Simulations: Version=2
  DataStore
    ExcelInput NZObserved: SheetNames=[observed]
      FileName=%root%\Tests\Validation\Maize\Observations\obsDataMaize_DB.xlsx
    ExcelInput RainShelterN: SheetNames=[RainShelterNitrogen]
      FileName=%root%\Tests\Validation\Maize\Observations\obsDataMaize_DB.xlsx
    ExcelInput RainShelterSW: FileName=%root%\Tests\Validation\Maize\Observations\SoilWater.xlsx; SheetNames=[SoilWater]
    Input ABlockObserved: FileName=%root%\Tests\Validation\SCUM\AblockObserved.txt
      ErrorMessage=The process cannot access the file 'C:\ApsimX\Tests\SCUM\AblockObserved.txt' because it is being used by another process.
    Input ABlockSWC: ErrorMessage=The specified file does not exist.; FileName=%root%\Tests\Validation\SCUM\AblockSWC.txt
    PredictedObserved: PredictedTableName=PredictedLeach; ObservedTableName=ObservedLeach; FieldNameUsedForMatch=Clock.Today
      Tests: POName=PredictedObserved
        AcceptedStats:
          Name       n   Slope    Intercept  SEslope    SEintercept  R2        RMSE     NSE       ME       MAE      RSR
          N          36  1        0          0          0            1         0        1         0        0        0
          NLeaching  36  1.01268  12.4741    0.0809637  7.31662      0.821471  32.9197  0.733569  13.2859  18.4803  0.50895
        AcceptedStatsName=Name n Slope Intercept SEslope SEintercept R2 RMSE NSE ME MAE RSR
    PredictedObserved PredictedObserved_RSSoilWater: PredictedTableName=Report; ObservedTableName=SoilWater; FieldNameUsedForMatch=Clock.Today
      Tests: POName=PredictedObserved_RSSoilWater
        AcceptedStats:
          Name                  n    Slope       Intercept    SEslope     SEintercept  R2         RMSE       NSE         ME            MAE        RSR
          ProfileWater          126  0.979801    6.18175      0.0323388   10.2435      0.880994   15.2246    0.869899    -0.159501     12.6305    0.359261
          Soil.SoilWater.SW(1)  126  1.19042     -0.00373175  0.0342152   0.00621497   0.907081   0.043555   0.700272    0.0273635     0.0300351  0.545298
          Soil.SoilWater.SW(2)  126  0.996244    -0.00816038  0.0346912   0.00738312   0.869294   0.0226347  0.823214    -0.00893376   0.017974   0.418787
          Soil.SoilWater.SW(3)  126  0.730879    0.0435291    0.0351954   0.00710875   0.776673   0.0252511  0.739626    -0.00917119   0.0208449  0.50824
          Soil.SoilWater.SW(4)  126  0.486021    0.099182     0.0434364   0.00878237   0.502406   0.0253974  0.494313    -0.00310504   0.019342   0.708289
          Soil.SoilWater.SW(5)  126  0.275026    0.145161     0.0483837   0.00982263   0.20671    0.0289787  0.184103    -0.000170012  0.0243072  0.899679
          Soil.SoilWater.SW(6)  126  0.15793     0.171773     0.0284952   0.0056994    0.198539   0.0192112  0.148288    0.00426332    0.015291   0.919213
          Soil.SoilWater.SW(7)  126  -0.0178745  0.203429     0.00724722  0.00146983   0.0467629  0.0254904  -0.0459376  -0.00144399   0.0209724  1.01864
          Soil.SoilWater.SW(8)  126  -0.0344828  0.202426     0.0167762   0.00346444   0.0329493  0.0282389  -0.249464   -0.00960034   0.0216918  1.11335
        AcceptedStatsName=Name n Slope Intercept SEslope SEintercept R2 RMSE NSE ME MAE RSR
  Simulation SCUMTestBase: Area=0; Slope=0
    Weather: FileName=%root%\Tests\WeatherFiles\lincoln.met
    Clock: StartDate=1998-10-14; EndDate=1999-07-01
    Summary
    SoilArbitrator Soil Arbitrator
    Zone Field: Area=0; Slope=0
      Soil: Latitude=0; Longitude=0
        Analysis: Thickness=[100, 200, 300, 300, 300, 300]; PH=[6.6, 6.2, 5.7, 5.5, 5.5, 5.5]; PHUnits=Water; BoronUnits=HotWater
        InitialWater Initial water: PercentMethod=EvenlyDistributed; FractionFull=1
        Water
          Thickness  BD   AirDry  LL15  DUL   SAT
          100        1.2  0.08    0.13  0.33  0.5
          200        1.2  0.13    0.13  0.33  0.5
          300        1.2  0.1     0.1   0.31  0.44
          300        1.2  0.06    0.06  0.15  0.46
          300        1.2  0.04    0.04  0.1   0.44
          300        1.2  0.02    0.02  0.06  0.44
          SoilCrop SCUMSoil: LL=[0.13, 0.13, 0.1, 0.08, 0.11, 0.11]; KL=[0.1, 0.1, 0.1, 0.1, 0.1, 0.1]; XF=[1, 1, 1, 1, 1, 1]
          SoilCrop PotatoSoil: LL=[0.13, 0.13, 0.27, 0.27, 0.3, 0.3]; KL=[0.1, 0.06, 0.03, 0.01, 0, 0]; XF=[1, 1, 0.1, 0, 0, 0]
        SoilWater: residueinterception=0; SummerDate=1-Nov; SummerU=9; SummerCona=4.4; WinterDate=1-Apr; WinterU=9; WinterCona=4.4; DiffusConst=88; DiffusSlope=35.4; Salb=0.18; CN2Bare=68; CNRed=20; CNCov=0.8; slope=0; discharge_width=0; catchment_area=0; max_pond=0
          Thickness  SWCON  KLAT
          100        0.55   0
          200        0.55   0
          300        0.55   0
          300        0.55   0
          300        0.55   0
          300        0.55   0
        SoilNitrogen: fom_type=[default, manure, mucuna, lablab, shemp, stable]; fract_carb=[0.2, 0.3, 0.54, 0.57, 0.45, 0]; fract_cell=[0.7, 0.3, 0.37, 0.37, 0.47, 0.1]; fract_lign=[0.1, 0.4, 0.09, 0.06, 0.08, 0.9]; wfpsN2N2O_x=[22, 88]; wfpsN2N2O_y=[0.1, 1]; oc=[1.83566, 1.46334, 1.19884, 1.0301, 0.470338, 0.470138]
        SoilOrganicMatter: RootCN=30; RootWt=3000; SoilCN=11.5; EnrACoeff=7.4; EnrBCoeff=0.2; OCUnits=Total
          Thickness  OC    FBiom  FInert
          100        1.82  0.025  0.3
          200        1.47  0.025  0.4
          300        1.2   0.015  0.75
          300        1.03  0.01   0.9
          300        0.47  0.01   0.96
          300        0.47  0.01   0.96
        Sample Initial nitrogen: NO3Units=kgha; NH4Units=ppm; SWUnits=Volumetric; OCUnits=Total; PHUnits=Water
          Thickness  NO3  NH4
          100        270  0
          200        30   0
          300        5    0
          300        5    0
          300        0    0
          300        0    0
      SurfaceOrganicMatter surface organic matter: PondActive=no; ReportAdditions=no; ReportRemovals=no; PoolName=wheat; type=wheat; mass=2000; standing_fraction=0; cnr=80; CriticalResidueWeight=2000; OptimumDecompTemp=20; MaxCumulativeEOS=20; CNRatioDecompCoeff=0.277; CNRatioDecompThreshold=25; TotalLeachRain=25; MinRainToLeach=10; CriticalMinimumOrganicC=0.004; DefaultCPRatio=0; DefaultStandingFraction=0; StandingExtinctCoeff=0.5; FractionFaecesAdded=0.5
        Pools:
          {PoolName=wheat, ResidueType=wheat, Mass=2000, CNRatio=80, StandingFraction=0}
        ResidueTypes: LoadFromResource=ResidueTypes
        TillageTypes TillageTypesList
      MicroClimate: a_interception=0; b_interception=1; c_interception=0; d_interception=0; soil_albedo=0.23; air_pressure=1010; soil_emissivity=0.96; sun_angle=15; soil_heat_flux_fraction=0.4; night_interception_fraction=0.5; windspeed_default=3; refheight=2; albedo=0.26; emissivity=0.96; gsmax=0.01; r50=200
      Plant SCUM: CropType=SCUM
      Irrigation
      Fertiliser
      Manager SCUMSowingRule
        CultivarName = Maize_Short
        InitialRootDepth = 10
        SowingDate = 1998-10-14
```csharp
using System;
using Models.Core;
using Models.PMF;
namespace Models
{
	[Serializable] 
	[System.Xml.Serialization.XmlInclude(typeof(Model))]
	public class Script : Model
	{
		[Link] Plant SCUM;
		[Link] Clock Clock;

		[Description("Cultivar")]
		public string CultivarName { get; set; }
		[Description("Initial Root Depth")]
		public double InitialRootDepth { get; set; }
		[Description("Sowing Date")]
		public DateTime SowingDate { get; set; }

               
		[EventSubscribe("DoManagement")]
		private void OnDoManagement(object sender, EventArgs e)
		{
			if (Clock.Today.Date == SowingDate)
				SCUM.Sow(cultivar: CultivarName, population: 1, depth: InitialRootDepth, rowSpacing: 150);
                
			//PMFCrop.Sow(... Contains the following arguements:
			//Population  double  Optional  Seeds sowing/m2.  Default is zero
			//Cultivar    string  Required  "NameOfCultivar"
			//Depth       double  Optional  Depth (mm) seed sown.   Default is 100mm 
			//MaxCover    double  Optional  Proportion (0-1) of the ground row crop will cover.   Default is 1.0
			//BudNumber   double  Optional  Number of mainstems per seed sown.  Default is 1.0
			//RowSpacing  double  Optional  Spaceing (mm) between drill rows when crop is sown.  Default is 150mm
			//CropClass   string  Optional  Crop class to instantiate when crop is sown.  Default is "Plant"
		}
	}
}
```
      Manager ExtraVariables
```csharp
using System;
using Models.Core;
using System.Collections.Generic;
using System.Text;
using Models.Soils;
using Models.PMF;
using Models;
using System.Xml.Serialization;
using APSIM.Shared.Utilities;

namespace Models
{
	[Serializable] 
	public class Script : Model
	{
		[Link] Clock Clock;
		[Link] Soils.Soil Soil;
		[Link] Models.SurfaceOM.SurfaceOrganicMatter SOM;
		[Link] Weather Met;
		[Link] Fertiliser Fert;
		[Link] Irrigation Irrig;
		[Link] Plant SCUM;
		[Link] Zone zone;
					
		[XmlIgnore] public bool InitialDay { get; set; }
		
		[XmlIgnore] public double AccumPlantN { get; set; }
		[XmlIgnore] public double AccumMineralisation { get; set; }
		[XmlIgnore] public double AccumDenit { get; set; }
		[XmlIgnore] public double AccumFert { get; set; }
		[XmlIgnore] public double AccumLeach { get; set; }
		[XmlIgnore] public double AccumDetach { get; set; }
		[XmlIgnore] public double DeltaSoilOMN { get; set; }
		[XmlIgnore] public double DeltaSurfaceOMN { get; set; }
		[XmlIgnore] public double DeltaSoilMineralN { get; set; }
		[XmlIgnore] public double SoilNitrogenContent { get; set; }
		
		[XmlIgnore] public double AccumEO { get; set; }
		[XmlIgnore] public double AccumEP { get; set; }
		[XmlIgnore] public double AccumES { get; set; }
		[XmlIgnore] public double AccumDrainage { get; set; }
		[XmlIgnore] public double AccumRunoff { get; set; }
		[XmlIgnore] public double AccumOutflowLat { get; set; }
		[XmlIgnore] public double AccumIrrigation { get; set; }
		[XmlIgnore] public double AccumRainfall { get; set; }
		[XmlIgnore] public double SoilWaterDeficit { get; set; }
	
		[XmlIgnore] public double  InitialSoilOMN { get; set; }
		[XmlIgnore] public double  InitialSurfaceOMN { get; set; }
		[XmlIgnore] public double  InitialMineralN { get; set; }
		
		[XmlIgnore] public double SWC { get; set; }
		[XmlIgnore] public double DUL { get; set; }
		[XmlIgnore] public double OutFlowLat { get; set; }

		[XmlIgnore] public double FomN { get; set; }
		[XmlIgnore] public double BiomN { get; set; }
		[XmlIgnore] public double HumN { get; set; }
		[XmlIgnore] public double OrganicN { get; set; }
		[XmlIgnore] public double NO3N { get; set; }
		[XmlIgnore] public double NH4N { get; set; }
		[XmlIgnore] public double UreaN { get; set; }
		[XmlIgnore] public double MineralN { get; set; }
		[XmlIgnore] public double DltNMinRes { get; set; }
		[XmlIgnore] public double DltNMinTot { get; set; }
		
		[EventSubscribe("Commencing")]
		private void OnSimulationCommencing(object sender, EventArgs e)
		{
			InitialDay = true;
		}
		
		[EventSubscribe("DoManagement")]
		private void OnDoManagement(object sender, EventArgs e)
		{
			//!!!!!! Nitrogen balance components !!!!!!
			//!!!!!!^^^^^^^^^^^^^^^^^^^^^^^^^^^^^!!!!!!
			FomN = MathUtilities.Sum(Soil.SoilNitrogen.FOMN);
			HumN = MathUtilities.Sum(Soil.SoilNitrogen.HumicN);
			BiomN = MathUtilities.Sum(Soil.SoilNitrogen.MicrobialN);
			OrganicN = FomN + HumN + BiomN;
			NO3N = MathUtilities.Sum(Soil.NO3N);
			NH4N = MathUtilities.Sum(Soil.NH4N);
			UreaN = MathUtilities.Sum(Soil.SoilNitrogen.urea);
			MineralN = NO3N + NH4N + UreaN; 
			DltNMinRes = MathUtilities.Sum(Soil.SoilNitrogen.dlt_n_min_res);
			DltNMinTot = MathUtilities.Sum(Soil.SoilNitrogen.MineralisedN);
			int layers = Soil.Thickness.Length;
			if (InitialDay == true)
			{
				InitialSurfaceOMN = SOM.N;
				InitialSoilOMN = OrganicN;
				InitialMineralN = MineralN;
				InitialDay = false;
			}
			DeltaSurfaceOMN = SOM.N - InitialSurfaceOMN;
			AccumLeach = AccumLeach - Soil.SoilWater.LeachNH4 - Soil.SoilWater.LeachNO3 - Soil.SoilWater.LeachUrea; //Fails
			AccumMineralisation += MathUtilities.Sum(Soil.SoilNitrogen.MineralisedN);
			AccumDenit -= MathUtilities.Sum(Soil.SoilNitrogen.Denitrification);
			AccumPlantN -= (double)zone.Get("SCUM.Root.NUptake");
			DeltaSoilOMN = OrganicN - InitialSoilOMN;
			DeltaSoilMineralN = MineralN - InitialMineralN;
			SoilNitrogenContent = MineralN;
			
			//!!!!!! Water balance components !!!!!!
			//!!!!!!^^^^^^^^^^^^^^^^^^^^^^^^^^!!!!!!

			AccumRainfall += Met.Rain;
			//AccumEP -= (double)zone.Get("[SCUM].Stover.Transpiration");
            AccumEP -= (double)zone.Get("SCUM.Root.WaterUptake");
			SoilWaterDeficit =  (SWC - DUL);
			double OutFlowLat = MathUtilities.Sum(Soil.SoilWater.outflow_lat);
			AccumOutflowLat -= OutFlowLat;
		}
		
		[EventSubscribe("DoManagementCalculations")]
		private void OnDoManagementCalculations(object sender, EventArgs e)
		{
			FomN = MathUtilities.Sum(Soil.SoilNitrogen.FOMN);
			HumN = MathUtilities.Sum(Soil.SoilNitrogen.HumicN);
			BiomN = MathUtilities.Sum(Soil.SoilNitrogen.MicrobialN);
			AccumFert += Fert.NitrogenApplied;
			AccumIrrigation += Irrig.IrrigationApplied;
			
			
			AccumEO -= Soil.SoilWater.Eo;
			AccumES -= Soil.SoilWater.Es; 
			AccumDrainage -= Soil.SoilWater.Drainage;
			AccumRunoff -= Soil.SoilWater.Runoff;
			SWC = MathUtilities.Sum(Soil.SoilWater.SWmm);
			DUL = MathUtilities.Sum(Soil.SoilWater.DULmm);
		}
	}
}
```
      Manager AutomaticIrrigation
        Irrigation_Yes_No = yes
        Season_Start = 1-Oct
        Season_End = 30-Apr
        Season_Allocation = 1000
        Refull_Frac = 0.9
        Trigger_Frac = 0.7
        Return_days = 3
        Maximum_Irrigation_Amount = 40
        Top_Depth = 600
```csharp
using System;
using Models.Core;
using Models.PMF;
using Models.Soils;
using System.Xml.Serialization;
using Models.PMF;
using APSIM.Shared.Utilities;

        
namespace Models
{
	[Serializable] 
	[System.Xml.Serialization.XmlInclude(typeof(Model))]
	public class Script : Model
	{
		//Communication to other modules
		[Link] ISummary summary = null;
		[Link] Irrigation Irrigation;
		[Link] Clock Clock;
		[Link] Soil Soil;
		[Link] Plant SCUM;
	   
		//User inputs from properties tab
		[Description("Irrigation on (yes or no)")]
		public string Irrigation_Yes_No { get; set; }
		[Description("SeasonStart (dd-MMM)")]
		public string Season_Start { get; set; }
		[Description("SeasonEnd (dd-MMM)")]
		public string Season_End { get; set; }
		[Description("Season Allocation (mm)")]
		public double Season_Allocation { get; set; }
		[Description("% PAWC to refill soil to (0-1)")]
		public double Refull_Frac { get; set; }
		[Description("% PAWC to trigger irrigation (0-1)")]
		public double Trigger_Frac { get; set; }
		[Description("Minimum days for irrigation to return")]
		public double Return_days { get; set; }
		[Description("Maximum irrigation application (mm)")]
		public double Maximum_Irrigation_Amount { get; set; }
		[Description("Depth to calculate PAWC (mm)")]
		public double Top_Depth { get; set; }
	   
		//Class members
		[XmlIgnore] private bool IrrigationIsAvailable { get; set; }
		[XmlIgnore] public bool SeasonIsOpen { get; set; }
		[XmlIgnore] private bool CropIsActive { get; set; }
		[XmlIgnore] private bool IrrigatorIsAvailable { get; set; }
		[XmlIgnore] private bool SoilIsDry { get; set; }
		[XmlIgnore] public double Top_DUL { get; set; }
		[XmlIgnore] public double Top_Refull { get; set; }
		[XmlIgnore] public double Top_Trigger { get; set; }
		[XmlIgnore] public double Top_LL { get; set; }
		[XmlIgnore] public double Top_SW { get; set; }
		[XmlIgnore] public double Accumulated_depth { get; set; }
		[XmlIgnore] public double Days_since_irrigation { get; set; }
		[XmlIgnore] public double Amount_to_apply { get; set; }
		[XmlIgnore] public double Season_Application { get; set; }
		
		//Variables for date logic testing
		[XmlIgnore] public string StartString { get; set; }
		[XmlIgnore] public string EndString { get; set; }
		[XmlIgnore] public DateTime StartDate { get; set; }
		[XmlIgnore] public DateTime EndDate { get; set; }
		[XmlIgnore] public int TodayYear { get; set; }
		[XmlIgnore] public int TodayMonth { get; set; }
		[XmlIgnore] public int StartMonth { get; set; }
		[XmlIgnore] public int EndMonth { get; set; }
		[XmlIgnore] public int TodayDay { get; set; }
		[XmlIgnore] public int StartDay { get; set; }
		[XmlIgnore] public int EndDay { get; set; }
	   
	
		//Calculate static soil variables
		[EventSubscribe("StartOfSimulation")]
		private void OnStartOfSimulation(object sender, EventArgs e)
		{   
			//Calculated soil water variables
			Accumulated_depth = 0;
			for (int layer = 0; Accumulated_depth < Top_Depth; layer++)
			{
				Top_LL += Soil.SoilWater.LL15mm[layer];
				Top_DUL += Soil.SoilWater.DULmm[layer];
				Accumulated_depth += Soil.SoilWater.Thickness[layer];
			}
			Top_Refull = Top_LL + (Top_DUL - Top_LL) * Refull_Frac;
		}
	   
	  
		//Determine daily requirement for irrigation
		[EventSubscribe("StartOfDay")]
		private void OnStartOfDay(object sender, EventArgs e)
		{ 
			//Can we irrigate?
			IrrigationIsAvailable = false; 
			if (Irrigation_Yes_No == "yes")
				IrrigationIsAvailable = true; 
	
			//Are we Allowed to Irrigate?
			TodayYear = Clock.Today.Year;
			StartString = Season_Start + "-" + TodayYear.ToString();
			EndString = Season_End + "-" + TodayYear.ToString();
			StartDate = DateTime.Parse(StartString);
			EndDate = DateTime.Parse(EndString);
			TodayMonth = Clock.Today.Month;
			TodayDay = Clock.Today.Day;
			StartDay = StartDate.Day;
			StartMonth = StartDate.Month;
			EndDay = EndDate.Day;
			EndMonth = EndDate.Month;
		  
			SeasonIsOpen = false;
			//if we are in the spring and after the start date then yes
			if ((Clock.Today.Month > 6) && (Clock.Today >= StartDate))
				SeasonIsOpen = true;
			//if we are in the autumn and before the end date then yes
			if ((Clock.Today.Month <= 6) && (Clock.Today <= EndDate))
				SeasonIsOpen = true;
		  
			//Is there a crop in the ground that needs irrigation?
			CropIsActive = false;
			if ((SCUM.Phenology.Stage >= 3.0) && (SCUM.Phenology.Stage < 6.0))
				CropIsActive = true;
	      
			//Is the irrigator available?
			IrrigatorIsAvailable = false;
			Days_since_irrigation += 1;
			if (Days_since_irrigation >= Return_days)
				IrrigatorIsAvailable = true;
	      
			//Is the soil dry enough to require irrigation?
			SoilIsDry = false;
			double CurrentRootDepth = 0;
			double RootDepth = SCUM.Root.Depth;
			CurrentRootDepth = Math.Max(RootDepth, CurrentRootDepth);
	      
			double RelativeRootDepth = Math.Min(1.0, CurrentRootDepth / Top_Depth);
			Top_Trigger = Math.Min(Top_Refull, Top_DUL - (Top_DUL - Top_LL) * RelativeRootDepth * (1 - Trigger_Frac)); 
	      
			Accumulated_depth = 0;
			Top_SW = 0;
			for (int layer = 0; Accumulated_depth < Top_Depth; layer++)
			{
				Top_SW += Soil.SoilWater.SWmm[layer];
				Accumulated_depth += Soil.SoilWater.Thickness[layer];
			}
			if (Top_SW <= Top_Trigger)
				SoilIsDry = true;
	            
			//Lets bloody well irrigate then!!!!
			if ((IrrigationIsAvailable) && (SeasonIsOpen) && (CropIsActive) && (IrrigatorIsAvailable) && (SoilIsDry)) //The conditions are rife for irrigation
			{
				Amount_to_apply = Math.Min(Top_Refull - Top_SW, Maximum_Irrigation_Amount);
				Amount_to_apply = Math.Min(Amount_to_apply, Season_Allocation - Season_Application); 
				Amount_to_apply = Math.Max(Amount_to_apply, 0.0);
				Irrigation.Apply(Amount_to_apply);
				Days_since_irrigation = 0;
				Season_Application += Amount_to_apply;
				summary.WriteMessage(this, "Automatic Irrigation");
            
			}
		}
	}
}
```
      Manager AutomaticFertiliser
        Fertiliser_Yes_No = no
        Season_Start = 1-Aug
        Season_End = 30-Apr
        Season_Allocation = 1000
        TriggerN = 50
        NApplicationAmount = 25
        Return_days = 3
        Top_Depth = 300
```csharp
using System;
using Models.Core;
using Models.PMF;
using Models.Soils;
using System.Xml.Serialization;
using Models.PMF;
using APSIM.Shared.Utilities;

        
namespace Models
{
	[Serializable] 
	[System.Xml.Serialization.XmlInclude(typeof(Model))]
	public class Script : Model
	{
		//Communication to other modules
		[Link] ISummary summary = null;
		[Link] Fertiliser Fertiliser;
		[Link] Clock Clock;
		[Link] Soils.Soil Soil;
		[Link] Plant SCUM;
	   
		//User inputs from properties tab
		[Description("Fertiliser on (yes or no)")]
		public string Fertiliser_Yes_No { get; set; }
		[Description("SeasonStart (dd-MMM)")]
		public string Season_Start { get; set; }
		[Description("SeasonEnd (dd-MMM)")]
		public string Season_End { get; set; }
		[Description("Season Allocation (kg/ha)")]
		public double Season_Allocation { get; set; }
		[Description("Mineral N to maintain soil above (kg/ha)")]
		public double TriggerN { get; set; }
		[Description("Amount of N to apply (kg/ha)")]
		public double NApplicationAmount { get; set; }
		[Description("Minimum days for Fertiliser spreader to return")]
		public double Return_days { get; set; }
		[Description("Depth to calculate mineral N (mm)")]
		public double Top_Depth { get; set; }
	   
		//Class members
		[XmlIgnore] private bool FertiliserIsAvailable { get; set; }
		[XmlIgnore] public bool SeasonIsOpen { get; set; }
		[XmlIgnore] private bool CropIsActive { get; set; }
		[XmlIgnore] private bool FertSpreaderIsAvailable { get; set; }
		[XmlIgnore] private bool SoilNIsLow { get; set; }
		[XmlIgnore] public double Top_SoilN { get; set; }
		[XmlIgnore] public double Accumulated_depth { get; set; }
		[XmlIgnore] public double Days_since_fertiliser { get; set; }
		[XmlIgnore] public double Season_Application { get; set; }
		
		//Variables for date logic testing
		[XmlIgnore] public string StartString { get; set; }
		[XmlIgnore] public string EndString { get; set; }
		[XmlIgnore] public DateTime StartDate { get; set; }
		[XmlIgnore] public DateTime EndDate { get; set; }
		[XmlIgnore] public int TodayYear { get; set; }
		[XmlIgnore] public int TodayMonth { get; set; }
		[XmlIgnore] public int StartMonth { get; set; }
		[XmlIgnore] public int EndMonth { get; set; }
		[XmlIgnore] public int TodayDay { get; set; }
		[XmlIgnore] public int StartDay { get; set; }
		[XmlIgnore] public int EndDay { get; set; }
	   	   
		//Determine daily requirement for fertiliser
		[EventSubscribe("StartOfDay")]
		private void OnStartOfDay(object sender, EventArgs e)
		{ 
			//Can we irrigate?
			FertiliserIsAvailable = false; 
			if (Fertiliser_Yes_No == "yes")
				FertiliserIsAvailable = true; 
	
			//Are we Allowed to Irrigate?
			TodayYear = Clock.Today.Year;
			StartString = Season_Start + "-" + TodayYear.ToString();
			EndString = Season_End + "-" + TodayYear.ToString();
			StartDate = DateTime.Parse(StartString);
			EndDate = DateTime.Parse(EndString);
			TodayMonth = Clock.Today.Month;
			TodayDay = Clock.Today.Day;
			StartDay = StartDate.Day;
			StartMonth = StartDate.Month;
			EndDay = EndDate.Day;
			EndMonth = EndDate.Month;
		  
			SeasonIsOpen = false;
			//if we are in the spring and after the start date then yes
			if ((Clock.Today.Month > 6) && (Clock.Today >= StartDate))
				SeasonIsOpen = true;
			//if we are in the autumn and before the end date then yes
			if ((Clock.Today.Month <= 6) && (Clock.Today <= EndDate))
				SeasonIsOpen = true;
		  
			//Is there a crop in the ground that needs irrigation?
			CropIsActive = false;
			if ((SCUM.Phenology.Stage >= 3.0) && (SCUM.Phenology.Stage < 6.0))
				CropIsActive = true;
	      
			//Is the irrigator available?
			FertSpreaderIsAvailable = false;
			Days_since_fertiliser += 1;
			if (Days_since_fertiliser >= Return_days)
				FertSpreaderIsAvailable = true;
	      
			//Is the soil N low enough to require fertiliser?
			SoilNIsLow = false;
			double CurrentRootDepth = 0;
			double RootDepth = SCUM.Root.Depth;
			CurrentRootDepth = Math.Max(RootDepth, CurrentRootDepth);
	      
			Accumulated_depth = 0;
			Top_SoilN = 0;
			for (int layer = 0; Accumulated_depth < Top_Depth; layer++)
			{
				Top_SoilN += Soil.NO3N[layer];
				Accumulated_depth += Soil.SoilWater.Thickness[layer];
			}
			if (Top_SoilN <= TriggerN)
				SoilNIsLow = true;
	            
			//Lets bloody well irrigate then!!!!
			if ((FertiliserIsAvailable) && (SeasonIsOpen) && (CropIsActive) && (FertSpreaderIsAvailable) && (SoilNIsLow)) //The conditions are rife for irrigation
			{
				Fertiliser.Apply(NApplicationAmount, Fertiliser.Types.UreaN, 10);
				Days_since_fertiliser = 0;
				Season_Application += NApplicationAmount;
				summary.WriteMessage(this, "Automatic Fertiliser");
            
			}
		}
	}
}
```
      Report: EventNames=[Clock].DoReport
        VariableNames:
          [Clock].Today
          [ExtraVariables].Script.AccumPlantN
          [ExtraVariables].Script.AccumMineralisation
          [ExtraVariables].Script.AccumDenit
          [ExtraVariables].Script.AccumFert
          [ExtraVariables].Script.AccumLeach
          [ExtraVariables].Script.AccumDetach
          [ExtraVariables].Script.DeltaSoilOMN
          [ExtraVariables].Script.DeltaSurfaceOMN
          [ExtraVariables].Script.DeltaSoilMineralN
          [ExtraVariables].Script.SWC
          [ExtraVariables].Script.DUL
          [ExtraVariables].Script.OutFlowLat
          [ExtraVariables].Script.AccumEO
          [ExtraVariables].Script.AccumEP
          [ExtraVariables].Script.AccumES
          [ExtraVariables].Script.AccumDrainage
          [ExtraVariables].Script.AccumRunoff
          [ExtraVariables].Script.AccumRainfall
          [ExtraVariables].Script.AccumIrrigation
          [ExtraVariables].Script.AccumOutflowLat
          [ExtraVariables].Script.SoilWaterDeficit
          [ExtraVariables].Script.SoilNitrogenContent
          [ExtraVariables].Script.FomN
          [ExtraVariables].Script.HumN
          [ExtraVariables].Script.BiomN
          [ExtraVariables].Script.DltNMinRes
          [ExtraVariables].Script.DltNMinTot
          [MicroClimate].net_radn
          [MicroClimate].peta
          [MicroClimate].petr
          [Soil].SoilWater.Drainage
          [Soil].SoilWater.Runoff
          [Soil].SoilWater.Eo
          [Soil].SoilWater.Es
          [Soil].SoilWater.pond
          [Soil].SoilWater.SWmm
          [Soil].NO3N
          [SCUM].Stover.Live.Wt
          [SCUM].Root.Live.Wt
          [SCUM].Product.Live.Wt
          [SCUM].Stover.Live.N
          [SCUM].Root.Live.N
          [SCUM].Product.Live.N
          [SCUM].Stover.Live.NConc
          [SCUM].Root.Live.NConc
          [SCUM].Product.Live.NConc
          [SCUM].Root.WaterSupply
          [SCUM].Root.WaterUptake
          [SCUM].Stover.Transpiration
          [SCUM].Stover.WaterDemand
          [SCUM].Root.Depth
          [SCUM].Stover.CoverTotal
          [SCUM].Stover.CoverDead
          [SCUM].Stover.LAI
          [SCUM].Stover.Height
          [SCUM].Stover.PotentialBiomass.Value
          [SCUM].Product.LiveFWt
          [SCUM].Arbitrator.NDemand
          [SCUM].Arbitrator.NSupply
          [SCUM].Stover.Fw
          [SCUM].Stover.Fn
          [SCUM].Total.Wt
          [SCUM].ExpectedYield.Value
          [SCUM].DryYield.Value
          [SCUM].TotalBiomassAtStartReproductive.Value
          [SCUM].TotalBiomassAtStartSenescence.Value
          [SCUM].Ymax.Value
          [SCUM].Total.N
          [SCUM].Arbitrator.DMSupply
          [SCUM].Arbitrator.DMDemand
          [SCUM].Phenology.AccumulatedEmergedTT
          [SCUM].Arbitrator.DMSinkLimitation
          [SCUM].Arbitrator.DMNutrientLimitation
          [SCUM].Phenology.ThermalTime.Value
          [SCUM].Phenology.CurrentPhaseName
          [SCUM].Phenology.Stage
          [AutomaticIrrigation].Script.Top_Refull
          [AutomaticIrrigation].Script.Top_Trigger
          [AutomaticIrrigation].Script.Top_SW
          [AutomaticIrrigation].Script.Top_DUL
          [Irrigation].IrrigationApplied
          [AutomaticIrrigation].Script.Amount_to_apply
          [AutomaticIrrigation].Script.StartDate
          [Clock].Today
          [AutomaticIrrigation].Script.SeasonIsOpen
          [AutomaticIrrigation].Script.EndDate
          [AutomaticIrrigation].Script.TodayYear
          [SCUM].Arbitrator.FN
          [SCUM].Arbitrator.NSupply
    Memo Caption
      # SCUM: the Simple Crop Uptake Model

      _Hamish Brown and Rob Zyskowski, Plant and Food Research, New Zealand_

      This model has been built to simulate a range of different crops in simulations where water and nitrogen balance are of interest but a fully mechanistic plant model is not needed. It is a daily time step implementation of the crop model that is used on the Overseer nutrient balance model (Cichota_etal_2010).  It uses simple sigmoidal functions for estimating daily cover and biomass deltas to give realistic water and nitrogen demands. It does not simulate potential yield, this is specified as an input. Yield will be reduced below the specified potential yield if N or water supplies from the soil are insufficient to meet demand. The model has been paramaterised for simulating water and nitrogen balances of cropping rotations in New Zealand (where over 50 different crop types are grown and it is not feasible to produce full crop models for each of these). It may be adapted for other purposes and other crop types may be added but the user will need to keep in mind that it is empirical and the parameters might need changing for crops from different locations.
  Simulation Simple test with Biomass Cut: Area=0; Slope=0
    Memo
      In this test an Autumn wheat crop is planted, and defoliated part way through its growth.  The series of graphs show how SCUM accumulates biomass and nitrogen and what happens when a biomass removal event is invoked.  The also demonstrate that componenst of the Nitrogen and water balances are behaving sensibly with the inclusion of SCUM in a simulation.
    Weather: FileName=%root%\Tests\WeatherFiles\lincoln.met
    Clock: StartDate=2010-10-01; EndDate=2011-07-31
    Summary
    SoilArbitrator Soil Arbitrator
    Zone Field: Area=0; Slope=0
      Soil: same as SCUMTestBase.Field.Soil
      SurfaceOrganicMatter surface organic matter: same as SCUMTestBase.Field.surface organic matter
      MicroClimate: same as SCUMTestBase.Field.MicroClimate
      Plant SCUM: CropType=SCUM
      Irrigation
      Fertiliser
      Manager SowingAndCutting
        CultivarName = Green_Peas
        InitialRootDepth = 10
        SowingDate = 2010-10-14
        CutDate = 2010-12-14
        CutDate2 = 2012-02-14
        CutDate3 = 2013-01-14
        EndCropDate = 2011-05-14
```csharp
using System;
using System.Collections.Generic;
using Models.Core;
using Models.PMF;
using Models.PMF.Interfaces;
using System.Xml.Serialization;

namespace Models
{
	[Serializable] 
	[System.Xml.Serialization.XmlInclude(typeof(Model))]
	public class Script : Model
	{
		[Link] Plant SCUM;
		[Link] Clock Clock;

		[Description("Cultivar")]
		public string CultivarName { get; set; }
		[Description("Initial Root Depth")]
		public double InitialRootDepth { get; set; }
		[Description("Sowing Date")]
		public DateTime SowingDate { get; set; }
		[Description("Cut Date")]
		public DateTime CutDate { get; set; }
		[Description("Cut Date2")]
		public DateTime CutDate2 { get; set; }
		[Description("Cut Date3")]
		public DateTime CutDate3 { get; set; }
		[Description("EndCrop Date")]
		public DateTime EndCropDate { get; set; }
		
		[XmlIgnore] private RemovalFractions Remove { get; set; }
		
		[EventSubscribe("Commencing")]
		private void OnSimulationCommencing(object sender, EventArgs e)
		{
			Remove = new RemovalFractions();
		}
		
		[EventSubscribe("DoManagement")]
		private void OnDoManagement(object sender, EventArgs e)
		{
			//Set up  array of remove fractions to send with Cut method.  Each member in the array corresponds to an organ in the same order they are set up in.

			if (Clock.Today.Date == SowingDate)
				SCUM.Sow(cultivar: CultivarName, population: 1, depth: InitialRootDepth, rowSpacing: 150);
			else if (Clock.Today.Date == CutDate)
			{
				Remove.SetPhenologyStage = 3.5;
				Remove.SetFractionToRemove("Stover", 0.5);
				Remove.SetFractionToResidue("Stover", 0.2);
				Remove.SetFractionToRemove("Product", 0.8);
				Remove.SetFractionToResidue("Product", 0.1);
				Remove.SetFractionToRemove("Root", 0.0);
				Remove.SetFractionToResidue("Root", 0.2);
				SCUM.RemoveBiomass("Cut", Remove);
			}
			else if (Clock.Today.Date == EndCropDate)
				SCUM.EndCrop();
			
			/*//Change fractions to remove
			if (Clock.Today.Date == SowingDate2)
				SCUM.Sow(cultivar: CultivarName, population: 1, depth: InitialRootDepth, rowSpacing: 150);
			else if (Clock.Today.Date == CutDate2)
			{
				//Harvest with manager specified removal fractions
				Remove.SetFractionToRemove("Product", 0.3);
				Remove.SetFractionToRemove("Stover", 0.1);
				Remove.SetFractionToResidue("Product", 0.3);
				Remove.SetFractionToResidue("Stover", 0.7);
				SCUM.RemoveBiomass("Cut", Remove);
			}
			else if (Clock.Today.Date == EndCropDate2)
				SCUM.EndCrop();
			
			//Change fractions to remove
			if (Clock.Today.Date == SowingDate3)
				SCUM.Sow(cultivar: CultivarName, population: 1, depth: InitialRootDepth, rowSpacing: 150);
			else if (Clock.Today.Date == CutDate3)
			{
				Remove.SetFractionToRemove("Product", 0.5);
				Remove.SetFractionToRemove("Stover", 0.3);
				Remove.SetFractionToResidue("Product", 0.3);
				Remove.SetFractionToResidue("Stover", 0.7);
				SCUM.RemoveBiomass("Cut", Remove);
			}
			else if (Clock.Today.Date == EndCropDate3)
				SCUM.EndCrop();*/
			//PMFCrop.Sow(... Contains the following arguements:
			//Population  double  Optional  Seeds sowing/m2.  Default is zero
			//Cultivar    string  Required  "NameOfCultivar"
			//Depth       double  Optional  Depth (mm) seed sown.   Default is 100mm 
			//MaxCover    double  Optional  Proportion (0-1) of the ground row crop will cover.   Default is 1.0
			//BudNumber   double  Optional  Number of mainstems per seed sown.  Default is 1.0
			//RowSpacing  double  Optional  Spaceing (mm) between drill rows when crop is sown.  Default is 150mm
			//CropClass   string  Optional  Crop class to instantiate when crop is sown.  Default is "Plant"
		}
	}
}
```
      Manager ExtraVariables
        script: same as in SCUMTestBase.Field.ExtraVariables
      Report: EventNames=[Clock].DoReport
        VariableNames:
          [Clock].Today
          [ExtraVariables].Script.AccumPlantN
          [ExtraVariables].Script.AccumMineralisation
          [ExtraVariables].Script.AccumDenit
          [ExtraVariables].Script.AccumFert
          [ExtraVariables].Script.AccumLeach
          [ExtraVariables].Script.AccumDetach
          [ExtraVariables].Script.DeltaSoilOMN
          [ExtraVariables].Script.DeltaSurfaceOMN
          [ExtraVariables].Script.DeltaSoilMineralN
          [ExtraVariables].Script.SWC
          [ExtraVariables].Script.DUL
          [ExtraVariables].Script.OutFlowLat
          [ExtraVariables].Script.AccumEO
          [ExtraVariables].Script.AccumEP
          [ExtraVariables].Script.AccumES
          [ExtraVariables].Script.AccumDrainage
          [ExtraVariables].Script.AccumRunoff
          [ExtraVariables].Script.AccumRainfall
          [ExtraVariables].Script.AccumIrrigation
          [ExtraVariables].Script.AccumOutflowLat
          [ExtraVariables].Script.SoilWaterDeficit
          [ExtraVariables].Script.SoilNitrogenContent
          [ExtraVariables].Script.FomN
          [ExtraVariables].Script.HumN
          [ExtraVariables].Script.BiomN
          [ExtraVariables].Script.DltNMinRes
          [ExtraVariables].Script.DltNMinTot
          [MicroClimate].net_radn
          [MicroClimate].peta
          [MicroClimate].petr
          [Soil].SoilWater.Drainage
          [Soil].SoilWater.Runoff
          [Soil].SoilWater.Eo
          [Soil].SoilWater.Es
          [Soil].SoilWater.pond
          [Soil].SoilWater.SWmm
          [Soil].NO3N
          [SCUM].Stover.Live.Wt
          [SCUM].Root.Live.Wt
          [SCUM].Product.Live.Wt
          [SCUM].Stover.Live.N
          [SCUM].Root.Live.N
          [SCUM].Product.Live.N
          [SCUM].Stover.Live.NConc
          [SCUM].Root.Live.NConc
          [SCUM].Product.Live.NConc
          [SCUM].Root.WaterSupply
          [SCUM].Root.WaterUptake
          [SCUM].Stover.Transpiration
          [SCUM].Stover.WaterDemand
          [SCUM].Root.Depth
          [SCUM].Stover.CoverTotal
          [SCUM].Stover.CoverDead
          [SCUM].Stover.LAI
          [SCUM].Stover.Height
          [SCUM].Stover.PotentialBiomass.Value
          [SCUM].Product.LiveFWt
          [SCUM].Arbitrator.NDemand
          [SCUM].Arbitrator.NSupply
          [SCUM].Stover.Fw
          [SCUM].Stover.Fn
          [SCUM].Total.Wt
          [SCUM].ExpectedYield.Value
          [SCUM].DryYield.Value
          [SCUM].TotalBiomassAtStartReproductive.Value
          [SCUM].TotalBiomassAtStartSenescence.Value
          [SCUM].Ymax.Value
          [SCUM].Total.N
          [SCUM].Arbitrator.DMSupply
          [SCUM].Arbitrator.DMDemand
          [SCUM].Phenology.AccumulatedThermalTime.Value
          [SCUM].Arbitrator.DMSinkLimitation
          [SCUM].Arbitrator.DMNutrientLimitation
          [SCUM].Phenology.ThermalTime.Value
          [SCUM].Phenology.CurrentPhaseName
          [SCUM].Phenology.Stage
          [AutomaticIrrigation].Script.Top_Refull
          [AutomaticIrrigation].Script.Top_Trigger
          [AutomaticIrrigation].Script.Top_SW
          [AutomaticIrrigation].Script.Top_DUL
          [Irrigation].IrrigationApplied
          [AutomaticIrrigation].Script.Amount_to_apply
          [AutomaticIrrigation].Script.StartDate
          [Clock].Today
          [AutomaticIrrigation].Script.SeasonIsOpen
          [AutomaticIrrigation].Script.EndDate
          [AutomaticIrrigation].Script.TodayYear
          [SCUM].Arbitrator.FN
          [SurfaceOrganicMatter].wt
          sum([Soil].SoilNitrogen.FOMN)
          [SCUM].Phenology.AccumulatedEmergedTT
          [SCUM].Stover.CoverGreen
  Experiment Crop Comparisions
    Memo Description
      This test simply simulates a range of different SCUM crop types to show how they differ in their canopy and biomass accumulation patterns.  The 5 graphs demonstrate the differences in:
       - The speed at which cover is attained
       - The maximum cover that is achieved
       - The speed and which cover is senesced again
       - The speed and extent of biomass and N accumulation
       - The timing and extent of dry and fresh yield productin
      These graphs are intended to demonstrate how SCUM represents approximate differences in differnt crops types with simple yet realistic temporal patterns
    Factors
      Factor Crop
        Factor SpringWheat
          Specifications:
            [SCUMSowingRule].Script.CultivarName = Wheat_Spring
            [SCUMSowingRule].Script.SowingDate = 1998-09-15
        Factor AutumnWheat
          Specifications:
            [SCUMSowingRule].Script.CultivarName = Wheat_Autumn
            [SCUMSowingRule].Script.SowingDate = 1998-05-15
        Factor Potatoes
          Specifications:
            [SCUMSowingRule].Script.CultivarName = Potatoes_Long
            [SCUMSowingRule].Script.SowingDate = 1998-10-15
        Factor Peas
          Specifications:
            [SCUMSowingRule].Script.CultivarName = Green_Peas
            [SCUMSowingRule].Script.SowingDate = 1998-10-15
        Factor Maize
          Specifications:
            [SCUMSowingRule].Script.CultivarName = Maize_Short
            [SCUMSowingRule].Script.SowingDate = 1998-11-15
        Factor Spinach
          Specifications:
            [SCUMSowingRule].Script.CultivarName = Spinach
            [SCUMSowingRule].Script.SowingDate = 1998-05-15
        Factor Kale
          Specifications:
            [SCUMSowingRule].Script.CultivarName = Kale
            [SCUMSowingRule].Script.SowingDate = 1998-10-15
        Factor Rape
          Specifications:
            [SCUMSowingRule].Script.CultivarName = Rape
            [SCUMSowingRule].Script.SowingDate = 1998-10-15
    Simulation CropCompBase: Area=0; Slope=0
      Weather: FileName=%root%\Tests\WeatherFiles\lincoln.met
      Clock: StartDate=1998-05-01; EndDate=1999-07-01
      Summary
      SoilArbitrator Soil Arbitrator
      Zone Field: Area=0; Slope=0
        Soil: Latitude=0; Longitude=0
          Analysis: Thickness=[100, 200, 300, 300, 300, 300]; PH=[6.6, 6.2, 5.7, 5.5, 5.5, 5.5]; PHUnits=Water; BoronUnits=HotWater
          InitialWater Initial water: PercentMethod=EvenlyDistributed; FractionFull=1
          Water
            Thickness  BD   AirDry  LL15  DUL   SAT
            100        1.2  0.08    0.13  0.33  0.5
            200        1.2  0.13    0.13  0.33  0.5
            300        1.2  0.1     0.1   0.31  0.44
            300        1.2  0.06    0.06  0.15  0.46
            300        1.2  0.04    0.04  0.1   0.44
            300        1.2  0.02    0.02  0.06  0.44
            SoilCrop SCUMSoil: LL=[0.13, 0.13, 0.1, 0.08, 0.11, 0.11]; KL=[0.08, 0.08, 0.08, 0.08, 0.08, 0.08]; XF=[1, 1, 1, 1, 1, 1]
            SoilCrop PotatoSoil: LL=[0.13, 0.13, 0.27, 0.27, 0.3, 0.3]; KL=[0.1, 0.06, 0.03, 0.01, 0, 0]; XF=[1, 1, 0.1, 0, 0, 0]
          SoilWater: same as SCUMTestBase.Field.Soil.SoilWater
          SoilNitrogen: same as SCUMTestBase.Field.Soil.SoilNitrogen
          SoilOrganicMatter: same as SCUMTestBase.Field.Soil.SoilOrganicMatter
          Sample Initial nitrogen: NO3Units=kgha; NH4Units=ppm; SWUnits=Volumetric; OCUnits=Total; PHUnits=Water
            Thickness  NO3  NH4
            100        270  0
            200        30   0
            300        5    0
            300        5    0
            300        0    0
            300        0    0
        MicroClimate: same as SCUMTestBase.Field.MicroClimate
        Irrigation
        Fertiliser
        Manager SCUMSowingRule
          CultivarName = Barley_Spring
          InitialRootDepth = 10
          SowingDate = 1998-10-14
          script: same as in SCUMTestBase.Field.SCUMSowingRule
        Manager ExtraVariables
          script: same as in SCUMTestBase.Field.ExtraVariables
        SurfaceOrganicMatter surface organic matter: same as SCUMTestBase.Field.surface organic matter
        Report: EventNames=[Clock].DoReport
          VariableNames:
            [Clock].Today
            [ExtraVariables].Script.AccumPlantN
            [ExtraVariables].Script.AccumMineralisation
            [ExtraVariables].Script.AccumDenit
            [ExtraVariables].Script.AccumFert
            [ExtraVariables].Script.AccumLeach
            [ExtraVariables].Script.AccumDetach
            [ExtraVariables].Script.DeltaSoilOMN
            [ExtraVariables].Script.DeltaSurfaceOMN
            [ExtraVariables].Script.DeltaSoilMineralN
            [ExtraVariables].Script.SWC
            [ExtraVariables].Script.DUL
            [ExtraVariables].Script.OutFlowLat
            [ExtraVariables].Script.AccumEO
            [ExtraVariables].Script.AccumEP
            [ExtraVariables].Script.AccumES
            [ExtraVariables].Script.AccumDrainage
            [ExtraVariables].Script.AccumRunoff
            [ExtraVariables].Script.AccumRainfall
            [ExtraVariables].Script.AccumIrrigation
            [ExtraVariables].Script.AccumOutflowLat
            [ExtraVariables].Script.SoilWaterDeficit
            [ExtraVariables].Script.SoilNitrogenContent
            [ExtraVariables].Script.FomN
            [ExtraVariables].Script.HumN
            [ExtraVariables].Script.BiomN
            [ExtraVariables].Script.DltNMinRes
            [ExtraVariables].Script.DltNMinTot
            [MicroClimate].net_radn
            [MicroClimate].peta
            [MicroClimate].petr
            [Soil].SoilWater.Drainage
            [Soil].SoilWater.Runoff
            [Soil].SoilWater.Eo
            [Soil].SoilWater.Es
            [Soil].SoilWater.pond
            [Soil].SoilWater.SWmm
            [Soil].NO3N
            [SCUM].Stover.Live.Wt
            [SCUM].Root.Live.Wt
            [SCUM].Product.Live.Wt
            [SCUM].Stover.Live.N
            [SCUM].Root.Live.N
            [SCUM].Product.Live.N
            [SCUM].Stover.Live.NConc
            [SCUM].Root.Live.NConc
            [SCUM].Product.Live.NConc
            [SCUM].Root.WaterSupply
            [SCUM].Root.WaterUptake
            [SCUM].Stover.Transpiration
            [SCUM].Stover.WaterDemand
            [SCUM].Root.Depth
            [SCUM].Stover.CoverTotal
            [SCUM].Stover.CoverDead
            [SCUM].Stover.CoverGreen
            [SCUM].Stover.LAI
            [SCUM].Stover.Height
            [SCUM].Stover.PotentialBiomass.Value
            [SCUM].Product.LiveFWt
            [SCUM].Arbitrator.NDemand
            [SCUM].Arbitrator.NSupply
            [SCUM].Stover.Fw
            [SCUM].Stover.Fn
            [SCUM].Total.Wt
            [SCUM].ExpectedYield.Value
            [SCUM].DryYield.Value
            [SCUM].TotalBiomassAtStartReproductive.Value
            [SCUM].TotalBiomassAtStartSenescence.Value
            [SCUM].Ymax.Value
            [SCUM].Total.N
            [SCUM].Arbitrator.DMSupply
            [SCUM].Arbitrator.DMDemand
            [SCUM].Phenology.AccumulatedEmergedTT
            [SCUM].Arbitrator.DMSinkLimitation
            [SCUM].Arbitrator.DMNutrientLimitation
            [SCUM].Phenology.ThermalTime.Value
            [SCUM].Phenology.CurrentPhaseName
            [SCUM].Phenology.Stage
        Plant SCUM: CropType=SCUM
        Manager AutomaticIrrigation
          Irrigation_Yes_No = yes
          Season_Start = 1-Oct
          Season_End = 30-Apr
          Season_Allocation = 1000
          Refull_Frac = 0.9
          Trigger_Frac = 0.7
          Return_days = 3
          Maximum_Irrigation_Amount = 40
          Top_Depth = 600
          script: same as in SCUMTestBase.Field.AutomaticIrrigation
        Manager AutomaticFertiliser
          Fertiliser_Yes_No = yes
          Season_Start = 1-Aug
          Season_End = 30-Apr
          Season_Allocation = 1000
          TriggerN = 50
          NApplicationAmount = 25
          Return_days = 3
          Top_Depth = 300
          script: same as in SCUMTestBase.Field.AutomaticFertiliser
  Experiment Lincoln2012
    Memo
      ### Lincoln2012 (Rain-Shelter Trail)

      Testing of SCUM under New Zealand conditions was undertaken using the data Maize data of Teixeira et al (2014).  This dataset includes the impact of three N (0 to 250 kg/ha N) and two water regimes (dryland and fully irrigated) using a rain-shelter structure.  Observations include biomass and nitrogen accumulation, soil water contents. Total biomass ranged from 8000 kg/ha for dryland nil N crops to up to 28000kg/ha for fully irrigated and N fertilised crops.  Dryland crops recovered 25 percent less N from applied fertilizer than irrigated crops.  The expected yields were set to 18 t/ha (the yield achieved in the fully irrigation Med N plots) for all treatments and the simple N and water responses of SCUM were allowed to predict treatment effects.  The three graphs below show that SCUM gave adequate estimations of biomass and N accumulations in respone to irrigation and fertiliser treatments and adequate estimations of soil water content.  This suggests Scum is suitable for its intended purpose of providing realistic N and water uptake patterns for N and water balance studies.
    Factors
      Factor Nit: Specifications=[Fert]
        Operations Nil
          2012-11-15  [Fertiliser].Apply(0, Fertiliser.Types.UreaN, 10);
          2012-12-20  [Fertiliser].Apply(0, Fertiliser.Types.UreaN, 10);
          2013-01-31  [Fertiliser].Apply(0, Fertiliser.Types.UreaN, 10);
        Operations Low
          2012-11-15  [Fertiliser].Apply(25, Fertiliser.Types.UreaN, 10);
          2012-12-20  [Fertiliser].Apply(50, Fertiliser.Types.UreaN, 10);
        Operations Med
          2012-11-15  [Fertiliser].Apply(50, Fertiliser.Types.UreaN, 10);
          2012-12-20  [Fertiliser].Apply(100, Fertiliser.Types.UreaN, 10);
          2013-01-31  [Fertiliser].Apply(100, Fertiliser.Types.UreaN, 10);
      Factor Irr: Specifications=[Irrig]
        Operations Full
          2012-10-24  [Irrigation].Apply(16);
          2012-10-26  [Irrigation].Apply(10);
          2012-11-03  [Irrigation].Apply(13);
          2012-11-11  [Irrigation].Apply(19.5);
          2012-11-15  [Irrigation].Apply(3.1);
          2012-11-23  [Irrigation].Apply(20);
          2012-11-29  [Irrigation].Apply(20);
          2012-11-30  [Irrigation].Apply(30);
          2012-12-13  [Irrigation].Apply(19);
          2012-12-20  [Irrigation].Apply(26);
          2012-12-20  [Irrigation].Apply(4);
          2012-12-27  [Irrigation].Apply(22);
          2013-01-03  [Irrigation].Apply(39.7);
          2013-01-10  [Irrigation].Apply(42.1);
          2013-01-17  [Irrigation].Apply(46.2);
          2013-01-24  [Irrigation].Apply(44.7);
          2013-01-31  [Irrigation].Apply(49.0);
          2013-02-07  [Irrigation].Apply(37);
          2013-02-14  [Irrigation].Apply(38);
          2013-02-21  [Irrigation].Apply(38);
          2013-02-28  [Irrigation].Apply(33.4);
          2013-03-07  [Irrigation].Apply(39.7);
          2013-03-14  [Irrigation].Apply(31.3);
          2013-03-21  [Irrigation].Apply(24);
          2013-03-28  [Irrigation].Apply(34);
          2013-04-04  [Irrigation].Apply(27.5);
        Operations Nil
          2012-10-24  [Irrigation].Apply(16);
          2012-10-26  [Irrigation].Apply(10);
          2012-11-03  [Irrigation].Apply(13);
          2012-11-11  [Irrigation].Apply(19.5);
          2012-11-15  [Irrigation].Apply(3.1);
          2012-11-23  [Irrigation].Apply(25);
          2012-11-29  [Irrigation].Apply(25);
          2012-12-20  [Irrigation].Apply(4);
          2013-01-31  [Irrigation].Apply(4.3);
    Simulation Lincoln2012: Area=0; Slope=0
      Weather: FileName=%root%\Tests\Validation\Maize\lincoln.met
      Clock: StartDate=2012-10-01; EndDate=2013-04-25
      Summary summaryfile
      SoilArbitrator Soil Arbitrator
      Zone RainShelter: Area=1; Slope=0
        Soil paparoa_silt_loam: SoilType=lignin_FOM; Region=Generic soil types; State=Canterbury; Latitude=999999; Longitude=999999
          DataSource=Profile descriptions provided by Trevor Webb and data for functional horizions based on SWAMP project results
          SoilWater: residueinterception=0; SummerDate=1-Nov; SummerU=9; SummerCona=4.4; WinterDate=1-Apr; WinterU=6; WinterCona=3; DiffusConst=88; DiffusSlope=35; Salb=0.13; CN2Bare=73; CNRed=20; CNCov=0.8; max_pond=0; Thickness=[200, 200, 200, 200, 200, 200, 200, 200]; SWCON=[0.5, 0.56, 0.31, 0.7, 0.7, 0.7, 0.7, 0.7]
          SoilNitrogen: fom_type=[default, manure, mucuna, lablab, shemp, stable]; fract_carb=[0.2, 0.3, 0.54, 0.57, 0.45, 0]; fract_cell=[0.7, 0.3, 0.37, 0.37, 0.47, 0.1]; fract_lign=[0.1, 0.4, 0.09, 0.06, 0.08, 0.9]; wfpsN2N2O_x=[22, 88]; wfpsN2N2O_y=[0.1, 1]
          Analysis: Thickness=[200, 200, 200, 300, 300, 300]; PH=[6, 6, 6, 6, 6, 6]; PHUnits=Water; BoronUnits=HotWater
          Water
            Thickness  BD     AirDry  LL15  DUL   SAT
            200        1.311  0.06    0.06  0.3   0.37
            200        1.474  0.12    0.12  0.3   0.37
            200        1.601  0.1     0.12  0.26  0.32
            200        1.68   0.13    0.13  0.24  0.3
            200        1.68   0.12    0.12  0.24  0.3
            200        1.68   0.15    0.15  0.21  0.3
            200        1.68   0.15    0.15  0.21  0.3
            200        1.68   0.15    0.15  0.21  0.3
            SoilCrop SCUMSoil: LL=[0.084, 0.12, 0.12, 0.15, 0.15, 0.06, 0.06, 0.06]; KL=[0.1, 0.1, 0.1, 0.1, 0.1, 0.01, 0.01, 0.01]; XF=[1, 1, 0.5, 1, 1, 1, 1, 1]
          Sample Initial nitrogen: NO3Units=kgha; NH4Units=kgha; SWUnits=Volumetric; OCUnits=Total; PHUnits=Water
            Thickness  NO3    NH4   SW
            200        16.2   0.9   0.06
            200        10.76  2.92  0.25
            200        7.83   0.57  0.2
            300        6.85   0.98  0.2
            300        4.88   0.84  0.2
            300        1.74   0.54  0.2
          SoilOrganicMatter: RootCN=16; RootWt=6000; SoilCN=11; EnrACoeff=7.4; EnrBCoeff=0.2; OCUnits=Total
            Thickness  OC    FBiom  FInert
            200        3.6   0.03   0.3
            200        0.97  0.02   0.6
            200        0.42  0.01   0.8
            300        0.23  0.01   0.9
            300        0.23  0.01   0.9
            300        0.23  0.01   0.9
        Plant SCUM: CropType=SCUM
        MicroClimate: a_interception=0; b_interception=1; c_interception=0; d_interception=0; soil_albedo=0.23; air_pressure=1010; soil_emissivity=0.96; sun_angle=15; soil_heat_flux_fraction=0.4; night_interception_fraction=0.5; windspeed_default=3; refheight=2; albedo=0.15; emissivity=0.96; gsmax=0.01; r50=200
        Irrigation
        Fertiliser
        SurfaceOrganicMatter: PoolName=wheat; type=wheat; mass=0; standing_fraction=0; cnr=80; CriticalResidueWeight=2000; OptimumDecompTemp=20; MaxCumulativeEOS=20; CNRatioDecompCoeff=0.277; CNRatioDecompThreshold=25; TotalLeachRain=25; MinRainToLeach=10; CriticalMinimumOrganicC=0.004; DefaultCPRatio=0; DefaultStandingFraction=0; StandingExtinctCoeff=0.5; FractionFaecesAdded=0.5
          Pools:
            {PoolName=wheat, ResidueType=wheat, Mass=0, CNRatio=80, StandingFraction=0}
          ResidueTypes ResidueTypesList: LoadFromResource=ResidueTypes
        Operations Irrig
          2012-10-24  [Irrigation].Apply(16);
          2012-10-26  [Irrigation].Apply(10);
          2012-11-03  [Irrigation].Apply(13);
          2012-11-11  [Irrigation].Apply(19.5);
          2012-11-15  [Irrigation].Apply(3.1);
          2012-11-23  [Irrigation].Apply(20);
          2012-11-29  [Irrigation].Apply(20);
          2012-11-30  [Irrigation].Apply(30);
          2012-12-13  [Irrigation].Apply(19);
          2012-12-20  [Irrigation].Apply(26);
          2012-12-20  [Irrigation].Apply(4);
          2012-12-27  [Irrigation].Apply(22);
          2013-01-03  [Irrigation].Apply(39.7);
          2013-01-10  [Irrigation].Apply(42.1);
          2013-01-17  [Irrigation].Apply(46.2);
          2013-01-24  [Irrigation].Apply(44.7);
          2013-01-31  [Irrigation].Apply(44.7);
          2013-01-31  [Irrigation].Apply(4.3);
          2013-02-07  [Irrigation].Apply(37);
          2013-02-14  [Irrigation].Apply(38);
          2013-02-21  [Irrigation].Apply(38);
          2013-02-28  [Irrigation].Apply(33.4);
          2013-03-07  [Irrigation].Apply(39.7);
          2013-03-14  [Irrigation].Apply(31.3);
          2013-03-21  [Irrigation].Apply(24);
          2013-03-28  [Irrigation].Apply(34);
          2013-04-04  [Irrigation].Apply(27.5);
        Operations Fert
          2012-11-15  [Fertiliser].Apply(50, Fertiliser.Types.UreaN, 10);
          2012-12-20  [Fertiliser].Apply(100, Fertiliser.Types.UreaN, 10);
          2013-01-31  [Fertiliser].Apply(100, Fertiliser.Types.UreaN, 10);
        Operations Sow
          2012-10-23  [SCUM].Sow(population:11, cultivar:"Maize_Short", depth:10, rowSpacing:710);
        Manager ExtraVariables
```csharp
using System;
using Models.Core;
using System.Collections.Generic;
using System.Text;
using Models.Soils;
using Models.PMF;
using Models;
using System.Xml.Serialization;
using APSIM.Shared.Utilities;

namespace Models
{
	[Serializable] 
	public class Script : Model
	{
		[Link] Clock Clock;
		[Link] Soils.Soil Soil;
		[Link] Models.SurfaceOM.SurfaceOrganicMatter SOM;
		[Link] Weather Met;
		[Link] Fertiliser Fert;
		[Link] Irrigation Irrig;
		[Link] Plant SCUM;
		[Link] Zone zone;
					
		[XmlIgnore] public bool InitialDay { get; set; }
		
		[XmlIgnore] public double AccumPlantN { get; set; }
		[XmlIgnore] public double AccumMineralisation { get; set; }
		[XmlIgnore] public double AccumDenit { get; set; }
		[XmlIgnore] public double AccumFert { get; set; }
		[XmlIgnore] public double AccumLeach { get; set; }
		[XmlIgnore] public double AccumDetach { get; set; }
		[XmlIgnore] public double DeltaSoilOMN { get; set; }
		[XmlIgnore] public double DeltaSurfaceOMN { get; set; }
		[XmlIgnore] public double DeltaSoilMineralN { get; set; }
		[XmlIgnore] public double SoilNitrogenContent { get; set; }
		
		[XmlIgnore] public double AccumEO { get; set; }
		[XmlIgnore] public double AccumEP { get; set; }
		[XmlIgnore] public double AccumES { get; set; }
		[XmlIgnore] public double AccumDrainage { get; set; }
		[XmlIgnore] public double AccumRunoff { get; set; }
		[XmlIgnore] public double AccumOutflowLat { get; set; }
		[XmlIgnore] public double AccumIrrigation { get; set; }
		[XmlIgnore] public double AccumRainfall { get; set; }
		[XmlIgnore] public double SoilWaterDeficit { get; set; }
	
		[XmlIgnore] public double  InitialSoilOMN { get; set; }
		[XmlIgnore] public double  InitialSurfaceOMN { get; set; }
		[XmlIgnore] public double  InitialMineralN { get; set; }
		
		[XmlIgnore] public double SWC { get; set; }
		[XmlIgnore] public double DUL { get; set; }
		[XmlIgnore] public double OutFlowLat { get; set; }

		[XmlIgnore] public double FomN { get; set; }
		[XmlIgnore] public double BiomN { get; set; }
		[XmlIgnore] public double HumN { get; set; }
		[XmlIgnore] public double OrganicN { get; set; }
		[XmlIgnore] public double NO3N { get; set; }
		[XmlIgnore] public double NH4N { get; set; }
		[XmlIgnore] public double UreaN { get; set; }
		[XmlIgnore] public double MineralN { get; set; }
		[XmlIgnore] public double DltNMinRes { get; set; }
		[XmlIgnore] public double DltNMinTot { get; set; }
		
		[XmlIgnore] public double StoverExpandedPosition { get; set; }
		[XmlIgnore] public double StoverAppearedPosition { get; set; }
		[XmlIgnore] public double ExpandedStoverNoYesterday { get; set; }
		[XmlIgnore] public double AppearedStoverNoYesterday { get; set; }
		[XmlIgnore] public double MostRecentlyExpandedStoverSize { get; set; }
		[XmlIgnore] public double MostRecentlyAppearedStoverMaxSize { get; set; }
        
		[EventSubscribe("Commencing")]
		private void OnSimulationCommencing(object sender, EventArgs e)
		{
			InitialDay = true;
			StoverExpandedPosition = 0;
			StoverAppearedPosition = 0;
			ExpandedStoverNoYesterday = 0;
			AppearedStoverNoYesterday = 0;
			MostRecentlyExpandedStoverSize = 0;
			MostRecentlyAppearedStoverMaxSize = 0;
		}
		
		[EventSubscribe("DoManagement")]
		private void OnDoManagement(object sender, EventArgs e)
		{
			//!!!!!! Nitrogen balance components !!!!!!
			//!!!!!!^^^^^^^^^^^^^^^^^^^^^^^^^^^^^!!!!!!
			FomN = MathUtilities.Sum(Soil.SoilNitrogen.FOMN);
			HumN = MathUtilities.Sum(Soil.SoilNitrogen.HumicN);
			BiomN = MathUtilities.Sum(Soil.SoilNitrogen.MicrobialN);
			OrganicN = FomN + HumN + BiomN;
			NO3N = MathUtilities.Sum(Soil.NO3N);
			NH4N = MathUtilities.Sum(Soil.NH4N);
			UreaN = MathUtilities.Sum(Soil.SoilNitrogen.urea);
			MineralN = NO3N + NH4N + UreaN; 
			DltNMinRes = MathUtilities.Sum(Soil.SoilNitrogen.dlt_n_min_res);
			DltNMinTot = MathUtilities.Sum(Soil.SoilNitrogen.MineralisedN);
			int layers = Soil.Thickness.Length;
			if (InitialDay == true)
			{
				InitialSurfaceOMN = SOM.N;
				InitialSoilOMN = OrganicN;
				InitialMineralN = MineralN;
				InitialDay = false;
			}
			AccumFert += Fert.NitrogenApplied;
			DeltaSurfaceOMN = SOM.N - InitialSurfaceOMN;
			AccumLeach = AccumLeach - Soil.SoilWater.LeachNH4 - Soil.SoilWater.LeachNO3 - Soil.SoilWater.LeachUrea; //Fails
			AccumMineralisation += MathUtilities.Sum(Soil.SoilNitrogen.MineralisedN);
			AccumDenit -= MathUtilities.Sum(Soil.SoilNitrogen.Denitrification);
			AccumPlantN -= (double)zone.Get("SCUM.Root.NUptake");
			DeltaSoilOMN = OrganicN - InitialSoilOMN;
			DeltaSoilMineralN = MineralN - InitialMineralN;
			SoilNitrogenContent = MineralN;
			
			//!!!!!! Water balance components !!!!!!
			//!!!!!!^^^^^^^^^^^^^^^^^^^^^^^^^^!!!!!!

			AccumIrrigation += Irrig.IrrigationApplied;
			AccumRainfall += Met.Rain;
			//AccumEP -= (double)zone.Get("[SCUM].Stover.Transpiration");
			AccumEP -= (double)zone.Get("SCUM.Root.WaterUptake");
			SoilWaterDeficit = (SWC - DUL);
			double OutFlowLat = MathUtilities.Sum(Soil.SoilWater.outflow_lat);
			AccumOutflowLat -= OutFlowLat;
			
		}
		
		[EventSubscribe("DoManagementCalculations")]
		private void OnDoManagementCalculations(object sender, EventArgs e)
		{
			FomN = MathUtilities.Sum(Soil.SoilNitrogen.FOMN);
			HumN = MathUtilities.Sum(Soil.SoilNitrogen.HumicN);
			BiomN = MathUtilities.Sum(Soil.SoilNitrogen.MicrobialN);
			
			
			AccumEO -= Soil.SoilWater.Eo;
			AccumES -= Soil.SoilWater.Es; 
			AccumDrainage -= Soil.SoilWater.Drainage;
			AccumRunoff -= Soil.SoilWater.Runoff;
			SWC = MathUtilities.Sum(Soil.SoilWater.SWmm);
			DUL = MathUtilities.Sum(Soil.SoilWater.DULmm);
			
			
			
		}
	}
}
```
        Manager Harvesting
```csharp
using System;
using Models.Core;
using System.Collections.Generic;
using System.Text;
using Models.Soils;
using Models.PMF;
using Models;
using System.Xml.Serialization;
using APSIM.Shared.Utilities;

namespace Models
{
	[Serializable] 
	public class Script : Model
	{
		[Link] Plant SCUM;
		[Link] Zone zone;
					
        
		[EventSubscribe("Commencing")]
		private void OnSimulationCommencing(object sender, EventArgs e)
		{
		}
		
		[EventSubscribe("DoManagement")]
		private void OnDoManagement(object sender, EventArgs e)
		{
			if (SCUM.Phenology.CurrentPhaseName == "ReadyForHarvesting")
			{
				SCUM.Harvest();
				SCUM.EndCrop();
			}
		}
		
		[EventSubscribe("DoManagementCalculations")]
		private void OnDoManagementCalculations(object sender, EventArgs e)
		{
			
		}
	}
}
```
        Manager SetSCUMYield
          OverRidePath = SCUM.Product.ExpectedYield.Value
          OverRideInterger = 1800
          ChangeDate = 2012-10-23
```csharp
using System;
using Models.Core;
using System.Collections.Generic;
using System.Text;
using Models.PMF;
using Models;
using System.Xml.Serialization;
using APSIM.Shared.Utilities;

namespace Models
{
	[Serializable] 
	public class Script : Model
	{
		[Link] Plant Plant;
		[Link] Clock Clock;
		[Link] Zone zone;
		
		[Description("Path for coefficient to be Overwritten")]
		public string OverRidePath { get; set; }
		[Description("Value for new coefficient Interger")]
		public int OverRideInterger { get; set; }
		[Description("Sowing Date")]
		public DateTime ChangeDate { get; set; }
        
		[EventSubscribe("DoManagement")]
		private void OnDoManagement(object sender, EventArgs e)
		{
			if (Clock.Today.Date == ChangeDate)
			{
				object ResetValue = OverRideInterger;
				zone.Set(OverRidePath, ResetValue);
			}
		}
	}
}
```
        Manager SetSCUMCoverMax
          OverRidePath = SCUM.Stover.CoverFunction.Expanding.SigCoverFunction.Ymax.Value
          OverRideDouble = 0.9
          ChangeDate = 2012-10-23
```csharp
using System;
using Models.Core;
using System.Collections.Generic;
using System.Text;
using Models.PMF;
using Models;
using System.Xml.Serialization;
using APSIM.Shared.Utilities;

namespace Models
{
	[Serializable] 
	public class Script : Model
	{
		[Link] Plant Plant;
		[Link] Clock Clock;
		[Link] Zone zone;
		
		[Description("Path for coefficient to be Overwritten")]
		public string OverRidePath { get; set; }
		[Description("Value for new coefficient Interger")]
		public double OverRideDouble { get; set; }
		[Description("Sowing Date")]
		public DateTime ChangeDate { get; set; }
        
		[EventSubscribe("DoManagement")]
		private void OnDoManagement(object sender, EventArgs e)
		{
			if (Clock.Today.Date == ChangeDate)
			{
				object ResetValue = OverRideDouble;
				zone.Set(OverRidePath, ResetValue);
			}
		}
	}
}
```
        Report: EventNames=[Clock].DoReport
          VariableNames:
            [Clock].Today
            [ExtraVariables].Script.AccumPlantN
            [ExtraVariables].Script.AccumMineralisation
            [ExtraVariables].Script.AccumDenit
            [ExtraVariables].Script.AccumFert
            [ExtraVariables].Script.AccumLeach
            [ExtraVariables].Script.AccumDetach
            [ExtraVariables].Script.DeltaSoilOMN
            [ExtraVariables].Script.DeltaSurfaceOMN
            [ExtraVariables].Script.DeltaSoilMineralN
            [ExtraVariables].Script.SWC
            [ExtraVariables].Script.DUL
            [ExtraVariables].Script.OutFlowLat
            [ExtraVariables].Script.AccumEO
            [ExtraVariables].Script.AccumEP
            [ExtraVariables].Script.AccumES
            [ExtraVariables].Script.AccumDrainage
            [ExtraVariables].Script.AccumRunoff
            [ExtraVariables].Script.AccumRainfall
            [ExtraVariables].Script.AccumIrrigation
            [ExtraVariables].Script.AccumOutflowLat
            [ExtraVariables].Script.SoilWaterDeficit
            [ExtraVariables].Script.SoilNitrogenContent
            [ExtraVariables].Script.FomN
            [ExtraVariables].Script.HumN
            [ExtraVariables].Script.BiomN
            [ExtraVariables].Script.DltNMinRes
            [ExtraVariables].Script.DltNMinTot
            [Soil].SoilWater.SW
            [Soil].SoilWater.Eo
            [Soil].SoilWater.Es
            [Soil].SoilWater.Drainage
            [Soil].SoilWater.Runoff
            sum([Soil].SoilWater.SWmm) as ProfileWater
            [Soil].NO3N
            [MicroClimate].net_radn
            [MicroClimate].peta
            [MicroClimate].petr
            [SCUM].Product.Live.Wt
            [SCUM].Stover.Live.Wt
            [SCUM].Root.Live.Wt
            [SCUM].Product.Live.N
            [SCUM].Stover.Live.N
            [SCUM].Root.Live.N
            [SCUM].Root.WaterUptake
            [SCUM].Stover.Transpiration
            [SCUM].Stover.WaterDemand
            [SCUM].Root.Depth
            [SCUM].Stover.CoverTotal
            [SCUM].Stover.LAI
            [SCUM].Stover.Height
            [SCUM].Phenology.Stage
            [SCUM].AboveGround.N
            [SCUM].AboveGround.Wt
            [SCUM].Total.N
            [SCUM].Total.Wt
            [SCUM].Arbitrator.NDemand
            [SCUM].Arbitrator.NSupply
            [SCUM].Arbitrator.DMSupply
            [SCUM].Arbitrator.DMDemand
            [SCUM].Arbitrator.DMAllocated
            [SCUM].Arbitrator.DMSinkLimitation
            [SCUM].Arbitrator.DMNutrientLimitation
            [SCUM].Stover.MaximumNConc.Value
            [SCUM].Stover.MinimumNConc.Value
            [SCUM].Stover.Live.NConc
            [SCUM].Stover.Live.NConc
            [SCUM].Product.Live.NConc
            [SCUM].Stover.FRGRFunction.Value
            [SCUM].Stover.Fw
            [SCUM].Arbitrator.FN
        Manager ClimateControl
          StartDate = 2012-10-23
          EndDate = 2013-04-10
```csharp
using System;
using Models.Core;
using APSIM.Shared.Utilities;



using System.Collections.Generic;
using System.Text;
using Models.PMF;
using Models;
using System.Xml.Serialization;

namespace Models
{
	[Serializable] 
	[System.Xml.Serialization.XmlInclude(typeof(Model))]
	public class Script : Model
	{
		[Link] Weather Met;
		[Link] Clock Clock;
    
		[Description("Start Date")]
		public DateTime StartDate { get; set; }
        
		[Description("End Date")]
		public DateTime EndDate { get; set; }
 
    
		[EventSubscribe("PreparingNewWeatherData")]
		private void OnPreparingNewWeatherData(object sender, EventArgs e)
		{
			if ((Clock.Today.Date >= StartDate) && (Clock.Today.Date <= EndDate))
				Met.Rain = 0;		
		}
	}
}
```
  Experiment ABlock
    Memo
      In this test we use SCUM to represent differnt crops in two different rotation treatments (Potatoes -> Wheat -> Potatoes and Potatoes -> Peas -> Potatoes) with two irrigation (W1 and W2) and three N fertiliser treatments (N0, N1 and N2).  These rotations ran over three years and were conducted to provide data for testing N leaching predictions of different models.  SCUM yields were set to the High N full irrigation treatment values for each crop and SCUMs N and water responses were allowed to predict any differences in crop N uptake.  It is importnat to note that the soilN organic matter degridation coefficients were set to custom (non-release) values as this has been necessary to predict accurate N mineralisation values in new zealand arable soils.

      SCUM gave reasionable predictions of Product N removals, soil water contents and accumulated leaching from each crop treatment.  This provides further support that SCUM is adequate for the task of providing realistic N and Water uptakes for the purpose of N and water balance studies.
    Factors
      Factor Rot
        Factor PP_
          Specifications:
            [Sowing_Yield].Script.Crop2 = Dried_Peas
            [Sowing_Yield].Script.SowingDate2 = 2005-09-28
            [Sowing_Yield].Script.HarvestDate2 = 2006-02-24
            [TreatmentID].Script.Rotation = PP
            [InF].Script.NFert = 0
            [InF].Script.Irr1 = 55
            [InF].Script.Irr2 = 0
            [InF].Script.Irr3 = 38
            [InF].Script.Irr4 = 40
            [Sowing_Yield].Script.CropNConc = 0.05
        Factor PW_
          Specifications:
            [Sowing_Yield].Script.Crop2 = Wheat_Autumn
            [Sowing_Yield].Script.SowingDate2 = 2005-05-13
            [Sowing_Yield].Script.HarvestDate2 = 2006-02-24
            [TreatmentID].Script.Rotation = PW
            [InF].Script.NFert = 100
            [InF].Script.Irr1 = 94
            [InF].Script.Irr2 = 34
            [InF].Script.Irr3 = 61
            [InF].Script.Irr4 = 0
            [Sowing_Yield].Script.CropNConc = 0.025
      Factor W
        Factor 1_
          Specifications:
            [Irrig]
            [TreatmentID].Script.Irrigation = W1
            [InF].Script.IrrFact1 = 0
            [InF].Script.IrrFact2 = 1
            [InF].Script.IrrFact3 = 1
            [InF].Script.IrrFact4 = 0
          Operations Irrig
            2004-12-08  [Irrigation].Apply(66);
            2005-01-05  [Irrigation].Apply(59);
            2005-01-19  [Irrigation].Apply(45);
            2005-01-26  [Irrigation].Apply(48);
            2005-02-02  [Irrigation].Apply(35);
            2005-02-09  [Irrigation].Apply(38);
            2005-02-23  [Irrigation].Apply(48);
            2005-03-02  [Irrigation].Apply(29);
            2005-11-09  [Irrigation].Apply(50);
            2005-11-30  [Irrigation].Apply(21);
            2005-12-13  [Irrigation].Apply(18);
            2005-12-21  [Irrigation].Apply(26);
            2005-12-29  [Irrigation].Apply(13);
            2006-01-05  [Irrigation].Apply(39);
            2006-01-12  [Irrigation].Apply(44);
            2006-12-20  [Irrigation].Apply(22);
            2007-01-24  [Irrigation].Apply(22);
            2007-01-25  [Irrigation].Apply(10);
            2007-01-31  [Irrigation].Apply(32);
            2007-02-07  [Irrigation].Apply(23);
            2007-02-21  [Irrigation].Apply(32);
            2007-02-28  [Irrigation].Apply(31);
        Factor 2_
          Specifications:
            [Irrig]
            [TreatmentID].Script.Irrigation = W2
            [InF].Script.IrrFact1 = 1
            [InF].Script.IrrFact2 = 0
            [InF].Script.IrrFact3 = 0
            [InF].Script.IrrFact4 = 1
          Operations Irrig
            2004-12-08  [Irrigation].Apply(66);
            2004-12-22  [Irrigation].Apply(55);
            2005-01-05  [Irrigation].Apply(102);
            2005-01-19  [Irrigation].Apply(78);
            2005-01-26  [Irrigation].Apply(76);
            2005-02-02  [Irrigation].Apply(64);
            2005-02-09  [Irrigation].Apply(67);
            2005-02-23  [Irrigation].Apply(85);
            2005-03-02  [Irrigation].Apply(50);
            2005-12-14  [Irrigation].Apply(71);
            2006-01-12  [Irrigation].Apply(68);
            2007-01-25  [Irrigation].Apply(10);
            2007-02-07  [Irrigation].Apply(60);
      Factor N
        Factor 0
          Specifications:
            [Nit]
            [TreatmentID].Script.Nitrogen = N0
            [InF].Script.TreatFact = 0
          Operations Nit
        Factor 1
          Specifications:
            [Nit]
            [TreatmentID].Script.Nitrogen = N1
            [InF].Script.TreatFact = 1
          Operations Nit
            2004-10-13  [Fertiliser].Apply(100, [Fertiliser].Types.UreaN, 50);
            2004-12-20  [Fertiliser].Apply(50, [Fertiliser].Types.UreaN, 50);
            2005-01-24  [Fertiliser].Apply(50, [Fertiliser].Types.UreaN, 50);
            2005-10-26  [Fertiliser].Apply(50, [Fertiliser].Types.UreaN, 50);
            2006-10-10  [Fertiliser].Apply(100, [Fertiliser].Types.UreaN, 50);
            2006-12-29  [Fertiliser].Apply(50, [Fertiliser].Types.UreaN, 50);
            2007-01-16  [Fertiliser].Apply(50, [Fertiliser].Types.UreaN, 50);
        Factor 2
          Specifications:
            [Nit]
            [TreatmentID].Script.Nitrogen = N2
            [InF].Script.TreatFact = 2
          Operations Nit
            2004-10-13  [Fertiliser].Apply(200, [Fertiliser].Types.UreaN, 50);
            2004-12-20  [Fertiliser].Apply(100, [Fertiliser].Types.UreaN, 50);
            2005-01-24  [Fertiliser].Apply(100, [Fertiliser].Types.UreaN, 50);
            2005-10-26  [Fertiliser].Apply(100, [Fertiliser].Types.UreaN, 50);
            2006-10-10  [Fertiliser].Apply(200, [Fertiliser].Types.UreaN, 50);
            2006-12-29  [Fertiliser].Apply(100, [Fertiliser].Types.UreaN, 50);
            2007-01-16  [Fertiliser].Apply(100, [Fertiliser].Types.UreaN, 50);
    Simulation ABlock: Area=0; Slope=0
      Weather: FileName=%root%\Tests\WeatherFiles\lincoln.met
      Clock: StartDate=2004-10-12; EndDate=2007-03-31
      Summary
      SoilArbitrator Soil Arbitrator
      Manager TreatmentID
```csharp
using System;
using Models.Core;
using System.Collections.Generic;
using System.Text;
using Models.PMF;
using Models;
using System.Xml.Serialization;
using APSIM.Shared.Utilities;
using System.IO;
using System.Data;
	  

namespace Models
{
	[Serializable] 
	public class Script : Model
	{
		[XmlIgnore] public string Rotation { get; set; }
		[XmlIgnore] public string Irrigation { get; set; }
		[XmlIgnore] public string Nitrogen { get; set; }
		
		[XmlIgnore] public string TreatmentName { get; set; }
		
		[EventSubscribe("StartOfSimulation")]
		private void OnStartOfSimulation(object sender, EventArgs e)
		{
			TreatmentName = Rotation + "_" + Irrigation + "_" + Nitrogen;
		}
	}
}
```
      Zone Field: Area=0; Slope=0
        Plant SCUM: CropType=SCUM
        Soil: Region=Plains; State=Canterbury; Country=New Zealand; Latitude=0; Longitude=0
          DataSource=Generic profile descriptions provided by Trevor Webb and data for functional horizions based on SWAMP project results
          Comments=Bulk density values were measured on the fine earth fraction so values entered into apsim soil are adjusted down to account for stone content (assuming stones are inert from all soil process so their mass and volume is removed from model paramaters).  SAT, DUL, LL15 and Air dry have been adjusted down to account for stone content.  OC has not been adjusted so the model will get the correct carbon and N amounts using the adjusted BD.
          Analysis: Thickness=[100, 200, 200, 100, 300, 200, 100, 300]; PH=[6, 6, 6, 6, 6, 6, 6, 6]; PHUnits=Water; BoronUnits=HotWater
          Water
            Thickness  BD     AirDry  LL15   DUL   SAT
            100        1      0.05    0.1    0.27  0.419
            200        1      0.05    0.1    0.27  0.395
            300        1.59   0.157   0.157  0.29  0.36
            200        1.57   0.173   0.173  0.3   0.366
            100        1.57   0.173   0.173  0.3   0.366
            200        1.6    0.165   0.165  0.3   0.358
            100        1.6    0.165   0.165  0.3   0.358
            300        1.601  0.115   0.115  0.3   0.316
            SoilCrop SCUMSoil: LL=[0.1, 0.1, 0.157, 0.173, 0.173, 0.165, 0.165, 0.115]; KL=[0.1, 0.1, 0.1, 0.1, 0.1, 0.1, 0.1, 0.1]; XF=[1, 1, 1, 1, 1, 1, 1, 1]
          SoilWater: residueinterception=0; SummerDate=1-oct; SummerU=9; SummerCona=4.4; WinterDate=1-Apr; WinterU=2; WinterCona=1.5; DiffusConst=88; DiffusSlope=35; Salb=0.13; CN2Bare=73; CNRed=20; CNCov=0.8; max_pond=0; Thickness=[100, 200, 300, 200, 100, 200, 100, 300]; SWCON=[0.9, 0.6, 0.4, 0.4, 0.4, 0.9, 0.9, 0.9]
          SoilNitrogen: fom_type=[default, manure, mucuna, lablab, shemp, stable]; fract_carb=[0.2, 0.3, 0.54, 0.57, 0.45, 0]; fract_cell=[0.7, 0.3, 0.37, 0.37, 0.47, 0.1]; fract_lign=[0.1, 0.4, 0.09, 0.06, 0.08, 0.9]; wfpsN2N2O_x=[22, 88]; wfpsN2N2O_y=[0.1, 1]
          SoilOrganicMatter: RootCN=31.5; RootWt=1500; SoilCN=11; EnrACoeff=7.4; EnrBCoeff=0.2; OCUnits=Total
            Thickness  OC     FBiom  FInert
            100        2.677  0.025  0.45
            200        2.784  0.025  0.6
            300        1.454  0.015  0.75
            200        0.383  0.01   0.9
            100        0.243  0.01   0.96
            200        0.243  0.01   0.96
            100        0.243  0.01   0.96
            300        0.243  0.01   0.96
          Sample: NO3Units=kgha; NH4Units=kgha; SWUnits=Volumetric; OCUnits=Total; PHUnits=Water
            Thickness  NO3  NH4
            100        35   6.18
            200        30   6.18
            300        29   3.21
            200        2    1.3
            100        2    1.3
            200        1    0.9
            100        1    0.1
            300        1    0.1
          InitialWater: PercentMethod=FilledFromTop; FractionFull=0.9
        SurfaceOrganicMatter: PondActive=no; ReportAdditions=no; ReportRemovals=no; PoolName=grass; type=grass; mass=2500; standing_fraction=0; cnr=15; CriticalResidueWeight=2000; OptimumDecompTemp=20; MaxCumulativeEOS=20; CNRatioDecompCoeff=0.277; CNRatioDecompThreshold=25; TotalLeachRain=25; MinRainToLeach=10; CriticalMinimumOrganicC=0.004; DefaultCPRatio=0; DefaultStandingFraction=0; StandingExtinctCoeff=0.5; FractionFaecesAdded=0.5
          Pools:
            {PoolName=grass, ResidueType=grass, Mass=2500, CNRatio=15, StandingFraction=0}
          ResidueTypes: LoadFromResource=ResidueTypes
          TillageTypes TillageTypesList
        MicroClimate: same as SCUMTestBase.Field.MicroClimate
        Irrigation
        Fertiliser
        Folder Management
          Manager SetSoilParams
```csharp
using System;
using Models.Core;
using System.Collections.Generic;
using System.Text;
using Models.Soils;
using Models.PMF;
using Models;
using System.Xml.Serialization;
using APSIM.Shared.Utilities;

namespace Models
{
	[Serializable] 
	public class Script : Model
	{
		[Link] Soils.Soil Soil;

		[EventSubscribe("DoInitialSummary")]
		private void OnDoInitialSummary(object sender, EventArgs e)
		{
			Soil.SoilNitrogen.rd_hum = new double[] { 0.000363, 0.00007 };
			Soil.SoilNitrogen.rd_lign = new double[] { 0.001392, 0.003 };
			Soil.SoilNitrogen.rd_cell = new double[] { 0.05, 0.25 };
			Soil.SoilNitrogen.rd_carb = new double[] { 0.756438, 0.1 };
			Soil.SoilNitrogen.rd_biom = new double[] { 0.010295, 0.004 };
			Soil.SoilNitrogen.opt_temp = new double[] { 26.5, 32.0 };
			Soil.SoilNitrogen.stfMiner_FctrZero = new double[] { 0.05, 0.0 }; 
			Soil.SoilNitrogen.swfMiner_y = new double[] { 0.0, 0.5, 0.9, 1.0, 1.0 };

		}
			
	}
}
```
          Manager Sowing_Yield
            YieldFile = %root%\Tests\Validation\SCUM\YieldsToSet.csv
            InitialRootDepth = 10
            Crop1 = Potatoes_Short
            SowingDate1 = 2004-10-15
            HarvestDate1 = 2005-03-14
            Yield1 = 5500
            Crop2 = Dried_Peas
            SowingDate2 = 2005-09-28
            HarvestDate2 = 2006-02-24
            Yield2 = 958
            CropNConc = 0
            Crop3 = Potatoes_Short
            SowingDate3 = 2006-10-11
            HarvestDate3 = 2007-03-12
            Yield3 = 2200
            Treatment =
```csharp
using System;
using Models.Core;
using System.Collections.Generic;
using System.Text;
using Models.PMF;
using Models;
using System.Xml.Serialization;
using APSIM.Shared.Utilities;
using System.Data;
using Models.PMF.Interfaces;
using Models.SurfaceOM;

namespace Models
{
	[Serializable] 
	//[System.Xml.Serialization.XmlInclude(typeof(Model))]
	public class Script : Model
	{
		[Link] Plant SCUM;
		[Link] Clock Clock;
		[Link] Zone zone;
		[Link] Simulation Simulation;
		[Link] SurfaceOrganicMatter SurfOM;
		
		[Description("File of Yields")]
		public string YieldFile { get; set; }
		
		public string FullFileName
		{
			get
			{
				return PathUtilities.GetAbsolutePath(YieldFile, Simulation.FileName);
			}
		}
		
		[XmlIgnore] private DataTable Yields { get; set; }
		
		[Description("Initial Root Depth")]
		public double InitialRootDepth { get; set; }
		
		[Description("First Crop")]
		public string Crop1 { get; set; }
		[Description("First Sowing Date")]
		public DateTime SowingDate1 { get; set; }
		[Description("First Harvest Date")]
		public DateTime HarvestDate1 { get; set; }
		[Description("First Crop Yield (g/m2 fresh wt)")]
		public int Yield1 { get; set; }
		
		[Description("Second Crop")]
		public string Crop2 { get; set; }
		[Description("Second Sowing Date")]
		public DateTime SowingDate2 { get; set; }
		[Description("Second Harvest Date")]
		public DateTime HarvestDate2 { get; set; }
		[Description("Second Crop Yield (g/m2 fresh wt)")]
		public int Yield2 { get; set; }
		public double CropNConc { get; set; }

		[Description("Third Crop")]
		public string Crop3 { get; set; }
		[Description("Third Sowing Date")]
		public DateTime SowingDate3 { get; set; }
		[Description("Third Harvest Date")]
		public DateTime HarvestDate3 { get; set; }
		[Description("Third Crop Yield (g/m2 fresh wt)")]
		public int Yield3 { get; set; }
		
		public string Treatment { get; set; }
		
		[XmlIgnore] private RemovalFractions Remove { get; set; }
		
		
		
		
		[EventSubscribe("Commencing")]
		private void OnSimulationCommencing(object sender, EventArgs e)
		{
			Remove = new RemovalFractions();
		}
		
		[EventSubscribe("StartOfSimulation")]
		private void OnStartOfSimulation(object sender, EventArgs e)
		{
			Treatment = (string)Apsim.Get(Simulation, "TreatmentID.Script.TreatmentName");
			
			ApsimTextFile textFile = new ApsimTextFile();
			textFile.Open(FullFileName);
			Yields = textFile.ToTable();
			textFile.Close();
			
			Remove.SetFractionToRemove("Stover", 0);
			Remove.SetFractionToResidue("Stover", 1);
			Remove.SetFractionToRemove("Product", 1);
			Remove.SetFractionToResidue("Product", 0);
			Remove.SetFractionToRemove("Root", 0.0);
			Remove.SetFractionToResidue("Root", 0.2);
		}
		
		[EventSubscribe("DoManagement")]
		private void OnDoManagement(object sender, EventArgs e)
		{
			if (Clock.Today.Date == SowingDate1)
			{
				SCUM.Sow(cultivar: Crop1, population: 1, depth: InitialRootDepth, rowSpacing: 150);
				object ResetValue = Convert.ToDouble(Yields.Rows[0][Treatment]);
				zone.Set("[SCUM].Product.ExpectedYield.Value", ResetValue);
				ResetValue = 0.025;
				zone.Set("[SCUM].Product.MaximumNConc.Value", ResetValue);
			}
			else if (Clock.Today.Date == HarvestDate1)
			{
				SCUM.Harvest(Remove);
				SCUM.EndCrop();
			}
			else if (Clock.Today.Date == SowingDate2)
			{
				SCUM.Sow(cultivar: Crop2, population: 1, depth: InitialRootDepth, rowSpacing: 150);
				object ResetValue = Convert.ToDouble(Yields.Rows[1][Treatment]);
				zone.Set("[SCUM].Product.ExpectedYield.Value", ResetValue);
				ResetValue = CropNConc;
				zone.Set("[SCUM].Product.MaximumNConc.Value", ResetValue);
			}
			else if (Clock.Today.Date == HarvestDate2)
			{
				SCUM.Harvest(Remove);
				SCUM.EndCrop();
				SurfOM.Incorporate(0.8, 10);
			}
			else if (Clock.Today.Date == SowingDate3)
			{
				SurfOM.Incorporate(1, 10);
				SCUM.Sow(cultivar: Crop3, population: 1, depth: InitialRootDepth, rowSpacing: 150);
				object ResetValue = Convert.ToDouble(Yields.Rows[2][Treatment]);
				zone.Set("[SCUM].Product.ExpectedYield.Value", ResetValue);
				ResetValue = 0.025;
				zone.Set("[SCUM].Product.MaximumNConc.Value", ResetValue);
		
			}
			else if (Clock.Today.Date == HarvestDate3)
			{
				SCUM.Harvest(Remove);
				SCUM.EndCrop();
			}
			//PMFCrop.Sow(... Contains the following arguements:
			//Population  double  Optional  Seeds sowing/m2.  Default is zero
			//Cultivar    string  Required  "NameOfCultivar"
			//Depth       double  Optional  Depth (mm) seed sown.   Default is 100mm 
			//MaxCover    double  Optional  Proportion (0-1) of the ground row crop will cover.   Default is 1.0
			//BudNumber   double  Optional  Number of mainstems per seed sown.  Default is 1.0
			//RowSpacing  double  Optional  Spaceing (mm) between drill rows when crop is sown.  Default is 150mm
			//CropClass   string  Optional  Crop class to instantiate when crop is sown.  Default is "Plant"
		}
	}
}
```
          Manager NConcReps
            NConcFile = %root%\Tests\Validation\SCUM\NO3.csv
            TotalLeach = 0
            Leach_60 = 0
            ObservedLeach1 = 0
            ObservedLeach2 = 0
            ObservedLeach3 = 0
            ObservedLeach4 = 0
            ObservedLeach5 = 0
            NConc1 = 0
            NConc2 = 0
            NConc3 = 0
            NConc4 = 0
            NConc5 = 0
            Treat_Rep1 =
            Treat_Rep2 =
            Treat_Rep3 =
            Treat_Rep4 =
            Treat_Rep5 =
            NLeachMean = 0
```csharp
using System;
using Models.Core;
using System.Collections.Generic;
using System.Text;
using Models.Soils;
using Models.PMF;
using Models;
using System.Xml.Serialization;
using APSIM.Shared.Utilities;
using System.Data;

namespace Models
{
	[Serializable] 
	public class Script : Model
	{
		[Link] Clock Clock;
		[Link] Soils.Soil Soil;
		[Link] Models.SurfaceOM.SurfaceOrganicMatter SOM;
		[Link] Weather Met;
		[Link] Fertiliser Fert;
		[Link] Irrigation Irrig;
		[Link] Plant SCUM;
		[Link] Zone zone;
		[Link] Simulation Simulation;
		
		[Description("File of Nconcs")]
		public string NConcFile { get; set; }
		
		public string FullFileName
		{
			get
			{
				return PathUtilities.GetAbsolutePath(NConcFile, Simulation.FileName);
			}
		}
		
		public double TotalLeach { get; set; }
		public double Leach_60 { get; set; }
		public double ObservedLeach1 { get; set; }
		public double ObservedLeach2 { get; set; }
		public double ObservedLeach3 { get; set; }
		public double ObservedLeach4 { get; set; }
		public double ObservedLeach5 { get; set; }
		public double NConc1 { get; set; }
		public double NConc2 { get; set; }
		public double NConc3 { get; set; }
		public double NConc4 { get; set; }
		public double NConc5 { get; set; }
	
		public string Treat_Rep1 { get; set; }
		public string Treat_Rep2 { get; set; }
		public string Treat_Rep3 { get; set; }
		public string Treat_Rep4 { get; set; }
		public string Treat_Rep5 { get; set; }
		
		public double NLeachMean { get; set; }
	    
		[XmlIgnore] private DataTable NConcs { get; set; }
	
		private DateTime Date1 { get; set; }
		
		[EventSubscribe("StartOfSimulation")]
		private void OnStartOfSimulation(object sender, EventArgs e)
		{
			ApsimTextFile textFile = new ApsimTextFile();
			textFile.Open(FullFileName);
			NConcs = textFile.ToTable();
			textFile.Close();
			
			Treat_Rep1 = (string)Apsim.Get(Simulation, "TreatmentID.Script.TreatmentName") + "_1";
			Treat_Rep2 = (string)Apsim.Get(Simulation, "TreatmentID.Script.TreatmentName") + "_2";
			Treat_Rep3 = (string)Apsim.Get(Simulation, "TreatmentID.Script.TreatmentName") + "_3";
			Treat_Rep4 = (string)Apsim.Get(Simulation, "TreatmentID.Script.TreatmentName") + "_4";
			Treat_Rep5 = (string)Apsim.Get(Simulation, "TreatmentID.Script.TreatmentName") + "_5";
		}
		
		[EventSubscribe("DoInitialSummary")]
		private void OnDoInitialSummary(object sender, EventArgs e)
		{
			TotalLeach = 0;
			Leach_60 = 0;
			NConc1 = 0;
			NConc2 = 0;
			NConc3 = 0;
			NConc4 = 0;
			NConc5 = 0;
			ObservedLeach1 = 0;
			ObservedLeach2 = 0;
			ObservedLeach3 = 0;
			ObservedLeach4 = 0;
			ObservedLeach5 = 0;
		}
		
		[EventSubscribe("StartOfDay")]
		private void OnStartOfDay(object sender, EventArgs e)
		{
			try
			{
				foreach (DataRow row in NConcs.Rows)
				{
					DateTime TodayDate = Convert.ToDateTime(row["Date"]);
					if (TodayDate.Date == Clock.Today.Date)
					{
						NConc1 = Convert.ToDouble(row[Treat_Rep1]);
						NConc2 = Convert.ToDouble(row[Treat_Rep2]);
						NConc3 = Convert.ToDouble(row[Treat_Rep3]);
						NConc4 = Convert.ToDouble(row[Treat_Rep4]);
						NConc5 = Convert.ToDouble(row[Treat_Rep5]);
					}
				}
			}
			finally
			{
			}
		}
		
		[EventSubscribe("DoManagement")]
		private void OnDoManagement(object sender, EventArgs e)
		{
			DateTime Potato1Start = new DateTime(2004, 12, 9);
			DateTime Potato1End = new DateTime(2005, 3, 14);
		
			if ((Clock.Today.Date >= Potato1Start) && (Clock.Today.Date <= Potato1End))
			{
				Leach_60 = Leach_60 + (Soil.SoilWater.flow_no3[3]);
				ObservedLeach1 = ObservedLeach1 + ((Soil.SoilWater.flow[3] + Soil.SoilWater.flux[3]) * NConc1) / 100;
				ObservedLeach2 = ObservedLeach2 + ((Soil.SoilWater.flow[3] + Soil.SoilWater.flux[3]) * NConc2) / 100;
				ObservedLeach3 = ObservedLeach3 + ((Soil.SoilWater.flow[3] + Soil.SoilWater.flux[3]) * NConc3) / 100;
				ObservedLeach4 = ObservedLeach4 + ((Soil.SoilWater.flow[3] + Soil.SoilWater.flux[3]) * NConc4) / 100;
				ObservedLeach5 = ObservedLeach5 + ((Soil.SoilWater.flow[3] + Soil.SoilWater.flux[3]) * NConc5) / 100;
				if (ObservedLeach5 > 0)
					NLeachMean = (ObservedLeach1 + ObservedLeach2 + ObservedLeach3 + ObservedLeach4 + ObservedLeach5) / 5;
				else
					NLeachMean = (ObservedLeach1 + ObservedLeach2 + ObservedLeach3) / 3;
					
				TotalLeach = TotalLeach + (Soil.SoilWater.flow_no3[2] + Soil.SoilWater.flow_nh4[2]);
			}
			else if (Clock.Today.Date > Potato1End)
			{	
				Leach_60 = 0;
				ObservedLeach1 = ObservedLeach1 + (Soil.SoilWater.Drainage * NConc1) / 100;
				ObservedLeach2 = ObservedLeach2 + (Soil.SoilWater.Drainage * NConc2) / 100;
				ObservedLeach3 = ObservedLeach3 + (Soil.SoilWater.Drainage * NConc3) / 100;
				ObservedLeach4 = ObservedLeach4 + (Soil.SoilWater.Drainage * NConc4) / 100;
				ObservedLeach5 = ObservedLeach5 + (Soil.SoilWater.Drainage * NConc5) / 100;
				if (ObservedLeach5 > 0)
					NLeachMean = (ObservedLeach1 + ObservedLeach2 + ObservedLeach3 + ObservedLeach4 + ObservedLeach5) / 5;
				else
					NLeachMean = (ObservedLeach1 + ObservedLeach2 + ObservedLeach3) / 3;
				//TotalLeach = TotalLeach + Soil.SoilWater.LeachNH4 + Soil.SoilWater.LeachNO3 + Soil.SoilWater.LeachUrea;
				TotalLeach = TotalLeach + (Soil.SoilWater.flow_no3[7] + Soil.SoilWater.flow_nh4[7]);
			}
		}
		
		[EventSubscribe("PlantEnding")]
		private void OnPlantEnding(object sender, EventArgs e)
		{
			Leach_60 = 0;
			ObservedLeach1 = 0;
			ObservedLeach2 = 0;
			ObservedLeach3 = 0;
			ObservedLeach4 = 0;
			ObservedLeach5 = 0;
			TotalLeach = 0;
			
			
		}
	}
}
```
          Manager ExtraVariables
```csharp
using System;
using Models.Core;
using System.Collections.Generic;
using System.Text;
using Models.Soils;
using Models.PMF;
using Models;
using System.Xml.Serialization;
using APSIM.Shared.Utilities;

namespace Models
{
	[Serializable] 
	public class Script : Model
	{
		[Link] Clock Clock;
		[Link] Soils.Soil Soil;
		[Link] Models.SurfaceOM.SurfaceOrganicMatter SOM;
		[Link] Weather Met;
		[Link] Fertiliser Fert;
		[Link] Irrigation Irrig;
		[Link] Plant SCUM;
		[Link] Zone zone;
					
		[XmlIgnore] public bool InitialDay { get; set; }
		
		[XmlIgnore] public double AccumPlantN { get; set; }
		[XmlIgnore] public double AccumMineralisation { get; set; }
		[XmlIgnore] public double AccumDenit { get; set; }
		[XmlIgnore] public double AccumFert { get; set; }
		[XmlIgnore] public double AccumLeach { get; set; }
		[XmlIgnore] public double AccumDetach { get; set; }
		[XmlIgnore] public double DeltaSoilOMN { get; set; }
		[XmlIgnore] public double DeltaSurfaceOMN { get; set; }
		[XmlIgnore] public double DeltaSoilMineralN { get; set; }
		[XmlIgnore] public double SoilNitrogenContent { get; set; }
		
		
		
		[XmlIgnore] public double AccumEO { get; set; }
		[XmlIgnore] public double AccumEP { get; set; }
		[XmlIgnore] public double AccumES { get; set; }
		[XmlIgnore] public double AccumDrainage { get; set; }
		[XmlIgnore] public double AccumRunoff { get; set; }
		[XmlIgnore] public double AccumOutflowLat { get; set; }
		[XmlIgnore] public double AccumIrrigation { get; set; }
		[XmlIgnore] public double AccumRainfall { get; set; }
		[XmlIgnore] public double SoilWaterDeficit { get; set; }
	
		[XmlIgnore] public double  InitialSoilOMN { get; set; }
		[XmlIgnore] public double  InitialSurfaceOMN { get; set; }
		[XmlIgnore] public double  InitialMineralN { get; set; }
		
		
		[XmlIgnore] public double SWC { get; set; }
		[XmlIgnore] public double DUL { get; set; }
		[XmlIgnore] public double OutFlowLat { get; set; }

		[XmlIgnore] public double FomN { get; set; }
		[XmlIgnore] public double BiomN { get; set; }
		[XmlIgnore] public double HumN { get; set; }
		[XmlIgnore] public double OrganicN { get; set; }
		[XmlIgnore] public double NO3N { get; set; }
		[XmlIgnore] public double NH4N { get; set; }
		[XmlIgnore] public double UreaN { get; set; }
		[XmlIgnore] public double MineralN { get; set; }
		[XmlIgnore] public double DltNMinRes { get; set; }
		[XmlIgnore] public double DltNMinTot { get; set; }
		[XmlIgnore] public double ResidueWt{ get; set; }
		
		
		[EventSubscribe("Commencing")]
		private void OnSimulationCommencing(object sender, EventArgs e)
		{
			InitialDay = true;
		}
		
		[EventSubscribe("DoManagement")]
		private void OnDoManagement(object sender, EventArgs e)
		{
			//!!!!!! Nitrogen balance components !!!!!!
			//!!!!!!^^^^^^^^^^^^^^^^^^^^^^^^^^^^^!!!!!!
			FomN = MathUtilities.Sum(Soil.SoilNitrogen.FOMN);
			HumN = MathUtilities.Sum(Soil.SoilNitrogen.HumicN);
			BiomN = MathUtilities.Sum(Soil.SoilNitrogen.MicrobialN);
			OrganicN = FomN + HumN + BiomN;
			NO3N = MathUtilities.Sum(Soil.NO3N);
			NH4N = MathUtilities.Sum(Soil.NH4N);
			UreaN = MathUtilities.Sum(Soil.SoilNitrogen.urea);
			MineralN = NO3N + NH4N + UreaN; 
			DltNMinRes = MathUtilities.Sum(Soil.SoilNitrogen.dlt_n_min_res);
			DltNMinTot = MathUtilities.Sum(Soil.SoilNitrogen.MineralisedN);
		
			//Residue components//
			ResidueWt = SOM.Wt;
			//MathUtilities.Sum(SOM.dlt_SurfaceOM_wt);	Failed:)
			
			int layers = Soil.Thickness.Length;
			if (InitialDay == true)
			{
				InitialSurfaceOMN = SOM.N;
				InitialSoilOMN = OrganicN;
				InitialMineralN = MineralN;
				InitialDay = false;
			}
			DeltaSurfaceOMN = SOM.N - InitialSurfaceOMN;
			//AccumLeach = AccumLeach + Soil.SoilWater.LeachNH4 + Soil.SoilWater.LeachNO3 + Soil.SoilWater.LeachUrea; //Fails
			AccumLeach = AccumLeach + Soil.SoilWater.LeachNO3;
			AccumMineralisation += MathUtilities.Sum(Soil.SoilNitrogen.MineralisedN);
			AccumDenit -= MathUtilities.Sum(Soil.SoilNitrogen.Denitrification);
			AccumPlantN += (double)zone.Get("SCUM.Root.NUptake");
			DeltaSoilOMN = OrganicN - InitialSoilOMN;
			DeltaSoilMineralN = MineralN - InitialMineralN;
			SoilNitrogenContent = MineralN;
	
			
			
			//!!!!!! Water balance components !!!!!!
			//!!!!!!^^^^^^^^^^^^^^^^^^^^^^^^^^!!!!!!

			AccumRainfall += Met.Rain;
			//AccumEP -= (double)zone.Get("[SCUM].Stover.Transpiration");
			AccumEP -= (double)zone.Get("SCUM.Root.WaterUptake");
			SoilWaterDeficit = (SWC - DUL);
			double OutFlowLat = MathUtilities.Sum(Soil.SoilWater.outflow_lat);
			AccumOutflowLat -= OutFlowLat;
		}
		
		[EventSubscribe("DoManagementCalculations")]
		private void OnDoManagementCalculations(object sender, EventArgs e)
		{
			FomN = MathUtilities.Sum(Soil.SoilNitrogen.FOMN);
			HumN = MathUtilities.Sum(Soil.SoilNitrogen.HumicN);
			BiomN = MathUtilities.Sum(Soil.SoilNitrogen.MicrobialN);
			AccumFert += Fert.NitrogenApplied;
			AccumIrrigation += Irrig.IrrigationApplied;
			
			
			AccumEO -= Soil.SoilWater.Eo;
			AccumES -= Soil.SoilWater.Es; 
			AccumDrainage += Soil.SoilWater.Drainage;
			AccumRunoff -= Soil.SoilWater.Runoff;
			SWC = MathUtilities.Sum(Soil.SoilWater.SWmm);
			DUL = MathUtilities.Sum(Soil.SoilWater.DULmm);
		}
		
		[EventSubscribe("PlantEnding")]
		private void OnPlantEnding(object sender, EventArgs e)
		{
			AccumFert = 0;
			AccumIrrigation = 0;
			
			
			AccumEO = 0;
			AccumES = 0;
			AccumDrainage = 0;
			AccumRunoff = 0;
			
			AccumLeach = 0;
			AccumMineralisation = 0;
			AccumDenit = 0;
			AccumPlantN = 0;
			
			AccumRainfall = 0;
			AccumEP = 0;
			AccumOutflowLat = 0;
			
		}
	}
}
```
          Operations Nit: same as ABlock.Factors.N.1.Nit
          Operations Irrig
            2004-12-08  [Irrigation].Apply(66);
            2005-01-05  [Irrigation].Apply(59);
            2005-01-19  [Irrigation].Apply(45);
            2005-01-26  [Irrigation].Apply(48);
            2005-02-02  [Irrigation].Apply(35);
            2005-02-09  [Irrigation].Apply(38);
            2005-02-23  [Irrigation].Apply(48);
            2005-03-02  [Irrigation].Apply(29);
            2005-11-09  [Irrigation].Apply(50);
            2005-11-30  [Irrigation].Apply(21);
            2005-12-07  [Irrigation].Apply(38);
            2005-12-13  [Irrigation].Apply(18);
            2005-12-21  [Irrigation].Apply(26);
            2005-12-29  [Irrigation].Apply(13);
            2006-01-05  [Irrigation].Apply(39);
            2006-01-12  [Irrigation].Apply(44);
            2006-12-20  [Irrigation].Apply(22);
            2007-01-24  [Irrigation].Apply(22);
            2007-01-25  [Irrigation].Apply(10);
            2007-01-31  [Irrigation].Apply(32);
            2007-02-07  [Irrigation].Apply(23);
            2007-02-21  [Irrigation].Apply(32);
            2007-02-28  [Irrigation].Apply(31);
          Manager InF
            FertDate1 = 2005-10-26
            FertDate2 = 2005-11-25
            NFert = 0
            TreatFact = 0
            IrrDate1 = 2005-11-18
            Irr1 = 0
            IrrFact1 = 0
            IrrDate2 = 2005-11-23
            Irr2 = 0
            IrrFact2 = 0
            IrrDate3 = 2005-12-07
            Irr3 = 0
            IrrFact3 = 0
            IrrDate4 = 2005-12-29
            Irr4 = 0
            IrrFact4 = 0
```csharp
using System;
using Models.Core;
using System.Collections.Generic;
using System.Text;
using Models.PMF;
using Models;
using System.Xml.Serialization;
using APSIM.Shared.Utilities;
using System.Data;

namespace Models
{
	[Serializable] 
	//[System.Xml.Serialization.XmlInclude(typeof(Model))]
	public class Script : Model
	{
		[Link] Plant SCUM;
		[Link] Clock Clock;
		[Link] Zone zone;
		[Link] Simulation Simulation;
		[Link] Fertiliser Fert;
		[Link] Irrigation Irrigation;
		
		[Description("Date of Fert on Wheat")]
		public DateTime FertDate1 { get; set; }
		[Description("Date of Fert on Wheat")]
		public DateTime FertDate2 { get; set; }
		public int NFert { get; set; }
		public double TreatFact { get; set; }
	
		[Description("Date of Irrig on Wheat")]
		public DateTime IrrDate1 { get; set; }
		public int Irr1 { get; set; }
		public double IrrFact1 { get; set; }
		[Description("Date of Irrig on Wheat")]
		public DateTime IrrDate2 { get; set; }
		public int Irr2 { get; set; }
		public double IrrFact2 { get; set; }
		[Description("Date of Irrig on Wheat")]
		public DateTime IrrDate3 { get; set; }
		public int Irr3 { get; set; }
		public double IrrFact3 { get; set; }
		[Description("Date of Irrig on Wheat")]
		public DateTime IrrDate4 { get; set; }
		public int Irr4 { get; set; }
		public double IrrFact4 { get; set; }
		
		
		[EventSubscribe("DoManagement")]
		private void OnDoManagement(object sender, EventArgs e)
		{
			if (Clock.Today.Date == FertDate1)
			{
				Fert.Apply(NFert * TreatFact * 0.5, Fertiliser.Types.UreaN, 50);
			}
			if (Clock.Today.Date == FertDate2)
			{
				Fert.Apply(NFert * TreatFact, Fertiliser.Types.UreaN, 50);
			}
			if (Clock.Today.Date == IrrDate1)
			{
				Irrigation.Apply(Irr1 * IrrFact1);
			}
			if (Clock.Today.Date == IrrDate2)
			{
				Irrigation.Apply(Irr2 * IrrFact2);
			}
			if (Clock.Today.Date == IrrDate3)
			{
				Irrigation.Apply(Irr3 * IrrFact3);
			}
			if (Clock.Today.Date == IrrDate4)
			{
				Irrigation.Apply(Irr4 * IrrFact4);
			}
		}
	}
}
```
        Report: EventNames=[Clock].DoReport
          VariableNames:
            [Clock].Today
            [ExtraVariables].Script.AccumPlantN
            [ExtraVariables].Script.AccumMineralisation
            [ExtraVariables].Script.AccumDenit
            [ExtraVariables].Script.AccumFert
            [ExtraVariables].Script.AccumLeach as LeachNo3
            [ExtraVariables].Script.AccumDetach
            [ExtraVariables].Script.DeltaSoilOMN
            [ExtraVariables].Script.DeltaSurfaceOMN as SOM_N
            [ExtraVariables].Script.DeltaSoilMineralN
            [ExtraVariables].Script.DltNMinRes as Residue_N
            [ExtraVariables].Script.SWC as SWC
            [ExtraVariables].Script.DUL
            [ExtraVariables].Script.OutFlowLat
            [ExtraVariables].Script.AccumEO
            [ExtraVariables].Script.AccumEP
            [ExtraVariables].Script.AccumES
            [ExtraVariables].Script.AccumDrainage as Drainage
            [ExtraVariables].Script.AccumRunoff
            [ExtraVariables].Script.AccumRainfall
            [ExtraVariables].Script.AccumIrrigation
            [ExtraVariables].Script.AccumOutflowLat
            [ExtraVariables].Script.SoilWaterDeficit
            [ExtraVariables].Script.SoilNitrogenContent as TotalSoilN
            [ExtraVariables].Script.FomN
            [ExtraVariables].Script.HumN
            [ExtraVariables].Script.BiomN
            [ExtraVariables].Script.DltNMinRes
            [ExtraVariables].Script.DltNMinTot
            [MicroClimate].net_radn
            [MicroClimate].peta
            [MicroClimate].petr
            [Soil].SoilWater.Drainage
            [Soil].SoilWater.Runoff
            [Soil].SoilWater.Eo
            [Soil].SoilWater.Es
            [Soil].SoilWater.pond
            [Soil].SoilWater.SWmm
            [Soil].NO3N
            [SCUM].Stover.Live.Wt
            [SCUM].Root.Live.Wt
            [SCUM].Product.Live.Wt
            [SCUM].Stover.Live.N
            [SCUM].Root.Live.N
            [SCUM].Product.Live.N
            [SCUM].Stover.Live.NConc
            [SCUM].Root.Live.NConc
            [SCUM].Product.Live.NConc
            [SCUM].Root.WaterSupply
            [SCUM].Root.WaterUptake
            [SCUM].Stover.Transpiration
            [SCUM].Stover.WaterDemand
            [SCUM].Root.Depth
            [SCUM].Stover.CoverTotal
            [SCUM].Stover.CoverDead
            [SCUM].Stover.LAI
            [SCUM].Stover.Height
            [SCUM].Stover.PotentialBiomass.Value
            [SCUM].Product.LiveFWt
            [SCUM].Arbitrator.NDemand
            [SCUM].Arbitrator.NSupply
            [SCUM].Stover.Fw
            [SCUM].Stover.Fn
            [SCUM].Total.Wt
            [SCUM].ExpectedYield.Value
            [SCUM].DryYield.Value
            [SCUM].TotalBiomassAtStartReproductive.Value
            [SCUM].TotalBiomassAtStartSenescence.Value
            [SCUM].Ymax.Value
            [SCUM].Total.N
            [SCUM].Arbitrator.DMSupply
            [SCUM].Arbitrator.DMDemand
            [SCUM].Phenology.AccumulatedThermalTime.Value
            [SCUM].Arbitrator.DMSinkLimitation
            [SCUM].Arbitrator.DMNutrientLimitation
            [SCUM].Phenology.ThermalTime.Value
            [SCUM].Phenology.CurrentPhaseName
            [SCUM].Phenology.Stage
            [AutomaticIrrigation].Script.Top_Refull
            [AutomaticIrrigation].Script.Top_Trigger
            [AutomaticIrrigation].Script.Top_SW
            [AutomaticIrrigation].Script.Top_DUL
            [Irrigation].IrrigationApplied
            [AutomaticIrrigation].Script.Amount_to_apply
            [AutomaticIrrigation].Script.StartDate
            [AutomaticIrrigation].Script.SeasonIsOpen
            [AutomaticIrrigation].Script.EndDate
            [AutomaticIrrigation].Script.TodayYear
            [SCUM].Arbitrator.FN
            [NConcReps].Script.TotalLeach
            [NConcReps].Script.ObservedLeach1
            [NConcReps].Script.ObservedLeach2
            [NConcReps].Script.ObservedLeach3
            [NConcReps].Script.ObservedLeach4
            [NConcReps].Script.ObservedLeach5
            [NConcReps].Script.Leach_60
            [Soil].SoilWater.solute_flow_eff
            [Soil].SoilWater.solute_flux_eff
            [SCUM].Total.N
            [Soil].SoilWater.flow_no3
            [TreatmentID].Script.TreatmentName as Treat
            [Sowing_Yield].Script.Treatment
            [TreatmentID].Script.Rotation as RotTreat
            [TreatmentID].Script.Irrigation as IrrigTreat
            [TreatmentID].Script.Nitrogen as NitTreat
            [SurfaceOrganicMatter].N
            [SurfaceOrganicMatter].wt
            [SurfaceOrganicMatter].Cover
        Report PredictedLeach: EventNames=[SCUM].Harvesting
          VariableNames:
            [Clock].Today
            [NConcReps].Script.TotalLeach as NLeaching
        Report ObservedLeach: EventNames=[SCUM].Harvesting
          VariableNames:
            [Clock].Today
            [NConcReps].Script.NLeachMean as NLeaching
    Folder LeachingObsPre
      Memo
        Predictions working well for all but the high N treatment in the final wheat crop following the potato crop.  I suspect the model is under predicting Denitrification here
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