Simulations: Version=34
  DataStore
    Input ObservedResidues: FileName=A_block_obs_residual.txt
    Input ObservedSoilWater: FileName=a_block_obs_soilwater.txt
    PredictedObserved: PredictedTableName=Report; ObservedTableName=ObservedSoilWater; FieldNameUsedForMatch=Clock.Today
      Tests: POName=PredictedObserved
        AcceptedStats:
          Name                    n    Slope     Intercept  SEslope    SEintercept  R2        RMSE     NSE       ME         MAE      RSR
          ProfileWater            672  0.568622  65.3358    0.0131794  2.0533       0.735332  15.0333  0.696607  -0.832166  10.6123  0.550402
          Soil.SoilWater.SWmm(1)  672  0.710422  14.3444    0.0165246  0.864586     0.733948  4.05172  0.726373  -0.639705  3.11105  0.522705
          Soil.SoilWater.SWmm(2)  672  0.420962  29.0007    0.0148105  0.743806     0.546648  6.69013  0.515479  0.458013   5.10043  0.695557
          Soil.SoilWater.SWmm(3)  672  0.555948  22.5953    0.0149977  0.804071     0.672227  6.85568  0.648954  -0.650475  4.25052  0.592051
        AcceptedStatsName=Name n Slope Intercept SEslope SEintercept R2 RMSE NSE ME MAE RSR
  Experiment Residues
    Factors
      Factor Cover: Specifications=[SurfaceOrganicMatter]
        SurfaceOrganicMatter StandingStubble: InitialResidueName=Barley; InitialResidueType=Barley; InitialResidueMass=2026; InitialStandingFraction=1; InitialCPR=0; InitialCNR=80; CriticalResidueWeight=2000; OptimumDecompTemp=20; MaxCumulativeEOS=20; CNRatioDecompCoeff=0.277; CNRatioDecompThreshold=25; TotalLeachRain=25; MinRainToLeach=10; CriticalMinimumOrganicC=0.004; DefaultCPRatio=0; DefaultStandingFraction=0; StandingExtinctCoeff=0.5; FractionFaecesAdded=0.5
        SurfaceOrganicMatter HarvesterWindrow: InitialResidueName=Barley; InitialResidueType=Barley; InitialResidueMass=8300; InitialStandingFraction=0; InitialCPR=0; InitialCNR=80; CriticalResidueWeight=2000; OptimumDecompTemp=20; MaxCumulativeEOS=20; CNRatioDecompCoeff=0.277; CNRatioDecompThreshold=25; TotalLeachRain=25; MinRainToLeach=10; CriticalMinimumOrganicC=0.004; DefaultCPRatio=0; DefaultStandingFraction=0; StandingExtinctCoeff=0.5; FractionFaecesAdded=0.5
        SurfaceOrganicMatter MownStubble: InitialResidueName=Barley; InitialResidueType=Barley; InitialResidueMass=400; InitialStandingFraction=1; InitialCPR=0; InitialCNR=80; CriticalResidueWeight=2000; OptimumDecompTemp=20; MaxCumulativeEOS=20; CNRatioDecompCoeff=0.277; CNRatioDecompThreshold=25; TotalLeachRain=25; MinRainToLeach=10; CriticalMinimumOrganicC=0.004; DefaultCPRatio=0; DefaultStandingFraction=0; StandingExtinctCoeff=0.5; FractionFaecesAdded=0.5
        SurfaceOrganicMatter BareSoil: InitialResidueName=Barley; InitialResidueType=Barley; InitialResidueMass=0; InitialStandingFraction=1; InitialCPR=0; InitialCNR=80; CriticalResidueWeight=2000; OptimumDecompTemp=20; MaxCumulativeEOS=20; CNRatioDecompCoeff=0.277; CNRatioDecompThreshold=25; TotalLeachRain=25; MinRainToLeach=10; CriticalMinimumOrganicC=0.004; DefaultCPRatio=0; DefaultStandingFraction=0; StandingExtinctCoeff=0.5; FractionFaecesAdded=0.5
    Simulation Base
      Weather: FileName=..\..\WeatherFiles\lincoln.met
      Clock: StartDate=2010-02-25; EndDate=2010-08-11
      Summary
      Zone Field: Area=1; Slope=0
        Soil: SoilType=Sedementary; LocalName=Lincoln; Latitude=0; Longitude=0
          Water
            Thickness  BD    AirDry  LL15   DUL   SAT    KS
            200        1.3   0.06    0.08   0.27  0.31   999
            200        1.3   0.124   0.124  0.25  0.358  300
            200        1.3   0.106   0.106  0.27  0.4    100
            200        1.52  0.07    0.07   0.2   0.314  90
            200        1.52  0.07    0.07   0.2   0.314  90
            200        1.52  0.165   0.165  0.3   0.358  90
            200        1.65  0.157   0.157  0.29  0.35   90
            200        1.65  0.125   0.125  0.25  0.318  90
            200        1.65  0.125   0.125  0.25  0.318  90
            200        1.65  0.125   0.125  0.25  0.318  90
            200        1.65  0.125   0.125  0.25  0.318  90
            200        1.65  0.125   0.125  0.25  0.318  90
            200        1.65  0.125   0.125  0.25  0.318  90
            200        1.65  0.125   0.125  0.25  0.318  90
            200        1.6   0.125   0.125  0.25  0.318  90
          SoilWater: SummerDate=1-Nov; SummerU=9; SummerCona=4.4; WinterDate=1-Apr; WinterU=9; WinterCona=4.4; DiffusConst=88; DiffusSlope=35; Salb=0.13; CN2Bare=73; CNRed=20; CNCov=0.8; slope=0; discharge_width=0; catchment_area=0; max_pond=0; ResidueInterception=0
            Thickness  SWCON  KLAT
            200        0.3    0
            200        0.6    0
            200        0.6    0
            200        0.6    0
            200        0.95   0
            200        0.95   0
            200        0.95   0
            200        0.95   0
            200        0.95   0
            200        0.95   0
            200        0.95   0
            200        0.95   0
            200        0.95   0
            200        0.95   0
            200        0.95   0
          SoilNitrogen: fom_type=[default, manure, mucuna, lablab, shemp, stable]; fract_carb=[0.2, 0.3, 0.54, 0.57, 0.45, 0]; fract_cell=[0.7, 0.3, 0.37, 0.37, 0.47, 0.1]; fract_lign=[0.1, 0.4, 0.09, 0.06, 0.08, 0.9]
          SoilOrganicMatter: RootCN=40; RootWt=1000; SoilCN=11; EnrACoeff=7.4; EnrBCoeff=0.2; OCUnits=Total
            Thickness  OC    FBiom  FInert
            200        2.63  0.03   0.4
            200        1.25  0.02   0.7
            200        0.32  0.01   0.8
            200        0.21  0.01   0.9
            200        0.2   0.01   1
            200        0.2   0.01   1
            200        0.2   0.01   1
            200        0.2   0.01   1
            200        0.2   0.01   1
            200        0.2   0.01   1
            200        0.2   0.01   1
            200        0.2   0.01   1
            200        0.2   0.01   1
            200        0.2   0.01   1
            200        0.2   0.01   1
          Analysis: PH=[6, 6, 6, 6, 6, 6, 6, 6, 6, 6, 6, 6, 6, 6, 6]; PHUnits=Water; BoronUnits=HotWater
            Thickness=[200, 200, 200, 200, 200, 200, 200, 200, 200, 200, 200, 200, 200, 200, 200]
          Sample InitialN: NO3Units=kgha; NH4Units=kgha; SWUnits=Volumetric; OCUnits=Total; PHUnits=Water
            Thickness  NO3      NH4    SW
            200        115.556  0.26   0.253
            200        77.0371  0.26   0.175
            200        57.7778  0.26   0.15
            200        33.7778  0.304  0.1
            200        33.7778  0.304  0.13
            200        0        0.304  0.25
            200        0        0.33   0.29
            200        0        0.33   0.25
            200        0.33     0.33   0.25
            200        0.33     0.33   0.25
            200        0.33     0.33   0.25
            200        0.33     0.33   0.25
            200        0.33     0.33   0.25
            200        0.33     0.33   0.25
            200        0.32     0.32   0.25
          CERESSoilTemperature
        Irrigation
        Fertiliser
        SurfaceOrganicMatter: same as Residues.Factors.Cover.StandingStubble
        MicroClimate: a_interception=0; b_interception=1; c_interception=0; d_interception=0; soil_albedo=0.3; sun_angle=15; soil_heat_flux_fraction=0.4; night_interception_fraction=0.5; refheight=2; albedo=0.293662; emissivity=0.96; RadIntTotal=0
        Report
          VariableNames:
            [Clock].Today
            [SurfaceOrganicMatter].Cover
            [SurfaceOrganicMatter].Wt
            [Soil].SoilWater.SWmm
            [Weather].Rain
            [Soil].Thickness
            [Soil].SoilWater.Es
            [Irrigation].IrrigationApplied
            [Soil].SoilWater.SW
            [Soil].SoilWater.Runoff
            [Soil].SoilWater.Infiltration
            [Soil].SoilWater.Drainage
            [Soil].LL15
            [Soil].DUL
            [Soil].LL15mm
            [Soil].DULmm
            sum([Soil].SoilWater.SWmm[1:3] as ProfileWater
            [ExtraVariables].Script.SWDep60
            [ExtraVariables].Script.FomN
            [ExtraVariables].Script.HumN
            [ExtraVariables].Script.BiomN
            [ExtraVariables].Script.DltNMinRes
            [ExtraVariables].Script.DltNMinTot
            [ExtraVariables].Script.AccumPlantN
            [ExtraVariables].Script.AccumMineralisation
            [ExtraVariables].Script.AccumDenit
            [ExtraVariables].Script.AccumFert
            [ExtraVariables].Script.AccumLeach
            [ExtraVariables].Script.AccumDetach
            [ExtraVariables].Script.DeltaSoilOMN
            [ExtraVariables].Script.DeltaSurfaceOMN
            [ExtraVariables].Script.DeltaSoilMineralN
            [ExtraVariables].Script.AccumEO
            [ExtraVariables].Script.AccumEP
            [ExtraVariables].Script.AccumES
            [ExtraVariables].Script.AccumDrainage
            [ExtraVariables].Script.AccumRunoff
            [ExtraVariables].Script.AccumRainfall
            [ExtraVariables].Script.AccumIrrigation
            [ExtraVariables].Script.AccumOutflowLat
            [ExtraVariables].Script.SoilWaterDeficit
            [Soil].SoilNitrogen.Denitrification
            [ExtraVariables].Script.MineralN
            [Soil].NO3N
            [Soil].NH4N
            [Soil].SoilNitrogen.urea
          EventNames:
            [Clock].DoReport
        Operations
          2010-03-05  [Irrigation].Apply(26.6);
          2010-03-08  [Irrigation].Apply(30.4);
          2010-03-09  [Irrigation].Apply(100);
          2010-03-12  [Irrigation].Apply(10);
        Manager ResiduePrecipitationInterception
```csharp
using System;
using Models.Core;
using System.Collections.Generic;
using System.Text;
using Models.Soils;
using Models;
using System.Xml.Serialization;
using APSIM.Shared.Utilities;

namespace Models
{
    [Serializable] 
    public class Script : Model
    {
        [Link] Clock Clock;
        [Link] Soils.Soil Soil;
        [Link] Models.Surface.SurfaceOrganicMatter SOM;
        [Link] Weather Met;
        [Link] Irrigation Irrig;
               
        [XmlIgnore] public bool InitialDay { get; set; }

        [XmlIgnore] public double Precip { get; set; }
        [XmlIgnore] public double Maximum_interception { get; set; }
        [XmlIgnore] public double Residue_water { get; set; }
        [XmlIgnore] public double Interception_today { get; set; }
        [XmlIgnore] public double Evaporated_interception { get; set; }
        [XmlIgnore] public double SWC60 { get; set; }

        [EventSubscribe("Initialised")]
        private void OnInitialised(object sender, EventArgs e)
        {
            Precip = 0;
            Maximum_interception = 0;
            Residue_water = 0;
            Interception_today = 0;
            Evaporated_interception = 0;
            SWC60 = 0;
        }

        [EventSubscribe("DoManagementCalculations")]
        private void OnDoManagementCalculations(object sender, EventArgs e)
        {
//calculate the amount of water that is going to evaporate from the residue water pool

            if (Residue_water > Soil.SoilWater.Eo)
                Evaporated_interception = Soil.SoilWater.Eo;
            else
                Evaporated_interception = Residue_water;

            SWC60 = Soil.SoilWater.SWmm[0] + Soil.SoilWater.SWmm[1] + Soil.SoilWater.SWmm[2];

// remove evaporation from residue water pool               

            Residue_water = Residue_water - Evaporated_interception;
        }

        [EventSubscribe("DoManagement")]
        private void OnDoManagement(object sender, EventArgs e)
        {
//Set interception variables
            Precip = Met.Rain + Irrig.IrrigationApplied; 
            Maximum_interception = 0.0002 * SOM.Wt;
          
//Determine the amount of water intercepted by residue today
            if ((Precip * SOM.Cover) >= (Maximum_interception - Residue_water))
                Interception_today = (Maximum_interception - Residue_water);
            else
                Interception_today = (Precip * SOM.Cover);

// Send message to soil module to take interception out of water balance
    
            Soil.SoilWater.ResidueInterception = Interception_today;
            
//Add intercepted water into residual water pool

            Residue_water = Residue_water + Interception_today;



            

        }
    }
}
```
        Manager ExtraVariables
```csharp
using System;
using Models.Core;
using System.Collections.Generic;
using System.Text;
using Models.Soils;
using Models;
using System.Xml.Serialization;
using APSIM.Shared.Utilities;

namespace Models
{
    [Serializable] 
    public class Script : Model
    {
        [Link] Clock Clock;
        [Link] Soils.Soil Soil;
        [Link] Models.Surface.SurfaceOrganicMatter SOM;
        [Link] Weather Met;
        [Link] Fertiliser Fert;
        [Link] Irrigation Irrig;
                    
        [XmlIgnore] public bool InitialDay { get; set; }
        
        [XmlIgnore] public double AccumPlantN { get; set; }
        [XmlIgnore] public double AccumMineralisation { get; set; }
        [XmlIgnore] public double AccumDenit { get; set; }
        [XmlIgnore] public double AccumFert { get; set; }
        [XmlIgnore] public double AccumLeach { get; set; }
        [XmlIgnore] public double AccumDetach { get; set; }
        [XmlIgnore] public double DeltaSoilOMN { get; set; }
        [XmlIgnore] public double DeltaSurfaceOMN { get; set; }
        [XmlIgnore] public double DeltaSoilMineralN { get; set; }
        [XmlIgnore] public double SoilNitrogenContent { get; set; }
        
        [XmlIgnore] public double AccumEO { get; set; }
        [XmlIgnore] public double AccumEP { get; set; }
        [XmlIgnore] public double AccumES { get; set; }
        [XmlIgnore] public double AccumDrainage { get; set; }
        [XmlIgnore] public double AccumRunoff { get; set; }
        [XmlIgnore] public double AccumOutflowLat { get; set; }
        [XmlIgnore] public double AccumIrrigation { get; set; }
        [XmlIgnore] public double AccumRainfall { get; set; }
        [XmlIgnore] public double SoilWaterDeficit { get; set; }
        
        [XmlIgnore] public double AccumTtemerg { get; set; }
        
        [XmlIgnore] public double  InitialSoilOMN { get; set; }
        [XmlIgnore] public double  InitialSurfaceOMN { get; set; }
        [XmlIgnore] public double  InitialMineralN { get; set; }
        
        [XmlIgnore] public double SWC { get; set; }
        [XmlIgnore] public double DUL { get; set; }
        [XmlIgnore] public double OutFlowLat { get; set; }
        [XmlIgnore] public double SWDep60 { get; set; }
        [XmlIgnore] public double Flux1 { get; set; }
        [XmlIgnore] public double Flux3 { get; set; }
        
        [XmlIgnore] public double FomN { get; set; }
        [XmlIgnore] public double BiomN { get; set; }
        [XmlIgnore] public double HumN { get; set; }
        [XmlIgnore] public double OrganicN { get; set; }
        [XmlIgnore] public double NO3N { get; set; }
        [XmlIgnore] public double NH4N { get; set; }
        [XmlIgnore] public double UreaN { get; set; }
        [XmlIgnore] public double MineralN { get; set; }
        [XmlIgnore] public double DltNMinRes { get; set; }
        [XmlIgnore] public double DltNMinTot { get; set; }
        
        [EventSubscribe("Commencing")]
        private void OnSimulationCommencing(object sender, EventArgs e)
        {
            InitialDay = true;
        }
        
        [EventSubscribe("DoManagement")]
        private void OnDoManagement(object sender, EventArgs e)
        {
            //!!!!!! Nitrogen balance components !!!!!!
            //!!!!!!^^^^^^^^^^^^^^^^^^^^^^^^^^^^^!!!!!!
            FomN = MathUtilities.Sum(Soil.SoilNitrogen.FOMN);
            HumN = MathUtilities.Sum(Soil.SoilNitrogen.HumicN);
            BiomN = MathUtilities.Sum(Soil.SoilNitrogen.MicrobialN);
            OrganicN = FomN + HumN + BiomN;
            NO3N = MathUtilities.Sum(Soil.NO3N);
            NH4N = MathUtilities.Sum(Soil.NH4N);
            UreaN = MathUtilities.Sum(Soil.SoilNitrogen.urea);
            MineralN = NO3N + NH4N + UreaN; 
            DltNMinRes = MathUtilities.Sum(Soil.SoilNitrogen.dlt_n_min_res);
            DltNMinTot = MathUtilities.Sum(Soil.SoilNitrogen.MineralisedN);
            int layers = Soil.Thickness.Length;
            if (InitialDay == true)
            {
                InitialSurfaceOMN = SOM.N;
                InitialSoilOMN = OrganicN;
                InitialMineralN = MineralN;
                InitialDay = false;
            }
            AccumFert += Fert.NitrogenApplied;
            DeltaSurfaceOMN = SOM.N - InitialSurfaceOMN;
            AccumLeach = AccumLeach - Soil.SoilWater.LeachNH4 - Soil.SoilWater.LeachNO3 - Soil.SoilWater.LeachUrea; //Fails
            AccumMineralisation += MathUtilities.Sum(Soil.SoilNitrogen.MineralisedN);
            AccumDenit -= MathUtilities.Sum(Soil.SoilNitrogen.Denitrification);
            DeltaSoilOMN = OrganicN - InitialSoilOMN;
            DeltaSoilMineralN = MineralN - InitialMineralN;
            SoilNitrogenContent = MineralN;
            
            //!!!!!! Water balance components !!!!!!
            //!!!!!!^^^^^^^^^^^^^^^^^^^^^^^^^^!!!!!!

            AccumIrrigation += Irrig.IrrigationApplied; 
            AccumRainfall += Met.Rain;
            SWDep60 = 0;
            SWC = MathUtilities.Sum(Soil.SoilWater.SWmm);
            DUL = MathUtilities.Sum(Soil.DULmm);
            SoilWaterDeficit = (SWC - DUL);
            double OutFlowLat = MathUtilities.Sum(Soil.SoilWater.LateralOutflow);
            AccumOutflowLat -= OutFlowLat;
            SWDep60 = Soil.SoilWater.SWmm[0] + Soil.SoilWater.SWmm[1] + Soil.SoilWater.SWmm[2];
        }
        
        [EventSubscribe("DoManagementCalculations")]
        private void OnDoManagementCalculations(object sender, EventArgs e)
        {
            int layers = Soil.Thickness.Length;            
            AccumEO -= Soil.SoilWater.Eo;
            AccumES -= Soil.SoilWater.Es; 
            AccumDrainage -= Soil.SoilWater.Drainage;
            AccumRunoff -= Soil.SoilWater.Runoff;
            Flux1 = Soil.SoilWater.Flux[0];
            Flux3 = Soil.SoilWater.Flux[2];
        }
    }
}
```
        SoluteManager
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