Simulations: Version=58
  DataStore
    ExcelInput Observed: FileName=Observed.xlsx; SheetNames=[Observed]
  Folder Evaporation
    Folder Wellcamp
      Memo
        This dataset was developed as part of work by [huth_managing_2008].  Evaporation from a Black Vertosol over a period of 6 months was measured using a Neutron Moisture Meter at Wellcamp, near Toowoomba in Queensland, Australia.  Rainfall was excluded from the soil.  Drainage was unlikely during the study period and so all changes in water content should be due to evaporation alone.
      Experiment WellCamp
        Factors
          Factor Surface: Specification=[SurfaceOrganicMatter]
            SurfaceOrganicMatter Bare: InitialResidueName=wheat_stubble; InitialResidueType=wheat; InitialResidueMass=10; InitialStandingFraction=0; InitialCPR=0; InitialCNR=100; FractionFaecesAdded=0.5
        Simulation WellcampBase
          Clock: StartDate=2006-02-27; EndDate=2006-09-04
          Summary SummaryFile
          Weather: FileName=Toowoomba.met
          SoilArbitrator
          MicroClimate: a_interception=0; b_interception=1; c_interception=0; d_interception=0; soil_albedo=0.3; SoilHeatFluxFraction=0.4; NightInterceptionFraction=0.5; ReferenceHeight=2
          Zone Field: Area=1; Slope=0
            Report: EventNames=[Clock].DoReport
              VariableNames:
                [Clock].Today
                [Soil].SoilWater.Es
                sum([Soil].SoilWater.SWmm) as TotalSW
                [Soil].SoilWater.SW
            Soil: ASCOrder=Vertosol; ASCSubOrder=Black; SoilType=Clay; Site=Norwin; NearestTown=Norwin; Region=Darling Downs and Granite Belt; State=Queensland; Country=Australia; NaturalVegetation=Qld. Bluegrass, possible Qld. Blue gum; ApsoilNumber=900; Latitude=-27.581836; Longitude=151.320206; LocationAccuracy=+/- 20m
              DataSource=CSIRO Sustainable Ecosystems, Toowoomba; Characteriesd as part of the GRDC funded project"Doing it better, doing it smarter, managing soil water in Australian agriculture' 2011
              Comments=OC, CLL for all crops estimated-based on Bongeen Mywybilla Soil No1
              Water
                Thickness  BD    AirDry  LL15  DUL   SAT   KS
                150        0.9   0.15    0.32  0.54  0.62  20
                150        1.01  0.26    0.32  0.52  0.59  20
                300        1.02  0.29    0.38  0.52  0.55  20
                300        1     0.29    0.3   0.48  0.54  20
                300        1.06  0.3     0.25  0.39  0.5   20
                300        1.14  0.31    0.28  0.4   0.5   20
              SoilOrganicMatter: RootCN=40; EnrACoeff=7.4; EnrBCoeff=0.2; OCUnits=Total
                Thickness  OC    SoilCN  FBiom  FInert  RootWt
                150        1.04  12.5    0.025  0.4     78.1195
                150        0.89  12.5    0.02   0.6     57.8724
                300        0.89  12.5    0.015  0.8     31.761
                300        0.89  12.5    0.01   0.9     17.4308
                300        0.77  12.5    0.01   0.95    9.56624
                300        0.45  12.5    0.01   0.95    5.25006
              SoilWater: SummerDate=1-Nov; SummerU=9; SummerCona=5; WinterDate=1-Apr; WinterU=9; WinterCona=5; DiffusConst=20; DiffusSlope=8; Salb=0.13; CN2Bare=73; CNRed=20; CNCov=0.8; max_pond=0; Thickness=[150, 150, 300, 300, 300, 300]; SWCON=[0.3, 0.3, 0.3, 0.3, 0.3, 0.3]; ResidueInterception=0
              Analysis: PHUnits=Water; BoronUnits=0
                Thickness  EC    PH
                150        0.2   8.4
                150        0.25  8.8
                300        0.31  9
                300        0.4   9.2
                300        0.59  9.2
                300        0.84  9.1
              CERESSoilTemperature
              Nutrient
                DirectedGraphInfo={Nodes=[{Name=Inert, OutlineColour=Black}, {Name=SurfaceResidue, OutlineColour=Black}, {Name=FOMLignin, OutlineColour=Black}, {Name=FOMCellulose, OutlineColour=Black}, {Name=FOMCarbohydrate, OutlineColour=Black}, {Name=Microbial, OutlineColour=Black}, {Name=Humic, OutlineColour=Black}, {Name=Urea, OutlineColour=Black}, {Name=NO3, OutlineColour=Black}, {Name=NH4, OutlineColour=Black}, {Name=Atmosphere, OutlineColour=White}, {Name=PlantAvailableNO3, OutlineColour=Black}, {Name=PlantAvailableNH4, OutlineColour=Black}], Arcs=[{SourceName=SurfaceResidue, DestinationName=Microbial}, {SourceName=SurfaceResidue, DestinationName=Humic}, {SourceName=FOMLignin, DestinationName=Microbial}, {SourceName=FOMLignin, DestinationName=Humic}, {SourceName=FOMCellulose, DestinationName=Microbial}, {SourceName=FOMCellulose, DestinationName=Humic}, {SourceName=FOMCarbohydrate, DestinationName=Microbial}, {SourceName=FOMCarbohydrate, DestinationName=Humic}, {SourceName=Microbial, DestinationName=Microbial}, {SourceName=Microbial, DestinationName=Humic}, {SourceName=Humic, DestinationName=Microbial}, {SourceName=Urea, DestinationName=NH4}, {SourceName=NO3, DestinationName=Atmosphere}, {SourceName=NH4, DestinationName=NO3}]}
              Sample Initial nitrogen: NO3Units=ppm; NH4Units=ppm; SWUnits=Volumetric; OCUnits=Total; PHUnits=Water
                Thickness  NO3    NH4       SW
                150        6.503  0.599004  0.4695
                150        2.101  0.100001  0.4827
                300        2.101  0.100001  0.5052
                300        1.701  0.100001  0.4509
                300        1.701  0.100001  0.363
                300        1.701  0.100001  0.3772
            SurfaceOrganicMatter: InitialResidueName=wheat_stubble; InitialResidueType=wheat; InitialResidueMass=10; InitialStandingFraction=0; InitialCPR=0; InitialCNR=100; FractionFaecesAdded=0.5
    Folder TorStreet
      Memo
        Evaporation from a Grey Vertosol over a period of 7 months was measured using weighing lysimeters in Toowoomba, Queensland, Australia.
      Experiment TorStreet
        Factors
          Factor Surface: Specification=[SurfaceOrganicMatter]
            SurfaceOrganicMatter Bare: InitialResidueName=wheat_stubble; InitialResidueType=wheat; InitialResidueMass=10; InitialStandingFraction=0; InitialCPR=0; InitialCNR=100; FractionFaecesAdded=0.5
            SurfaceOrganicMatter Mulch: InitialResidueName=wheat_stubble; InitialResidueType=wheat; InitialResidueMass=4000; InitialStandingFraction=0; InitialCPR=0; InitialCNR=40; FractionFaecesAdded=0.5
        Simulation TorStreetBase
          Clock: StartDate=1982-05-11; EndDate=1982-12-01
          Summary SummaryFile
          Weather: FileName=TorStreet.met
          SoilArbitrator
          MicroClimate: a_interception=0; b_interception=1; c_interception=0; d_interception=0; soil_albedo=0.3; SoilHeatFluxFraction=0.4; NightInterceptionFraction=0.5; ReferenceHeight=2
          Zone Field: Area=1; Slope=0
            Report: EventNames=[Clock].DoReport
              VariableNames:
                [Clock].Today
                [Soil].SoilWater.Es
                sum([Soil].SoilWater.SWmm) as TotalSW
                sum([Soil].DULmm) as DUL
                sum([Soil].LL15mm) as LL15
                [Soil].SoilWater.SW
            Soil: ASCOrder=Vertosol; SoilType=Clay; LocalName=Moola Grey Clay; Latitude=-27.581836; Longitude=151.320206
              Water
                Thickness  BD    AirDry  LL15   DUL  SAT   KS
                100        1     0.084   0.198  0.4  0.55  20
                100        1.27  0.15    0.2    0.4  0.5   20
                150        1.32  0.2     0.2    0.4  0.5   20
              SoilOrganicMatter: RootCN=40; EnrACoeff=7.4; EnrBCoeff=0.2; OCUnits=Total
                Thickness  OC    SoilCN  FBiom  FInert  RootWt
                50         1.03  12.5    0.025  0.4     78.1195
                50         1.03  12.5    0.02   0.6     57.8724
                50         0.86  12.5    0.015  0.8     31.761
                50         0.86  12.5    0.01   0.9     17.4308
                50         0.77  12.5    0.01   0.95    9.56624
                50         0.77  12.5    0.01   0.95    5.25006
                50         0.65  12.5    0.01   0.95    1
              SoilWater: SummerDate=1-Nov; SummerU=9; SummerCona=5; WinterDate=1-Apr; WinterU=9; WinterCona=5; DiffusConst=40; DiffusSlope=16; Salb=0.13; CN2Bare=50; CNRed=20; CNCov=0.8; max_pond=0; Thickness=[150, 150, 300, 300, 300, 300]; SWCON=[0.3, 0.3, 0.3, 0.3, 0.3, 0.3]; ResidueInterception=0
              Analysis: Thickness=[50, 50, 50, 50, 50, 50, 50]; PH=[7, 7, 7, 7, 7, 7, 7]; PHUnits=Water; BoronUnits=0
              CERESSoilTemperature
              Nutrient: same as Evaporation.Wellcamp.WellCamp.WellcampBase.Field.Soil.Nutrient
              Sample Initial nitrogen: NO3Units=ppm; NH4Units=ppm; SWUnits=Volumetric; OCUnits=Total; PHUnits=Water
                Thickness  NO3    NH4       SW
                50         6.503  0.599004  0.198
                50         2.101  0.100001  0.198
                50         2.101  0.100001  0.251
                50         1.701  0.100001  0.251
                50         1.701  0.100001  0.246
                50         1.701  0.100001  0.246
                50         1      0.1       0.239
            SurfaceOrganicMatter: InitialResidueName=wheat_stubble; InitialResidueType=wheat; InitialResidueMass=10; InitialStandingFraction=0; InitialCPR=0; InitialCNR=100; FractionFaecesAdded=0.5
    Folder Norwin
      Memo: same as Evaporation.Wellcamp.Memo
      Experiment Norwin
        Factors
          Factor Surface: Specification=[SurfaceOrganicMatter]
            SurfaceOrganicMatter Mulch: InitialResidueName=wheat_stubble; InitialResidueType=wheat; InitialResidueMass=4000; InitialStandingFraction=0.66; InitialCPR=0; InitialCNR=120; FractionFaecesAdded=0.5
        Simulation NorwinBase
          Clock: StartDate=2010-01-01; EndDate=2010-12-31
          Summary SummaryFile
          Weather: FileName=Kurrowah_Norwin comp.met
          SoilArbitrator
          MicroClimate: a_interception=0; b_interception=1; c_interception=0; d_interception=0; soil_albedo=0.3; SoilHeatFluxFraction=0.4; NightInterceptionFraction=0.5; ReferenceHeight=2
          Zone Field: Area=1; Slope=0
            Report: EventNames=[Clock].DoReport
              VariableNames:
                [Clock].Today
                [Soil].SoilWater.Es
                sum([Soil].SoilWater.SWmm) as TotalSW
                [Soil].SoilWater.SW
                sum([Soil].DULmm) as DUL
                sum([Soil].LL15mm) as LL15
                [Soil].Temperature
            SurfaceOrganicMatter: InitialResidueName=wheat_stubble; InitialResidueType=wheat; InitialResidueMass=10; InitialStandingFraction=0; InitialCPR=0; InitialCNR=100; FractionFaecesAdded=0.5
            Soil: SoilType=Black Vertosol; Site=Bongeen; NearestTown=Bongeen, Q 4356; Region=Darling Downs; State=Queensland; Country=Australia; NaturalVegetation=Qld. Bluegrass, possible Qld. Blue gum; ApsoilNumber=1; Latitude=-27.629; Longitude=151.402; LocationAccuracy=+/-20m; DataSource=CSIRO Sustainable Ecosystems, Toowoomba
              Comments=Soil naming structure: \State\Region\Classification-Local Name (Site/district and locator number); oc and ph estimated
              Water
                Thickness  BD    AirDry  LL15  DUL   SAT   KS
                100        0.99  0.1     0.26  0.55  0.61  100
                100        1.06  0.14    0.26  0.55  0.6   100
                100        1.06  0.14    0.26  0.55  0.6   100
                300        1.13  0.2     0.32  0.55  0.57  100
                300        1.11  0.2     0.33  0.5   0.55  100
              Analysis: Thickness=[150, 150, 300, 300, 300, 300, 300]; PH=[8, 8, 8, 8, 8, 8, 8]; PHUnits=Water; BoronUnits=0
              SoilWater: SummerDate=1-Nov; SummerU=9; SummerCona=5; WinterDate=1-Apr; WinterU=9; WinterCona=5; DiffusConst=40; DiffusSlope=16; Salb=0.12; CN2Bare=75; CNRed=20; CNCov=0.8; max_pond=0; Thickness=[150, 150, 300, 300, 300, 300, 300]; SWCON=[0.3, 0.3, 0.3, 0.3, 0.3, 0.3, 0.3]; ResidueInterception=0
              SoilOrganicMatter: RootCN=40; EnrACoeff=7.4; EnrBCoeff=0.2; OCUnits=1
                Thickness  OC        SoilCN  FBiom  FInert  RootWt
                150        0.953846  12      0.04   0.4     347.129
                150        0.953846  12      0.02   0.6     270.344
                300        0.961538  12      0.02   0.8     163.972
                300        0.846154  12      0.02   1       99.4541
                300        0.546154  12      0.01   1       60.322
                300        0.261538  12      0.01   1       36.5871
                300        0.2       12      0.01   1       22.1912
              Sample Initial Soil Data: NO3Units=ppm; NH4Units=kg/ha; SWUnits=Volumetric; OCUnits=Total; PHUnits=Water
                Thickness  NO3  NH4  SW
                150        2    1    0.19
                150        1    0.5  0.19
                300        1    0.1  0.26
                300        1    0.1  0.32
              Nutrient: same as Evaporation.Wellcamp.WellCamp.WellcampBase.Field.Soil.Nutrient
              CERESSoilTemperature
    Folder Gatton
      Memo
        Evaporation from a Grey Vertosol over a period of 7 months was measured using weighing lysimeters in Toowoomba, Queensland, Australia.
      Experiment Gatton
        Factors
          Factor Surface: Specification=[SurfaceOrganicMatter]
            SurfaceOrganicMatter Bare: InitialResidueName=wheat_stubble; InitialResidueType=wheatsprayed; InitialResidueMass=10; InitialStandingFraction=0; InitialCPR=0; InitialCNR=100; FractionFaecesAdded=0.5
            SurfaceOrganicMatter Mulch: InitialResidueName=wheat_stubble; InitialResidueType=wheatsprayed; InitialResidueMass=6000; InitialStandingFraction=0; InitialCPR=0; InitialCNR=40; FractionFaecesAdded=0.5
            SurfaceOrganicMatter Standing: InitialResidueName=wheat_stubble; InitialResidueType=wheatsprayed; InitialResidueMass=8500; InitialStandingFraction=0.33; InitialCPR=0; InitialCNR=40; FractionFaecesAdded=0.5
        Simulation GattonBase
          Clock: StartDate=2000-10-17; EndDate=2001-06-30
          Summary SummaryFile
          Weather: FileName=Gatton.met
          SoilArbitrator
          MicroClimate: a_interception=0; b_interception=1; c_interception=0; d_interception=0; soil_albedo=0.3; SoilHeatFluxFraction=0.4; NightInterceptionFraction=0.5; ReferenceHeight=2
          Zone Field: Area=1; Slope=0
            Report: EventNames=[Clock].DoReport
              VariableNames:
                [Clock].Today
                [Soil].SoilWater.Es
                sum([Soil].SoilWater.SWmm) as TotalSW
                sum([Soil].DULmm) as DUL
                sum([Soil].LL15mm) as LL15
                [Soil].SoilWater.SW
                [SurfaceOrganicMatter].Wt
            SurfaceOrganicMatter: InitialResidueName=wheat_stubble; InitialResidueType=wheat; InitialResidueMass=10; InitialStandingFraction=0; InitialCPR=0; InitialCNR=100; FractionFaecesAdded=0.5
            Soil APS26Field: SoilType=APS26Soil; LocalName=APS26Site; Site=APS26Site; NearestTown=Unknown; Region=Lawes; NaturalVegetation=Unknown; Latitude=0; Longitude=0
              Water
                Thickness  BD    AirDry  LL15  DUL   SAT
                150        1.38  0.1     0.2   0.38  0.44
                150        1.38  0.1     0.2   0.38  0.44
                300        1.38  0.1     0.2   0.38  0.44
                300        1.38  0.1     0.2   0.38  0.44
                300        1.46  0.1     0.21  0.38  0.43
                300        1.51  0.1     0.19  0.4   0.42
                300        1.49  0.1     0.14  0.38  0.43
                300        1.47  0.1     0.14  0.38  0.43
                300        1.47  0.1     0.19  0.33  0.43
                SoilCrop WheatSoil: LL=[0.24, 0.24, 0.22, 0.24, 0.23, 0.23, 0.18, 0.18, 0.18]; KL=[0.06, 0.045, 0.045, 0.04, 0.04, 0.06, 0.06, 0.06, 0.06]; XF=[1, 1, 1, 1, 1, 1, 1, 1, 1]
              SoilWater: SummerDate=1-Nov; SummerU=6; SummerCona=3.5; WinterDate=1-Apr; WinterU=6; WinterCona=3.5; DiffusConst=10; DiffusSlope=16; Salb=0.13; CN2Bare=78; CNRed=10; CNCov=0.8; slope=0; discharge_width=0; catchment_area=0; max_pond=0; ResidueInterception=0
                Thickness  SWCON  KLAT
                150        0.3    0
                150        0.3    0
                150        0.3    0
                150        0.3    0
                300        0.3    0
                300        0.3    0
                300        0.3    0
                300        0.3    0
                300        0.3    0
                300        0.3    0
              SoilOrganicMatter: RootCN=40; EnrACoeff=1; EnrBCoeff=1; OCUnits=Total
                Thickness  OC    SoilCN  FBiom  FInert  RootWt
                150        2.2   14.5    0.024  0.45    118.866
                150        1.6   14.5    0.024  0.6     98.5437
                150        1.35  14.5    0.01   0.7     81.6956
                150        0.95  14.5    0.01   0.85    67.728
                300        1     14.5    0.01   0.9     46.5487
                300        0.8   14.5    0.01   0.95    31.9925
                300        0.45  14.5    0.01   0.95    21.9881
                300        0.45  14.5    0.01   0.95    15.1122
                300        0.45  14.5    0.01   0.95    10.3864
                300        0.45  14.5    0.01   0.95    7.13848
              Analysis: Thickness=[150, 150, 150, 150, 300, 300, 300, 300, 300, 300]; PH=[7.5, 8, 8, 8, 8, 8, 8, 8, 8, 8]; PHUnits=Water; BoronUnits=0
              Sample Initial Water: Thickness=[100, 100, 100, 100, 200, 200, 200]; SW=[0.21, 0.23, 0.26, 0.26, 0.24, 0.25, 0.24]; NO3Units=ppm; NH4Units=ppm; SWUnits=Volumetric; OCUnits=Total; PHUnits=Water
              Sample Initial Nitrogen: NO3Units=ppm; NH4Units=ppm; SWUnits=Volumetric; OCUnits=Total; PHUnits=Water
                Thickness  NO3  NH4
                150        1.5  0.5
                150        1.8  0.8
                150        1.5  0.5
                150        1.5  0.5
                300        0.4  0.42
                300        0.2  0.42
                300        0.4  0.37
                300        0.3  0.25
                300        0.3  0.3
                300        0.3  0.3
              CERESSoilTemperature
              Nutrient: same as Evaporation.Wellcamp.WellCamp.WellcampBase.Field.Soil.Nutrient
              LayerStructure: Thickness=[100, 100, 100, 100, 200, 200, 200]
            Irrigation
            Operations IrrigationSchedule
              2000-10-18  [Irrigation].Apply(amount:45);
    Folder BondAndWillis
      Memo
        This dataset reproduces the evaporation experiment by [BondWillis1970] in which microlysimeters were used to measure evaporation under varying residue levels and evaporative demands within controled environments.  Note that evaporation parameters may be higher than under natural systems as evaporative conditions were maintained for 24 hours per day.  The soil type was a fine sandy loam and the residue was clean bright wheat straw cut into 1.3 cm lengths.
      Experiment BondAndWillis
        Factors
          Factor Residue: Specification=[SurfaceOrganicMatter]
            SurfaceOrganicMatter 0: InitialResidueName=wheat_stubble; InitialResidueType=wheat; InitialResidueMass=1; InitialStandingFraction=0; InitialCPR=0; InitialCNR=100; FractionFaecesAdded=0.5
            SurfaceOrganicMatter 560: InitialResidueName=wheat_stubble; InitialResidueType=wheat; InitialResidueMass=560; InitialStandingFraction=0; InitialCPR=0; InitialCNR=100; FractionFaecesAdded=0.5
            SurfaceOrganicMatter 1120: InitialResidueName=wheat_stubble; InitialResidueType=wheat; InitialResidueMass=1120; InitialStandingFraction=0; InitialCPR=0; InitialCNR=100; FractionFaecesAdded=0.5
            SurfaceOrganicMatter 2240: InitialResidueName=wheat_stubble; InitialResidueType=wheat; InitialResidueMass=2240; InitialStandingFraction=0; InitialCPR=0; InitialCNR=100; FractionFaecesAdded=0.5
            SurfaceOrganicMatter 4480: InitialResidueName=wheat_stubble; InitialResidueType=wheat; InitialResidueMass=4480; InitialStandingFraction=0; InitialCPR=0; InitialCNR=100; FractionFaecesAdded=0.5
            SurfaceOrganicMatter 8960: InitialResidueName=wheat_stubble; InitialResidueType=wheat; InitialResidueMass=8960; InitialStandingFraction=0; InitialCPR=0; InitialCNR=100; FractionFaecesAdded=0.5
            SurfaceOrganicMatter 17920: InitialResidueName=wheat_stubble; InitialResidueType=wheat; InitialResidueMass=17920; InitialStandingFraction=0; InitialCPR=0; InitialCNR=100; FractionFaecesAdded=0.5
        Simulation BondAndWillisBase
          Clock: StartDate=2000-01-01; EndDate=2000-03-10
          Summary SummaryFile
          ControlledEnvironment: MaxT=20; MinT=20; Rain=0; Radn=30; PanEvap=7; VP=0; Wind=3; CO2=300; AirPressure=1010; Latitude=0; DayLength=12
          SoilArbitrator
          MicroClimate: a_interception=0; b_interception=1; c_interception=0; d_interception=0; soil_albedo=0.3; SoilHeatFluxFraction=0.4; NightInterceptionFraction=0.5; ReferenceHeight=2
          Zone Field: Area=1; Slope=0
            Report: EventNames=[Clock].DoReport
              VariableNames:
                [Clock].Today.DayOfYear
                [Soil].SoilWater.Es
                [Soil].SoilWater.Eos
                sum([Soil].SoilWater.SWmm) as TotalSW
                sum([Soil].DULmm) as DUL
                sum([Soil].LL15mm) as LL15
                [Soil].SoilWater.SW
                [SurfaceOrganicMatter].Wt
            SurfaceOrganicMatter: InitialResidueName=wheat_stubble; InitialResidueType=wheat; InitialResidueMass=10; InitialStandingFraction=0; InitialCPR=0; InitialCNR=100; FractionFaecesAdded=0.5
            Soil: SoilType=APS26Soil; LocalName=APS26Site; Site=APS26Site; NearestTown=Unknown; Region=Lawes; NaturalVegetation=Unknown; Latitude=0; Longitude=0
              Water
                Thickness  BD    AirDry  LL15  DUL   SAT  KS
                100        1.26  0.025   0.18  0.31  0.4  100
                100        1.26  0.025   0.18  0.31  0.4  100
                100        1.26  0.08    0.18  0.31  0.4  100
                100        1.26  0.08    0.18  0.31  0.4  100
              SoilWater: SummerDate=1-Nov; SummerU=27; SummerCona=7; WinterDate=1-Apr; WinterU=9; WinterCona=5; DiffusConst=200; DiffusSlope=50; Salb=0.13; CN2Bare=0; CNRed=10; CNCov=0.8; slope=0; discharge_width=0; catchment_area=0; max_pond=0; ResidueInterception=0
                Thickness  SWCON  KLAT
                100        0.8    0
                100        0.8    0
                100        0.8    0
                100        0      0
              SoilOrganicMatter: same as Evaporation.Gatton.Gatton.GattonBase.Field.APS26Field.SoilOrganicMatter
              Analysis: same as Evaporation.Gatton.Gatton.GattonBase.Field.APS26Field.Analysis
              Sample Initial Water: Thickness=[100, 100, 100, 100]; SW=[0.31, 0.31, 0.31, 0.31]; NO3Units=ppm; NH4Units=ppm; SWUnits=Volumetric; OCUnits=Total; PHUnits=Water
              Sample Initial Nitrogen: same as Evaporation.Gatton.Gatton.GattonBase.Field.APS26Field.Initial Nitrogen
              CERESSoilTemperature
              Nutrient: same as Evaporation.Wellcamp.WellCamp.WellcampBase.Field.Soil.Nutrient
  Folder Drainage
    Folder Libardi
      Memo
        Data used here were collected during an internal drainage experiment[Libardi2001], carried out on a sandy–loam Red Yellow Latosol (Typic Hapludox) near Piracicaba, SP, Brazil.  The soil had a fairly homogeneous
        profile down to the depth of 2 m. Soil water content values were calculated from tensiometer
        readings, through the use of laboratory established soil water retention curves and of soil water potential
        heads, measured with the same mercury manometer tensiometers.
      Experiment Libardi
        Factors: same as Evaporation.Wellcamp.WellCamp.Factors
        Simulation LibardiBase
          Clock: StartDate=1988-01-01; EndDate=1988-01-30
          Summary SummaryFile
          Weather: FileName=dummy.met
          SoilArbitrator
          MicroClimate: a_interception=0; b_interception=1; c_interception=0; d_interception=0; soil_albedo=0.3; SoilHeatFluxFraction=0.4; NightInterceptionFraction=0.5; ReferenceHeight=2
          Zone Field: Area=1; Slope=0
            Report: EventNames=[Clock].DoReport
              VariableNames:
                [Clock].Today
                [Soil].SoilWater.Es
                [Soil].SoilWater.Drainage
                sum([Soil].SoilWater.SWmm) as TotalSW
                sum([Soil].DULmm) as DUL
                sum([Soil].LL15mm) as LL15
                [Soil].SoilWater.SW
            Soil: ASCOrder=Vertosol; SoilType=Clay; LocalName=Moola Grey Clay; Latitude=-27.581836; Longitude=151.320206
              Water
                Thickness  BD  AirDry  LL15  DUL    SAT
                150        1   0.05    0.1   0.19   0.43
                150        1   0.05    0.1   0.243  0.457
                150        1   0.05    0.1   0.226  0.472
                150        1   0.05    0.1   0.227  0.491
                150        1   0.05    0.1   0.19   0.491
                150        1   0.05    0.1   0.201  0.487
                150        1   0.05    0.1   0.211  0.468
                150        1   0.05    0.1   0.207  0.472
                150        1   0.05    0.1   0.208  0.483
              SoilOrganicMatter: same as Evaporation.TorStreet.TorStreet.TorStreetBase.Field.Soil.SoilOrganicMatter
              SoilWater: SummerDate=1-Nov; SummerU=9; SummerCona=5; WinterDate=1-Apr; WinterU=9; WinterCona=5; DiffusConst=40; DiffusSlope=16; Salb=0.13; CN2Bare=50; CNRed=20; CNCov=0.8; max_pond=0; Thickness=[150, 150, 300, 300, 300, 300]; SWCON=[0.8, 0.8, 0.8, 0.8, 0.8, 0.8]; ResidueInterception=0
              Analysis: same as Evaporation.TorStreet.TorStreet.TorStreetBase.Field.Soil.Analysis
              CERESSoilTemperature
              Nutrient: same as Evaporation.Wellcamp.WellCamp.WellcampBase.Field.Soil.Nutrient
              Sample Initial nitrogen: NO3Units=ppm; NH4Units=ppm; SWUnits=Volumetric; OCUnits=Total; PHUnits=Water
                Thickness  NO3    NH4       SW
                150        6.503  0.599004  0.43
                150        2.101  0.100001  0.457
                150        2.101  0.100001  0.472
                150        1.701  0.100001  0.491
                150        1.701  0.100001  0.491
                150        1.701  0.100001  0.487
                150        1      0.1       0.468
                150        1      1         0.472
                150        1      1         0.483
            SurfaceOrganicMatter: InitialResidueName=wheat_stubble; InitialResidueType=wheat; InitialResidueMass=10; InitialStandingFraction=0; InitialCPR=0; InitialCNR=100; FractionFaecesAdded=0.5
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