Simulations: Version=171
  DataStore
    ParallelPostSimulationTool
      SerialPostSimulationTool PredictedObserved
        ParallelPostSimulationTool ReadInputs
          ExcelInput: FileNames=[obs\Observed.xlsx]; SheetNames=[Observed]
          ExcelInput DailyObserved: FileNames=[obs\DailyObserved.xlsx]; SheetNames=[DailyObserved]
        ParallelPostSimulationTool MergeWithPredictions
          PredictedObserved: PredictedTableName=HarvestReport; ObservedTableName=Observed; FieldNameUsedForMatch=SimulationName; FieldName2UsedForMatch=Stage; AllColumns=false
          PredictedObserved DailyPredictedObserved: PredictedTableName=DailyReport; ObservedTableName=DailyObserved; FieldNameUsedForMatch=SimulationName; FieldName2UsedForMatch=Date; AllColumns=false
      Probability: TableName=BugeseraSensibility; Exceedence=false; FieldToSplitOn=SimulationName
      Probability WaterByNProbability: TableName=WaterByNSensibilityReport; Exceedence=false; FieldToSplitOn=SimulationName
      Input OldApsimDynamic
        FileNames=[old\classic_apsim_file\dynamic_tillering\combined_dynamic.csv]
        Memo
          Daily outputs from the old apsim test set using dynamic tillering.
  Folder Replacements
    Report DailyReport: EventNames=[Clock].DoReport
      VariableNames:
        [Clock].Today
        [SorghumLeaf].SLA as SLA
        [SorghumLeaf].MaxSLA as MaxSLA
        ([SorghumLeaf].MaxSLA * 0.85) as LowerBound
        [Clock].Today.Year as Year
        [Clock].Today.DayOfYear as day_of_year
        [Clock].Today.Date as Date
        [Phenology].DltTTFM as DltTTFM
        [Phenology].ThermalTime as TT
        [Phenology].DltTT as dltTT
        [Phenology].PhenoWaterStress
        ([Sorghum].DaysAfterSowing + 1) as Das
        [Sorghum].Phenology.Stage as Stage
        [Sorghum].Phenology.CurrentStageName
        [Sorghum].Phenology.CurrentPhase.Name
        [Sorghum].AboveGround.Wt
        [Sorghum].TotalLive.Wt
        [Sorghum].TotalDead.Wt
        [Sorghum].AboveGround.Wt as BiomassWt
        [Sorghum].AboveGround.N as BiomassN
        [Sorghum].Total.Wt
        [Sorghum].Root.Live.Wt as RootGreenWt
        [Sorghum].Root.Live.N as RootGreenN
        [Sorghum].Arbitrator.SDRatioBound as WaterSD
        [Leaf].Senesced.Wt
        [Leaf].Senesced.N
        [Leaf].Dead.Wt
        [Leaf].Dead.N
        [Leaf].NitrogenPhenoStress
        [Sorghum].Leaf.Live.Wt as LeafGreenWt
        [Sorghum].Leaf.Live.N as LeafGreenN
        [Sorghum].Stem.Live.Wt as StemGreenWt
        [Sorghum].Stem.Live.N as StemGreenN
        [Sorghum].Rachis.Live.Wt as RachisGreenWt
        [Sorghum].Rachis.Live.N as RachisGreenN
        [Sorghum].Grain.Live.Wt as GrainGreenWt
        [Sorghum].Grain.Live.N as GrainGreenN
        [Sorghum].Grain.Live.NConc * 100 as GrainGreenNConc // old apsim grain nconc is in percent
        [Sorghum].Grain.NumberFunction as GrainNo
        [Sorghum].Grain.Size * 1000 as GrainSize
        [Soil].Water.Volumetric
        sum([Soil].SoilWater.ESW) as ESW
        [Sorghum].Phenology.Juvenile.Target
        sum([Soil].NO3.kgha) as NO3
        sum([Soil].Water.Volumetric) as sw
        [Soil].NO3.kgha
        [Soil].NH4.kgha
        [Leaf].DltLAI
        [Sorghum].Leaf.Photosynthesis.FW as RUEStress
        [Phenology].Emerging.Target
        [Phenology].Juvenile.Target
        [Phenology].JuvenileToFloralInit.Target
        [Phenology].FloralInitToFlagLeaf.Target
        [Phenology].FlagLeafToFlowering.Target
        [Phenology].FloweringToGrainFilling.Target
        [Phenology].GrainFilling.Target
        [Phenology].Maturing.Target
        [Phenology].MaturityToHarvestRipe.Target
        [Phenology].TTFromEmergence
        [Phenology].ThermalTime
        [Leaf].CoverGreen
        [Leaf].CoverTotal
        [Leaf].CoverDead
        [Leaf].RadiationIntercepted
        [Leaf].WaterDemand
        [Leaf].WaterAllocation
        [Leaf].Photosynthesis
        ([Leaf].LAITotal / ([Sorghum].Population + 0.00001) * 10000 as TPLA // gpla + spla as per old apsim. this assumes paddock area = 1ha
        [Leaf].NDemands.Structural
        [Leaf].DMPotentialAllocation.Total
        [Leaf].SLN as SLN
        [Leaf].FertileTillerNumber
        [SorghumLeaf].CalculatedTillerNumber
        [Phenology].TTEmergToFlagLeaf
        [Weather].Radn
        [Arbitrator].DM.TotalFixationSupply
        [Arbitrator].N.TotalFixationSupply
        [Arbitrator].N.TotalPlantSupply
        [Arbitrator].N.SupplyDemandRatioN
        [Arbitrator].N.UptakeSupply
        [Arbitrator].N.Uptake
        [Arbitrator].SDRatio
        [Arbitrator].SDRatioBound
        [Arbitrator].WatSupply
        [Grain].Live.Wt
        [Grain].Live.N
        [Grain].Size
        [Grain].LiveFWt
        [Grain].NDemand.Total
        [Grain].PotGrainFillRate
        [Grain].DMCaryopsis
        [Grain].NumberFunction
        [Leaf].DMDemands.Structural.DMDemandFunction
        [Stem].DMDemands.Structural.DMDemandFunction
        [Rachis].DMDemands.Structural.DMDemandFunction
        [Leaf].DMRemaining
        [Leaf].DMSupplyFixation
        [Leaf].DMSupplyFunction
        ([Leaf].DMSupplyFixation - [Leaf].DMSupplyFunction)
        [Leaf].Photosynthesis
        [Leaf].WaterDemandFunction
        [Leaf].WaterAllocation
        [Leaf].DMDemands.Structural.DMDemandFunction
        [Leaf].Photosynthesis
        [Leaf].LAI
        [Leaf].SenescedLai
        [Leaf].LAI as LAI
        [Leaf].SenescedLai as SLAI
        [Leaf].Live.N
        [Leaf].DMPotentialAllocation.Structural
        [Leaf].NDemand.Total
        [Leaf].NDemand.Structural
        [Leaf].NDemand.Metabolic
        [Leaf].NDemand.Storage
        [Leaf].NDemand.Total
        [Leaf].Allocated.StructuralN
        [Leaf].Allocated.MetabolicN
        [Leaf].Allocated.StorageN
        [Leaf].Senesced.Wt
        [Leaf].FinalLeafNo as FinalLeafNo
        [Leaf].LeafNo as LeafNo
        [Stem].Live.Wt
        [Stem].Dead.Wt
        [Stem].Senesced.Wt
        [Stem].NDemand.Total
        [Stem].NDemand.Structural
        [Stem].NDemand.Metabolic
        [Stem].NDemand.Storage
        [Stem].NDemand.Total
        [Stem].Allocated.StructuralN
        [Stem].Allocated.MetabolicN
        [Stem].Allocated.StorageN
        [Root].NSupply.Total
        [Rachis].NDemand.Total
        [Leaf].NDemand.Total
        [Root].potentialDMAllocation.Structural
        [Root].NDemand.Structural
        [Root].NDemand.Metabolic
        [Root].NDemand.Storage
        [Root].NDemand.Total
        [Root].Allocated.StructuralN
        [Root].Allocated.MetabolicN
        [Root].Allocated.StorageN
        [Root].DMDemand.Total
        [Root].DMDemand.Structural
        [Root].Depth
        [Root].NTakenUp
        [Root].NUptake
        [Root].Senesced.Wt
        [Root].Senesced.N
        [Root].Dead.Wt
        [Root].Senesced.StructuralWt
        [Root].Detached.N
        [Root].Detached.Wt
        [Root].PlantZone.NUptakeSupply
        [Sorghum].TotalLive.N
        [Arbitrator].N.Allocated
        [Arbitrator].DM.NotAllocated
        [Root].NDemand.Structural + [Stem].NDemand.Structural as StructuralDemandB4Rachis
        [Root].PlantZone.DeltaNO3
        ([Arbitrator].N.TotalPlantDemand - [Leaf].NDemand.Structural) as PlantDemand
        [Arbitrator].N.TotalPlantDemand as TotalPlantNDemand
        [Phenology].DltTT.Stress as stress
        [Arbitrator].NitrogenUptakeMethod.NDiffusionSupply as NDiffusionSupply
        [Arbitrator].NitrogenUptakeMethod.NMassFlowSupply as NMassFlowSupply
    Report HarvestReport: EventNames=[Sorghum].Harvesting
      VariableNames:
        [Sorghum].DaysAfterSowing as Das
        [Sorghum].Phenology.CurrentStageName as Stage
        [Sorghum].AboveGround.Wt as BiomassWt
        [Sorghum].AboveGround.N as biomass_n
        [Sorghum].Grain.Size * 1000 as GrainSize // FIXME!
        [Sorghum].Grain.NumberFunction as GrainNoFunc
        [Sorghum].Grain.Number as GrainNo
        [Sorghum].Leaf.LAI as LAI
        [Sorghum].Root.Live.Wt as RootGreenWt
        [Sorghum].Leaf.Live.Wt as LeafGreenWt
        [Sorghum].Stem.Live.Wt as StemGreenWt
        [Sorghum].Rachis.Live.Wt as RachisGreenWt
        [Sorghum].Grain.Live.Wt as GrainGreenWt
        [Sorghum].Root.Live.N as RootGreenN
        [Sorghum].Leaf.Live.N as LeafGreenN
        [Sorghum].Stem.Live.N as StemGreenN
        [Sorghum].Rachis.Live.N as RachisGreenN
        [Sorghum].Grain.Live.N as GrainGreenN
        [Sorghum].Grain.Live.NConc * 100 as GrainGreenNConc // old apsim grain nconc is in percent
        //[Sorghum].Leaf.Number as LeafNo
        sum([Soil].SoilWater.ESW) as ESW
        sum([Soil].NO3.kgha) as NO3
        [Sorghum].Leaf.SLN as SLN
        sum([Soil].Water.Volumetric) as sw
        // HI
        [Sorghum].Leaf.LAI / [Sorghum].Population * 10000 as GPLA
        [Sorghum].Leaf.LAIDead / [Sorghum].Population * 10000 as SPLA
        ([Sorghum].Leaf.SenescedLai / [Sorghum].Population + [Sorghum].Leaf.LAI / [Sorghum].Population) * 10000 as TPLA // gpla + spla as per old apsim. this assumes paddock area = 1ha
        [Sorghum].Leaf.LAIDead as SPLA
        // Yield
        [Sorghum].AboveGround.Wt // g/m2 - Biomass (kg/ha) in old Apsim
        [Sorghum].Leaf.LaiAnth as LaiAnth
        max of [Sorghum].Leaf.LAI from [Sorghum].Sowing to [Sorghum].Harvesting as LAImax
    Report LeafReport: EventNames=[Sorghum].Harvesting
      VariableNames:
        [Sorghum].DaysAfterSowing as Das
        [Sorghum].Leaf.LeafSizesMain
        [Sorghum].Leaf.LeafSizesTiller1
        [Sorghum].Leaf.LeafSizesTiller2
        [Sorghum].Leaf.LeafSizesTiller3
        [Sorghum].Leaf.LeafSizesTiller4
  Folder Validation
    Folder Combined Results
      Memo Combined Results
        Simulation results for the combined datasets from the various countries are shown in the following graphs.  The model is able to adequately capture the influence of growing conditions (soil, climate) and management (population, Nitrogen, irrigation, sowing date).
    Folder Lawes
      Experiment LE20
        Memo LE20 Description
          Dynamic Tillering is still under development.

          Experiment: LE20

          Description: LE20 - Density

          Start Date: 9/11/1998

          End Date: 7/03/1999

          |SimulationName |Density        |
          |---------------|---------------|
          |Density_1      | 2 plants/m2   |
          |Density_2      | 4 plants/m2   |
          |Density_2      | 8 plants/m2   |
          |Density_3      |16 plants/m2   |
        Factors
          CompositeFactor Density_1
            Specifications:
              [SowingRule].Script.Cultivar = Buster
              [SowingRule].Script.Density = 2
              [SowingRule].Script.Ftn = 5.1
          CompositeFactor Density_2
            Specifications:
              [SowingRule].Script.Cultivar = Buster
              [SowingRule].Script.Density = 4
              [SowingRule].Script.Ftn = 3.5
          CompositeFactor Density_3
            Specifications:
              [SowingRule].Script.Cultivar = Buster
              [SowingRule].Script.Density = 8
              [SowingRule].Script.Ftn = 2.1
          CompositeFactor Density_4
            Specifications:
              [SowingRule].Script.Cultivar = Buster
              [SowingRule].Script.Density = 16
              [SowingRule].Script.Ftn = 0.2
        Simulation Lawes20Base
          Clock: Start=1998-10-23; End=1999-02-21
          Summary
          Weather: FileName=Met\Gatton_Tiller_x_Density.met
          SoilArbitrator
          Zone Paddock: Area=1; Slope=0; AspectAngle=0; Altitude=50
            Report DailyReport
            Report HarvestReport
            Folder Manager folder
              Manager SowingRule
                Cultivar = Buster
                Density = 2
                Ftn = 5.1
                Date = 10/23/1998 00:00:00
                Depth = 30
                RowSpacing = 500
                RowConfiguration = Solid
                TilleringMethod = DynamicTillering
```csharp
using Models.Soils;
using System;
using Models.Core;
using Models.PMF;
using APSIM.Shared.Utilities;

namespace Models
{
    [Serializable]
    public class Script : Model
    {    
        
        [Description("Enter sowing date (dd/mm/yyyy) : ")]
        public DateTime Date { get; set; }

        [Description("Enter sowing density  (plants/m2) : ")]
        public double Density { get; set; }

        [Description("Enter sowing depth  (mm) : ")]
        public double Depth { get; set; }

        [Description("Enter cultivar : ")]
        [Display(Type = DisplayType.CultivarName)]
        public string Cultivar { get; set; } 

        [Description("Enter row spacing (mm) : ")]
        public double RowSpacing { get; set; }

        [Description("Enter skip row configuration : ")]
        public RowConfigurationType RowConfiguration { get; set; }

        [Description("Tillering Method : ")]
        public TilleringMethodType TilleringMethod { get; set; } = 0;

        [Description("Enter Fertile Tiller No. : ")]
        public double Ftn { get; set; } = 0;

        public enum TilleringMethodType 
        {
            RuleOfThumb = -1,
            FixedTillering = 0,
            DynamicTillering = 1
        }
        public enum RowConfigurationType 
        {
            Solid, SingleSkip, DoubleSkip
        }
        
        [Link]
        private Zone paddock;

        [Link]
        private Clock clock;

        [Link]
        private Plant crop;
        

        [EventSubscribe("DoManagement")]
        private void OnDoManagement(object sender, EventArgs e)
        {

            if (clock.Today == Date)
            {
                double population = Density * paddock.Area;
                crop.Sow(cultivar:Cultivar, population:population, depth:Depth, rowSpacing:RowSpacing, rowConfig: (double)RowConfiguration, tillering:(int)TilleringMethod, ftn:Ftn);
            }
        }
    }
}
```
              Manager HarvestingRule
```csharp
using Models.Soils;
using System;
using Models.Core;
using Models.PMF;

namespace Models
{
    [Serializable]

    public class Script : Model
    {
        [Link]
        private Clock clock;

        [Link]
        private IPlant crop;

        [EventSubscribe("DoManagement")]
        private void OnDoCalculations(object sender, EventArgs e)
        {
            if (crop.IsReadyForHarvesting)
            {
                crop.Harvest();
                crop.EndCrop();
            }
        }
    }
}
```
            Fertiliser
            Irrigation
            Operations IrrigationSchedule
              1998-10-26  [Irrigation].Apply(6);
              1998-10-27  [Irrigation].Apply(0);
              1998-10-28  [Irrigation].Apply(0);
              1998-10-29  [Irrigation].Apply(2);
              1998-10-30  [Irrigation].Apply(2);
              1998-10-31  [Irrigation].Apply(3);
              1998-11-01  [Irrigation].Apply(0);
              1998-11-02  [Irrigation].Apply(1);
              1998-11-13  [Irrigation].Apply(1);
              1998-11-14  [Irrigation].Apply(21);
              1998-11-19  [Irrigation].Apply(5);
              1998-11-23  [Irrigation].Apply(10);
              1998-11-24  [Irrigation].Apply(0);
              1998-11-25  [Irrigation].Apply(43);
              1998-11-26  [Irrigation].Apply(9);
              1998-11-27  [Irrigation].Apply(0);
              1998-11-29  [Irrigation].Apply(14);
              1998-12-16  [Irrigation].Apply(30);
              1998-12-17  [Irrigation].Apply(4);
              1998-12-19  [Irrigation].Apply(10);
              1998-12-20  [Irrigation].Apply(14);
              1998-12-21  [Irrigation].Apply(8);
              1998-12-22  [Irrigation].Apply(0);
              1998-12-24  [Irrigation].Apply(1);
              1998-12-25  [Irrigation].Apply(8);
              1998-12-26  [Irrigation].Apply(0);
              1999-01-01  [Irrigation].Apply(3);
              1999-01-02  [Irrigation].Apply(22);
              1999-01-03  [Irrigation].Apply(21);
              1999-01-04  [Irrigation].Apply(0);
              1999-01-05  [Irrigation].Apply(9);
              1999-01-06  [Irrigation].Apply(4);
              1999-01-10  [Irrigation].Apply(79);
              1999-01-11  [Irrigation].Apply(5);
              1999-01-12  [Irrigation].Apply(0);
              1999-01-13  [Irrigation].Apply(1);
              1999-01-16  [Irrigation].Apply(1);
              1999-01-21  [Irrigation].Apply(1);
              1999-01-22  [Irrigation].Apply(0);
              1999-01-28  [Irrigation].Apply(0);
              1999-01-29  [Irrigation].Apply(0);
              1999-01-30  [Irrigation].Apply(8);
              1999-01-31  [Irrigation].Apply(3);
              1999-02-01  [Irrigation].Apply(5);
              1999-02-02  [Irrigation].Apply(13);
              1999-02-08  [Irrigation].Apply(23);
              1999-02-09  [Irrigation].Apply(103);
              1999-02-10  [Irrigation].Apply(8);
              1999-02-11  [Irrigation].Apply(0);
              1999-02-12  [Irrigation].Apply(1);
              1999-02-25  [Irrigation].Apply(14);
              1999-02-26  [Irrigation].Apply(2);
              1999-03-01  [Irrigation].Apply(12);
              1999-03-02  [Irrigation].Apply(24);
              1999-03-03  [Irrigation].Apply(16);
              1999-03-04  [Irrigation].Apply(35);
              1999-03-12  [Irrigation].Apply(0);
              1999-03-23  [Irrigation].Apply(0);
              1999-04-05  [Irrigation].Apply(0);
              1999-04-06  [Irrigation].Apply(1);
              1999-04-07  [Irrigation].Apply(0);
              1999-04-18  [Irrigation].Apply(0);
              1999-04-19  [Irrigation].Apply(5);
            Manager Automatic irrigation based on water deficit
              AutoIrrigationOn = False
              FASWThreshold = 0.75
              FASWDepth = 600
```csharp
using Models.Interfaces;
using System;
using Models.Core;
using System.Collections.Generic;
using System.Text;
using Models.Soils;
using Models.PMF;
using Models;
using System.Xml.Serialization;
using APSIM.Shared.Utilities;

namespace Models
{
    [Serializable] 
    public class Script : Model
    {
        [Link] private Zone zone;
        [Link] private Irrigation irrigation;
        [Link] private Soil soil;
        [Link]
        private IPhysical soilPhysical;
        [Link]
        private ISoilWater waterBalance;
        public double FASW { get; set; }
        public double WaterDeficit  { get; set; }
    
        
        [Description("Auto irrigation on?")]
        public bool AutoIrrigationOn { get; set; }

        [Description("Threshold fraction available water (0-1)")]
        public double FASWThreshold { get; set; }

        [Description("Soil depth (mm) to which fraction available water is calculated")]
        public double FASWDepth { get; set; }

        [EventSubscribe("DoManagement")]
        private void OnDoManagement(object sender, EventArgs e)
        {
            CalculateFASW();
            if (AutoIrrigationOn)
            {
                if (FASW < FASWThreshold)
                {
                    double amount = 10;
                    irrigation.Apply(WaterDeficit, depth: 0);
                }
            }
        }
        
        private void CalculateFASW()
        {
            double[] LL15 = MathUtilities.Multiply(soilPhysical.LL15, soilPhysical.Thickness);
            double[] DUL = MathUtilities.Multiply(soilPhysical.DUL, soilPhysical.Thickness);
        
            int nlayr = GetLayerIndex();
            double cumdep = MathUtilities.Sum(soilPhysical.Thickness, 0, nlayr, 0.0);

            double excess_fr = MathUtilities.Divide((cumdep - FASWDepth), soilPhysical.Thickness[nlayr], 0.0);

            // note that results may be strange if swdep < ll15
            double avail_sw = (MathUtilities.Sum(waterBalance.SWmm, 0, nlayr, 0.0)
                              - excess_fr * waterBalance.SWmm[nlayr])
                              - (MathUtilities.Sum(LL15, 0, nlayr, 0.0)
                              - excess_fr * LL15[nlayr]);


            double pot_avail_sw = (MathUtilities.Sum(DUL, 0, nlayr, 0.0)
                                  - excess_fr * DUL[nlayr])
                                  - (MathUtilities.Sum(LL15, 0, nlayr, 0.0)
                                  - excess_fr * LL15[nlayr]);

            FASW = MathUtilities.Divide(avail_sw, pot_avail_sw, 0.0);
            WaterDeficit = MathUtilities.Constrain(pot_avail_sw - avail_sw, 0.0, 100000);
        }

        private int GetLayerIndex()
        {
            double[] cumThickness = soilPhysical.ThicknessCumulative;
            for (int i = 1; i < cumThickness.Length; i++)
            {
                if (FASWDepth < cumThickness[i])
                    return i - 1;
            }
            
            return cumThickness.Length - 1;
        }

    }
}
```
            MicroClimate: a_interception=0; b_interception=1; c_interception=0; d_interception=0; SoilHeatFluxFraction=0.4; MinimumHeightDiffForNewLayer=0; NightInterceptionFraction=0.5; ReferenceHeight=2
            Plant Sorghum
            SurfaceOrganicMatter: InitialResidueName=wheat_stubble; InitialResidueType=wheat; InitialResidueMass=0; InitialStandingFraction=0; InitialCPR=0; InitialCNR=80
            Soil LawesBlackVertosol: SoilType=LawesBlackVertosol; Site=Gatton RS; NearestTown=Unknown; Region=Gatton; NaturalVegetation=Unknown; Latitude=0; Longitude=0
              Physical
                Thickness  BD    AirDry  LL15  DUL   SAT
                150        1.32  0.1     0.26  0.41  0.46
                150        1.3   0.15    0.26  0.43  0.48
                300        1.23  0.25    0.26  0.46  0.51
                300        1.27  0.26    0.26  0.44  0.49
                300        1.37  0.25    0.25  0.4   0.45
                300        1.35  0.28    0.28  0.41  0.46
                300        1.35  0.31    0.31  0.38  0.43
                SoilCrop SorghumSoil: LL=[0.26, 0.26, 0.26, 0.26, 0.25, 0.28, 0.31]; KL=[0.08, 0.08, 0.08, 0.08, 0.06, 0.04, 0.02]; XF=[1, 1, 1, 1, 1, 1, 1]
              WaterBalance SoilWater: SummerDate=1-Nov; SummerU=6; SummerCona=3.5; WinterDate=1-Apr; WinterU=6; WinterCona=3.5; DiffusConst=88; DiffusSlope=35.4; Salb=0.13; CN2Bare=91; CNRed=20; CNCov=0.8; PSIDul=-100; Thickness=[150, 150, 300, 300, 300, 300, 300]; SWCON=[0.5, 0.5, 0.5, 0.5, 0.5, 0.5, 0.5]
              Nutrient
              CERESSoilTemperature Temperature
              Organic: FOMCNRatio=30; CarbonUnits=Total
                Thickness  Carbon  SoilCNRatio  FBiom  FInert  FOM
                150        1.3     12.5         0.03   0.31    520.694
                150        0.65    12.5         0.01   0.38    405.517
                300        0.32    12.5         0      0.47    245.958
                300        0.11    12.5         0      0.7     149.181
                300        0.11    12.5         0      0.9     90.483
                300        0.11    12.5         0      0.95    54.8807
                300        0.11    12.5         0      0.95    33.2868
              Chemical: Thickness=[150, 150, 300, 300, 300, 300, 300]; PH=[8.2, 8.7, 8.9, 8.1, 8, 8, 8]; PHUnits=Water
              Water: Thickness=[150, 150, 300, 300, 300, 300, 300]; InitialValues=[0.41, 0.43, 0.46, 0.44, 0.4, 0.41, 0.38]; InitialPAWmm=267; RelativeTo=LL15; FilledFromTop=true
              Solute NO3: Thickness=[150, 150, 300, 300, 300, 300, 300]; InitialValues=[7, 5, 4, 2, 1.5, 1, 0.5]; InitialValuesUnits=ppm; WaterTableConcentration=0; D0=0; DepthConstant=0; MaxDepthSoluteAccessible=0; RunoffEffectivenessAtMovingSolute=0; MaxEffectiveRunoff=0
              Solute NH4: Thickness=[150, 150, 300, 300, 300, 300, 300]; InitialValues=[1, 0.5, 0.3, 0.2, 0.2, 0.2, 0.2]; InitialValuesUnits=ppm; WaterTableConcentration=0; D0=0; DepthConstant=0; MaxDepthSoluteAccessible=0; RunoffEffectivenessAtMovingSolute=0; MaxEffectiveRunoff=0
              Solute Urea: Thickness=[150, 150, 300, 300, 300, 300, 300]; InitialValues=[0, 0, 0, 0, 0, 0, 0]; InitialValuesUnits=kg/ha; WaterTableConcentration=0; D0=0; DepthConstant=0; MaxDepthSoluteAccessible=0; RunoffEffectivenessAtMovingSolute=0; MaxEffectiveRunoff=0
            Manager Fertilise at sowing
              Crop = [Sorghum]
              FertiliserType = NO3N
              Amount = 240
```csharp
using Models.Soils;
using System;
using System.Linq;
using Models.Core;
using Models.PMF;
namespace Models
{
    [Serializable]
    public class Script : Model
    {
        [Link] Clock Clock;
        [Link] Fertiliser Fertiliser;
        
        [Description("Crop to be fertilised")]
        public IPlant Crop { get; set; }

        [Description("Type of fertiliser to apply? ")] 
        public Fertiliser.Types FertiliserType { get; set; }
    
        [Description("Amount of fertiliser to be applied (kg/ha)")]
        public double Amount { get; set; }
        
        [EventSubscribe("Sowing")]
        private void OnSowing(object sender, EventArgs e)
        {
            Model crop = sender as Model;
            if (Crop != null && crop.Name.ToLower() == (Crop as IModel).Name.ToLower())
                Fertiliser.Apply(Amount: Amount, Type: FertiliserType);
        }
    }
}
```
            Report LeafReport: EventNames=[Sorghum].Harvesting
              VariableNames:
                [Sorghum].Leaf.LeafSizesMain
                [Sorghum].Leaf.LeafSizesTiller1
                [Sorghum].Leaf.LeafSizesTiller2
                [Sorghum].Leaf.LeafSizesTiller3
                [Sorghum].Leaf.LeafSizesTiller4
                [Sorghum].Leaf.LeafSizesTiller5
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