folder: version=37; creator=Apsim 7.10-r0
  folder shared
    Soil LawesBlackVertosol: SoilType=LawesBlackVertosol; LocalName=Gatton RS; Site=Gatton RS; NearestTown=Unknown; Region=Gatton; NaturalVegetation=Unknown; Latitude=0; Longitude=0; YearOfSampling=0
      Water
        Thickness  BD    AirDry  LL15  DUL   SAT
        150        1.32  0.1     0.26  0.41  0.46
        150        1.3   0.15    0.26  0.43  0.48
        300        1.23  0.25    0.26  0.46  0.51
        300        1.27  0.26    0.26  0.44  0.49
        300        1.37  0.25    0.25  0.4   0.45
        300        1.35  0.28    0.28  0.41  0.46
        300        1.35  0.31    0.31  0.38  0.43
        SoilCrop Sorghum: LL=[0.26, 0.26, 0.26, 0.26, 0.25, 0.28, 0.31]; KL=[0.08, 0.08, 0.08, 0.08, 0.06, 0.04, 0.02]; XF=[1, 1, 1, 1, 1, 1, 1]
      SoilWater: SummerCona=3.5; SummerU=6; SummerDate=1-Nov; WinterCona=3.5; WinterU=6; WinterDate=1-Apr; DiffusConst=88; DiffusSlope=35.4; Salb=0.13; CN2Bare=91; CNRed=20; CNCov=0.8; Thickness=[150, 150, 300, 300, 300, 300, 300]; SWCON=[0.5, 0.5, 0.5, 0.5, 0.5, 0.5, 0.5]
      SoilOrganicMatter: RootCN=30; RootWt=1500; SoilCN=12.5; EnrACoeff=7.4; EnrBCoeff=0.2; OCUnits=Total
        Thickness  OC    FBiom  FInert
        150        1.3   0.03   0.31
        150        0.65  0.01   0.38
        300        0.32  0      0.47
        300        0.11  0      0.7
        300        0.11  0      0.9
        300        0.11  0      0.95
        300        0.11  0      0.95
      Analysis: Thickness=[150, 150, 300, 300, 300, 300, 300]; PH=[8.2, 8.7, 8.9, 8.1, 8, 8, 8]; PHUnits=Water; BoronUnits=HotWater
      Sample Initial Soil: NO3Units=kgha; NH4Units=ppm; SWUnits=Volumetric; OCUnits=Total; PHUnits=Water
        Thickness  NO3    NH4  SW
        150        13.86  1    0.41
        150        9.75   0.5  0.43
        300        14.76  0.3  0.46
        300        7.62   0.2  0.44
        300        6.165  0.2  0.4
        300        4.05   0.2  0.41
        300        2.025  0.2  0.38
    variables output_daily - My Variables
      variables: dd/mm/yyyy as date, DaysAfterSowing, Leafno, lai, tillers, tillersAdded, linearLAI, calculatedTillers, Supply, Demand, sw_dep(), SLA, maxSLA, ll15_dep(), dul_dep(), WaterSD, Biomass, yield, GrainNo, stage, biomass_wt, GrainGreenWt, RachisGreenWt, StemGreenWt, GrainSize, LeafSenescedWt, TillerNoFertile, TPLA, SPLA, DeltaTT, LeafGreenWt, DeltaLAI, DeltaGreenN(), lai, slai, GPLA, reeves
    events My Variables Events
    sorghum
      sorghumGenotype M35-1
        tt_emerg_to_endjuv = 100
        photoperiod_crit1 = 11.5
        photoperiod_crit2 = 13.5
        photoperiod_slope = 61
        tt_endjuv_to_init = 252
        tt_flag_to_flower = 170
        tt_flower_to_start_grain = 80
        tt_flower_to_maturity = 761
        tt_maturity_to_ripe = 1
        main_stem_coef = 2.82
        tpla_prod_coef = 0.011
        dm_per_seed = 0.00142784
        x_stem_wt = 0    80
        y_height = 0  2000
        partition_rate_leaf = 0.018
        nUptakeCease = 10
        leaf_init_rate = 26.1
        targetLeafSLN = 1.2
        maxGFRate = 0.09
        x_stem_wt = 0    80  # look up table for canopy height
        y_height = 0  2000  # plant canopy height
        aX0 = 0.687  # Largest leaf multiplier
        aMaxS = 22.25  # Largest Leaf Area Slope
        aMaxI = 92.45  # Intercept for Largest leaf calculation
        aMaxVert = 0.3  # Vertical Offset for Largest Leaf Calc
        tillerSdIntercept = -1.363  # Propensity to Tiller
        tillerSdSlope = 0.206  # Tiller Supply/demand slope
      sorghumGenotype ATX623xRTX430
        tt_emerg_to_endjuv = 100
        photoperiod_crit1 = 11.5
        photoperiod_crit2 = 13.5
        photoperiod_slope = 13
        tt_endjuv_to_init = 202
        tt_flag_to_flower = 170
        tt_flower_to_start_grain = 80
        tt_flower_to_maturity = 761
        tt_maturity_to_ripe = 1
        main_stem_coef = 2.9
        tpla_prod_coef = 0.018
        dm_per_seed = 0.00083
        x_stem_wt = 0    80
        y_height = 0  2000
        maxGFRate = 0.09
        x_stem_wt = 0    80  # look up table for canopy height
        y_height = 0  2000  # plant canopy height
        aX0 = 0.687  # Largest leaf multiplier
        aMaxS = 22.25  # Largest Leaf Area Slope
        aMaxI = 92.45  # Intercept for Largest leaf calculation
        aMaxVert = 0.3  # Vertical Offset for Largest Leaf Calc
        tillerSdIntercept = -0.265  # Propensity to Tiller
        tillerSdSlope = 0.247  # Tiller Supply/demand slope
      sorghumGenotype A35xQL36
        tt_emerg_to_endjuv = 100
        photoperiod_crit1 = 11.8
        photoperiod_crit2 = 14.0
        photoperiod_slope = 39.7
        tt_endjuv_to_init = 134.4
        tt_flag_to_flower = 170
        tt_flower_to_start_grain = 80
        tt_flower_to_maturity = 761
        tt_maturity_to_ripe = 1
        main_stem_coef = 2.90
        tpla_prod_coef = 0.018
        dm_per_seed = 0.00083
        x_stem_wt = 0    80
        y_height = 0  2000
        partition_rate_leaf = 0.012
        maxGFRate = 0.09
        x_stem_wt = 0    80  # look up table for canopy height
        y_height = 0  2000  # plant canopy height
        aX0 = 0.687  # Largest leaf multiplier
        aMaxS = 22.25  # Largest Leaf Area Slope
        aMaxI = 92.45  # Intercept for Largest leaf calculation
        aMaxVert = 0.3  # Vertical Offset for Largest Leaf Calc
        tilleringPropensity = 0  # Propensity to Tiller
        tillerSdIntercept = -0.265  # Propensity to Tiller
        tillerSdSlope = 0.247  # Tiller Supply/demand slope
        aTillerVert = 0.05  # Additional Vertical Offset for each additional Tiller
      sorghumGenotype QL39xQL36
        tt_emerg_to_endjuv = 100
        photoperiod_crit1 = 11.8
        photoperiod_crit2 = 14
        photoperiod_slope = 39.7
        tt_endjuv_to_init = 114.4
        tt_flag_to_flower = 170
        tt_flower_to_start_grain = 80
        tt_flower_to_maturity = 761
        tt_maturity_to_ripe = 1
        main_stem_coef = 2.9
        tpla_prod_coef = 0.018
        dm_per_seed = 0.00083
        x_stem_wt = 0    80
        y_height = 0  2000
        maxGFRate = 0.09
        x_stem_wt = 0    80  # look up table for canopy height
        y_height = 0  2000  # plant canopy height
        aX0 = 0.687  # Largest leaf multiplier
        aMaxS = 22.25  # Largest Leaf Area Slope
        aMaxI = 92.45  # Intercept for Largest leaf calculation
        aMaxVert = 0.3  # Vertical Offset for Largest Leaf Calc
        tillerSdIntercept = -0.265  # Propensity to Tiller
        tillerSdSlope = 0.247  # Tiller Supply/demand slope
        aTillerVert = 0.05  # Additional Vertical Offset for each additional Tiller
      sorghumConstants standard
        crop_type = sorghum
        default_crop_class = plant
        stage_names = sowing germination emergence end_of_juvenile floral_initiation flag_leaf flowering start_grain_fill end_grain_fill maturity harvest_ripe end_crop
        stage_code = 1   2   3    4      5     6     7    8    9    10   11   12
        pesw_germ = 0.0  # plant extractable soil water in seedling layer inadequate for germination (mm/mm)
        shoot_lag = 15.0  # time lag before linear coleoptile growth starts (deg days)
        shoot_rate = 0.6  # growing deg day increase with depth for coleoptile (deg day/mm depth)
        twilight = -2.2  # Twilight is defined as the interval between sunrise or sunset and the time when the true
        x_temp = 11 30  42  # cardinal temps.
        y_tt = 0  19   0  # diff
        x_temp_fm = 5.7 23.5
        y_tt_fm = 0   17.8
        leaf_no_at_emerg = 1.0  # (expanded) leaf number at emergence ()
        leaf_no_seed = 4.0  # number of leaf primordia present in seed
        leaf_no_min = 10.0  # minimum leaf number
        leaf_no_max = 40.0  # maximum leaf number
        leaf_init_rate = 21.6  # degree days to initiate each leaf primordium until floral init (deg day)
        leaf_app_rate1 = 41.0  # Growing deg day required to develop the most leaf ligules. (deg day).
        leaf_app_rate2 = 20.0  # Growing deg day required to develop last leaf ligules. (deg day).
        leaf_no_rate_change = 3.5  # Leaf no below flag above which leaf appearance rate changes from rate1 to rate2.
        leaf_app_rate = 41.0  # last leaf ligules. (deg day).
        rue = 1.25  # g bio/MJ Radn radiation use efficiency
        row_spacing_default = 750  # Default rowing spacing used to calculate k
        x_row_spacing = 0.20   0.50   1.00  # Row spacing
        y_extinct_coef = 0.70   0.40   0.40  # extinction coefficient for green leaf
        x_ave_temp = 8 20 35 50  # mean daily temperature
        y_stress_photo = 0  1  1  0  # multiplier on RUE
        dm_leaf_init = 0.1  # leaf weight at emergence (g/plant)
        dm_root_init = 0.1  # root weight at emergence (g/plant)
        dm_stem_init = 0.1  # stem weight at emergence (g/plant)
        stem_trans_frac = 0.20  # fraction of stem used in translocation to grain
        leaf_trans_frac = 0.15  # fraction of leaf used in translocation to grain
        retransRate = 0.15
        ratio_root_shoot = 0   0   1    1     0.33  0.33  0.087  0    0     0    0    0
        partition_rate_leaf = 0.006  # coefficient of sigmoidal function between leaf partition fraction and internode no**2 (0-1)
        frac_stem2flower = 0.30  # fraction of dm allocated to stem that goes to developing head
        grn_water_cont = 0.130  # water content of grain g/g
        GrainTempWindow = -150 50
        GrainTempOrdinals = 36 40
        leaf_no_correction = 1.52  # corrects for other growing leaves
        x_lai = 0.1    4
        y_lai_sla_max = 50000 25000  # maximum specific leaf area for delta LAI
        lai_sla_min = 8000  8000  # minimum specific leaf area for delta LAI
        sla_max = 45000
        sla_min = 8000  # minimum specific leaf area for new leaf area
        initial_tpla = 200.0  # initial total plant leaf area
        tiller_coef = 0.66  # exponent for determining leaf area on each additional tiller
        tpla_inflection_ratio = 0.66  # inflection coefficient of TPLA curve
        height_max = 3500.0  # maximum canopy height
        height_stem_slope = 250.0  # rate of height growth (mm/g/stem)
        root_depth_rate = 0 27.0  27.0  27.0 27.0  27.0   27.0   0      0       0    0    0  # mm/day.
        x_sw_ratio = 0   0.25  # water availability for effects on root depth growth
        y_sw_fac_root = 0   1  # stress factor for root depth growth, This may be probably the same for all crops
        initial_root_depth = 50  # initial depth of roots (mm)
        specific_root_length = 100000
        x_plant_rld = 0.0  0.1  # root branching
        y_rel_root_rate = 1.0  1.0
        transp_eff_cf = 0.009
        svp_fract = 0.75  # (0-1)
        x_sw_demand_ratio = 0.1 1.1  # water availability This is the original value
        y_swdef_leaf = 0   1  # stress indices
        x_sw_avail_ratio = 0 0.2 1.0  # water availability Needs to be severe to worry phenology
        y_swdef_pheno = 0 1.0 1.0  # stress indices
        no3_diffn_const = 2.0
        maxUptakeRate = 0.029
        initialRootNConc = 0.020
        targetRootNConc = 0.002
        initialLeafSLN = 1.5
        targetLeafSLN = 1.5
        newLeafSLN = 1.0
        leafDilnNSlope = 0.0043
        leafDilnNInt = -0.0017
        initialStemNConc = 0.01
        x_stem_n = 3         5       7         10
        targetStemNConc = 0.055   0.016   0.01      0.005
        structStemNConc = 0.012  0.012   0.005   0.0015
        stemDilnNSlope = 0.0062
        stemDilnNInt = -0.001
        initialRachisNConc = 0.000
        targetRachisNConc = 0.01
        structRachisNConc = 0.003
        rachisDilnNSlope = 0.0062
        rachisDilnNInt = -0.001
        grainFillRate = 0.001
        targetGrainNConc = 0.0175
        grainFillIntercept = 0.0000319
        grainFillSlope = 0.4026
        nUptakeCease = 570
        nSupplyFrac = 5
        dm_root_sen_frac = 0.002  # fraction of root dry matter senesced each day
        lai_sen_light = 4.0  # induced senescence occurs (m^2/m^2)
        sen_light_slope = 0.008  # sensitivity of leaf area senescence to shading
        x_temp_senescence = 0.0 6.0  # minimum temperature for frost senescence table (oC)
        y_senescence_fac = 1   0  # daily fraction of leaf area senesced due to frost (0-1)
        sen_rate_water = 0.05  # slope in linear eqn relating soil water stress during photosynthesis to leaf senesence rate
        dead_detach_frac = 0 0 0 0 0  # fraction detached from each part of a dead plant per day.
        dm_leaf_detach_frac = 0
        sen_light_time_const = 10.0  # delay factor for light senescence
        sen_radn_crit = 2  # radiation level for onset of light senescence
        frost_kill = 1.0  # temperature threshold for leaf death
        sen_water_time_const = 10.0  # delay factor for water senescence
        sen_threshold = 0.25  # supply:demand ratio for onset of water senescence
        spla_slope = 81.5  # regression slope for calculating inflection point for leaf senescence
        tt_emerg_limit = 150.0  # maximum degree days allowed for emergence to take place
        days_germ_limit = 40.0  # maximum days allowed after sowing for germination to take place (days)
        swdf_photo_limit = 99.0  # critical cumulative photosynthesis water stress, above which the crop partly fails (unitless)
        swdf_photo_rate = 0.0  # rate of plant reduction with photosynthesis water stress
        swdf_pheno_limit = 99.0  # critical cumulative phenology water stress, above which the crop fails (unitless)
        x_weighted_temp = 55.0  60.0
        y_plant_death = 0.0   1.0
        stress_determinants = leaf stem grain
        yield_parts = grain
        retrans_parts = leaf stem  flower
        pfact_photo_slope = 2.5
        pfact_expansion_slope = 2.5
        pfact_pheno_slope = 100
        pfact_grain_slope = 20
        p_uptake_factor = 1.5  # factor to calc total P uptake from demand for today's growth
        x_p_stage_code = 3       4      5      6      7      8      10
        y_p_conc_max_leaf = 0.0059  0.0054 0.0040 0.0029 0.0026 0.0025 0.0022
        y_p_conc_min_leaf = 0.003   0.003  0.0029 0.0011 0.0011 0.0008 0.0006
        y_p_conc_sen_leaf = 0.0005  0.0005 0.0005 0.0005 0.0005 0.0005 0.0005
        y_p_conc_max_stem = 0.0057  0.0038 0.0037 0.0018 0.0016 0.0013 0.0013
        y_p_conc_min_stem = 0.003   0.003  0.002  0.0006 0.0006 0.0002 0.0002
        y_p_conc_sen_stem = 0.0002  0.0002 0.0002 0.0002 0.0002 0.0002 0.0002
        y_p_conc_max_root = 0.0010  0.0010 0.0010 0.0010 0.0010 0.0010 0.0010  # assume P conc in roots non-varying
        y_p_conc_min_root = 0.0010  0.0010 0.0010 0.0010 0.0010 0.0010 0.0010
        y_p_conc_sen_root = 0.0010  0.0010 0.0010 0.0010 0.0010 0.0010 0.0010
        y_p_conc_max_flower = 0.0057  0.0038 0.0037 0.0018 0.0016 0.0013 0.0013  # assumed same as stem
        y_p_conc_min_flower = 0.003   0.003  0.002  0.0006 0.0006 0.0002 0.0002
        y_p_conc_sen_flower = 0.0002  0.0002 0.0002 0.0002 0.0002 0.0002 0.0002
        y_p_conc_max_grain = 0.001   0.001  0.001  0.001  0.052  0.0044  0.0034
        y_p_conc_min_grain = 0.001   0.001  0.001  0.001  0.001  0.0015  0.0015  # based on Kenya maize data
        y_p_conc_sen_grain = 0.001   0.001  0.001  0.001  0.001  0.0015  0.0015
        y_p_conc_max_energy = 0.001   0.001  0.001  0.001  0.001  0.001  0.001
        y_p_conc_min_energy = 0.001   0.001  0.001  0.001  0.001  0.001  0.001
        y_p_conc_sen_energy = 0.001   0.001  0.001  0.001  0.001  0.001  0.001
        p_conc_init_leaf = 0.0059
        p_conc_init_stem = 0.0057
        p_conc_init_root = 0.010
        p_conc_init_flower = 0.0057
        p_conc_init_grain = 0.0052
        p_conc_init_energy = 0.0
        ll_ub = 1000.0  # upper limit of lower limit
        kl_ub = 1.0  # upper limit of water uptake factor
        minsw = 0.00001  # lowest acceptable value for ll
        latitude_ub = 90  # latitude upper limit
        latitude_lb = -90  # latitude lower limit
        maxt_ub = 55  # max. temperature upper limit
        maxt_lb = 0  # max. temperature lower limit
        mint_ub = 40  # min. temperature upper limit
        mint_lb = -10  # min. temperature lower limit
        radn_ub = 50  # radiation upper limit
        radn_lb = 1  # radiation lower limit
        dlayer_ub = 1000  # layer depth upper limit
        dlayer_lb = 0  # layer depth lower limit
        dul_dep_ub = 1000  # drained upper limit upper limit
        dul_dep_lb = 0  # drained upper limit lower limit
        sw_dep_ub = 1000  # soil water upper limit
        sw_dep_lb = 0  # soil water lower limit
        sw_ub = 1.0  # soil water upper limit
        sw_lb = 0.0  # soil water upper limit
        no3_ub = 10000  # soil nitrate upper limit
        no3_lb = 0  # soil nitrate lower limit
        no3_min_ub = 10000  # min. soil nitrate upper limit
        no3_min_lb = 0  # min. soil nitrate lower limit
        nh4_ub = 10000  # soil nitrate upper limit
        nh4_lb = 0  # soil nitrate lower limit
        nh4_min_ub = 10000  # min. soil nitrate upper limit
        nh4_min_lb = 0  # min. soil nitrate lower limit
        head_grain_no_max_ub = 45000.0  # upper limit !NOT USED
        grain_gth_rate_ub = 20.0  # upper limit !NOT USED
        tt_emerg_to_endjuv_ub = 500.0  # upper limit
        pp_endjuv_to_init_ub = 200.0  # upper limit oC h-1
        tt_flower_to_maturity_ub = 1000.0  # upper limit
        tt_maturity_to_ripe_ub = 1000.0  # upper limit
        tt_flower_to_start_grain_ub = 1000.0  # upper limit
        tt_flag_to_flower_ub = 1000.0  # upper limit
        senescedLeafSLN = 0.0
        leaf_area_calc_type = bellcurve  # Canopy calculation
        tillerSlaBound = 15  # SLA Range (%)
        maxLAIForTillerAddition = 0.325  # Max Linear LAI for tillers
      sorghumGenotype QL41xQL36
        tt_emerg_to_endjuv = 100
        photoperiod_crit1 = 11.5
        photoperiod_crit2 = 13.5
        photoperiod_slope = 12.5
        tt_endjuv_to_init = 179
        tt_flag_to_flower = 170
        tt_flower_to_start_grain = 80
        tt_flower_to_maturity = 761
        tt_maturity_to_ripe = 1
        main_stem_coef = 2.9
        tpla_prod_coef = 0.018
        dm_per_seed = 0.00083
        x_stem_wt = 0    80
        y_height = 0  2000
        maxGFRate = 0.09
        x_stem_wt = 0    80  # look up table for canopy height
        y_height = 0  2000  # plant canopy height
        aX0 = 0.687  # Largest leaf multiplier
        aMaxS = 22.25  # Largest Leaf Area Slope
        aMaxI = 92.45  # Intercept for Largest leaf calculation
        aMaxVert = 0.3  # Vertical Offset for Largest Leaf Calc
        tillerSdIntercept = -0.265  # Propensity to Tiller
        tillerSdSlope = 0.247  # Tiller Supply/demand slope
      sorghumGenotype Buster
        tt_emerg_to_endjuv = 100
        photoperiod_crit1 = 11.5
        photoperiod_crit2 = 13.5
        photoperiod_slope = 11.5
        tt_endjuv_to_init = 160
        tt_flag_to_flower = 170
        tt_flower_to_start_grain = 80
        tt_flower_to_maturity = 761
        tt_maturity_to_ripe = 1
        main_stem_coef = 2.9
        tpla_prod_coef = 0.018
        dm_per_seed = 0.00083
        x_stem_wt = 0    80
        y_height = 0  2000
        maxGFRate = 0.09
        x_stem_wt = 0    80  # look up table for canopy height
        y_height = 0  2000  # plant canopy height
        aX0S = 0.60  # Position of largest leaf Slope
        aX0I = 3.58  # Position of largest leaf Intercept
        aMaxS = 42.1  # Area of largest leaf Slope
        aMaxI = -137.4  # Area of largest leaf Intercept
        tillerSdIntercept = 0.329  # Propensity to Tiller
        tillerSdSlope = 0.300  # Tiller Supply/demand slope
      sorghumGenotype M35-2
        tt_emerg_to_endjuv = 100
        photoperiod_crit1 = 11.5
        photoperiod_crit2 = 13.5
        photoperiod_slope = 61
        tt_endjuv_to_init = 252
        tt_flag_to_flower = 170
        tt_flower_to_start_grain = 80
        tt_flower_to_maturity = 761
        tt_maturity_to_ripe = 1
        main_stem_coef = 2.82
        tpla_prod_coef = 0.011
        dm_per_seed = 0.00142784
        x_stem_wt = 0    80
        y_height = 0  2000
        partition_rate_leaf = 0.018
        nUptakeCease = 10
        leaf_init_rate = 26.1
        targetLeafSLN = 1.2
        maxGFRate = 0.09
        x_stem_wt = 0    80  # look up table for canopy height
        y_height = 0  2000  # plant canopy height
        aX0 = 0.687  # Largest leaf multiplier
        aMaxS = 22.25  # Largest Leaf Area Slope
        aMaxI = 92.45  # Intercept for Largest leaf calculation
        aMaxVert = 0.3  # Vertical Offset for Largest Leaf Calc
        tillerSdIntercept = 0.329  # Propensity to Tiller
        tillerSdSlope = 0.300  # Tiller Supply/demand slope
      sorghumGenotype CSH13R
        tt_emerg_to_endjuv = 100
        photoperiod_crit1 = 11.5
        photoperiod_crit2 = 13.5
        photoperiod_slope = 17
        tt_endjuv_to_init = 228
        tt_flag_to_flower = 170
        tt_flower_to_start_grain = 80
        tt_flower_to_maturity = 761
        tt_maturity_to_ripe = 1
        main_stem_coef = 2.95
        tpla_prod_coef = 0.014
        dm_per_seed = 0.0015
        x_stem_wt = 0    80
        y_height = 0  2000
        rue = 1.6
        partition_rate_leaf = 0.018
        targetLeafSLN = 1.2
        leaf_init_rate = 23.2
        maxGFRate = 0.09
        x_stem_wt = 0    80  # look up table for canopy height
        y_height = 0  2000  # plant canopy height
        aX0 = 0.687  # Largest leaf multiplier
        aMaxS = 22.25  # Largest Leaf Area Slope
        aMaxI = 92.45  # Intercept for Largest leaf calculation
        aMaxVert = 0.3  # Vertical Offset for Largest Leaf Calc
        tillerSdIntercept = -0.818  # Propensity to Tiller
        tillerSdSlope = 0.159  # Tiller Supply/demand slope
        aTillerVert = 0.05  # Additional Vertical Offset for each additional Tiller
    manager Logic
      on init:
```
 my_soil = ' '
          counter =0   ! used to finish the simulation (in the "harvesting rule"
          harvested =0
          
! variables of the logic
 n_uptake=0
 cumRain=0                                    ! (mm)
 cumIrrig=0                                   ! (mm) irrigation from sowing to harvest
 cumRadn=0                                    ! (MJ/m^2)
reeves = 0
```
      on start_of_day:
```
 avgTemp = (maxt + mint) / 2
reeves = 429.72 - 18.158 * LeafNo
if (reeves > 400) then
   reeves = 400
endif
if (reeves < 150) then
   reeves = 150
endif
```
      on end_of_day:
```
 
if (paddock_is_fallow() = 0) then 
   outputfile_daily do_output
   outputfileLeaf do_output
   outputfileArea do_output
endif                
cumRain=cumRain + rain                  ! definition of  cum rain, radn...
cumRadn=cumRadn + radn

if (stage = 7) then
   outputfile do_output
endif
```
    outputfile: filename=.out
      variables My Variables
        variables: LeafSizesMain as Main, LeafSizesTiller1 as T1, LeafSizesTiller2 as T2, LeafSizesTiller3 as T3, LeafSizesTiller4 as T4, LeafSizesTiller5 as T5
        constants: constant format=csv
    outputfile outputfileLeaf: filename=outputfileLeaf.out; title=outputfileLeaf
      variables My Variables
        variables: DaysAfterSowing, Proportions
        constants: constant format=csv
    outputfile outputfileArea: filename=outputfileArea.out; title=outputfileArea
      variables My Variables
        variables: DaysAfterSowing, CulmArea, lai, TPLA, LeafNo, deltaTT, radn
        constants: constant format=csv
  simulation Sorghum_Gatton_Tiller_x_Density_1
    clock
      start_date = 23/10/1998
      end_date = 21/02/1999
    summaryfile
    metfile met: filename=Gatton Tiller x Density.met
    area paddock
      surfaceom Surface Organic Matter
        PoolName = wheat  # Organic Matter pool name
        type = wheat  # Organic Matter type
        mass = 1000  # Initial surface residue (kg/ha)
        cnr = 80  # C:N ratio of initial residue
        standing_fraction = 0  # Fraction of residue standing
      fertiliser
      operations
        26/10/1998  Irrigation apply amount = 6
        27/10/1998  Irrigation apply amount = 0
        28/10/1998  Irrigation apply amount = 0
        29/10/1998  Irrigation apply amount = 2
        30/10/1998  Irrigation apply amount = 2
        31/10/1998  Irrigation apply amount = 3
        1/11/1998  Irrigation apply amount = 0
        2/11/1998  Irrigation apply amount = 1
        13/11/1998  Irrigation apply amount = 1
        14/11/1998  Irrigation apply amount = 21
        19/11/1998  Irrigation apply amount = 5
        23/11/1998  Irrigation apply amount = 10
        24/11/1998  Irrigation apply amount = 0
        25/11/1998  Irrigation apply amount = 43
        26/11/1998  Irrigation apply amount = 9
        27/11/1998  Irrigation apply amount = 0
        29/11/1998  Irrigation apply amount = 14
        16/12/1998  Irrigation apply amount = 30
        17/12/1998  Irrigation apply amount = 4
        19/12/1998  Irrigation apply amount = 10
        20/12/1998  Irrigation apply amount = 14
        21/12/1998  Irrigation apply amount = 8
        22/12/1998  Irrigation apply amount = 0
        24/12/1998  Irrigation apply amount = 1
        25/12/1998  Irrigation apply amount = 8
        26/12/1998  Irrigation apply amount = 0
        1/01/1999  Irrigation apply amount = 3
        2/01/1999  Irrigation apply amount = 22
        3/01/1999  Irrigation apply amount = 21
        4/01/1999  Irrigation apply amount = 0
        5/01/1999  Irrigation apply amount = 9
        6/01/1999  Irrigation apply amount = 4
        10/01/1999  Irrigation apply amount = 79
        11/01/1999  Irrigation apply amount = 5
        12/01/1999  Irrigation apply amount = 0
        13/01/1999  Irrigation apply amount = 1
        16/01/1999  Irrigation apply amount = 1
        21/01/1999  Irrigation apply amount = 1
        22/01/1999  Irrigation apply amount = 0
        28/01/1999  Irrigation apply amount = 0
        29/01/1999  Irrigation apply amount = 0
        30/01/1999  Irrigation apply amount = 8
        31/01/1999  Irrigation apply amount = 3
        1/02/1999  Irrigation apply amount = 5
        2/02/1999  Irrigation apply amount = 13
        8/02/1999  Irrigation apply amount = 23
        9/02/1999  Irrigation apply amount = 103
        10/02/1999  Irrigation apply amount = 8
        11/02/1999  Irrigation apply amount = 0
        12/02/1999  Irrigation apply amount = 1
        25/02/1999  Irrigation apply amount = 14
        26/02/1999  Irrigation apply amount = 2
        1/03/1999  Irrigation apply amount = 12
        2/03/1999  Irrigation apply amount = 24
        3/03/1999  Irrigation apply amount = 16
        4/03/1999  Irrigation apply amount = 35
        12/03/1999  Irrigation apply amount = 0
        23/03/1999  Irrigation apply amount = 0
        5/04/1999  Irrigation apply amount = 0
        6/04/1999  Irrigation apply amount = 1
        7/04/1999  Irrigation apply amount = 0
        18/04/1999  Irrigation apply amount = 0
        19/04/1999  Irrigation apply amount = 5
      folder Manager folder
        manager Sow on a fixed date
          # Sowing criteria
          date = 23/10/1998  # Enter sowing date (dd-mmm)
          # Sowing parameters
          crop = Sorghum  # Enter name of crop to sow
          density = 2  # Enter sowing density (plants/m2)
          depth = 30  # Enter sowing depth (mm)
          cultivar = Buster  # Enter cultivar
          class = plant  # Enter crop growth class
          row_spacing = 500  # Enter row spacing (mm)
          skiprow = solid
          ftn = 0  # Enter Fertile Tiller Number
          on start_of_day:
```
if (today = date('[date]') then
[crop] sow plants =[density], sowing_depth = [depth], cultivar = [cultivar], row_spacing = [row_spacing], crop_class = [class], skip = [skiprow], tiller_no_fertile = [ftn]
endif
```
        manager Fertilise at sowing
          # When should fertiliser be applied
          modulename = Sorghum  # On which module should the event come from
          eventname = sowing  # On which event should fertiliser be applied
          # Fertiliser application details
          fertmodule = fertiliser  # Module used to apply the fertiliser
          fert_amount_sow = 240  # Amount of starter fertiliser at sowing (kg/ha)
          fert_type_sow = NO3_N  # Sowing fertiliser type
          on [modulename].[eventname]:
```
[fertmodule] apply amount = [fert_amount_sow] (kg/ha), depth = 50 (mm), type = [fert_type_sow]
fert_amount_sow=[fert_amount_sow]
```
        manager Harvesting rule
          # Harvesting criteria
          crop = Sorghum  # Enter name of crop to harvest when ripe
          on end_of_day:
```
if [crop].StageName = 'harvest_ripe' or [crop].plant_status = 'dead' then
[crop]  harvest
[crop]  end_crop
endif
```
      outputfile outputfile_daily: filename=Sorghum_Gatton_Tiller_x_Density_1 outputfile_daily.out; title=Sorghum_Gatton_Tiller_x_Density_1 outputfile_daily; events=output_daily - My Variables Events
        variables output_daily - My Variables -> /folder/shared/output_daily - My Variables
      irrigation
        automatic_irrigation = off
        asw_depth = 600  # Depth to which ASW is calculated. (mm)
        crit_fr_asw = 0.5  # Fraction of ASW below which irrigation is applied (0-1.0)
        irrigation_efficiency = 1  # Efficiency of the irrigation. (0-1.0)
        irrigation_allocation = off  # Allocation limits
        allocation = 0  # Allocation in ML
        default_no3_conc = 0  # Nitrate concentration (ppm N)
        default_nh4_conc = 0  # Ammonium concentration (ppm N)
        default_cl_conc = 0  # Chloride concentration (ppm Cl)
        default_no3_conc = 0  # Nitrate concentration (ppm N)
        default_nh4_conc = 0  # Ammonium concentration (ppm N)
        default_cl_conc = 0  # Chloride concentration (ppm Cl)
      Sorghum -> /folder/shared/sorghum
      Soil LawesBlackVertosol -> /folder/shared/LawesBlackVertosol
      manager Logic -> /folder/shared/Logic
      outputfile -> /folder/shared/outputfile: filename=Sorghum_Gatton_Tiller_x_Density_1.out; title=Sorghum_Gatton_Tiller_x_Density_1
        variables My Variables -> /folder/shared/outputfile/My Variables
      outputfile outputfileLeaf -> /folder/shared/outputfileLeaf: filename=Sorghum_Gatton_Tiller_x_Density_1 outputfileLeaf.out; title=Sorghum_Gatton_Tiller_x_Density_1 outputfileLeaf
        variables My Variables -> /folder/shared/outputfileLeaf/My Variables
      outputfile outputfileArea -> /folder/shared/outputfileArea: filename=Sorghum_Gatton_Tiller_x_Density_1 outputfileArea.out; title=Sorghum_Gatton_Tiller_x_Density_1 outputfileArea
        variables My Variables
          variables: DaysAfterSowing, CulmLAI
          constants: constant format=csv
  simulation Sorghum_Gatton_Tiller_x_Density_2
    clock
      start_date = 23/10/1998
      end_date = 21/02/1999
    summaryfile
    metfile met: filename=Gatton Tiller x Density.met
    area paddock
      surfaceom Surface Organic Matter
        PoolName = wheat  # Organic Matter pool name
        type = wheat  # Organic Matter type
        mass = 1000  # Initial surface residue (kg/ha)
        cnr = 80  # C:N ratio of initial residue
        standing_fraction = 0  # Fraction of residue standing
      fertiliser
      operations: same as Sorghum_Gatton_Tiller_x_Density_1.paddock.operations
      folder Manager folder
        manager Sow on a fixed date
          # Sowing criteria
          date = 23/10/1998  # Enter sowing date (dd-mmm)
          # Sowing parameters
          crop = Sorghum  # Enter name of crop to sow
          density = 4  # Enter sowing density (plants/m2)
          depth = 30  # Enter sowing depth (mm)
          cultivar = Buster  # Enter cultivar
          class = plant  # Enter crop growth class
          row_spacing = 500  # Enter row spacing (mm)
          skiprow = solid
          ftn = 3.27  # Enter Fertile Tiller Number
          on start_of_day:
          script: same as in Sorghum_Gatton_Tiller_x_Density_1.paddock.Manager folder.Sow on a fixed date
        manager Fertilise at sowing: same as Sorghum_Gatton_Tiller_x_Density_1.paddock.Manager folder.Fertilise at sowing
        manager Harvesting rule
          # Harvesting criteria
          crop = Sorghum  # Enter name of crop to harvest when ripe
          on end_of_day:
          script: same as in Sorghum_Gatton_Tiller_x_Density_1.paddock.Manager folder.Harvesting rule
      outputfile outputfile_daily: filename=Sorghum_Gatton_Tiller_x_Density_2 outputfile_daily.out; title=Sorghum_Gatton_Tiller_x_Density_2 outputfile_daily; events=output_daily - My Variables Events
        variables output_daily - My Variables -> /folder/shared/output_daily - My Variables
      irrigation: same as Sorghum_Gatton_Tiller_x_Density_1.paddock.Irrigation
      Soil LawesBlackVertosol -> /folder/shared/LawesBlackVertosol
      Sorghum -> /folder/shared/sorghum
      manager Logic -> /folder/shared/Logic
      outputfile outputfileLeaf -> /folder/Sorghum_Gatton_Tiller_x_Density_1/paddock/outputfileLeaf: filename=Sorghum_Gatton_Tiller_x_Density_2 outputfileLeaf.out; title=Sorghum_Gatton_Tiller_x_Density_2 outputfileLeaf
        variables My Variables -> /folder/Sorghum_Gatton_Tiller_x_Density_1/paddock/outputfileLeaf/My Variables
      outputfile -> /folder/shared/outputfile: filename=Sorghum_Gatton_Tiller_x_Density_2.out; title=Sorghum_Gatton_Tiller_x_Density_2
        variables My Variables -> /folder/shared/outputfile/My Variables
      outputfile outputfileArea -> /folder/shared/outputfileArea: filename=Sorghum_Gatton_Tiller_x_Density_2 outputfileArea.out; title=Sorghum_Gatton_Tiller_x_Density_2 outputfileArea
        variables My Variables
          variables: DaysAfterSowing, CulmLAI
          constants: constant format=csv
  simulation Sorghum_Gatton_Tiller_x_Density_3
    clock
      start_date = 23/10/1998
      end_date = 21/02/1999
    summaryfile
    metfile met: filename=Gatton Tiller x Density.met
    area paddock
      surfaceom Surface Organic Matter
        PoolName = wheat  # Organic Matter pool name
        type = wheat  # Organic Matter type
        mass = 1000  # Initial surface residue (kg/ha)
        cnr = 80  # C:N ratio of initial residue
        standing_fraction = 0  # Fraction of residue standing
      fertiliser
      operations: same as Sorghum_Gatton_Tiller_x_Density_1.paddock.operations
      folder Manager folder
        manager Sow on a fixed date
          # Sowing criteria
          date = 23/10/1998  # Enter sowing date (dd-mmm)
          # Sowing parameters
          crop = Sorghum  # Enter name of crop to sow
          density = 8  # Enter sowing density (plants/m2)
          depth = 30  # Enter sowing depth (mm)
          cultivar = Buster  # Enter cultivar
          class = plant  # Enter crop growth class
          row_spacing = 500  # Enter row spacing (mm)
          skiprow = solid
          ftn = 1.53  # Enter Fertile Tiller Number
          on start_of_day:
          script: same as in Sorghum_Gatton_Tiller_x_Density_1.paddock.Manager folder.Sow on a fixed date
        manager Fertilise at sowing: same as Sorghum_Gatton_Tiller_x_Density_1.paddock.Manager folder.Fertilise at sowing
        manager Harvesting rule
          # Harvesting criteria
          crop = Sorghum  # Enter name of crop to harvest when ripe
          on end_of_day:
          script: same as in Sorghum_Gatton_Tiller_x_Density_1.paddock.Manager folder.Harvesting rule
      outputfile outputfile_daily: filename=Sorghum_Gatton_Tiller_x_Density_3 outputfile_daily.out; title=Sorghum_Gatton_Tiller_x_Density_3 outputfile_daily; events=output_daily - My Variables Events
        variables output_daily - My Variables -> /folder/shared/output_daily - My Variables
      irrigation: same as Sorghum_Gatton_Tiller_x_Density_1.paddock.Irrigation
      Soil LawesBlackVertosol -> /folder/shared/LawesBlackVertosol
      manager Logic -> /folder/shared/Logic
      Sorghum -> /folder/shared/sorghum
      outputfile outputfileLeaf -> /folder/Sorghum_Gatton_Tiller_x_Density_1/paddock/outputfileLeaf: filename=Sorghum_Gatton_Tiller_x_Density_3 outputfileLeaf.out; title=Sorghum_Gatton_Tiller_x_Density_3 outputfileLeaf
        variables My Variables -> /folder/Sorghum_Gatton_Tiller_x_Density_1/paddock/outputfileLeaf/My Variables
      outputfile -> /folder/shared/outputfile: filename=Sorghum_Gatton_Tiller_x_Density_3.out; title=Sorghum_Gatton_Tiller_x_Density_3
        variables My Variables -> /folder/shared/outputfile/My Variables
      outputfile outputfileArea -> /folder/shared/outputfileArea: filename=Sorghum_Gatton_Tiller_x_Density_3 outputfileArea.out; title=Sorghum_Gatton_Tiller_x_Density_3 outputfileArea
        variables My Variables -> /folder/shared/outputfileArea/My Variables
  simulation Sorghum_Gatton_Tiller_x_Density_4
    clock
      start_date = 23/10/1998
      end_date = 21/02/1999
    summaryfile
    metfile met: filename=Gatton Tiller x Density.met
    area paddock
      surfaceom Surface Organic Matter
        PoolName = wheat  # Organic Matter pool name
        type = wheat  # Organic Matter type
        mass = 1000  # Initial surface residue (kg/ha)
        cnr = 80  # C:N ratio of initial residue
        standing_fraction = 0  # Fraction of residue standing
      fertiliser
      operations: same as Sorghum_Gatton_Tiller_x_Density_1.paddock.operations
      folder Manager folder
        manager Sow on a fixed date
          # Sowing criteria
          date = 23/10/1998  # Enter sowing date (dd-mmm)
          # Sowing parameters
          crop = Sorghum  # Enter name of crop to sow
          density = 16  # Enter sowing density (plants/m2)
          depth = 30  # Enter sowing depth (mm)
          cultivar = Buster  # Enter cultivar
          class = plant  # Enter crop growth class
          row_spacing = 500  # Enter row spacing (mm)
          skiprow = solid
          ftn = 0.2  # Enter Fertile Tiller Number
          on start_of_day:
          script: same as in Sorghum_Gatton_Tiller_x_Density_1.paddock.Manager folder.Sow on a fixed date
        manager Fertilise at sowing: same as Sorghum_Gatton_Tiller_x_Density_1.paddock.Manager folder.Fertilise at sowing
        manager Harvesting rule
          # Harvesting criteria
          crop = Sorghum  # Enter name of crop to harvest when ripe
          on end_of_day:
          script: same as in Sorghum_Gatton_Tiller_x_Density_1.paddock.Manager folder.Harvesting rule
      outputfile outputfile_daily: filename=Sorghum_Gatton_Tiller_x_Density_4 outputfile_daily.out; title=Sorghum_Gatton_Tiller_x_Density_4 outputfile_daily; events=output_daily - My Variables Events
        variables output_daily - My Variables -> /folder/shared/output_daily - My Variables
      irrigation: same as Sorghum_Gatton_Tiller_x_Density_1.paddock.Irrigation
      Soil LawesBlackVertosol -> /folder/shared/LawesBlackVertosol
      Sorghum -> /folder/shared/sorghum
      manager Logic -> /folder/shared/Logic
      outputfile outputfileLeaf -> /folder/Sorghum_Gatton_Tiller_x_Density_1/paddock/outputfileLeaf: filename=Sorghum_Gatton_Tiller_x_Density_4 outputfileLeaf.out; title=Sorghum_Gatton_Tiller_x_Density_4 outputfileLeaf
        variables My Variables -> /folder/Sorghum_Gatton_Tiller_x_Density_1/paddock/outputfileLeaf/My Variables
      outputfile -> /folder/shared/outputfile: filename=Sorghum_Gatton_Tiller_x_Density_4.out; title=Sorghum_Gatton_Tiller_x_Density_4
        variables My Variables -> /folder/shared/outputfile/My Variables
      outputfile outputfileArea -> /folder/shared/outputfileArea: filename=Sorghum_Gatton_Tiller_x_Density_4 outputfileArea.out; title=Sorghum_Gatton_Tiller_x_Density_4 outputfileArea
        variables My Variables -> /folder/shared/outputfileArea/My Variables
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