Simulations: Version=155
  DataStore
    SimulationStats: TableName=SowHarvestReport; FieldNamesToSplitOn=[SimulationName, SowingDate, Management]; CalcCount=true; CalcTotal=true; CalcMean=true; CalcMedian=true; CalcMin=true; CalcMax=true; CalcStdDev=true; CalcPercentiles=true
  Folder Replacements
  Folder RowConfiguration
    Experiment RowConfiguration
      DisabledSimNames=[RowConfigurationRow250Skip2, RowConfigurationRow250Skip1, RowConfigurationRowSpacing250RowConfiguration2, RowConfigurationRowSpacing250RowConfiguration1, RowConfigurationRowSpacing250RowConfiguration0]
      Factors
        Permutation
          Factor Row
            Specification=[SowingRule].Script.RowSpacing = 250, 500, 600, 750, 1000, 1200, 1500
          Factor Skip
            CompositeFactor Solid: Specifications=[SowingRule].Script.RowConfiguration = 0
            CompositeFactor SingleSkip: Specifications=[SowingRule].Script.RowConfiguration = 1
            CompositeFactor DoubleSkip: Specifications=[SowingRule].Script.RowConfiguration = 2
      Simulation RowConfigurationBase
        Clock: Start=1995-10-01; End=1996-01-01
        Summary
        Weather: FileName=%root%/Examples/WeatherFiles/Dalby.met
        SoilArbitrator
        Zone Paddock: Area=1; Slope=0; AspectAngle=0; Altitude=50
          Report: EventNames=[Sorghum].Flowering
            VariableNames:
              [Clock].Today
              [Sorghum].AboveGround.Wt
              [Sorghum].Grain.Wt
              [Sorghum].Leaf.LAI
              [Sorghum].SowingData.SkipDensityScale
              [Sorghum].Leaf.CoverGreen
              [Sorghum].Phenology.Stage
          Manager SowingFertiliser
            Crop = [Sorghum]
            FertiliserType = UreaN
            Amount = 180
```csharp
using Models.Soils;
using System;
using Models.Core;
using Models.PMF;
namespace Models
{
    [Serializable]
    public class Script : Model
    {
        [Link] Clock Clock;
        [Link] Fertiliser Fertiliser;
        
        [Description("Crop to be fertilised")]
        public IPlant Crop { get; set; }

        [Description("Type of fertiliser to apply? ")] 
        public Fertiliser.Types FertiliserType { get; set; }
    
        [Description("Amount of fertiliser to be applied (kg/ha)")]
        public double Amount { get; set; }
        
        [EventSubscribe("Sowing")]
        private void OnSowing(object sender, EventArgs e)
        {
            Model crop = sender as Model;
            if (Crop != null && crop.Name.ToLower() == (Crop as IModel).Name.ToLower())
                Fertiliser.Apply(Amount: Amount, Type: FertiliserType);
        }
    }
}
```
          Folder Manager folder
            Manager SowingRule
              Date = 10/01/1995 00:00:00
              Density = 12
              Depth = 20
              Cultivar = Buster
              RowSpacing = 500
              RowConfiguration = Solid
              TilleringMethod = FixedTillering
              Ftn = 0
```csharp
using Models.Soils;
using System;
using Models.Core;
using Models.PMF;
using APSIM.Shared.Utilities;

namespace Models
{
    [Serializable]
    public class Script : Model
    {
        [Description("Enter sowing date (dd/mm/yyyy) : ")]
        public DateTime Date { get; set; }

        [Description("Enter sowing density  (plants/m2) : ")]
        public double Density { get; set; }

        [Description("Enter sowing depth  (mm) : ")]
        public double Depth { get; set; }

        [Description("Enter cultivar : ")]
        [Display(Type = DisplayType.CultivarName)]
        public string Cultivar { get; set; } // QL41xQL36

        [Description("Enter row spacing (mm) : ")]
        public double RowSpacing { get; set; }

        [Description("Enter skip row configuration : ")]
        public RowConfigurationType RowConfiguration { get; set; }

        [Description("Tillering Method")]
        public TilleringMethodType TilleringMethod { get; set; } = 0;

        [Description("Enter Fertile Tiller No. : ")]
        public double Ftn { get; set; }

        public enum TilleringMethodType 
        {
            RuleOfThumb = -1,
            FixedTillering = 0,
            DynamicTillering = 1
        }
        public enum RowConfigurationType 
        {
            Solid, SingleSkip, DoubleSkip
        }

        [Link]
        private Zone paddock;

        [Link]
        private Clock clock;

        [Link]
        private Plant crop;

        [EventSubscribe("DoManagement")]
        private void OnDoManagement(object sender, EventArgs e)
        {
            if (clock.Today == Date /* && isFallow */)
            {
                double population = Density * paddock.Area;
                crop.Sow(cultivar:Cultivar, population:population, depth:Depth, rowSpacing:RowSpacing, rowConfig: (double)RowConfiguration, tillering:(int)TilleringMethod, ftn:Ftn);
            }
        }
    }

}
```
            Manager Harvesting rule
```csharp
using Models.Soils;
using System;
using Models.Core;
using Models.PMF;

namespace Models
{
    [Serializable]

    public class Script : Model
    {
        [Link]
        private Clock clock;

        [Link]
        private IPlant crop;

        [EventSubscribe("DoManagement")]
        private void OnDoCalculations(object sender, EventArgs e)
        {
            if (crop.IsReadyForHarvesting)
            {
                crop.Harvest();
                crop.EndCrop();
            }
            
            /*
                

           if [crop].StageName = 'harvest_ripe' or [crop].plant_status = 'dead' then
              [crop]  harvest
              [crop]  end_crop
           endif

            
            */
        }
    }
}
```
            Manager AutomaticIrrigation
              allowIrrigation = True
              seasonStart = 1-sep
              seasonEnd = 30-mar
              seasonsAllocation = 10000
              triggerDeficit = 50
              targetDeficit = 95
              returndays = 3
              maximumAmount = 30
              depthPAWC = 650
```csharp
using Models.Interfaces;
using System;
using Models.Core;
using Models.PMF;
using Models.Soils;
using APSIM.Shared.Utilities;

namespace Models
{
    [Serializable] 
    public class Script : Model
    {
        [Link] private ISummary summary;
        [Link] private Irrigation Irrigation;
        [Link] private Clock Clock;
        [Link] private Soil Soil;
        [Link(IsOptional = true)] private IPlant existingCrop;
        private DateTime StartDate;
        private DateTime EndDate;
        private double TopDUL;
        private double TopLL;
        private int nLayers;
        [Link]
        private IPhysical soilPhysical;
        [Link]
        private ISoilWater waterBalance;
        //Communication to other modules
       
        //User inputs from properties tab
        [Description("Turn irrigation on?")]
        public bool allowIrrigation { get; set; }
        [Description("Start of irrigation season (dd-MMM)")]
        public string seasonStart { get; set; }
        [Description("End of irrigation season (dd-MMM)")]
        public string seasonEnd { get; set; }
        [Description("Season allocation (mm)")]
        public double seasonsAllocation { get; set; }
        [Description("Deficit to trigger irrigation (% PAWC)")]
        public double triggerDeficit { get; set; }
        [Description("Deficit to stop irrigaton (% PAWC)")]
        public double targetDeficit { get; set; }
        [Description("Minimum days for irrigation to return")]
        public double returndays { get; set; }
        [Description("Maximum irrigation application (mm/day)")]
        public double maximumAmount { get; set; }
        [Description("Depth to calculate PAWC (mm)")]
        public double depthPAWC { get; set; }

        //Class members
        public double TopSWdeficit { get; set; }
        public double TopSWC { get; set; }
        public double DaysSinceIrrigation { get; set; }
        public double AmountToApply { get; set; }
        public double SeasonAppliedAmount { get; set; }
        
        private bool IrrigationIsAllowed { get; set; }
        private bool SeasonIsOpen { get; set; }
        private bool CropIsActive { get; set; }
        private bool IrrigatorIsAvailable { get; set; }
        private bool SoilIsDry { get; set; }

    
        //Calculate static soil variables
        [EventSubscribe("StartOfSimulation")]
        private void OnStartOfSimulation(object sender, EventArgs e)
        {   
            //Set the season dates
            StartDate = DateTime.Parse(seasonStart + "-" + Clock.Today.Year.ToString());
            EndDate = DateTime.Parse(seasonEnd + "-" + Clock.Today.Year.ToString());
            
            //Can we irrigate at all?
            IrrigationIsAllowed = false; 
            if (allowIrrigation)
                IrrigationIsAllowed = true; 

            //Calculate soil water variables
            double depthFromSurface = 0.0;
            double fracLayer = 0.0;
            nLayers = soilPhysical.Thickness.Length;
            for (int layer = 0; layer < nLayers; layer++)
            {
                fracLayer = Math.Min(1.0, (depthPAWC - depthFromSurface) / soilPhysical.Thickness[layer]);
                TopLL += soilPhysical.LL15mm[layer] * fracLayer;
                TopDUL += soilPhysical.DULmm[layer] * fracLayer;
                depthFromSurface += soilPhysical.Thickness[layer];
                if (depthFromSurface >= depthPAWC)
                    layer = nLayers;
            }
        }
             
        //Determine daily requirement for irrigation
        [EventSubscribe("StartOfDay")]
        private void OnStartOfDay(object sender, EventArgs e)
        {
            //Can we irrigate today?          
            SeasonIsOpen = isBetween(Clock.Today, StartDate, EndDate);
            if (!SeasonIsOpen)
                SeasonAppliedAmount = 0;

            //Is there a crop in the ground that needs irrigation?
            CropIsActive = false;
            if ((existingCrop != null) && (existingCrop.IsAlive))
                CropIsActive = true;
            //if ((existingCrop.Phenology.Stage >= 3.0) && (existingCrop.Phenology.Stage < 6.0))
          
            //Is the irrigator available?
            IrrigatorIsAvailable = false;
            DaysSinceIrrigation += 1;
            if (DaysSinceIrrigation >= returndays)
                IrrigatorIsAvailable = true;
          
            //Is the soil dry enough to require irrigation?
            SoilIsDry = false;
            double depthFromSurface = 0.0;
            double fracLayer = 0.0;
            TopSWC = 0.0;
            for (int layer = 0; layer < nLayers; layer++)
            //for (int layer = 0; depthFromSurface < depthPAWC + soilPhysical.Thickness[layer]; layer++)
            {
                fracLayer = Math.Min(1.0, (depthPAWC - depthFromSurface) / soilPhysical.Thickness[layer]);
                TopSWC += waterBalance.SWmm[layer] * fracLayer;
                depthFromSurface += soilPhysical.Thickness[layer];
                if (depthFromSurface >= depthPAWC)
                    layer = nLayers;
            }
            
            TopSWdeficit = TopSWC - TopDUL;
            if (Math.Max(0.0, -TopSWdeficit) >= (TopDUL - TopLL) * (100 - triggerDeficit) / 100)
                SoilIsDry = true;
                
            //Are all the conditions ratifying irrigation
            if (IrrigationIsAllowed && SeasonIsOpen && CropIsActive && IrrigatorIsAvailable && SoilIsDry)
            {
                //Lets bloody well irrigate then!!!!
                AmountToApply = TopDUL * targetDeficit / 100 - TopSWC;
                AmountToApply = Math.Max(0.0, Math.Min(AmountToApply, seasonsAllocation - SeasonAppliedAmount));
                AmountToApply = Math.Min(AmountToApply,maximumAmount);
                Irrigation.Apply(AmountToApply);
                DaysSinceIrrigation = 0;
                SeasonAppliedAmount += AmountToApply;
            }
        }
        
        ///Checks whether theDate is between iniDate and endDate (non-year specific)
        private bool isBetween(DateTime theDay, DateTime iniDate, DateTime endDate)
        {
            bool result = false;
            if (iniDate.DayOfYear < endDate.DayOfYear)
            {
                // period is within one year, ex: summer in the northern hemisphere
                if ((theDay.DayOfYear >= iniDate.DayOfYear) && (theDay.DayOfYear <= endDate.DayOfYear))
                    result = true;
            }
            else
            {
                // period goes over the end of the year, ex: summer in the southern hemisphere
                if ((theDay.DayOfYear >= iniDate.DayOfYear) || (theDay.DayOfYear <= endDate.DayOfYear))
                    result = true;
            }
            
            return result;
        }
    }
}
```
          Irrigation
          Fertiliser
          MicroClimate: a_interception=0; b_interception=1; c_interception=0; d_interception=0; SoilHeatFluxFraction=0.4; MinimumHeightDiffForNewLayer=0; NightInterceptionFraction=0.5; ReferenceHeight=2
          Soil GLH Field: SoilType=GLHSoil; Site=Cooper Lab; NearestTown=Unknown; Region=Gatton; NaturalVegetation=Unknown; Latitude=0; Longitude=0
            Physical
              Thickness  BD    AirDry  LL15  DUL   SAT
              200        1.32  0.1     0.3   0.41  0.46
              200        1.3   0.15    0.3   0.43  0.48
              200        1.23  0.28    0.35  0.46  0.51
              300        1.27  0.28    0.32  0.44  0.49
              300        1.37  0.28    0.29  0.4   0.45
              300        1.35  0.3     0.31  0.41  0.46
              300        1.35  0.3     0.31  0.38  0.43
              SoilCrop SorghumSoil: LL=[0.3, 0.3, 0.35, 0.32, 0.29, 0.31, 0.31]; KL=[0.08, 0.08, 0.08, 0.08, 0.06, 0.04, 0.02]; XF=[1, 1, 1, 1, 1, 1, 1]
            WaterBalance SoilWater: SummerDate=1-Nov; SummerU=6; SummerCona=3.5; WinterDate=1-Apr; WinterU=6; WinterCona=3.5; DiffusConst=88; DiffusSlope=35.4; Salb=0.13; CN2Bare=91; CNRed=20; CNCov=0.8; PSIDul=-100; Thickness=[200, 200, 200, 300, 300, 300, 300]; SWCON=[0.5, 0.5, 0.5, 0.5, 0.5, 0.5, 0.5]
            Nutrient
            Organic: FOMCNRatio=30; CarbonUnits=Total
              Thickness  Carbon  SoilCNRatio  FBiom  FInert  FOM
              200        1.3     12.5         0.03   0.31    514.709
              200        0.65    12.5         0.01   0.38    368.805
              200        0.32    12.5         0      0.47    264.26
              300        0.11    12.5         0      0.7     160.282
              300        0.11    12.5         0      0.9     97.2159
              300        0.11    12.5         0      0.95    58.9644
              300        0.11    12.5         0      0.95    35.7637
            Chemical: Thickness=[200, 200, 200, 300, 300, 300, 300]; PH=[8.2, 8.7, 8.9, 8.1, 8, 8, 8]; PHUnits=Water
            Water: Thickness=[200, 200, 200, 300, 300, 300, 300]; InitialValues=[0.385, 0.47, 0.467, 0.459, 0.394, 0.399, 0.38]; FilledFromTop=false
            CERESSoilTemperature Temperature
            Solute NO3: Thickness=[200, 200, 200, 300, 300, 300, 300]; InitialValues=[9, 2.48, 2.79, 1.28, 2.98, 2.965, 1.387]; InitialValuesUnits=ppm; WaterTableConcentration=0; D0=0
            Solute NH4: Thickness=[200, 200, 200, 300, 300, 300, 300]; InitialValues=[0.1, 0.1, 0.1, 0.1, 0.1, 0.1, 0.1]; InitialValuesUnits=ppm; WaterTableConcentration=0; D0=0
            Solute Urea: Thickness=[200, 200, 200, 300, 300, 300, 300]; InitialValues=[0, 0, 0, 0, 0, 0, 0]; InitialValuesUnits=kg/ha; WaterTableConcentration=0; D0=0
          Plant Sorghum
          SurfaceOrganicMatter: InitialResidueName=wheat_stubble; InitialResidueType=wheat; InitialResidueMass=0; InitialStandingFraction=0; InitialCPR=0; InitialCNR=80
  Folder SowingDensity
    Experiment DensityYieldResponse
      Factors
        Permutation
          Memo
            Factor setup is maybe a bit counter-intuitive - we could do it without the CompositeFactors. The reason it was done this way is so that the graph series names come out better when varying by irrigation/fertiliser.
          Factor Management
            CompositeFactor HighN_Irr
              Specifications:
                [AutomaticIrrigation].Script.allowIrrigation = true
                [FertiliseDates].Script.Amount = 80
            CompositeFactor LowN_Irr
              Specifications:
                [AutomaticIrrigation].Script.allowIrrigation = true
                [FertiliseDates].Script.Amount = 0
            CompositeFactor HighN_Dry
              Specifications:
                [AutomaticIrrigation].Script.allowIrrigation = false
                [FertiliseDates].Script.Amount = 80
            CompositeFactor LowN_Dry
              Specifications:
                [AutomaticIrrigation].Script.allowIrrigation = false
                [FertiliseDates].Script.Amount = 0
          Factor Density
            CompositeFactor 2: Specifications=[SowingRule].Script.Density = 2
            CompositeFactor 4: Specifications=[SowingRule].Script.Density = 4
            CompositeFactor 8: Specifications=[SowingRule].Script.Density = 8
            CompositeFactor 12: Specifications=[SowingRule].Script.Density = 12
            CompositeFactor 16: Specifications=[SowingRule].Script.Density = 16
            CompositeFactor 20: Specifications=[SowingRule].Script.Density = 20
            CompositeFactor 24: Specifications=[SowingRule].Script.Density = 24
            CompositeFactor 28: Specifications=[SowingRule].Script.Density = 28
            CompositeFactor 32: Specifications=[SowingRule].Script.Density = 32
      Simulation BaseSimulation
        Clock: Start=1997-09-15; End=1998-03-01
        Summary
        Weather: FileName=%root%/Examples/WeatherFiles/Dalby.met
        SoilArbitrator
        Zone Paddock: Area=1; Slope=0; AspectAngle=0; Altitude=50
          Manager SowingFertiliser
            Crop = [Sorghum]
            FertiliserType = UreaN
            Amount = 30
            script: same as in RowConfiguration.RowConfiguration.RowConfigurationBase.Paddock.SowingFertiliser
          Folder Manager folder
            Manager SowingRule
              Density = 16
              Date = 09/15/1997 00:00:00
              Depth = 20
              Cultivar = Buster
              RowSpacing = 750
              RowConfiguration = Solid
              TilleringMethod = FixedTillering
              Ftn = 0
```csharp
using Models.Soils;
using System;
using Models.Core;
using Models.PMF;
using APSIM.Shared.Utilities;

namespace Models
{
    [Serializable]
    public class Script : Model
    {
        [Description("Enter sowing date (dd/mm/yyyy) : ")]
        public DateTime Date { get; set; }

        [Description("Enter sowing density  (plants/m2) : ")]
        public double Density { get; set; }

        [Description("Enter sowing depth  (mm) : ")]
        public double Depth { get; set; }

        [Description("Enter cultivar : ")]
        [Display(Type = DisplayType.CultivarName)]
        public string Cultivar { get; set; }

        [Description("Enter row spacing (mm) : ")]
        public double RowSpacing { get; set; }

        [Description("Enter skip row configuration : ")]
        public RowConfigurationType RowConfiguration { get; set; }

        [Description("Tillering Method")]
        public TilleringMethodType TilleringMethod { get; set; } = 0;

        [Description("Enter Fertile Tiller No. : ")]
        public double Ftn { get; set; }

        public enum TilleringMethodType 
        {
            RuleOfThumb = -1,
            FixedTillering = 0,
            DynamicTillering = 1
        }
        public enum RowConfigurationType 
        {
            Solid, SingleSkip, DoubleSkip
        }

        [Link]
        private Zone paddock;

        [Link]
        private Clock clock;

        [Link]
        private Plant crop;

        [EventSubscribe("DoManagement")]
        private void OnDoManagement(object sender, EventArgs e)
        {
            if (clock.Today == Date /* && isFallow */)
            {
                double population = Density * paddock.Area;
                crop.Sow(cultivar:Cultivar, population:population, depth:Depth, rowSpacing:RowSpacing, rowConfig: (double)RowConfiguration, tillering:(int)TilleringMethod, ftn:Ftn);
            }
        }
    }
}
```
            Manager Harvesting rule
              script: same as in RowConfiguration.RowConfiguration.RowConfigurationBase.Paddock.Manager folder.Harvesting rule
            Manager AutomaticIrrigation: same as RowConfiguration.RowConfiguration.RowConfigurationBase.Paddock.Manager folder.AutomaticIrrigation
            Manager FertiliseDates
              EachYear = True
              Dates = 30-oct, 30-nov
              Depth = 50
              Amount = 50
              FertiliserType = UreaN
```csharp
using Models.Interfaces;
using System.Linq;
using APSIM.Shared.Utilities;
using Models.PMF;
using Models.Soils;
using Models.Core;
using System;
using Models.Soils.Nutrients;

namespace Models
{
    [Serializable]
    public class Script : Model
    {
        [Link] private Clock clock;
        [Link] private Fertiliser fertiliser;
        [Link] private ISummary summary;
        [Link] private Soil soil;
        private Nutrient nutrient;
        private SoilNitrogen soilN;
        [Link]
        private IPhysical soilPhysical;


        [Separator("Fertiliser will be applied on the date(s) below")]
        [Description("Apply fertiliser on the same day(s) each year? If no, then must include the year of appliaction below")]
        public bool EachYear { get; set; }

        [Description("Dates for one or more fertiliser applications (dd-mmm or dd-mmm-yyyy) as a list with a comma between dates")]
        public string[] Dates { get; set; }

        [Separator("Fertiliser application details")]
        [Description("Depth at which to apply the fertiliser (mm)")]
        public double Depth { get; set; }

        [Description("Amount of fertiliser to apply (kg N /ha) per application")]
        public double Amount { get; set; }

        [Description("Fertiliser type - select from the list")]
        public Fertiliser.Types FertiliserType { get; set; }

        [EventSubscribe("DoManagement")]
        private void OnDoManagement(object sender, EventArgs e)
        {
            if (OnApplicationDate())
            {
                fertiliser.Apply(Amount, FertiliserType, Depth);
            }
        }

        /// <summary>Checks if today's date is one of the specified fertiliser application dates.</summary>
        private bool OnApplicationDate()
        {
            if (EachYear)
                return Dates.Any(d => DateUtilities.DatesEqual(d, clock.Today));
            
            DateTime[] dates = Dates.Select(d => DateTime.ParseExact(d, "d-MMM-yyyy", null)).ToArray();
            return dates.Any(d => SameDate(d, clock.Today));
        }

        private bool SameDate(DateTime d1, DateTime d2)
        {
            return d1.Year == d2.Year && d1.DayOfYear == d2.DayOfYear;
        }
    }
}
```
          Irrigation
          Fertiliser
          MicroClimate: a_interception=0; b_interception=1; c_interception=0; d_interception=0; SoilHeatFluxFraction=0.4; MinimumHeightDiffForNewLayer=0; NightInterceptionFraction=0.5; ReferenceHeight=2
          Soil GLH Field: SoilType=GLHSoil; Site=Cooper Lab; NearestTown=Unknown; Region=Gatton; NaturalVegetation=Unknown; Latitude=0; Longitude=0
            Physical: same as RowConfiguration.RowConfiguration.RowConfigurationBase.Paddock.GLH Field.Physical
            WaterBalance SoilWater: same as RowConfiguration.RowConfiguration.RowConfigurationBase.Paddock.GLH Field.SoilWater
            Nutrient
            Organic: same as RowConfiguration.RowConfiguration.RowConfigurationBase.Paddock.GLH Field.Organic
            Chemical: Thickness=[200, 200, 200, 300, 300, 300, 300]; PH=[8.2, 8.7, 8.9, 8.1, 8, 8, 8]; PHUnits=Water
            Water: Thickness=[200, 200, 200, 300, 300, 300, 300]; InitialValues=[0.385, 0.47, 0.467, 0.459, 0.394, 0.399, 0.38]; RelativeTo=LL15; FilledFromTop=false
            CERESSoilTemperature Temperature
            Solute NO3: Thickness=[200, 200, 200, 300, 300, 300, 300]; InitialValues=[9, 2.48, 2.79, 1.28, 2.98, 2.965, 1.387]; InitialValuesUnits=ppm; WaterTableConcentration=0; D0=0
            Solute NH4: Thickness=[200, 200, 200, 300, 300, 300, 300]; InitialValues=[0.1, 0.1, 0.1, 0.1, 0.1, 0.1, 0.1]; InitialValuesUnits=ppm; WaterTableConcentration=0; D0=0
            Solute Urea: Thickness=[200, 200, 200, 300, 300, 300, 300]; InitialValues=[0, 0, 0, 0, 0, 0, 0]; InitialValuesUnits=kg/ha; WaterTableConcentration=0; D0=0
          Plant Sorghum
          SurfaceOrganicMatter: InitialResidueName=wheat_stubble; InitialResidueType=wheat; InitialResidueMass=0; InitialStandingFraction=0; InitialCPR=0; InitialCNR=80
          Report HarvestReport: EventNames=[Sorghum].Harvesting
            VariableNames:
              [Clock].Today
              [Sorghum].AboveGround.Wt
              [Sorghum].Grain.Wt
              [Sorghum].Leaf.LAI
              [Sorghum].SowingData.Population
          Report DailyReport: EventNames=[Clock].DoReport
            VariableNames:
              [Clock].Today
              [Sorghum].AboveGround.Wt
              [Sorghum].Grain.Wt
              [Sorghum].Leaf.LAI
  Folder Intercropping
    Simulation Sorghum Maize Intercrop
      Clock
      Summary
      Weather: FileName=%root%/Examples/WeatherFiles/Gatton.met
      SoilArbitrator
      Zone Paddock: Area=1; Slope=0; AspectAngle=0; Altitude=50
        Report SorghumHarvesting: EventNames=[Sorghum].Harvesting
          VariableNames:
            [Clock].Today
            [Sorghum].AboveGround.Wt
            [Sorghum].Grain.Wt
            [Sorghum].Leaf.LAI
        Report MaizeHarvesting: EventNames=[Maize].Harvesting
          VariableNames:
            [Clock].Today
            [Maize].AboveGround.Wt
            [Maize].Grain.Wt
            [Maize].Leaf.LAI
        Manager Fertilise at sowing
          FertiliserType = UreaN
          Amount = 500
```csharp
using Models.Soils;
using System;
using Models.Core;
using Models.PMF;
namespace Models
{
    [Serializable]
    public class Script : Model
    {
        [Link] Clock Clock;
        [Link] Fertiliser Fertiliser;

        [Description("Type of fertiliser to apply? ")] 
        public Fertiliser.Types FertiliserType { get; set; }
    
        [Description("Amount of fertiliser to be applied (kg/ha)")]
        public double Amount { get; set; }
        
        [EventSubscribe("Sowing")]
        private void OnSowing(object sender, EventArgs e)
        {
            Fertiliser.Apply(Amount: Amount, Type: FertiliserType);
        }
    }
}
```
        Folder Manager folder
          Manager SowSorghum
            Crop = [Sorghum]
            StartDate = 1-nov
            EndDate = 10-jan
            MinESW = 100
            MinRain = 25
            RainDays = 7
            CultivarName = Buster
            SowingDepth = 30
            RowSpacing = 500
            Population = 6
```csharp
using Models.Interfaces;
using APSIM.Shared.Utilities;
using Models.Utilities;
using Models.Soils;
using Models.PMF;
using Models.PMF.Organs;
using Models.Core;
using System;
using Models.Climate;

namespace Models
{
    [Serializable]
    public class Script : Model
    {
        [Link] private Clock Clock;
        [Link] private Fertiliser Fertiliser;
        [Link] private Summary Summary;
        [Link] private Soil Soil;
        private Accumulator accumulatedRain;
        [Link]
        private ISoilWater waterBalance;
        [Link]
        private Zone paddock;
        
        [Description("Crop")]
        public Plant Crop { get; set; }

        [Description("Start of sowing window (d-mmm)")]
        public string StartDate { get; set; }

        [Description("End of sowing window (d-mmm)")]
        public string EndDate { get; set; }

        [Description("Minimum extractable soil water for sowing (mm)")]
        public double MinESW { get; set; }

        [Description("Accumulated rainfall required for sowing (mm)")]
        public double MinRain { get; set; }

        [Description("Duration of rainfall accumulation (d)")]
        public int RainDays { get; set; }

        [Display(Type = DisplayType.CultivarName)]
        [Description("Cultivar to be sown")]
        public string CultivarName { get; set; }

        [Description("Sowing depth (mm)")]
        public double SowingDepth { get; set; }

        [Description("Row spacing (mm)")]
        public double RowSpacing { get; set; }

        [Description("Plant population (/m2)")]
        public double Population { get; set; }
        
        [EventSubscribe("StartOfSimulation")]
        private void OnSimulationCommencing(object sender, EventArgs e)
        {
            accumulatedRain = new Accumulator(this, "[Weather].Rain", RainDays);
        }

        [EventSubscribe("DoManagement")]
        private void OnDoManagement(object sender, EventArgs e)
        {
            accumulatedRain.Update();
            
            if (DateUtilities.WithinDates(StartDate, Clock.Today, EndDate) &&
                !Crop.IsAlive &&
                MathUtilities.Sum(waterBalance.ESW) > MinESW &&
                accumulatedRain.Sum > MinRain)
            {
                //planting multiple crops will need 
                var sorghumLeaf = (Crop.Leaf as SorghumLeaf);
                sorghumLeaf.MicroClimateSetting = 1;
                
                double population = Population * paddock.Area;
                Crop.Sow(cultivar:CultivarName, population:population, depth:SowingDepth, rowSpacing:RowSpacing);
            }
        }
    }
}
```
          Manager SowMaize
            Crop = [Maize]
            StartDate = 1-nov
            EndDate = 10-jan
            MinESW = 100
            MinRain = 25
            RainDays = 7
            CultivarName = Katumani
            SowingDepth = 30
            RowSpacing = 500
            Population = 6
```csharp
using Models.Interfaces;
using APSIM.Shared.Utilities;
using Models.Utilities;
using Models.Soils;
using Models.PMF;
using Models.Core;
using System;
using Models.Climate;

namespace Models
{
    [Serializable]
    public class Script : Model
    {
        [Link] private Clock Clock;
        [Link] private Fertiliser Fertiliser;
        [Link] private Summary Summary;
        [Link] private Soil Soil;
        private Accumulator accumulatedRain;
        [Link]
        private ISoilWater waterBalance;
        
        [Description("Crop")]
        public IPlant Crop { get; set; }

        [Description("Start of sowing window (d-mmm)")]
        public string StartDate { get; set; }

        [Description("End of sowing window (d-mmm)")]
        public string EndDate { get; set; }

        [Description("Minimum extractable soil water for sowing (mm)")]
        public double MinESW { get; set; }

        [Description("Accumulated rainfall required for sowing (mm)")]
        public double MinRain { get; set; }

        [Description("Duration of rainfall accumulation (d)")]
        public int RainDays { get; set; }

        [Display(Type = DisplayType.CultivarName)]
        [Description("Cultivar to be sown")]
        public string CultivarName { get; set; }

        [Description("Sowing depth (mm)")]
        public double SowingDepth { get; set; }

        [Description("Row spacing (mm)")]
        public double RowSpacing { get; set; }

        [Description("Plant population (/m2)")]
        public double Population { get; set; }
        
        
        [EventSubscribe("StartOfSimulation")]
        private void OnSimulationCommencing(object sender, EventArgs e)
        {
            accumulatedRain = new Accumulator(this, "[Weather].Rain", RainDays);
        }

        [EventSubscribe("DoManagement")]
        private void OnDoManagement(object sender, EventArgs e)
        {
            accumulatedRain.Update();
            
            if (DateUtilities.WithinDates(StartDate, Clock.Today, EndDate) &&
                !Crop.IsAlive &&
                MathUtilities.Sum(waterBalance.ESW) > MinESW &&
                accumulatedRain.Sum > MinRain)
            {
                Crop.Sow(population: Population, cultivar: CultivarName, depth: SowingDepth, rowSpacing: RowSpacing);    
            }
        }
    }
}
```
          Manager Harvesting rule
```csharp
using Models.Soils;
using System.Collections.Generic;
using System;
using Models.Core;
using Models.PMF;

namespace Models
{
    [Serializable]

    public class Script : Model
    {
        [Link]
        private Clock clock;

        [Link]
        private List<IPlant> plants;

        [EventSubscribe("DoManagement")]
        private void OnDoCalculations(object sender, EventArgs e)
        {
            foreach (IPlant plant in plants)
            {
                if (plant.IsReadyForHarvesting)
                {
                    plant.Harvest();
                    plant.EndCrop();
                }
            }
        }
    }
}
```
          Manager AutomaticIrrigation
            allowIrrigation = True
            seasonStart = 1-sep
            seasonEnd = 30-mar
            seasonsAllocation = 10000
            triggerDeficit = 50
            targetDeficit = 95
            returndays = 3
            maximumAmount = 30
            depthPAWC = 650
```csharp
using Models.Interfaces;
using System;
using Models.Core;
using Models.PMF;
using Models.Soils;
using APSIM.Shared.Utilities;

namespace Models
{
    [Serializable] 
    public class Script : Model
    {
        [Link] private ISummary summary;
        [Link] private Irrigation Irrigation;
        [Link] private Clock Clock;
        [Link] private Soil Soil;
        [Link(IsOptional = true)] private IPlant existingCrop;
        private DateTime StartDate;
        private DateTime EndDate;
        private double TopDUL;
        private double TopLL;
        private int nLayers;
        [Link]
        private IPhysical soilPhysical;
        [Link]
        private ISoilWater waterBalance;
        //Communication to other modules
       
        //User inputs from properties tab
        [Description("Turn irrigation on?")]
        public bool allowIrrigation { get; set; }
        [Description("Start of irrigation season (dd-MMM)")]
        public string seasonStart { get; set; }
        [Description("End of irrigation season (dd-MMM)")]
        public string seasonEnd { get; set; }
        [Description("Season allocation (mm)")]
        public double seasonsAllocation { get; set; }
        [Description("Deficit to trigger irrigation (% PAWC)")]
        public double triggerDeficit { get; set; }
        [Description("Deficit to stop irrigaton (% PAWC)")]
        public double targetDeficit { get; set; }
        [Description("Minimum days for irrigation to return")]
        public double returndays { get; set; }
        [Description("Maximum irrigation application (mm/day)")]
        public double maximumAmount { get; set; }
        [Description("Depth to calculate PAWC (mm)")]
        public double depthPAWC { get; set; }

        //Class members
        public double TopSWdeficit { get; set; }
        public double TopSWC { get; set; }
        public double DaysSinceIrrigation { get; set; }
        public double AmountToApply { get; set; }
        public double SeasonAppliedAmount { get; set; }
        
        private bool IrrigationIsAllowed { get; set; }
        private bool SeasonIsOpen { get; set; }
        private bool CropIsActive { get; set; }
        private bool IrrigatorIsAvailable { get; set; }
        private bool SoilIsDry { get; set; }

    
        //Calculate static soil variables
        [EventSubscribe("StartOfSimulation")]
        private void OnStartOfSimulation(object sender, EventArgs e)
        {   
            //Set the season dates
            StartDate = DateTime.Parse(seasonStart + "-" + Clock.Today.Year.ToString());
            EndDate = DateTime.Parse(seasonEnd + "-" + Clock.Today.Year.ToString());
            
            //Can we irrigate at all?
            IrrigationIsAllowed = false; 
            if (allowIrrigation)
                IrrigationIsAllowed = true; 

            //Calculate soil water variables
            double depthFromSurface = 0.0;
            double fracLayer = 0.0;
            nLayers = soilPhysical.Thickness.Length;
            for (int layer = 0; layer < nLayers; layer++)
            {
                fracLayer = Math.Min(1.0, (depthPAWC - depthFromSurface) / soilPhysical.Thickness[layer]);
                TopLL += soilPhysical.LL15mm[layer] * fracLayer;
                TopDUL += soilPhysical.DULmm[layer] * fracLayer;
                depthFromSurface += soilPhysical.Thickness[layer];
                if (depthFromSurface >= depthPAWC)
                    layer = nLayers;
            }
        }
             
        //Determine daily requirement for irrigation
        [EventSubscribe("StartOfDay")]
        private void OnStartOfDay(object sender, EventArgs e)
        {
            //Can we irrigate today?          
            SeasonIsOpen = isBetween(Clock.Today, StartDate, EndDate);
            if (!SeasonIsOpen)
                SeasonAppliedAmount = 0;

            //Is there a crop in the ground that needs irrigation?
            CropIsActive = false;
            if ((existingCrop != null) && (existingCrop.IsAlive))
                CropIsActive = true;
            //if ((existingCrop.Phenology.Stage >= 3.0) && (existingCrop.Phenology.Stage < 6.0))
          
            //Is the irrigator available?
            IrrigatorIsAvailable = false;
            DaysSinceIrrigation += 1;
            if (DaysSinceIrrigation >= returndays)
                IrrigatorIsAvailable = true;
          
            //Is the soil dry enough to require irrigation?
            SoilIsDry = false;
            double depthFromSurface = 0.0;
            double fracLayer = 0.0;
            TopSWC = 0.0;
            for (int layer = 0; layer < nLayers; layer++)
            //for (int layer = 0; depthFromSurface < depthPAWC + soilPhysical.Thickness[layer]; layer++)
            {
                fracLayer = Math.Min(1.0, (depthPAWC - depthFromSurface) / soilPhysical.Thickness[layer]);
                TopSWC += waterBalance.SWmm[layer] * fracLayer;
                depthFromSurface += soilPhysical.Thickness[layer];
                if (depthFromSurface >= depthPAWC)
                    layer = nLayers;
            }
            
            TopSWdeficit = TopSWC - TopDUL;
            if (Math.Max(0.0, -TopSWdeficit) >= (TopDUL - TopLL) * (100 - triggerDeficit) / 100)
                SoilIsDry = true;
                
            //Are all the conditions ratifying irrigation
            if (IrrigationIsAllowed && SeasonIsOpen && /*CropIsActive &&*/ IrrigatorIsAvailable && SoilIsDry)
            {
                //Lets bloody well irrigate then!!!!
                AmountToApply = TopDUL * targetDeficit / 100 - TopSWC;
                AmountToApply = Math.Max(0.0, Math.Min(AmountToApply, seasonsAllocation - SeasonAppliedAmount));
                AmountToApply = Math.Min(AmountToApply,maximumAmount);
                Irrigation.Apply(AmountToApply);
                DaysSinceIrrigation = 0;
                SeasonAppliedAmount += AmountToApply;
            }
        }
        
        ///Checks whether theDate is between iniDate and endDate (non-year specific)
        private bool isBetween(DateTime theDay, DateTime iniDate, DateTime endDate)
        {
            bool result = false;
            if (iniDate.DayOfYear < endDate.DayOfYear)
            {
                // period is within one year, ex: summer in the northern hemisphere
                if ((theDay.DayOfYear >= iniDate.DayOfYear) && (theDay.DayOfYear <= endDate.DayOfYear))
                    result = true;
            }
            else
            {
                // period goes over the end of the year, ex: summer in the southern hemisphere
                if ((theDay.DayOfYear >= iniDate.DayOfYear) || (theDay.DayOfYear <= endDate.DayOfYear))
                    result = true;
            }
            
            return result;
        }
    }
}
```
        Operations
          1997-01-09  [Irrigation].Apply(52);
          1997-01-16  [Irrigation].Apply(36);
          1997-01-21  [Irrigation].Apply(18);
          1997-01-29  [Irrigation].Apply(20);
          1997-02-07  [Irrigation].Apply(14);
          1997-03-13  [Irrigation].Apply(30);
          1997-03-21  [Irrigation].Apply(45);
          1997-04-10  [Irrigation].Apply(27);
          1997-04-17  [Irrigation].Apply(42);
          1997-05-02  [Irrigation].Apply(27);
          1996-12-20  [Fertiliser].Apply(33, Fertiliser.Types.NO3N, 50);
          1996-12-23  [Fertiliser].Apply(0, Fertiliser.Types.NO3N, 50);
          1996-12-23  [Fertiliser].Apply(119, Fertiliser.Types.NO3N, 50);
          1997-02-12  [Fertiliser].Apply(59, Fertiliser.Types.NO3N, 50);
          1997-03-21  [Fertiliser].Apply(59, Fertiliser.Types.NO3N, 50);
        Irrigation
        Fertiliser
        MicroClimate: a_interception=0; b_interception=1; c_interception=0; d_interception=0; SoilHeatFluxFraction=0.4; MinimumHeightDiffForNewLayer=0; NightInterceptionFraction=0.5; ReferenceHeight=2
        Soil HRS: SoilType=HMM; Site=HRS; NearestTown=Unknown; Region=SE Queensland; NaturalVegetation=Unknown; Latitude=0; Longitude=0
          Physical
            Thickness  BD    AirDry  LL15   DUL   SAT
            100        1.34  0.08    0.226  0.42  0.45
            100        1.34  0.19    0.226  0.42  0.45
            200        1.33  0.23    0.258  0.46  0.48
            200        1.38  0.26    0.27   0.46  0.47
            200        1.4   0.26    0.268  0.43  0.45
            200        1.55  0.28    0.304  0.4   0.41
            200        1.59  0.25    0.335  0.37  0.38
            200        1.63  0.28    0.33   0.33  0.37
            200        1.66  0.3     0.32   0.32  0.37
            200        1.68  0.31    0.33   0.33  0.36
            SoilCrop SorghumSoil
              LL=[0.226, 0.226, 0.258, 0.27, 0.268, 0.304, 0.335, 0.33, 0.32, 0.33]
              KL=[0.07, 0.07, 0.07, 0.07, 0.06, 0.06, 0.06, 0.05, 0.05, 0.04]
              XF=[1, 1, 1, 1, 1, 1, 1, 1, 1, 1]
            SoilCrop MaizeSoil
              LL=[0.226, 0.226, 0.258, 0.27, 0.268, 0.304, 0.335, 0.33, 0.32, 0.33]
              KL=[0.07, 0.07, 0.07, 0.07, 0.06, 0.06, 0.06, 0.05, 0.05, 0.04]
              XF=[1, 1, 1, 1, 1, 1, 1, 1, 1, 1]
          WaterBalance SoilWater: SummerDate=1-Nov; SummerU=1.5; SummerCona=6.5; WinterDate=1-Apr; WinterU=1.5; WinterCona=6.5; DiffusConst=40; DiffusSlope=16; Salb=0.2; CN2Bare=85; CNRed=20; CNCov=0.8; PSIDul=-100; Thickness=[100, 100, 200, 200, 200, 200, 200, 200, 200, 200]; SWCON=[0.3, 0.3, 0.3, 0.3, 0.3, 0.3, 0.3, 0.3, 0.3, 0.3]
          Nutrient
          Organic: FOMCNRatio=50; CarbonUnits=Total
            Thickness  Carbon  SoilCNRatio  FBiom  FInert  FOM
            100        1.19    12.5         0.05   0.45    260.587
            100        0.59    12.5         0.02   0.6     220.582
            200        0.45    12.5         0.01   0.75    158.054
            200        0.3     12.5         0.01   0.9     113.251
            200        0.2     12.5         0.01   0.9     81.1478
            200        0.16    12.5         0.01   0.9     58.1449
            200        0.17    12.5         0.01   0.9     41.6626
            200        0.17    12.5         0.05   0.9     29.8526
            200        0.17    12.5         0.02   0.9     21.3903
            200        0.17    12.5         0.01   0.9     15.3268
          Chemical: Thickness=[100, 100, 200, 200, 200, 200, 200, 200, 200, 200]; PH=[6.3, 6.4, 6.5, 6.6, 6.6, 6.5, 6.5, 6.5, 6.5, 6.5]; PHUnits=Water
          Water: Thickness=[100, 100, 200, 200, 200, 200, 200, 200, 200, 200]; FilledFromTop=false
            InitialValues=[0.235, 0.252, 0.27, 0.3, 0.268, 0.304, 0.335, 0.33, 0.32, 0.33]
          CERESSoilTemperature Temperature
          Solute NO3: Thickness=[100, 100, 200, 200, 200, 200, 200, 200, 200, 200]; InitialValuesUnits=ppm; WaterTableConcentration=0; D0=0
            InitialValues=[10.4, 1.633, 1.233, 0.9, 1.1, 1.467, 3.633, 5.667, 5.8, 7.267]
          Solute NH4: Thickness=[100, 100, 200, 200, 200, 200, 200, 200, 200, 200]; InitialValues=[0.1, 0.1, 0.1, 0.1, 0.1, 0.1, 0.1, 0.1, 0.1, 0.1]; InitialValuesUnits=ppm; WaterTableConcentration=0; D0=0
          Solute Urea: Thickness=[100, 100, 200, 200, 200, 200, 200, 200, 200, 200]; InitialValues=[0, 0, 0, 0, 0, 0, 0, 0, 0, 0]; InitialValuesUnits=kg/ha; WaterTableConcentration=0; D0=0
        Plant Sorghum
        Plant Maize
        SurfaceOrganicMatter: InitialResidueName=wheat_stubble; InitialResidueType=wheat; InitialResidueMass=0; InitialStandingFraction=0; InitialCPR=0; InitialCNR=80
  Folder SowingDate
    Experiment SowingDateResponse
      Factors
        Permutation
          Factor Management
            CompositeFactor HighN_Irr: Specifications=[AutomaticIrrigation].Script.allowIrrigation = true
            CompositeFactor LowN_Irr (disabled)
              Specifications:
                [AutomaticIrrigation].Script.allowIrrigation = true
                [FertiliseDates].Script.Amount = 0
            CompositeFactor HighN_Dry: Specifications=[AutomaticIrrigation].Script.allowIrrigation = false
            CompositeFactor LowN_Dry (disabled)
              Specifications:
                [AutomaticIrrigation].Script.allowIrrigation = false
                [FertiliseDates].Script.Amount = 0
          Factor SowingDate
            CompositeFactor Jul: Specifications=[SowingRule].Script.Date = 15-jul
            CompositeFactor Aug: Specifications=[SowingRule].Script.Date = 15-Aug
            CompositeFactor Sep: Specifications=[SowingRule].Script.Date = 15-Sep
            CompositeFactor Oct: Specifications=[SowingRule].Script.Date = 15-Oct
            CompositeFactor Nov: Specifications=[SowingRule].Script.Date = 15-Nov
            CompositeFactor Dec: Specifications=[SowingRule].Script.Date = 15-Dec
            CompositeFactor Jan: Specifications=[SowingRule].Script.Date = 15-Jan
      Simulation SowingDateSimulation
        Clock: Start=1970-09-15; End=1999-05-01
        Summary
        Weather: FileName=%root%/Examples/WeatherFiles/Dalby.met
        SoilArbitrator
        Zone Paddock: Area=1; Slope=0; AspectAngle=0; Altitude=50
          Manager SowingFertiliser
            Crop = [Sorghum]
            FertiliserType = UreaN
            Amount = 200
            script: same as in RowConfiguration.RowConfiguration.RowConfigurationBase.Paddock.SowingFertiliser
          Manager Fertilise topup
            Crop = [Sorghum]
            FertiliserType = NO3N
            Threshold = 200
```csharp
using Models.Soils;
using Models.Soils.Nutrients;
using System;
using Models.Core;
using Models.PMF;
using APSIM.Shared.Utilities;
namespace Models
{
    [Serializable]
    public class Script : Model
    {
        [Link] Clock Clock;
        [Link] Fertiliser Fertiliser;
        [Link] Nutrient SoilN;
		
		[Description("Crop")]
        public IPlant Crop { get; set; }
        
        [Description("Type of fertiliser to apply? ")] 
        public Fertiliser.Types FertiliserType { get; set; }
    
        [Description("Threshold amount of NO3 to topup to (kg/ha)")]
        public double Threshold { get; set;}
        
        [EventSubscribe("DoManagement")]
        private void OnDoManagement(object sender, EventArgs e)
        {
            if(Crop.IsAlive)
            {
	            double Amount = Threshold - MathUtilities.Sum(SoilN.NO3.kgha);
	            Fertiliser.Apply(Amount: Amount, Type: FertiliserType);
	        }
        }
    }
}
```
          Folder Manager folder
            Manager SowingRule
              Date = 07/01/2020 00:00:00
              Density = 12
              Depth = 20
              Cultivar = Buster
              RowSpacing = 750
              RowConfiguration = Solid
              TilleringMethod = FixedTillering
              Ftn = 0
```csharp
using Models.Soils;
using Models.PMF.Organs;
using System;
using Models.Core;
using Models.PMF;
using APSIM.Shared.Utilities;

namespace Models
{
    [Serializable]
    public class Script : Model
    {
        [Description("Enter sowing date (dd/mm/yyyy) : ")]
        public DateTime Date { get; set; }

        [Description("Enter sowing density  (plants/m2) : ")]
        public double Density { get; set; }

        [Description("Enter sowing depth  (mm) : ")]
        public double Depth { get; set; }

        [Description("Enter cultivar : ")]
        [Display(Type = DisplayType.CultivarName)]
        public string Cultivar { get; set; }

        [Description("Enter row spacing (mm) : ")]
        public double RowSpacing { get; set; }

        [Description("Enter skip row configuration : ")]
        public RowConfigurationType RowConfiguration { get; set; }

        [Description("Tillering Method")]
        public TilleringMethodType TilleringMethod { get; set; } = 0;

        [Description("Enter Fertile Tiller No. : ")]
        public double Ftn { get; set; }

        public enum TilleringMethodType 
        {
            RuleOfThumb = -1,
            FixedTillering = 0,
            DynamicTillering = 1
        }
        public enum RowConfigurationType 
        {
            Solid, SingleSkip, DoubleSkip
        }

        [Link]
        private Zone paddock;

        [Link]
        private Clock clock;

        [Link]
        private Plant crop;

        [EventSubscribe("DoManagement")]
        private void OnDoManagement(object sender, EventArgs e)
        {
            if(SameDate(Date, clock.Today))
            {
                double population = Density * paddock.Area;
                crop.Sow(cultivar:Cultivar, population:population, depth:Depth, rowSpacing:RowSpacing, rowConfig: (double)RowConfiguration, tillering:(int)TilleringMethod, ftn:Ftn);
            }
        }

        private bool SameDate(DateTime d1, DateTime d2)
        {
            return d1.DayOfYear == d2.DayOfYear;
        }
    }
}
```
            Manager Harvesting rule: same as SowingDensity.DensityYieldResponse.BaseSimulation.Paddock.Manager folder.Harvesting rule
            Manager AutomaticIrrigation
              allowIrrigation = True
              seasonStart = 1-Jul
              seasonEnd = 30-mar
              seasonsAllocation = 10000
              triggerDeficit = 50
              targetDeficit = 95
              returndays = 3
              maximumAmount = 30
              depthPAWC = 650
              script: same as in RowConfiguration.RowConfiguration.RowConfigurationBase.Paddock.Manager folder.AutomaticIrrigation
            Manager Irrigate at sowing
              Crop = [Sorghum]
              Amount = 30
              Depth = 0
              Efficiency = 1
              WillRunoff = False
```csharp
using Models.Soils;
using System;
using Models.Core;
using Models.PMF;
namespace Models
{
    [Serializable]
    public class Script : Model
    {
        [Link] Clock Clock;
        [Link] Irrigation Irrigation;
        
        [Description("Crop to be irrigated")]
        public IPlant Crop { get; set; }

        [Description("Amount of irrigation to be applied (mm)")] 
        public double Amount { get; set; }
        
        [Description("Depth in the soil to apply the  irrigation (mm)")] 
        public double Depth { get; set; }
        
        [Description("Efficiency of irrigation (0-1)")] 
        public double Efficiency { get; set; }
        
        [Description("Will the irrigation runoff?")] 
        public bool WillRunoff { get; set; }
        
        [EventSubscribe("Sowing")]
        private void OnSowing(object sender, EventArgs e)
        {
            Model crop = sender as Model;
            if (Crop != null && crop.Name.ToLower() == (Crop as IModel).Name.ToLower())
                Irrigation.Apply(amount: Amount, depth: Depth, efficiency: Efficiency, willRunoff: WillRunoff);
        }
    }
}
```
            Manager Reset on sowing
              ResetWater = Yes
              ResetNutrients = Yes
              ResetSOM = Yes
```csharp
using Models.Soils.Nutrients;
using APSIM.Shared.Utilities;
using Models.Surface;
using Models.Utilities;
using Models.Soils.Nutrients;
using Models.Soils;
using Models.PMF;
using Models.Core;
using System;
using Models.Interfaces;

namespace Models
{
    [Serializable]
    public class Script : Model
    {
        [Link] private Plant Wheat;
        [Link] private ISoilWater SoilWater;
        [Link] private Nutrient nutrient;
        [Link] private SurfaceOrganicMatter SOM;
        [Link] private Summary Summary;

        [Description("Reset Water? (Yes or No)")]
        public string ResetWater {get;set;}

        [Description("Reset Soil Nutrients? (Yes or No)")]
        public string ResetNutrients {get;set;}

        [Description("Reset Surface Organic Matter? (Yes or No)")]
        public string ResetSOM {get;set;}

        [EventSubscribe("Sowing")]
        private void OnSowing(object sender, EventArgs e)
        {
            if (ResetWater == "Yes")
            {
                Summary.WriteMessage(this, "Reset Water", MessageType.Diagnostic);
                SoilWater.Reset();
            }
            if (ResetNutrients == "Yes")
            {
                Summary.WriteMessage(this, "Reset Nutrients", MessageType.Diagnostic);
                nutrient.Reset();
            }
            if (ResetSOM == "Yes")
            {
                Summary.WriteMessage(this, "Reset Surface OM", MessageType.Diagnostic);
                SOM.Reset();
            }
        }
    }
}
```
          Irrigation
          Fertiliser
          MicroClimate: a_interception=0; b_interception=1; c_interception=0; d_interception=0; SoilHeatFluxFraction=0.4; MinimumHeightDiffForNewLayer=0; NightInterceptionFraction=0.5; ReferenceHeight=2
          Soil GLH Field: same as RowConfiguration.RowConfiguration.RowConfigurationBase.Paddock.GLH Field
          Plant Sorghum
          SurfaceOrganicMatter: InitialResidueName=wheat_stubble; InitialResidueType=wheat; InitialResidueMass=0; InitialStandingFraction=0; InitialCPR=0; InitialCNR=80
          Report SowHarvestReport: EventNames=[Sorghum].Harvesting
            VariableNames:
              [Clock].Today
              [Sorghum].AboveGround.Wt
              [Sorghum].Grain.Wt
              [Sorghum].Leaf.LAI
              [Sorghum].SowingData.Population
          Report SowDailyReport: EventNames=[Clock].DoReport
            VariableNames:
              [Clock].Today
              [Sorghum].AboveGround.Wt
              [Sorghum].Grain.Wt
              [Sorghum].Leaf.LAI
  Folder CO2AndTranspirationEfficiency
    Experiment CO2TE
      Memo
        This test examines the impact of a doubling of CO2 from historical (350ppm) on Transpiration Efficiency.  [Reyenga1999] suggest an increase of approximately 37% in Transpiration Efficiency over this range in CO2 concentration.
        In this test, a series of wheat crops are simulated for Dalby, Queensland, Australia.  Nitrogen limitation is removed.  The slope of plots of biomass production vs crop water use is used to quantify a gross seasonal TE.  The change in slope should approximate the response suggested by [Reyenga1999].
      Factors
        Factor CO2: Specification=[SetCO2]
          Manager 350ppm
            CO2 = 350
```csharp
using Models.Soils;
using System.Xml.Serialization;
using Models;
using Models.PMF;
using System.Text;
using System.Collections.Generic;
using APSIM.Shared.Utilities;
using Models.Core;
using System;
using Models.Climate;

namespace Models
{
    [Serializable] 
    [System.Xml.Serialization.XmlInclude(typeof(Model))]
    public class Script : Model
    {
        [Link] Weather Met;
        [Link] Clock Clock;
    
        [Description("CO2 conc")]
        public double CO2 { get; set; }
    
        
        [EventSubscribe("PreparingNewWeatherData")]
        private void OnPreparingNewWeatherData(object sender, EventArgs e)
        {
            Met.CO2 = CO2;        
        }
    }
}
```
          Manager 700ppm
            CO2 = 700
            script: same as in CO2AndTranspirationEfficiency.CO2TE.Factors.CO2.350ppm
      Simulation CO2TEBaseSimulation
        Clock: Start=1900-01-01; End=2000-12-31
        Summary summaryfile
        Weather: FileName=%root%\Examples\WeatherFiles\Dalby.met
        SoilArbitrator Soil Arbitrator
        Zone Field: Area=1; Slope=0; AspectAngle=0; Altitude=50
          Fertiliser
          SurfaceOrganicMatter: InitialResidueName=wheat_stubble; InitialResidueType=wheat; InitialResidueMass=500; InitialStandingFraction=0; InitialCPR=0; InitialCNR=100
          MicroClimate: a_interception=0; b_interception=1; c_interception=0; d_interception=0; SoilHeatFluxFraction=0.4; MinimumHeightDiffForNewLayer=0; NightInterceptionFraction=0.5; ReferenceHeight=2
          Report SensibilityReport: EventNames=[Sorghum].Harvesting
            VariableNames:
              [Clock].Today.Date
              [Sorghum].Grain.Wt
              [Sorghum].AboveGround.Wt
              Sum of [Sorghum].Leaf.Transpiration from [Sorghum].Sowing to [Sorghum].Harvesting as CropET
          Plant Sorghum
          Manager SetCO2
            CO2 = 0
```csharp
using Models.Soils;
using System.Xml.Serialization;
using Models;
using Models.PMF;
using System.Text;
using System.Collections.Generic;
using APSIM.Shared.Utilities;
using Models.Core;
using System;
using Models.Climate;

namespace Models
{
    [Serializable] 
    [System.Xml.Serialization.XmlInclude(typeof(Model))]
    public class Script : Model
    {
        [Link] Weather Met;
        [Link] Clock Clock;
        [Link] Zone zone;
    
        [Description("CO2 conc")]
        public double CO2 { get; set; }
    
        
        [EventSubscribe("PreparingNewWeatherData")]
        private void OnPreparingNewWeatherData(object sender, EventArgs e)
        {
            zone.Set("Weather.CO2", CO2);
        }
    }
}
```
          Manager SowingRule
            StartDate = 1-may
            EndDate = 10-jul
            MinESW = 100
            MinRain = 25
            RainDays = 7
            CultivarName = Buster
            SowingDepth = 30
            RowSpacing = 250
            Population = 120
```csharp
using Models.Interfaces;
using System;
using Models.Core;
using Models.PMF;
using Models.Soils;
using Models.Soils.Nutrients;
using Models.Utilities;
using APSIM.Shared.Utilities;
using Models.Climate;

namespace Models
{
    [Serializable]
    public class Script : Model
    {
        [Link] private Clock Clock;
        [Link] private Fertiliser Fertiliser;
        [Link] private Summary Summary;
        [Link] private Plant Sorghum;
        [Link] private Soil Soil;
        [Link] private Zone paddock;
        private Accumulator accumulatedRain;
        [Link]
        private ISoilWater waterBalance;
        
        [Description("Start of sowing window (d-mmm)")]
        public string StartDate { get; set;}
        [Description("End of sowing window (d-mmm)")]
        public string EndDate { get; set;}
        [Description("Minimum extractable soil water for sowing (mm)")]
        public double MinESW { get; set;}
        [Description("Accumulated rainfall required for sowing (mm)")]
        public double MinRain { get; set;}
        [Description("Duration of rainfall accumulation (d)")]
        public int RainDays { get; set;}
        [Description("Cultivar to be sown")]
        [Display(Type=DisplayType.CultivarName)]
        public string CultivarName { get; set;}
        [Description("Sowing depth (mm)")]
        public double SowingDepth { get; set;}        
        [Description("Row spacing (mm)")]
        public double RowSpacing { get; set;}    
        [Description("Plant population (/m2)")]
        public double Population { get; set;}    
        
        
        [EventSubscribe("StartOfSimulation")]
        private void OnSimulationCommencing(object sender, EventArgs e)
        {
            accumulatedRain = new Accumulator(this, "[Weather].Rain", RainDays);
        }
        

        [EventSubscribe("DoManagement")]
        private void OnDoManagement(object sender, EventArgs e)
        {
            accumulatedRain.Update();
            
            if (DateUtilities.WithinDates(StartDate,Clock.Today,EndDate) &&
                !Sorghum.IsAlive &&
                MathUtilities.Sum(waterBalance.ESW) > MinESW &&
                accumulatedRain.Sum > MinRain)
            {
                double population = Population * paddock.Area;
                Sorghum.Sow(cultivar:CultivarName, population:population, depth:SowingDepth, rowSpacing:RowSpacing);
            }
        }
        
    }
}
```
          Manager Harvest
```csharp
using Models.Soils.Nutrients;
using System;
using Models.Core;
using Models.PMF;
using Models.Soils;
using Models.Soils.Nutrients;
using Models.Utilities;
using APSIM.Shared.Utilities;

namespace Models
{
    [Serializable]
    public class Script : Model
    {
        [Link] Plant Sorghum;

        [EventSubscribe("DoManagement")]
        private void OnDoManagement(object sender, EventArgs e)
        {
            if (Sorghum.IsReadyForHarvesting)
            {
               Sorghum.Harvest();
               Sorghum.EndCrop();    
            }
        
        }
        
    }
}
```
          Manager SowingFertiliser
            Amount = 300
            CropName = Sorghum
```csharp
using Models.Soils;
using System;
using Models.Core;
using Models.PMF;
namespace Models
{
    [Serializable]
    public class Script : Model
    {
        [Link] Clock Clock;
        [Link] Fertiliser Fertiliser;
        [Link] Summary Summary;
        
        
        [Description("Amount of fertiliser to be applied (kg/ha)")]
        public double Amount { get; set;}
        
        [Description("Crop to be fertilised")]
        public string CropName { get; set;}
        
        
        

        [EventSubscribe("Sowing")]
        private void OnSowing(object sender, EventArgs e)
        {
            Model crop = sender as Model;
            if (crop.Name.ToLower()==CropName.ToLower())
                Fertiliser.Apply(Amount: Amount, Type: Fertiliser.Types.NO3N);
        }
        
    }
}
```
          Soil: SoilType=HMM; Site=HRS; NearestTown=Unknown; Region=SE Queensland; NaturalVegetation=Unknown; Latitude=0; Longitude=0
            Physical
              Thickness  BD    AirDry  LL15   DUL   SAT
              100        1.34  0.08    0.226  0.42  0.45
              100        1.34  0.19    0.226  0.42  0.45
              200        1.33  0.23    0.258  0.46  0.48
              200        1.38  0.26    0.27   0.46  0.47
              200        1.4   0.26    0.268  0.43  0.45
              200        1.55  0.28    0.304  0.4   0.41
              200        1.59  0.25    0.335  0.37  0.38
              200        1.63  0.28    0.33   0.33  0.37
              200        1.66  0.3     0.32   0.32  0.37
              200        1.68  0.31    0.33   0.33  0.36
              SoilCrop SorghumSoil
                LL=[0.226, 0.226, 0.258, 0.27, 0.268, 0.304, 0.335, 0.33, 0.32, 0.33]
                KL=[0.07, 0.07, 0.07, 0.07, 0.06, 0.06, 0.06, 0.05, 0.05, 0.04]
                XF=[1, 1, 1, 1, 1, 1, 1, 1, 1, 1]
            WaterBalance SoilWater: same as Intercropping.Sorghum Maize Intercrop.Paddock.HRS.SoilWater
            Nutrient
            Organic: same as Intercropping.Sorghum Maize Intercrop.Paddock.HRS.Organic
            Chemical: Thickness=[100, 100, 200, 200, 200, 200, 200, 200, 200, 200]; PH=[6.3, 6.4, 6.5, 6.6, 6.6, 6.5, 6.5, 6.5, 6.5, 6.5]; PHUnits=Water
            Water: Thickness=[100, 100, 200, 200, 200, 200, 200, 200, 200, 200]; FilledFromTop=false
              InitialValues=[0.235, 0.252, 0.27, 0.3, 0.268, 0.304, 0.335, 0.33, 0.32, 0.33]
            CERESSoilTemperature Temperature
            Solute NO3: same as Intercropping.Sorghum Maize Intercrop.Paddock.HRS.NO3
            Solute NH4: Thickness=[100, 100, 200, 200, 200, 200, 200, 200, 200, 200]; InitialValues=[0.1, 0.1, 0.1, 0.1, 0.1, 0.1, 0.1, 0.1, 0.1, 0.1]; InitialValuesUnits=ppm; WaterTableConcentration=0; D0=0
            Solute Urea: Thickness=[100, 100, 200, 200, 200, 200, 200, 200, 200, 200]; InitialValues=[0, 0, 0, 0, 0, 0, 0, 0, 0, 0]; InitialValuesUnits=kg/ha; WaterTableConcentration=0; D0=0
          Report DailyReport
            VariableNames:
              GrainTempFactor
              GrainTempFactor
  Folder Forage
    Simulation Forage Crop Grazing (disabled)
      Memo
        “Forage Crop Grazing” is a simple single-paddock simulation. The paddock contains a sorghum crop that is irrigated and fertilised. The sorghum is sown in summer of the first year and is rejuvenated thereafter at the frequency set on the sowing rule in the paddock. In this simulation a new mob of animals are ‘bought’ every time the sorghum (or any forage crop or crops) are ready to be grazed.
        The user sets the characteristics of the stock, the grazing rules and if/how any supplementary feeding is done.

        **Stock Type Information**

        This section contains parameters for the genotype (e.g. Jersey, Small merino), reproductive type (e.g. Castrated male), age, weight, and fertility status. Every time the crop is to be grazed the animals of these characteristics are brought into the simulation. They will change status while grazing but will reset at each grazing event (they exit the simulation between grazing events).

        **Grazing event information**

        The stock parameters controlling the grazing event are the stocking rate (the numbers of animals bought will be controlled by this and the paddock area) and their location when the simulation is initialised.

        There are several parameters to control the timing of grazing events. Initially the paddock is assessed for the amount of grazable herbage at which the animals can enter and graze the cropand at which they must leave.

        The biomass is the sum of all the grazable components in the paddock. There is an option to set a rough minimum number of days that it might be anticipated that the animals might stay on the paddock if they enter. This is designed to prevent many, very short-duration, grazing events. The estimate is based on a potential intake of 3% of body mass per day and is applied as an additional amount of biomass above the post-grazing biomass. Apart from the biomass based rules there is also an optional no-grazing window. Note that there is no control of grazing based on growth stage (as there might be for a cereal crop for example).

        **Supplementary feeding**

        The management script also allows for optional supplementary feeding. A specified supplement can be feed every day and/or when the biomass in the grazed paddock falls below a set value. The supplement can be fed before grazing (i.e. as an intake priority) or animals can choose between offered supplement and forage depending on digestibility and availability (see the Stock Science Documentation for more information). Every time that a supplement about to be fed out the script buys sufficient supplement to last about a month.

        **Reporting Outputs**

        There are several example outputs included in the Report model. The documentation for the Report model for the general syntax which here is set up to accommodate means, sums or last values of the reporting interval. In this short example the reporting interval is every day but for longer simulations it might be desirable to set up reporting at the end of each month or grazing event for example.

        The first plots shows the location of the stock (on the paddock or ‘away’), the grazable biomass in the paddock and the supplement remaining in the store. The second plot shows average body mass and average dry matter intake. Note how body mass resets to a consistent value at the start of each grazing event. This is because a new mob of animals is bought at the start of each grazing event.

        The shaded area behind the plots shows the location of the stock (get this to show but adding a "ShadedBarsOnGraph" model to a Graph|Series). Clicking on one of the shaded areas will pop up the name of the location.
      Clock: Start=2010-09-01; End=2012-08-31
      Weather: FileName=%root%/Examples/WeatherFiles/Gatton.met
      Summary
      SoilArbitrator Soil Arbitrator
      MicroClimate: a_interception=0; b_interception=1; c_interception=0; d_interception=0; SoilHeatFluxFraction=0.4; MinimumHeightDiffForNewLayer=0; NightInterceptionFraction=0.5; ReferenceHeight=2
      Supplement: SpoilageTime=0
        Stores:
          Name    Stored  IsRoughage  DMContent  DMD   MEContent  CPConc  ProtDg  PConc   SConc   EEConc  ADIP2CP  AshAlk  MaxPassage
          fodder  0       true        0.85       0     0          0       0       0       0       0       0        0       0
          silage  0       true        1          0.75  12         0.18    0.8     0.0032  0.0024  0.02    0.06     0.6     0
      Stock: RandSeed=9999
        GenotypeCross Small Merino: AnimalType=Sheep; PureBredBreed=Small Merino; MatureDeathRate=0.02; WeanerDeathRate=0.02; Conception=[0, 0.54, 0.41, 0]; Generation=0; SRW=40; PotFleeceWt=3.6; MaxFibreDiam=19; FleeceYield=0.7; PeakMilk=0
      Forages
        Parameters:
          Name                          IsLive  DigestibilityString  FractionConsumable  MinimumAmount  UseDigestibilityFromModel
          SurfaceOrganicMatter.Residue  true    0.7                  1                   100            false
          SurfaceOrganicMatter.Residue  false   0.3                  1                   0              false
      Manager GrazeForageCrop
        Genotype = Friesian
        Sex = Female
        Age = 12
        Weight = 280
        Pregnant = 0
        Lactating = 0
        YoungNumber = 0
        YoungWt = 0
        StockingRate = 50
        CurrentLocation = Away
        PreGrazingDM = 2000
        MinGrazingDays = 7
        PostGrazingDM = 1500
        DoNoGrazingWindow = False
        NoGrazeStart = 1-Jun
        NoGrazeEnd = 31-Jul
        SupplementName = silage
        SupplementFirst = False
        SupplementEveryDay = 0
        SupplementOnPastureMass = 2
        TriggerPastureMass = 2100
```csharp
using Models.PMF.Interfaces;
using System.Diagnostics;
using Models.AgPasture;
using System.Linq;
using System.Collections.Generic;
using System.Collections;
using Models.Soils;
using Models.PMF;
using System.Xml.Serialization;
using APSIM.Shared.Utilities;
using Models.GrazPlan;
using Models.Utilities;
using Models.Core;
using Models;
using System;

namespace Models
{

    [Serializable]
    public class Script : Model
    {
        [Link] Clock clock;
        [Link] Stock stock;
        [Link] Supplement supplement;
        [Link] List<Zone> paddocks;
        [Link] ISummary summary;
        [Link] Simulation farm;
        [Link] List<IPlantDamage> forages = null;

        private int CurrentGroupNum = 1;    // animal group number
        private int CurrentLocationNum { get; set; }

        [Separator("Stock type info, the same type of stock are brought onto the paddock at each grazing")]

        [Description("Stock: genotype (e.g. Small Merino, Angus, Friesian):")] 
        [Display(Values="GetGenotypes")]
        public string Genotype { get; set; }

        [Description("Stock: sex (Female, Male, Castrate):")] 
        public ReproductiveType Sex { get; set; }

        [Description("Stock: age (months):")] 
        public double Age { get; set; }

        [Description("Stock: weight (kg liveweight /head):")] 
        public double Weight { get; set; }

        [Description("Stock: fertility status (0 if non-pregnant or days since conception):")] 
        public int Pregnant { get; set; }

        [Description("Stock: lactation status (0 if non-lactating or days since parturition):")]
        public int Lactating { get; set; }

        [Description("Stock: number of unweaned young:")]
        public int YoungNumber { get; set; }

        [Description("Stock: weight of unweaned young:")] 
        public double YoungWt { get; set; }

        [Separator("Grazing event information")]

        [Description("Paddock stocking rate (head/ha): ")] 
        public double StockingRate { get; set; }

        [Description("Initial location of the cows (give either the paddock name or 'Away'): ")] 
        public string CurrentLocation { get; set; }

        [Description("Standing biomass at which to bring the stock into the simulation (kg DM/ha): ")] 
        public double PreGrazingDM { get; set; }

        [Description("Don't move the stock onto the crop unless there is approx. X days of grazable forage available: ")] 
        public int MinGrazingDays { get; set; }

        [Description("Standing biomass at which to exit  stock from the simulation (kg DM/ha): ")] 
        public double PostGrazingDM { get; set; }

        [Description("Implement a no-grazing window? (tick for yes): ")] 
        public bool DoNoGrazingWindow { get; set; }

        [Description("Start of the no-grazing window (dd-MMM)")] 
        public string NoGrazeStart { get; set; }

        [Description("End of the no-grazing window (dd-MMM)")] 
        public string NoGrazeEnd { get; set; }

        [Separator("Supplementary feeding")]

        [Description("Name of the supplement to feed: ")] 
        public string SupplementName { get; set; }

        [Description("Feed the supplement first (i.e. before the new forage is available to the stock)?: ")] 
        public bool SupplementFirst { get; set; }

        [Description("Amount of supplementary feeding offered every day (kg DM /head /day): ")] 
        public double SupplementEveryDay { get; set; }

        [Description("Additional amount of supplement offered when available biomass is low (kg DM /head /day): ")] 
        public double SupplementOnPastureMass { get; set; }

        [Description("Trigger biomass for above rule (kg DM /ha): ")] 
        public double TriggerPastureMass { get; set; }

        public int NumStock { get; set; }
        public bool GrazingSeasonIsOpen { get; set; } // number of cows on the whole farm
        public double HarvestableBiomass { get; set; }
        public double HarvestableBiomassYesterday { get; set; }

        // Return a list of genotypes to the properties tab.
        public string[] GetGenotypes()
        {
            if (stock != null)
                return stock.Genotypes.Names.ToArray();
            return null;
        }

        [EventSubscribe("StartOfSimulation")]
        private void OnStartOfSimulation(object sender, EventArgs e)
        {

            //Debugger.Break();

            summary.WriteMessage(this, "Initialising the paddock information", MessageType.Diagnostic);

            NumStock = (int)(Math.Round(StockingRate * farm.Area, 0));

            if (CurrentLocation.ToLower() != "away")
            {
                BuyStock();
                stock.Move(CurrentLocation);
                summary.WriteMessage(this, " The Stock have been moved to " + CurrentLocation, MessageType.Diagnostic);
            }

            summary.WriteMessage(this, "     The number of animals has been rounded to " + NumStock + " from " + (StockingRate * farm.Area), MessageType.Diagnostic);
            summary.WriteMessage(this, "     The animals will begin in " + CurrentLocation + " which is paddock number " + CurrentLocationNum + " in the simulation", MessageType.Diagnostic);
            summary.WriteMessage(this, "     The area of the whole farm is " + farm.Area + " ha", MessageType.Diagnostic);

        }

        [EventSubscribe("DoManagement")]
        private void OnDoManagement(object sender, EventArgs e)
        {
            GrazingSeasonIsOpen = true;
            if (DoNoGrazingWindow)
                GrazingSeasonIsOpen = !DateUtilities.WithinDates(NoGrazeStart, clock.Today, NoGrazeEnd);

            bool sellSomeStock = false;
            if (!GrazingSeasonIsOpen)
                sellSomeStock = true;

            // Calculate forage mass in the paddock
            HarvestableBiomass = 0.0;
            foreach (var forage in forages)
                foreach (var forageOrgan in forage.Organs)
                    if (forageOrgan.IsAboveGround)
                        HarvestableBiomass += forageOrgan.Live.Wt + forageOrgan.Dead.Wt;
            
            HarvestableBiomass *= 10;  // Convert to kg/ha

            if (clock.Today == clock.StartDate)
                HarvestableBiomassYesterday = HarvestableBiomass;

            double deltaHarvestableBiomass = Math.Max(0.0, HarvestableBiomass - HarvestableBiomassYesterday);

            if (HarvestableBiomass <= PostGrazingDM)
                sellSomeStock = true;

            if (CurrentLocation == "Away")
                sellSomeStock = false;

            // The 0.03 is the propostion of body mass that the stock might eat
            double minFodder = Math.Max(PreGrazingDM, Math.Max(0.0, (0.03 * MinGrazingDays * NumStock * Weight) - (deltaHarvestableBiomass * MinGrazingDays))); 
            HarvestableBiomassYesterday = HarvestableBiomass;

            if (CurrentLocation == "Away" && (HarvestableBiomass >= PreGrazingDM) && HarvestableBiomass >= (PostGrazingDM + minFodder) && GrazingSeasonIsOpen)
            {
                CurrentLocation = paddocks[0].Name;
                CurrentLocationNum = paddocks[0].Index;
                BuyStock();
                stock.Move(CurrentLocation);
                summary.WriteMessage(this, "     Buying stock ", MessageType.Diagnostic);
            }

            if (sellSomeStock)
            {
                CurrentLocation = "Away";
                CurrentLocationNum = -1;
                SellStock();
                summary.WriteMessage(this, "     Selling stock ", MessageType.Diagnostic);
            }

            if (CurrentLocation != "Away")
            {
                if (SupplementEveryDay > 0)
                {
                    double silageOnHand = supplement.Stores[2 - 1].Stored;
                    if (silageOnHand < SupplementEveryDay * stock.NumberAll)
                    {
                        supplement.Buy(SupplementEveryDay * 30.0 * stock.NumberAll, SupplementName);  // i.e. 1 months worth
                        summary.WriteMessage(this, "SupplementEveryDay: Buying " + SupplementName + " of total amount : " + (SupplementEveryDay * 90 * stock.NumberAll) + " kg DM", MessageType.Diagnostic);
                    }
                    supplement.Feed(SupplementName, SupplementEveryDay * stock.NumberAll, CurrentLocation, SupplementFirst);
                }

                if (SupplementOnPastureMass > 0 && HarvestableBiomass <= TriggerPastureMass)
                {
                    double silageOnHand = supplement.Stores[2 - 1].Stored;
                    if (silageOnHand < SupplementOnPastureMass * stock.NumberAll)
                    {
                        supplement.Buy(SupplementOnPastureMass * 30.0 * stock.NumberAll, SupplementName);  // i.e. 1 months worth
                        summary.WriteMessage(this, "SupplementOnBiomass: Buying " + SupplementName + " of total amount : " + (SupplementOnPastureMass * 90 * stock.NumberAll) + " kg DM", MessageType.Diagnostic);
                    }
                    supplement.Feed(SupplementName, SupplementOnPastureMass * stock.NumberAll, CurrentLocation, SupplementFirst);
                }
            }
        }


        public void BuyStock()
        {
            CurrentGroupNum = stock.NoGroups + 1;
            StockBuy purchase = new StockBuy();
            purchase.Genotype = Genotype;
            purchase.Number = NumStock;
            purchase.Sex = Sex;
            purchase.Age = Age;       // age in months
            purchase.Weight = Weight;  // live weight in kg
            purchase.UseTag = CurrentGroupNum + 1;
            purchase.MatedTo = purchase.Genotype;
            purchase.Pregnant = Pregnant;  // days pregnant, 0 = non pregnant, 1 = pregnant
            purchase.Lactating = Lactating;  // 0 for dry, 1 for lactating
            purchase.NumYoung = YoungNumber;
            purchase.YoungWt = YoungWt;

            stock.Buy(purchase);
        }

        public void SellStock()
        {
            int NumGroups = stock.NoGroups;

            NumGroups = stock.NoGroups;
            for (int gg = 1; gg <= NumGroups; gg++)
            {
                stock.Sell(stock.Number[gg - 1]);
            }
        }
    }
}
```
      Zone Field: Area=1; Slope=0; AspectAngle=0; Altitude=50
        Manager SowingRule
          StartDate = 1-nov
          EndDate = 31-jan
          MinESW = 50
          MinRain = 30
          RainDays = 5
          mustSow = yes
          SowingFreq = 3
          CultivarName = Buster
          SowingDepth = 10
          RowSpacing = 150
          Population = 200
          Amount = 60
```csharp
using Models.Interfaces;
using System.Linq;
using System;
using Models.Core;
using Models.PMF;
using Models.Soils;
using Models.Utilities;
using APSIM.Shared.Utilities;
using Models.Climate;

namespace Models
{
    [Serializable]
    public class Script : Model
    {
        [Link] private Clock Clock;
        [Link] private Fertiliser Fertiliser;
        [Link] private Summary Summary;
        [Link(ByName = true)] private Plant sorghum;
        [Link] private Soil Soil;
        private Accumulator accumulatedRain;
        [Link]
        private ISoilWater waterBalance;

        [Separator("======= Sowing conditions =======")]
        [Description("Start of sowing window (dd-mmm)")] public string StartDate { get; set;}
        [Description("End of sowing window (dd-mmm)")] public string EndDate { get; set;}
        [Description("Minimum extractable soil water for sowing (mm)")] public double MinESW { get; set;}
        [Description("Accumulated rainfall required for sowing (mm)")] public double MinRain { get; set;}
        [Description("Duration of rainfall accumulation (d)")] public int RainDays { get; set;}
        [Description("Must sow at the end of the window?")] public answerType mustSow { get; set; }
        [Description("Frequency of sowing (years)")] public int SowingFreq { get; set; }
    

        [Separator("======= Sowing data =======")]
        [Description("Cultivar to be sown")]
        [Display(Type = DisplayType.CultivarName)]
        public string CultivarName { get; set;}
        [Description("Sowing depth (mm)")] public double SowingDepth { get; set;}        
        [Description("Row spacing (mm)")] public double RowSpacing { get; set;}    
        [Description("Plant population (/m2)")] public double Population { get; set;}    

        [Separator("======= Sowing fertiliser =======")]
        [Description("Amount of fertiliser to be applied (kg/ha)")] public double Amount { get; set;}

        public double CropAge { get; set; }

           public enum answerType
        {
            /// <summary>a positive answer</summary>
            yes,
            /// <summary>a negative answer</summary>
            no
        }

        
        [EventSubscribe("StartOfSimulation")]
        private void OnSimulationCommencing(object sender, EventArgs e)
        {
            accumulatedRain = new Accumulator(this, "[Weather].Rain", RainDays);
            CropAge = SowingFreq + 1.0;
        }
        

        [EventSubscribe("DoManagement")]
        private void OnDoManagement(object sender, EventArgs e)
        {
            accumulatedRain.Update();
            CropAge += 1.0 / 365.25;

            bool doSowing = false;
            if (DateUtilities.WithinDates(StartDate,Clock.Today,EndDate) && !sorghum.IsAlive)
                doSowing = true;
            if ((MathUtilities.Sum(waterBalance.ESW) < MinESW) || (accumulatedRain.Sum < MinRain))
                doSowing = false;
            if ((mustSow == answerType.yes) && (DateUtilities.DatesEqual(EndDate, Clock.Today)))
                doSowing = true;
            if (CropAge < SowingFreq)
                doSowing = false;
            
            if (doSowing)
            {
               sorghum.Sow(population:Population, cultivar:CultivarName, depth:SowingDepth, rowSpacing:RowSpacing);
               Fertiliser.Apply(Amount: Amount, Type: Fertiliser.Types.NO3N);    
               CropAge = 0.0;
            }
        
        }
        
    }
}
```
        Manager AutomaticIrrigation
          allowIrrigation = True
          seasonStart = 15-Sep
          seasonEnd = 30-Apr
          seasonsAllocation = 10000
          triggerDeficit = 75
          targetDeficit = 95
          returndays = 3
          maximumAmount = 15
          depthPAWC = 500
```csharp
using Newtonsoft.Json;
using Models.PMF.Phen;
using APSIM.Shared.Utilities;
using System.Xml.Serialization;
using Models.Soils;
using Models.PMF;
using Models.Core;
using System;
using System.Linq;
using Models.Interfaces;

        
namespace Models
{
    [Serializable] 
    [System.Xml.Serialization.XmlInclude(typeof(Model))]
    public class Script : Model
    {
        [Link] private ISummary summary;
        [Link] private Irrigation Irrigation;
        [Link] private Clock Clock;
        [Link] private Soil Soil;
        [Link(ByName = true)] private Plant sorghum;
        private DateTime StartDate;
        private DateTime EndDate;
        private double TopDUL;
        private double TopLL;
        private int nLayers;
        [Link]
        private IPhysical soilPhysical;
        [Link]
        private ISoilWater waterBalance;
        //Communication to other modules
       
        //User inputs from properties tab
        [Description("Turn irrigation on?")]
        public bool allowIrrigation { get; set; }
        [Description("Start of irrigation season (dd-MMM)")]
        public string seasonStart { get; set; }
        [Description("End of irrigation season (dd-MMM)")]
        public string seasonEnd { get; set; }
        [Description("Season allocation (mm)")]
        public double seasonsAllocation { get; set; }
        [Description("Deficit to trigger irrigation (% PAWC)")]
        public double triggerDeficit { get; set; }
        [Description("Deficit to stop irrigaton (% PAWC)")]
        public double targetDeficit { get; set; }
        [Description("Minimum days for irrigation to return")]
        public double returndays { get; set; }
        [Description("Maximum irrigation application (mm/day)")]
        public double maximumAmount { get; set; }
        [Description("Depth to calculate PAWC (mm)")]
        public double depthPAWC { get; set; }
       
        //Class members
        [JsonIgnore] public double TopSWdeficit { get; set; }
        [JsonIgnore] public double TopSWC { get; set; }
        [JsonIgnore] public double DaysSinceIrrigation { get; set; }
        [JsonIgnore] public double AmountToApply { get; set; }
        [JsonIgnore] public double SeasonAppliedAmount { get; set; }
        
        private bool IrrigationIsAllowed { get; set; }
        private bool SeasonIsOpen { get; set; }
        private bool CropIsActive { get; set; }
        private bool IrrigatorIsAvailable { get; set; }
        private bool SoilIsDry { get; set; }

    
        //Calculate static soil variables
        [EventSubscribe("StartOfSimulation")]
        private void OnStartOfSimulation(object sender, EventArgs e)
        {   
            //Set the season dates
            StartDate = DateTime.Parse(seasonStart + "-" + Clock.Today.Year.ToString());
            EndDate = DateTime.Parse(seasonEnd + "-" + Clock.Today.Year.ToString());
            
            //Can we irrigate at all?
            IrrigationIsAllowed = false; 
            if (allowIrrigation)
                IrrigationIsAllowed = true; 

            //Calculate soil water variables
            double depthFromSurface = 0.0;
            double fracLayer = 0.0;
            nLayers = soilPhysical.Thickness.Length;
            for (int layer = 0; layer < nLayers; layer++)
            {
                fracLayer = Math.Min(1.0, (depthPAWC - depthFromSurface) / soilPhysical.Thickness[layer]);
                TopLL += soilPhysical.LL15mm[layer] * fracLayer;
                TopDUL += soilPhysical.DULmm[layer] * fracLayer;
                depthFromSurface += soilPhysical.Thickness[layer];
                if (depthFromSurface >= depthPAWC)
                    layer = nLayers;
            }
        }
             
        //Determine daily requirement for irrigation
        [EventSubscribe("StartOfDay")]
        private void OnStartOfDay(object sender, EventArgs e)
        {
            //Can we irrigate today?          
            SeasonIsOpen = isBetween(Clock.Today, StartDate, EndDate);

            //Is there a crop in the ground that needs irrigation?
            CropIsActive = false;
            if ((sorghum != null) && (sorghum.IsAlive))
                CropIsActive = true;
          
            //Is the irrigator available?
            IrrigatorIsAvailable = false;
            DaysSinceIrrigation += 1;
            if (DaysSinceIrrigation >= returndays)
                IrrigatorIsAvailable = true;
          
            //Is the soil dry enough to require irrigation?
            SoilIsDry = false;
            double depthFromSurface = 0.0;
            double fracLayer = 0.0;
            TopSWC = 0.0;
            for (int layer = 0; layer < nLayers; layer++)
            {
                fracLayer = Math.Min(1.0, (depthPAWC - depthFromSurface) / soilPhysical.Thickness[layer]);
                TopSWC += waterBalance.SWmm[layer] * fracLayer;
                depthFromSurface += soilPhysical.Thickness[layer];
                if (depthFromSurface >= depthPAWC)
                    layer = nLayers;
            }
            
            TopSWdeficit = TopSWC - TopDUL;
            if (Math.Max(0.0, -TopSWdeficit) >= (TopDUL - TopLL) * (100 - triggerDeficit) / 100)
                SoilIsDry = true;
                
            //Are all the conditions ratifying irrigation
            if (IrrigationIsAllowed && SeasonIsOpen && CropIsActive && IrrigatorIsAvailable && SoilIsDry)
            {
                //Lets bloody well irrigate then!!!!
                AmountToApply = TopDUL * targetDeficit / 100 - TopSWC;
                //AmountToApply = Math.Max(0.0, Math.Min(AmountToApply, seasonsAllocation - SeasonAppliedAmount));
                AmountToApply = maximumAmount;
                Irrigation.Apply(AmountToApply);
                DaysSinceIrrigation = 0;
                SeasonAppliedAmount += AmountToApply;
            }
        }
        
        ///Checks whether theDate is between iniDate and endDate (non-year specific)
        private bool isBetween(DateTime theDay, DateTime iniDate, DateTime endDate)
        {
            bool result = false;
            if (iniDate.DayOfYear < endDate.DayOfYear)
            {
                // period is within one year, ex: summer in the northern hemisphere
                if ((theDay.DayOfYear >= iniDate.DayOfYear) && (theDay.DayOfYear <= endDate.DayOfYear))
                    result = true;
            }
            else
            {
                // period goes over the end of the year, ex: summer in the southern hemisphere
                if ((theDay.DayOfYear >= iniDate.DayOfYear) || (theDay.DayOfYear <= endDate.DayOfYear))
                    result = true;
            }
            
            return result;
        }
    }
}
```
        Manager Fertilise on fixed dates
          EachYear = True
          Dates = 20-sep, 20-nov, 20-jan, 20-mar
          UseCritNThreshold = False
          CritNThreshold = 50
          CritNDepth = 75
          Depth = 50
          Amount = 30
          FertiliserType = UreaN
```csharp
using Models.Interfaces;
using System.Linq;
using APSIM.Shared.Utilities;
using Models.PMF;
using Models.Soils;
using Models.Core;
using System;
using Models.Soils.Nutrients;

namespace Models
{
    [Serializable]
    public class Script : Model
    {
        [Link] private Clock clock;
        [Link] private Fertiliser fertiliser;
        [Link] private ISummary summary;
        [Link] private Soil soil;
        private Nutrient nutrient;
        private SoilNitrogen soilN;
        [Link]
        private IPhysical soilPhysical;


        [Separator("Fertiliser will be applied on the date(s) below")]
        [Description("Apply fertiliser on the same day(s) each year? If no, then must include the year of appliaction below")]
        public bool EachYear { get; set; }

        [Description("Dates for one or more fertiliser applications (dd-mmm or dd-mmm-yyyy) as a list with a comma between dates")]
        public string[] Dates { get; set; }

        [Separator("Test for the mineral N in the soil and don't apply the fertiliser if greater than X kgN/ha is stored in the soil above a depth of Y mm")]
        [Description("Use a critical soil mineral N to prevent application above a threshold?")]
        public bool UseCritNThreshold { get; set; }

        [Description("Don't add fertiliser if N in the soil to the depth below exceeds (kg/ha)")]
        public double CritNThreshold { get; set; }

        [Description("Depth to which the amount of N in the soil should be calculated (mm)")]
        public double CritNDepth { get; set; }

        [Separator("Fertiliser application details")]
        [Description("Depth at which to apply the fertiliser (mm)")]
        public double Depth { get; set; }

        [Description("Amount of fertiliser to apply (kg N /ha) per application")]
        public double Amount { get; set; }

        [Description("Fertiliser type - select from the list")]
        public Fertiliser.Types FertiliserType { get; set; }


        [EventSubscribe("StartOfSimulation")]
        private void FindSoilNOrNutrient(object sender, EventArgs e)
        {
            nutrient = this.FindInScope<Nutrient>() as Nutrient;
            soilN = this.FindInScope<SoilNitrogen>() as SoilNitrogen;

            if (nutrient == null && soilN == null)
                throw new Exception(string.Format("Error in script {0}: Unable to find nutrient or soilN.", Name));
        }

        [EventSubscribe("DoManagement")]
        private void OnDoManagement(object sender, EventArgs e)
        {
            if (OnApplicationDate())
            {
                if (NContentBelowThreshold())
                    fertiliser.Apply(Amount, FertiliserType, Depth);
                else
                    summary.WriteMessage(this, "Skipping fertiliser application due to soil mineral N content being above critical threshold.", MessageType.Diagnostic);
            }
        }

        /// <summary>Checks if today's date is one of the specified fertiliser application dates.</summary>
        private bool OnApplicationDate()
        {
            if (EachYear)
                return Dates.Any(d => DateUtilities.DatesEqual(d, clock.Today));
            
            DateTime[] dates = Dates.Select(d => DateTime.ParseExact(d, "d-MMM-yyyy", null)).ToArray();
            return dates.Any(d => SameDate(d, clock.Today));
        }

        /// <summary>Checks if N content in soil is below critical threshold.</summary>
        private bool NContentBelowThreshold()
        {
            if (!UseCritNThreshold)
                return true;
            
            double[] weights = GetLayerWeights();
            double cumSoilN = 0;

            for (int i = 0; i < soilPhysical.Thickness.Length; i++)
            {
                if (nutrient != null)
                    cumSoilN += weights[i] * nutrient.MineralN[i];
                else if (soilN != null)
                    cumSoilN += weights[i] * soilN.mineral_n[i];
            }

            return cumSoilN <= CritNThreshold;
        }

        private double[] GetLayerWeights()
        {
            double[] weights = new double[soilPhysical.Thickness.Length];
            double cumDepth = 0;

            for (int i = 0; i < soilPhysical.Thickness.Length; i++)
            {
                cumDepth += soilPhysical.Thickness[i];
                if (cumDepth < CritNDepth)
                    weights[i] = 1;
                else if (cumDepth - soilPhysical.Thickness[i] <= CritNDepth)
                    weights[i] = (CritNDepth - (cumDepth - soilPhysical.Thickness[i])) / soilPhysical.Thickness[i];
                else
                    weights[i] = 0;
            }

            return weights;
        }

        private bool SameDate(DateTime d1, DateTime d2)
        {
            return d1.Year == d2.Year && d1.DayOfYear == d2.DayOfYear;
        }
    }
}
```
        Irrigation
        Fertiliser
        SurfaceOrganicMatter: InitialResidueName=grass; InitialResidueType=grass; InitialResidueMass=500; InitialStandingFraction=0; InitialCPR=0; InitialCNR=40
        Soil HRS: SoilType=HMM; Site=HRS; NearestTown=Unknown; Region=SE Queensland; NaturalVegetation=Unknown; Latitude=0; Longitude=0
          Physical
            Thickness  BD    AirDry  LL15   DUL   SAT
            100        1.34  0.08    0.226  0.42  0.45
            100        1.34  0.19    0.226  0.42  0.45
            200        1.33  0.23    0.258  0.46  0.48
            200        1.38  0.26    0.27   0.46  0.47
            200        1.4   0.26    0.268  0.43  0.45
            200        1.55  0.28    0.304  0.4   0.41
            200        1.59  0.25    0.335  0.37  0.38
            200        1.63  0.28    0.33   0.33  0.37
            200        1.66  0.3     0.32   0.32  0.37
            200        1.68  0.31    0.33   0.33  0.36
            SoilCrop SorghumSoil
              LL=[0.226, 0.226, 0.258, 0.27, 0.268, 0.304, 0.335, 0.33, 0.32, 0.33]
              KL=[0.07, 0.07, 0.07, 0.07, 0.06, 0.06, 0.06, 0.05, 0.05, 0.04]
              XF=[1, 1, 1, 1, 1, 1, 1, 1, 1, 1]
          WaterBalance SoilWater: SummerDate=1-Nov; SummerU=1.5; SummerCona=6.5; WinterDate=1-Apr; WinterU=1.5; WinterCona=6.5; DiffusConst=40; DiffusSlope=16; Salb=0.2; CN2Bare=85; CNRed=20; CNCov=0.8; PSIDul=-100; Thickness=[100, 100, 200, 200, 200, 200, 200, 200, 200, 200]; SWCON=[0.3, 0.3, 0.3, 0.3, 0.3, 0.3, 0.3, 0.3, 0.3, 0.3]
          Organic: FOMCNRatio=50; CarbonUnits=Total
            Thickness  Carbon  SoilCNRatio  FBiom  FInert  FOM
            100        1.19    12.5         0.05   0.45    260.587
            100        0.59    12.5         0.02   0.6     220.582
            200        0.45    12.5         0.01   0.75    158.054
            200        0.3     12.5         0.01   0.9     113.251
            200        0.2     12.5         0.01   0.9     81.1478
            200        0.16    12.5         0.01   0.9     58.1449
            200        0.17    12.5         0.01   0.9     41.6626
            200        0.17    12.5         0.05   0.9     29.8526
            200        0.17    12.5         0.02   0.9     21.3903
            200        0.17    12.5         0.01   0.9     15.3268
          Chemical: Thickness=[100, 100, 200, 200, 200, 200, 200, 200, 200, 200]; PH=[6.3, 6.4, 6.5, 6.6, 6.6, 6.5, 6.5, 6.5, 6.5, 6.5]; PHUnits=Water
          Water: Thickness=[100, 100, 200, 200, 200, 200, 200, 200, 200, 200]; FilledFromTop=false
            InitialValues=[0.235, 0.252, 0.27, 0.3, 0.268, 0.304, 0.335, 0.33, 0.32, 0.33]
          CERESSoilTemperature Temperature
          SoilNitrogen: fom_types=[default, manure, mucuna, lablab, shemp, stable]; fract_carb=[0.2, 0.3, 0.54, 0.57, 0.45, 0]; fract_cell=[0.7, 0.3, 0.37, 0.37, 0.47, 0.1]; fract_lign=[0.1, 0.4, 0.09, 0.06, 0.08, 0.9]; NPartitionApproach=0
          SoilNitrogenNO3 NO3: Thickness=[100, 100, 200, 200, 200, 200, 200, 200, 200, 200]; InitialValuesUnits=ppm; WaterTableConcentration=0; D0=0
            InitialValues=[10.4, 1.633, 1.233, 0.9, 1.1, 1.467, 3.633, 5.667, 5.8, 7.267]
          SoilNitrogenNH4 NH4: Thickness=[100, 100, 200, 200, 200, 200, 200, 200, 200, 200]; InitialValues=[0.1, 0.1, 0.1, 0.1, 0.1, 0.1, 0.1, 0.1, 0.1, 0.1]; InitialValuesUnits=ppm; WaterTableConcentration=0; D0=0
          SoilNitrogenUrea Urea: Thickness=[100, 100, 200, 200, 200, 200, 200, 200, 200, 200]; InitialValues=[0, 0, 0, 0, 0, 0, 0, 0, 0, 0]; InitialValuesUnits=kg/ha; WaterTableConcentration=0; D0=0
        Plant Sorghum
      Report GrazingReport: EventNames=[Clock].EndOfDay
        VariableNames:
          [Clock].Today as Date
          Mean of [Stock].NumberAll from [Report].DayAfterLastOutput to [Clock].Today as NumStock
          Mean of [Stock].IntakeAll.Weight from [Report].DayAfterLastOutput to [Clock].Today as AveDMIntake
          Mean of [Stock].MEIntakeAll from [Report].DayAfterLastOutput to [Clock].Today as AveMEIntake
          Mean of [Stock].WeightAll from [Report].DayAfterLastOutput to [Clock].Today as AveBodyMass
          Mean of [Stock].CondScoreAll from [Report].DayAfterLastOutput to [Clock].Today as AveConditionScore
          Mean of [Stock].MilkWtAll from [Report].DayAfterLastOutput to [Clock].Today as AveMilkWeight4pcCorr
          Mean of ([Stock].MilkWtAll * 0.04 * 1.8) from [Report].DayAfterLastOutput to [Clock].Today as AveMilkSolids // note the "0.04" is to convert the 4% fat corrected to dry milk fat, the "1.8" is on the assumption that protein is 80% of the fat content
          Last of [GrazeForageCrop].Script.HarvestableBiomass from [Report].DayAfterLastOutput to [Clock].Today as HarvestableBiomass
          Last of [Supplement].stores[2].Stored from [Report].DayAfterLastOutput to [Clock].Today as SupplementRemaining
          Last of [Field].Sorghum.AboveGround.Wt * 10.0 from [Report].DayAfterLastOutput to [Clock].Today as SorghumMass
          Last of [Field].Sorghum.Leaf.LAI from [Report].DayAfterLastOutput to [Clock].Today as SorghumLAI
          Last of [Field].Sorghum.AboveGround.N * 10.0 from [Report].DayAfterLastOutput to [Clock].Today as SorghumN
          //Last of [GrazeForageCrop].Script.CurrentLocation from [Report].DayAfterLastOutput to [Clock].Today as StockLocation
          [GrazeForageCrop].Script.CurrentLocation as StockLocation
      Memo Memo1
        The first plots shows the location of the stock (on the paddock or ‘away’), the grazable biomass in the paddock and the supplement remaining in the store. The second plot shows average body mass and average dry matter intake. Note how body mass resets to a consistent value at the start of each grazing event. This is because a new mob of animals is bought at the start of each grazing event.

        The shaded area behind the plots shows the location of the stock (get this to show but adding a "ShadedBarsOnGraph" model to a Graph|Series). Clicking on one of the shaded areas will pop up the name of the location.
  Folder Environments
    Experiment Katherine
      Memo
        Testing ability of model to simulate rainfed production at Katherine RS, Northern Territory, Australia.

         25mm irrigation applied on day of sowing to ensure germination on all sowing dates through the year
      Factors
        Permutation
          Factor TOS
            CompositeFactor Jan
              Specifications:
                [Sowing].Script.SowDate = 1-Jan
                [Irrigate].Script.IrrigateDates = 1-Jan
            CompositeFactor Mar
              Specifications:
                [Sowing].Script.SowDate = 1-Mar
                [Irrigate].Script.IrrigateDates = 1-Mar
            CompositeFactor May
              Specifications:
                [Sowing].Script.SowDate = 1-May
                [Irrigate].Script.IrrigateDates = 1-May
            CompositeFactor Jul
              Specifications:
                [Sowing].Script.SowDate = 1-Jul
                [Irrigate].Script.IrrigateDates = 1-Jul
            CompositeFactor Sep
              Specifications:
                [Sowing].Script.SowDate = 1-Sep
                [Irrigate].Script.IrrigateDates = 1-Sep
            CompositeFactor Nov
              Specifications:
                [Sowing].Script.SowDate = 1-Nov
                [Irrigate].Script.IrrigateDates = 1-Nov
          Factor Site
            CompositeFactor Launceston
              Specifications:
                [Weather]
                [Soil]
              Weather: FileName=Met\91123Launceston.met
              Soil: SoilType=Clay; Site=Longford; NearestTown=Longford; Region=Central North; State=Tasmania; Country=Australia; NaturalVegetation=Agriculture; ApsoilNumber=651; Latitude=-41.623; Longitude=147.072; LocationAccuracy=+/- 20m; YearOfSampling=0; DataSource=Bill Cotching and Shaun Lisson, TIAR; Comments=Clay - Cressy 10
                Physical
                  Thickness  BD    AirDry  LL15  DUL   SAT
                  250        1.15  0.13    0.26  0.5   0.56
                  200        1.35  0.22    0.24  0.47  0.49
                  350        1.71  0.11    0.11  0.31  0.35
                  300        1.97  0.15    0.15  0.25  0.257
                  BD, DUL, SAT source: Laboratory measured
                  AirDry source: Unknown source or quality of data, Laboratory measured
                  LL15 source: Estimated based on local knowledge, Laboratory measured
                  SoilCrop wheatSoil: LL=[0.26, 0.24, 0.11, 0.15]; KL=[0.16, 0.16, 0.1, 0.05]; XF=[1, 1, 0.5, 0.2]
                    LL source: Estimated based on local knowledge
                  SoilCrop canolaSoil: LL=[0.26, 0.24, 0.11, 0.15]; KL=[0.16, 0.16, 0.1, 0.05]; XF=[0.9, 1, 0.5, 0.2]
                    LL source: Estimated based on local knowledge
                  SoilCrop fieldpeaSoil: LL=[0.26, 0.24, 0.11, 0.15]; KL=[0.16, 0.16, 0.1, 0.05]; XF=[0.9, 1, 0.5, 0.2]
                    LL source: Estimated based on local knowledge
                  SoilCrop lucerneSoil: LL=[0.26, 0.24, 0.11, 0.15]; KL=[0.16, 0.16, 0.1, 0.05]; XF=[0.9, 1, 0.5, 0.2]
                    LL source: Estimated based on local knowledge
                  SoilCrop weedSoil: LL=[0.26, 0.24, 0.11, 0.15]; KL=[0.16, 0.16, 0.1, 0.05]; XF=[0.9, 1, 0.5, 0.2]
                    LL source: Estimated based on local knowledge
                  SoilCrop broccoliSoil: LL=[0.26, 0.24, 0.11, 0.15]; KL=[0.16, 0.16, 0.1, 0.05]; XF=[0.9, 1, 0.5, 0.2]
                    LL source: Estimated based on local knowledge
                  SoilCrop sorghumSoil: LL=[0.26, 0.24, 0.11, 0.15]; KL=[0.07, 0.07, 0.07, 0.06]; XF=[0.9, 1, 0.5, 0.2]
                    LL source: Estimated based on local knowledge
                WaterBalance SoilWater: SummerDate=1-Nov; SummerU=6; SummerCona=3.5; WinterDate=1-Apr; WinterU=2; WinterCona=2; DiffusConst=40; DiffusSlope=16; Salb=0.1; CN2Bare=70; CNRed=20; CNCov=0.8; PSIDul=-100; Thickness=[250, 200, 350, 300]; SWCON=[0.4, 0.5, 0.5, 0.2]
                Organic: FOMCNRatio=30; CarbonUnits=Total
                  Thickness  Carbon  SoilCNRatio  FBiom  FInert  FOM
                  250        0.91    14.5         0.04   0.1     788.992
                  200        0.91    14.5         0.04   0.1     457.282
                  350        0.52    14.5         0.03   0.1     176.048
                  300        0.26    14.5         0.01   0.1     77.6781
                Chemical: Thickness=[250, 200, 350, 300]; PH=[5, 5, 5, 5]; PHUnits=Water
                  PH source: Estimated based on local knowledge
                Nutrient
                Water: Thickness=[250, 200, 350, 300]; InitialValues=[0.5, 0.455, 0.11, 0.15]; RelativeTo=LL15; FilledFromTop=true
                CERESSoilTemperature
                Solute NO3: Thickness=[250, 200, 350, 300]; InitialValues=[1, 1, 1, 1]; InitialValuesUnits=ppm; WaterTableConcentration=0; D0=0
                Solute NH4: Thickness=[250, 200, 350, 300]; InitialValues=[0.1, 0.1, 0.1, 0.1]; InitialValuesUnits=ppm; WaterTableConcentration=0; D0=0
                Solute Urea: Thickness=[250, 200, 350, 300]; InitialValues=[0, 0, 0, 0]; InitialValuesUnits=ppm; WaterTableConcentration=0; D0=0
            CompositeFactor Katherine
              Specifications:
                [Weather]
                [Soil]
              Weather: FileName=Met\14904_KatherineNT.met
              Soil: ASCOrder=NA; ASCSubOrder=NA; SoilType=Haplic Ferralsols; Site=NA; NearestTown=NA; Region=NA; State=NA; Country=Australia; NaturalVegetation=NA; ApsoilNumber=9999; Latitude=-14.375; Longitude=132.375; LocationAccuracy=+- 250 m; YearOfSampling=2019; DataSource=ISRIC SoilGrids
                Water: Thickness=[150, 150, 150, 150, 200, 200, 200, 200, 300, 300]; RelativeTo=LL15; FilledFromTop=true
                  InitialValues=[0.16, 0.175, 0.19, 0.19, 0.19, 0.19, 0.19, 0.19, 0.19, 0.19]
                Physical
                  Thickness  ParticleSizeClay  ParticleSizeSand  ParticleSizeSilt  BD     AirDry  LL15   DUL    SAT    KS
                  150        20.7              65.3              13.7              1.397  0.053   0.16   0.253  0.427  31.949
                  150        25                61.5              13                1.439  0.058   0.175  0.262  0.415  19.326
                  150        28.3              58.8              13                1.453  0.063   0.19   0.273  0.412  13.256
                  150        28.7              58.2              13                1.457  0.063   0.19   0.274  0.417  12.509
                  200        29                58                13                1.456  0.063   0.19   0.274  0.42   12.152
                  200        29                58                13                1.449  0.063   0.19   0.274  0.42   12.152
                  200        29                58                13                1.447  0.063   0.19   0.274  0.419  12.152
                  200        29                58                13                1.45   0.063   0.19   0.274  0.417  12.152
                  300        29                58                13                1.455  0.063   0.19   0.274  0.415  12.152
                  300        29                58                13                1.46   0.063   0.19   0.274  0.412  12.152
                  SoilCrop RiceSoil
                    LL=[0.16, 0.175, 0.19, 0.197, 0.207, 0.218, 0.229, 0.24, 0.254, 0.27]
                    KL=[0.06, 0.06, 0.06, 0.055, 0.048, 0.04, 0.032, 0.024, 0.014, 0.003]
                    XF=[1, 1, 1, 1, 1, 1, 1, 1, 1, 1]
                  SoilCrop WheatSoil
                    LL=[0.16, 0.175, 0.19, 0.197, 0.207, 0.218, 0.229, 0.24, 0.254, 0.27]
                    KL=[0.06, 0.06, 0.06, 0.055, 0.048, 0.04, 0.032, 0.024, 0.014, 0.003]
                    XF=[1, 1, 1, 1, 1, 1, 1, 1, 1, 1]
                  SoilCrop TeffSoil
                    LL=[0.16, 0.175, 0.19, 0.197, 0.207, 0.218, 0.229, 0.24, 0.254, 0.27]
                    KL=[0.06, 0.06, 0.06, 0.055, 0.048, 0.04, 0.032, 0.024, 0.014, 0.003]
                    XF=[1, 1, 1, 1, 1, 1, 1, 1, 1, 1]
                  SoilCrop SugarcaneSoil
                    LL=[0.16, 0.175, 0.19, 0.194, 0.2, 0.206, 0.213, 0.219, 0.227, 0.237]
                    KL=[0.06, 0.06, 0.06, 0.057, 0.053, 0.048, 0.044, 0.039, 0.033, 0.027]
                    XF=[1, 1, 1, 1, 1, 1, 1, 1, 1, 1]
                  SoilCrop MaizeSoil
                    LL=[0.16, 0.175, 0.19, 0.197, 0.207, 0.218, 0.229, 0.24, 0.254, 0.27]
                    KL=[0.06, 0.06, 0.06, 0.055, 0.048, 0.04, 0.032, 0.024, 0.014, 0.003]
                    XF=[1, 1, 1, 1, 1, 1, 1, 1, 1, 1]
                  SoilCrop SoybeanSoil
                    LL=[0.16, 0.175, 0.19, 0.197, 0.207, 0.218, 0.229, 0.24, 0.254, 0.27]
                    KL=[0.06, 0.06, 0.06, 0.055, 0.048, 0.04, 0.032, 0.024, 0.014, 0.003]
                    XF=[1, 1, 1, 1, 1, 1, 1, 1, 1, 1]
                  SoilCrop OilPalmSoil
                    LL=[0.16, 0.175, 0.19, 0.194, 0.2, 0.206, 0.213, 0.219, 0.227, 0.237]
                    KL=[0.06, 0.06, 0.06, 0.057, 0.053, 0.048, 0.044, 0.039, 0.033, 0.027]
                    XF=[1, 1, 1, 1, 1, 1, 1, 1, 1, 1]
                  SoilCrop CassavaSoil
                    LL=[0.16, 0.175, 0.19, 0.197, 0.207, 0.218, 0.229, 0.24, 0.254, 0.27]
                    KL=[0.06, 0.06, 0.06, 0.055, 0.048, 0.04, 0.032, 0.024, 0.014, 0.003]
                    XF=[1, 1, 1, 1, 1, 1, 1, 1, 1, 1]
                  SoilCrop PlantainSoil
                    LL=[0.16, 0.175, 0.19, 0.194, 0.2, 0.206, 0.213, 0.219, 0.227, 0.237]
                    KL=[0.06, 0.06, 0.06, 0.057, 0.053, 0.048, 0.044, 0.039, 0.033, 0.027]
                    XF=[1, 1, 1, 1, 1, 1, 1, 1, 1, 1]
                  SoilCrop SunflowerSoil
                    LL=[0.16, 0.181, 0.203, 0.211, 0.22, 0.229, 0.239, 0.249, 0.261, 0.273]
                    KL=[0.1, 0.093, 0.084, 0.075, 0.065, 0.053, 0.041, 0.029, 0.015, 0.001]
                    XF=[1, 1, 1, 1, 1, 1, 1, 1, 1, 1]
                  SoilCrop CanolaSoil
                    LL=[0.16, 0.175, 0.19, 0.197, 0.207, 0.218, 0.229, 0.24, 0.254, 0.27]
                    KL=[0.06, 0.06, 0.06, 0.055, 0.048, 0.04, 0.032, 0.024, 0.014, 0.003]
                    XF=[1, 1, 1, 1, 1, 1, 1, 1, 1, 1]
                  SoilCrop SorghumSoil
                    LL=[0.16, 0.175, 0.19, 0.195, 0.203, 0.211, 0.219, 0.228, 0.238, 0.251]
                    KL=[0.07, 0.07, 0.07, 0.066, 0.06, 0.053, 0.045, 0.039, 0.03, 0.019]
                    XF=[1, 1, 1, 1, 1, 1, 1, 1, 1, 1]
                  SoilCrop MilletSoil
                    LL=[0.16, 0.175, 0.19, 0.195, 0.203, 0.211, 0.219, 0.228, 0.238, 0.251]
                    KL=[0.07, 0.07, 0.07, 0.066, 0.06, 0.053, 0.045, 0.039, 0.03, 0.019]
                    XF=[1, 1, 1, 1, 1, 1, 1, 1, 1, 1]
                  SoilCrop PeanutSoil
                    LL=[0.16, 0.175, 0.19, 0.19, 0.197, 0.211, 0.225, 0.239, 0.256, 0.273]
                    KL=[0.06, 0.06, 0.06, 0.06, 0.055, 0.045, 0.035, 0.025, 0.012, 0.001]
                    XF=[1, 1, 1, 1, 1, 1, 1, 1, 1, 1]
                  SoilCrop BarleySoil
                    LL=[0.16, 0.175, 0.19, 0.196, 0.205, 0.215, 0.224, 0.234, 0.247, 0.261]
                    KL=[0.07, 0.07, 0.07, 0.065, 0.058, 0.049, 0.041, 0.033, 0.023, 0.01]
                    XF=[1, 1, 1, 1, 1, 1, 1, 1, 1, 1]
                  SoilCrop CottonSoil
                    LL=[0.16, 0.175, 0.19, 0.19, 0.19, 0.195, 0.204, 0.213, 0.225, 0.239]
                    KL=[0.1, 0.1, 0.1, 0.1, 0.1, 0.094, 0.083, 0.072, 0.058, 0.042]
                    XF=[1, 1, 1, 1, 1, 1, 1, 1, 1, 1]
                  SoilCrop OatsSoil
                    LL=[0.16, 0.175, 0.19, 0.197, 0.207, 0.218, 0.229, 0.24, 0.254, 0.27]
                    KL=[0.06, 0.06, 0.06, 0.055, 0.048, 0.04, 0.032, 0.024, 0.014, 0.003]
                    XF=[1, 1, 1, 1, 1, 1, 1, 1, 1, 1]
                  SoilCrop ChickpeaSoil
                    LL=[0.16, 0.175, 0.19, 0.19, 0.196, 0.209, 0.222, 0.235, 0.251, 0.269]
                    KL=[0.06, 0.06, 0.06, 0.06, 0.055, 0.046, 0.037, 0.028, 0.016, 0.003]
                    XF=[1, 1, 1, 1, 1, 1, 1, 1, 1, 1]
                  SoilCrop MungbeanSoil
                    LL=[0.16, 0.175, 0.19, 0.193, 0.207, 0.223, 0.24, 0.257, 0.272, 0.274]
                    KL=[0.06, 0.06, 0.06, 0.058, 0.048, 0.036, 0.024, 0.012, 0.001, 0]
                    XF=[1, 1, 1, 1, 1, 1, 1, 1, 1, 0]
                  SoilCrop Pigeon PeaSoil
                    LL=[0.16, 0.175, 0.19, 0.19, 0.197, 0.211, 0.225, 0.239, 0.256, 0.273]
                    KL=[0.06, 0.06, 0.06, 0.06, 0.055, 0.045, 0.035, 0.025, 0.012, 0.001]
                    XF=[1, 1, 1, 1, 1, 1, 1, 1, 1, 1]
                  SoilCrop CowpeaSoil
                    LL=[0.16, 0.175, 0.19, 0.197, 0.207, 0.218, 0.229, 0.24, 0.254, 0.27]
                    KL=[0.06, 0.06, 0.06, 0.055, 0.048, 0.04, 0.032, 0.024, 0.014, 0.003]
                    XF=[1, 1, 1, 1, 1, 1, 1, 1, 1, 1]
                  SoilCrop FababeanSoil
                    LL=[0.16, 0.175, 0.19, 0.19, 0.191, 0.202, 0.214, 0.226, 0.241, 0.259]
                    KL=[0.08, 0.08, 0.08, 0.08, 0.079, 0.069, 0.057, 0.046, 0.031, 0.014]
                    XF=[1, 1, 1, 1, 1, 1, 1, 1, 1, 1]
                  SoilCrop LucerneSoil
                    LL=[0.16, 0.175, 0.19, 0.19, 0.19, 0.19, 0.19, 0.191, 0.2, 0.211]
                    KL=[0.1, 0.1, 0.1, 0.1, 0.1, 0.1, 0.1, 0.099, 0.089, 0.075]
                    XF=[1, 1, 1, 1, 1, 1, 1, 1, 1, 1]
                  SoilCrop LupinSoil
                    LL=[0.16, 0.175, 0.19, 0.197, 0.207, 0.218, 0.229, 0.24, 0.254, 0.27]
                    KL=[0.06, 0.06, 0.06, 0.055, 0.048, 0.04, 0.032, 0.024, 0.014, 0.003]
                    XF=[1, 1, 1, 1, 1, 1, 1, 1, 1, 1]
                  SoilCrop LentilSoil
                    LL=[0.16, 0.175, 0.19, 0.197, 0.207, 0.218, 0.229, 0.24, 0.254, 0.27]
                    KL=[0.06, 0.06, 0.06, 0.055, 0.048, 0.04, 0.032, 0.024, 0.014, 0.003]
                    XF=[1, 1, 1, 1, 1, 1, 1, 1, 1, 1]
                  SoilCrop TriticaleSoil
                    LL=[0.16, 0.175, 0.196, 0.207, 0.22, 0.236, 0.251, 0.266, 0.274, 0.274]
                    KL=[0.07, 0.07, 0.065, 0.056, 0.045, 0.032, 0.019, 0.006, 0, 0]
                    XF=[1, 1, 1, 1, 1, 1, 1, 1, 0, 0]
                  SoilCrop EucalyptusSoil
                    LL=[0.16, 0.175, 0.19, 0.191, 0.191, 0.192, 0.193, 0.194, 0.195, 0.196]
                    KL=[0.08, 0.08, 0.08, 0.079, 0.079, 0.078, 0.077, 0.076, 0.075, 0.074]
                    XF=[1, 1, 1, 1, 1, 1, 1, 1, 1, 1]
                  SoilCrop GliricidiaSoil
                    LL=[0.16, 0.175, 0.19, 0.191, 0.193, 0.194, 0.196, 0.198, 0.2, 0.203]
                    KL=[0.08, 0.08, 0.08, 0.079, 0.077, 0.076, 0.074, 0.072, 0.07, 0.068]
                    XF=[1, 1, 1, 1, 1, 1, 1, 1, 1, 1]
                WaterBalance SoilWater: SummerDate=1-nov; SummerU=6; SummerCona=6; WinterDate=1-apr; WinterU=6; WinterCona=6; DiffusConst=8918.5; DiffusSlope=0.59; Salb=0.13; CN2Bare=73; CNRed=20; CNCov=0; DischargeWidth=5; CatchmentArea=10; PSIDul=-100; Thickness=[150, 150, 150, 150, 200, 200, 200, 200, 300, 300]
                  SWCON=[0.402, 0.351, 0.311, 0.297, 0.244, 0.244, 0.245, 0.247, 0.191, 0.194]
                Organic: FOMCNRatio=40; CarbonUnits=Total
                  Thickness  Carbon  SoilCNRatio  FBiom  FInert  FOM
                  150        1.694   13.1         0.04   0.642   145.546
                  150        1.428   13.1         0.031  0.74    116.221
                  150        1.277   13.1         0.014  0.819   92.804
                  150        1.156   13.1         0.01   0.902   74.1055
                  200        1.048   13.1         0.01   0.99    54.8987
                  200        0.949   13.1         0.01   0.99    40.6699
                  200        0.896   13.1         0.01   0.99    30.129
                  200        0.89    13.1         0.01   0.99    22.3201
                  300        0.882   13.1         0.01   0.99    14.2319
                  300        0.873   13.1         0.01   0.99    9.07469
                Chemical: Thickness=[150, 150, 150, 150, 200, 200, 200, 200, 300, 300]; PH=[6.6, 6.65, 6.73, 6.78, 6.83, 6.88, 6.9, 6.9, 6.9, 6.9]; PHUnits=Water
                Nutrient
                CERESSoilTemperature
                Solute NO3: Thickness=[150, 150, 150, 150, 200, 200, 200, 200, 300, 300]; InitialValues=[1, 1, 1, 1, 1, 1, 1, 1, 1, 1]; InitialValuesUnits=ppm; WaterTableConcentration=0; D0=0
                Solute NH4: Thickness=[150, 150, 150, 150, 200, 200, 200, 200, 300, 300]; InitialValues=[0.1, 0.1, 0.1, 0.1, 0.1, 0.1, 0.1, 0.1, 0.1, 0.1]; InitialValuesUnits=ppm; WaterTableConcentration=0; D0=0
                Solute Urea: Thickness=[150, 150, 150, 150, 200, 200, 200, 200, 300, 300]; InitialValues=[0, 0, 0, 0, 0, 0, 0, 0, 0, 0]; InitialValuesUnits=ppm; WaterTableConcentration=0; D0=0
            CompositeFactor Dalby
              Specifications:
                [Weather]
                [Soil]
              Weather: FileName=Met\dalby-41023.met
              Soil GLH Field: same as SowingDensity.DensityYieldResponse.BaseSimulation.Paddock.GLH Field
            CompositeFactor Wagga
              Specifications:
                [Weather]
                [Soil]
              Weather: FileName=Met\wagga_73127.met
              Soil GLH Field: same as SowingDensity.DensityYieldResponse.BaseSimulation.Paddock.GLH Field
      Simulation Multi_TOS
        Weather: FileName=Met\14904_KatherineNT.met
        Clock: Start=2000-01-01; End=2019-12-31
        Summary summaryfile
        SoilArbitrator Soil Arbitrator
        Zone Field: Area=1; Slope=0; AspectAngle=0; Altitude=50
          Manager Sowing
            SowDate = 1-Sep
            Density = 10
            Depth = 30
            Cultivar = Buster
            RowSpacing = 500
            RowConfiguration = Solid
            TilleringMethod = FixedTillering
            Ftn = 0
```csharp
using Models.Soils;
using System;
using Models.Core;
using Models.PMF;
using APSIM.Shared.Utilities;

namespace Models
{
    [Serializable]
    public class Script : Model
    {
        [Description("Sowing date (d-mmm)")]
        public string SowDate { get; set; }

        [Description("Enter sowing density  (plants/m2) : ")]
        public double Density { get; set; }

        [Description("Enter sowing depth  (mm) : ")]
        public double Depth { get; set; }

        [Description("Enter cultivar : ")]
        [Display(Type = DisplayType.CultivarName)]
        public string Cultivar { get; set; }

        [Description("Enter row spacing (mm) : ")]
        public double RowSpacing { get; set; }

        [Description("Enter skip row configuration : ")]
        public RowConfigurationType RowConfiguration { get; set; }

        [Description("Tillering Method")]
        public TilleringMethodType TilleringMethod { get; set; } = 0;

        [Description("Enter Fertile Tiller No. : ")]
        public double Ftn { get; set; }

        public enum TilleringMethodType 
        {
            RuleOfThumb = -1,
            FixedTillering = 0,
            DynamicTillering = 1
        }
        public enum RowConfigurationType 
        {
            Solid, SingleSkip, DoubleSkip
        }

        [Link] private Zone paddock;
        [Link] private Clock clock;
        [Link] private Plant crop;

        [EventSubscribe("DoManagement")]
        private void OnDoManagement(object sender, EventArgs e)
        {
            if (DateUtilities.WithinDates(SowDate, clock.Today, SowDate))
            {
                crop.Sow(cultivar:Cultivar, population:Density, depth:Depth, rowSpacing:RowSpacing, rowConfig: (double)RowConfiguration, tillering:(int)TilleringMethod, ftn:Ftn);
            }
        }
    }
}
```
          MicroClimate: a_interception=0; b_interception=1; c_interception=0; d_interception=0; SoilHeatFluxFraction=0.4; MinimumHeightDiffForNewLayer=0; NightInterceptionFraction=0.5; ReferenceHeight=1
          Irrigation
          Fertiliser
          SurfaceOrganicMatter: InitialResidueName=maize; InitialResidueType=maize; InitialResidueMass=500; InitialStandingFraction=0; InitialCPR=0; InitialCNR=65
          Manager Harvesting
```csharp
using Models.PMF.Phen;
using System;
using Models.Core;
using System.Collections.Generic;
using System.Text;
using Models.Soils;
using Models.PMF;
using Models;
using System.Xml.Serialization;
using APSIM.Shared.Utilities;

namespace Models
{
    [Serializable] 
    public class Script : Model
    {      
        [Link] private Clock clock;
        [Link] private Plant crop;
        //[Link(Type = LinkType.Path, Path = "[Sorghum].Phenology")] private Phenology phenology;

        [EventSubscribe("DoManagement")]
        private void OnDoCalculations(object sender, EventArgs e)
        {
	        bool cropSeverelyDelayed = crop.DaysAfterSowing > 250;

            if (crop.IsReadyForHarvesting || cropSeverelyDelayed)
            {
                crop.Harvest();
                crop.EndCrop();
            }
        }
    }
}
```
          Report FactorialReport: EventNames=[Sorghum].Harvesting
            VariableNames:
              [Clock].Today
              [Sorghum].Phenology.CurrentStageName as Stage
              [Sorghum].SowingDate.Date as SowingDate
              [Sorghum].SowingDate.DayOfYear as SowingDOY
              [Sorghum].Phenology.FloweringDAS as FloweringDAS
              [Sorghum].Phenology.MaturityDAS as MaturityDAS
              [Sorghum].Grain.Live.Wt as GrainWt
              [Sorghum].AboveGround.Wt
              [Sorghum].Grain.Wt
              [Sorghum].Leaf.LAI
              sum of ([Soil].Water.MM) from [Sorghum].Sowing to [Sorghum].Sowing as SowProfileWater
          Soil: SoilType=Sandy loam; LocalName=Mocked up kandosol; Country=Australia
            WaterBalance SoilWater: SummerDate=1-Oct; SummerU=2; SummerCona=4.5; WinterDate=1-Apr; WinterU=2; WinterCona=4.5; DiffusConst=140; DiffusSlope=35; Salb=0.15; CN2Bare=70; CNRed=20; CNCov=0.8; PSIDul=-100; Thickness=[100, 100, 200, 200, 200, 200, 200, 300]; SWCON=[0.7, 0.7, 0.5, 0.5, 0.5, 0.3, 0.3, 0.3]
            Nutrient
            Organic: FOMCNRatio=40; CarbonUnits=Total
              Thickness  Carbon    SoilCNRatio  FBiom  FInert    FOM
              100        0.47      13.8         0.04   0.5       301.302
              200        0.325     13.8         0.02   0.7       206.0215
              300        0.246667  13.8         0.02   0.933333  129.015
              300        0.213333  13.8         0.01   1         66.135
              300        0.2       13.8         0.01   1         38.8583
              300        0.2       13.8         0.01   1         18.322
              300        0.2       13.8         0.01   1         18.322
            Chemical: Thickness=[100, 200, 300, 300, 300, 300, 300]; PH=[7.1, 7.95, 8.16667, 8.43333, 8.5, 8.5, 8.5]; PHUnits=Water
            CERESSoilTemperature Temperature
            Water: Thickness=[100, 200, 300, 300, 300, 300, 300]; InitialValues=[0.06, 0.06, 0.08, 0.08, 0.08, 0.08, 0.08]; RelativeTo=LL15; FilledFromTop=false
            Solute NO3: InitialValuesUnits=ppm; WaterTableConcentration=0; D0=0
            Solute NH4: InitialValuesUnits=ppm; WaterTableConcentration=0; D0=0
            Solute Urea: Thickness=[100, 200, 300, 300, 300, 300, 300]; InitialValues=[0, 0, 0, 0, 0, 0, 0]; InitialValuesUnits=kg/ha; WaterTableConcentration=0; D0=0
            Physical
              Thickness  ParticleSizeClay  BD     AirDry  LL15  DUL   SAT    KS
              100        10.6              1.286  0.016   0.06  0.13  0.46   0
              200        15.2              1.486  0.048   0.06  0.13  0.39   0
              300        17.7              1.471  0.05    0.08  0.15  0.396  0
              300        21.9              1.59   0.05    0.08  0.15  0.38   0
              300        21.2              1.59   0.05    0.08  0.15  0.38   0
              300        22.1              1.626  0.05    0.08  0.15  0.38   0
              300        22.1              1.626  0.05    0.08  0.15  0.38   0
              SoilCrop ChickpeaSoil: LL=[0.06, 0.06, 0.07, 0.08, 0.1, 0.13, 0.14]; KL=[0.03, 0.03, 0.03, 0.025, 0.02, 0.0125, 0.008]; XF=[1, 1, 1, 1, 1, 0, 0]
              SoilCrop SorghumSoil: LL=[0.06, 0.06, 0.07, 0.08, 0.1, 0.13, 0.14]; KL=[0.07, 0.07, 0.07, 0.06, 0.05, 0.05, 0.04]; XF=[1, 1, 1, 1, 1, 0, 0]
            Soil Synthetic Soil Derived from ISRIC SoilGrids: same as Environments.Katherine.Factors.Permutation.Site.Katherine.Soil
          Manager Irrigate
            IrrigateDates = 24-jan
            Amount = 25
            Depth = 0
            Efficiency = 1
            WillRunoff = False
```csharp
using Models.Soils;
using System;
using Models.Core;
using Models.PMF;
using APSIM.Shared.Utilities;
namespace Models
{
    [Serializable]
    public class Script : Model
    {
        [Link] Clock Clock;
        [Link] Irrigation Irrigation;
        
        [Separator("A component to apply irrigation on one or more dates on every year of the simulation")]

        [Description("Enter the irrigation dates as dd-mmm with comma separation (any year information entered will be ignored)")] 
        public string[] IrrigateDates { get; set; }
        
        [Description("Amount of irrigation to be applied (mm)")] 
        public double Amount { get; set; }
        
        [Description("Depth in the soil to apply the  irrigation (mm)")] 
        public double Depth { get; set; }
        
        [Description("Efficiency of irrigation (0-1)")] 
        public double Efficiency { get; set; }
        
        [Description("Will the irrigation runoff?")] 
        public bool WillRunoff { get; set; }
        
        [EventSubscribe("DoManagement")]
        private void OnDoManagement(object sender, EventArgs e)
        {
            foreach (string ddMMM in IrrigateDates)
            {
                if (DateUtilities.DatesEqual(ddMMM, Clock.Today))
                    Irrigation.Apply(amount: Amount, depth: Depth, efficiency: Efficiency, willRunoff: WillRunoff);
            }
        }
    }
}
```
          Plant Sorghum
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