Simulations: Version=210
  Memo TitlePage
    # The APSIM Soybean Model

    The APSIM Soybean model has been developed using the Plant Modelling Framework (PMF) of ([#brown_plant_2014]). This new framework provides a library of plant organ and process submodels that can be coupled, at runtime, to construct a model in much the same way that models can be coupled to construct a simulation. This means that dynamic composition of lower level process and organ classes (e.g. photosynthesis, leaf) into larger constructions (e.g. maize, wheat, sorghum) can be achieved by the model developer without additional coding.

    The model consists of:

    * a phenology model to simulate development between growth phases
    * a structure model to simulate plant morphology
    * a collection of organs to simulate the various plant parts
    * an arbitrator to allocate resources (N, biomass) to the various plant organs
  Folder Replacements
    Report DailyReport: EventNames=[Clock].DoReport
      VariableNames:
        [Clock].Today
        [Clock].Today.DayOfYear
        [Soybean].DaysAfterSowing as Soybean.Phenology.DaysAfterSowing
        [Soybean].Phenology.Stage
        [Weather].MeanT
        [Weather].Radn
        [Weather].MaxT
        [Weather].MinT
        [Soybean].Arbitrator.DM.TotalFixationSupply
        sum([Soybean].Arbitrator.N.Fixation) as NFixed
        [Soybean].Arbitrator.DM.TotalPlantDemand
        [Soybean].Phenology.CurrentStageName
        [Soybean].Phenology.Photoperiod
        [Soybean].AboveGround.Wt
        [Soybean].AboveGround.N
        [Soybean].Leaf.NodeNumber
        [Soybean].Leaf.Fw
        [Soybean].Leaf.Fn
        [Soybean].Leaf.Photosynthesis.FT
        [Soybean].Leaf.LAI
        [Soybean].Leaf.LAITotal
        [Soybean].Leaf.CoverGreen
        [Soybean].Leaf.CoverTotal
        [Soybean].Leaf.Live.Wt
        [Soybean].Leaf.Live.StructuralWt
        [Soybean].Leaf.Live.MetabolicWt
        [Soybean].Leaf.Allocated.MetabolicWt
        [Soybean].Leaf.Allocated.StructuralWt
        [Soybean].Leaf.Dead.StructuralWt
        [Soybean].Leaf.Dead.MetabolicWt
        [Soybean].Leaf.Live.N
        [Soybean].Leaf.Live.NConc
        [Soybean].Leaf.SpecificArea
        [Soybean].Leaf.Wt
        [Soybean].Leaf.NConc
        [Soybean].Leaf.Senesced.Wt
        [Soybean].Leaf.Transpiration
        [Soybean].Stem.Wt
        [Soybean].Stem.Total.StructuralWt
        [Soybean].Stem.Live.StructuralWt
        [Soybean].Stem.Live.StructuralN
        [Soybean].Stem.N
        [Soybean].Stem.NConc
        [Soybean].Shell.Wt
        [Soybean].Shell.Live.Wt
        [Soybean].Shell.N
        [Soybean].Shell.NConc
        [Soybean].Grain.Wt
        [Soybean].Grain.N
        [Soybean].Grain.NConc
        [Soybean].Grain.HarvestIndex
        [Soybean].Shell.Wt
        [Soybean].Pod.Wt
        [Soybean].Pod.N
        [Soybean].Pod.NConc
        [Soybean].Nodule.NFixed
        [Soybean].Root.Wt
        sum([Soil].NO3.kgha) as TotalSoilNO3
        sum([Soil].NH4.kgha) as TotalSoilNH4
        sum([Soil].Water.MM) as TotalSW
        [Soil].Water.Volumetric[1:3]
        [Soybean].Leaf.Height
        [Soybean].Root.Depth
        sum([Soil].SoilWater.ESW) as TotalESW
        [Soil].Water.Potential
        [Soil].SoilWater.Runoff
        [Soil].SoilWater.Es
        [MicroClimate].PrecipitationInterception
        [Phenology].EarlyGrainFilling.Target.EntireGrainfilling
        [Phenology].EarlyGrainFilling.Target
    Report HarvestReport: EventNames=[Soybean].Harvesting
      VariableNames:
        [Clock].Today
        [Soybean].Phenology.CurrentStageName
        [Soybean].Phenology.EmergenceDAS
        [Soybean].Phenology.FloweringDAS
        [Soybean].Phenology.EndGrainFillDAS
        [Soybean].Phenology.MaturityDAS
        [Soybean].AboveGround.Wt
        [Soybean].Grain.Wt
        [Soybean].Leaf.NodeNumber
        [Soybean].Leaf.Height
        [HarvestRule].Script.NodeNumber as Soybean.Leaf.NodeNumber
  DataStore
    ExcelInput ExcelMultiInput: FileNames=[ObservedPhenology.xlsx]; SheetNames=[Observed]
    PredictedObserved: PredictedTableName=DailyReport; ObservedTableName=Observed; FieldNameUsedForMatch=SimulationName; FieldName2UsedForMatch=Clock.Today; AllColumns=false
    PredictedObserved PredictedObservedHarvest: PredictedTableName=HarvestReport; ObservedTableName=Observed; FieldNameUsedForMatch=SimulationName; FieldName2UsedForMatch=Soybean.Phenology.CurrentStageName; AllColumns=false
  Folder ForestHill
    Experiment ForestHill2022
      Factors
        Factor Cv
          Specification=[SowingRule].Script.CultivarName=Hayman,Bunya,Kuranda,A6785,Richmond
      Simulation ForestHill2022Base
        Clock: Start=2022-01-21; End=2022-06-01
        Summary summaryfile
        Weather: FileName=ForestHill_40079.met
        SoilArbitrator Soil Arbitrator
        Zone paddock: Area=1; Slope=0; AspectAngle=0; Altitude=50
          MicroClimate: a_interception=0; b_interception=1; c_interception=0; d_interception=0; SoilHeatFluxFraction=0.4; MinimumHeightDiffForNewLayer=0; NightInterceptionFraction=0.5; ReferenceHeight=2
          Irrigation
          Fertiliser
          SurfaceOrganicMatter: InitialResidueName=maize; InitialResidueType=maize; InitialResidueMass=500; InitialStandingFraction=0; InitialCPR=0; InitialCNR=55
          Report DailyReport: EventNames=[Clock].DoReport
            VariableNames:
              [Clock].Today
              [DiagnosticsVariables].Script.AccumPlantN
              [DiagnosticsVariables].Script.AccumMineralisation
              [DiagnosticsVariables].Script.AccumDenit
              [DiagnosticsVariables].Script.AccumFert
              [DiagnosticsVariables].Script.AccumLeach
              [DiagnosticsVariables].Script.AccumDetach
              [DiagnosticsVariables].Script.DeltaSoilOMN
              [DiagnosticsVariables].Script.DeltaSurfaceOMN
              [DiagnosticsVariables].Script.DeltaSoilMineralN
              [Soybean].Root.NSupply
              [Soil].SoilWater.Eo
              [Soil].SoilWater.Es
              [DiagnosticsVariables].Script.SWC
              [DiagnosticsVariables].Script.DUL
              [Soil].SoilWater.Drainage
              [Soil].SoilWater.Runoff
              [DiagnosticsVariables].Script.OutFlowLat
              [Soil].SoilWater.pond
              [DiagnosticsVariables].Script.AccumEO
              [DiagnosticsVariables].Script.AccumEP
              [DiagnosticsVariables].Script.AccumES
              [DiagnosticsVariables].Script.AccumDrainage
              [DiagnosticsVariables].Script.AccumRunoff
              [DiagnosticsVariables].Script.AccumRainfall
              [DiagnosticsVariables].Script.AccumIrrigation
              [DiagnosticsVariables].Script.AccumOutflowLat
              [DiagnosticsVariables].Script.SoilWaterDeficit
              [Soybean].Grain.Live.Wt
              [Soybean].Shell.Live.Wt
              [Soybean].Stem.Live.Wt
              [Soybean].Stem.Live.Wt
              [Soybean].Grain.Live.N
              [Soybean].Shell.Live.N
              [Soybean].Leaf.Live.Wt
              [Soybean].Root.Live.Wt
              [Soybean].Leaf.Live.N
              [Soybean].Root.Live.N
              [Soybean].Leaf.Live.NConc
              [Soybean].Root.Live.NConc
              [Soybean].Root.WaterSupply
              [Soybean].Root.WaterUptake
              [Soybean].Leaf.Transpiration
              [Soybean].Leaf.WaterDemand
              [Soybean].Root.Depth
              [Soybean].Leaf.CoverTotal
              [Soybean].Leaf.CoverDead
              [Soybean].Leaf.LAI
              [Soybean].Leaf.Height
              [Soybean].Leaf.PotentialBiomass
              [Soil].Water.MM
              [Soil].NO3.kgha
              [DiagnosticsVariables].Script.SoilNitrogenContent
              [Soybean].Arbitrator.N.TotalPlantDemand
              [MicroClimate].net_radn
              [MicroClimate].peta
              [MicroClimate].petr
              [DiagnosticsVariables].Script.FomN
              [DiagnosticsVariables].Script.HumN
              [DiagnosticsVariables].Script.BiomN
              [DiagnosticsVariables].Script.DltNMinRes
              [DiagnosticsVariables].Script.DltNMinTot
              [Soybean].Leaf.Fw
              [Soybean].Leaf.Fn
              [Soybean].Phenology.CurrentPhase.Name
              [Soybean].Phenology.Stage
              [Soybean].Pod.Wt
              [Soybean].Pod.N
              [Soybean].Structure.LeafTipsAppeared
              [Soybean].Structure.MainStemPrimordiaNo
              [Soybean].Leaf.CohortArea[1]
              [Soybean].Leaf.CohortArea[2]
              [Soybean].Leaf.CohortArea[3]
              [Soybean].Leaf.CohortArea[4]
              [Soybean].Leaf.CohortArea[5]
              [Soybean].Leaf.CohortArea[6]
              [Soybean].Leaf.CohortArea[7]
              [Soybean].Leaf.CohortArea[8]
              [Soybean].Leaf.CohortArea[9]
              [Soybean].Leaf.CohortArea[10]
              [Soybean].Leaf.CohortArea[11]
              [Soybean].Leaf.CohortArea[12]
              [Soybean].Leaf.CohortArea[13]
              [Soybean].Leaf.CohortArea[14]
              [Soybean].Leaf.CohortArea[15]
              [Soybean].Leaf.AppearedCohortNo
              [Soybean].Leaf.DeadCohortNo
              [Soybean].AboveGround.Wt
              [Soybean].Phenology.Stage
              [Soybean].Structure.MainStemPrimordiaNo
              [Soybean].Phenology.NFF
              [SoybeanHarvestRule].Script.FinalTag
              [Soybean].Grain.NumberFunction
              [Soybean].Shell.PodNumber
              [Soybean].Phenology.FN
              [Soybean].Phenology.FN.TotalNodes
              [Soybean].Phenology.FN.VegetativeNodes
          Manager SowingRule
            RowSpacing = 500
            SowingDepth = 50
            SowingRate = 25
            CultivarName = Bidgee
            SowingDate = 01/22/2022 00:00:00
```csharp
using Models.Soils;
using System;
using Models.Core;
using Models.PMF;
using APSIM.Shared.Utilities;
        
        namespace Models
        {
           [Serializable] 
           [System.Xml.Serialization.XmlInclude(typeof(Model))]
            public class Script : Model
            {      
               [Link] Plant Soybean;
               [Link] Clock Clock;

               [Description("Spacing (mm) between rows")]
               public double RowSpacing { get; set; }
               [Description("Depth (mm) Grains are planted")]
               public double SowingDepth { get; set; }
               [Description("Seeds sown (/m2)")]
               public double SowingRate { get; set; }
               [Description("Cultivar")]
               [Display(Type=DisplayType.CultivarName)]
               public string CultivarName { get; set; }
               [Description("Sowing Date")]
               public DateTime SowingDate { get; set; }

               [EventSubscribe("DoManagement")]
               private void OnDoManagement(object sender, EventArgs e)
               {
                if (Clock.Today.Date == SowingDate)
                    Soybean.Sow(population:SowingRate, cultivar:CultivarName, depth:SowingDepth, rowSpacing:RowSpacing, budNumber:1);
               }
            }
        }
```
          Manager HarvestRule
            HarvestDate = 06/01/2022 00:00:00
```csharp
using APSIM.Core;
using APSIM.Shared.Utilities;
using System.Xml.Serialization;
using Models.Functions;
using Models;
using Models.PMF;
using Models.Soils;
using System.Text;
using System.Collections.Generic;
using Models.Core;
using System;
using Models.Soils.Nutrients;
 
namespace Models
{
    [Serializable]
    public class Script : Model, IStructureDependency
    {     
        [Link] private Plant Soybean;
        [Link] private Clock Clock;
        
        public IStructure Structure { private get; set; }

        public double NodeNumber {get; set;} = 0;
    
        [Description("Harvest Date")]
        public DateTime HarvestDate { get; set; }
     
     
        [EventSubscribe("DoManagement")]
        private void OnDoManagement(object sender, EventArgs e)
        {
           if (Clock.Today.Date == HarvestDate)
           {
            NodeNumber = (  Structure.FindChild<IModel>("NodeNumber", relativeTo: (INodeModel)(Soybean.Leaf as IModel)) as IFunction).Value();
            Soybean.Harvest();
            Soybean.EndCrop();
           }
        }
    }
}
```
          Report HarvestReport: EventNames=[Soybean].Harvesting
            VariableNames:
              [Clock].Today
              [Soybean].Structure.MainStemPrimordiaNo
              [Soybean].Phenology.NFF
              [Soybean].Script.FinalTag
          Plant Soybean
          Manager AutomaticIrrigation
            allowIrrigation = True
            seasonStart = 21-jan
            seasonEnd = 30-may
            seasonsAllocation = 10000
            triggerDeficit = 75
            targetDeficit = 95
            returndays = 3
            maximumAmount = 30
            depthPAWC = 650
```csharp
using Newtonsoft.Json;
using APSIM.Shared.Utilities;
using System.Xml.Serialization;
using Models.Soils;
using Models.PMF;
using Models.Core;
using System;
using System.Linq;
using Models.Interfaces;



        
namespace Models
{
    [Serializable] 
    [System.Xml.Serialization.XmlInclude(typeof(Model))]
    public class Script : Model
    {
        [Link] private ISummary summary;
        [Link] private Irrigation Irrigation;
        [Link] private Clock Clock;
        [Link] private Soil Soil;
        [Link(IsOptional = true)] private IPlant existingCrop;
        private DateTime StartDate;
        private DateTime EndDate;
        private double TopDUL;
        private double TopLL;
        private int nLayers;
        [Link]
        private IPhysical soilPhysical;
        [Link]
        private ISoilWater waterBalance;
        //Communication to other modules
       
        //User inputs from properties tab
        [Description("Turn irrigation on?")]
        public bool allowIrrigation { get; set; }
        [Description("Start of irrigation season (dd-MMM)")]
        public string seasonStart { get; set; }
        [Description("End of irrigation season (dd-MMM)")]
        public string seasonEnd { get; set; }
        [Description("Season allocation (mm)")]
        public double seasonsAllocation { get; set; }
        [Description("Deficit to trigger irrigation (% PAWC)")]
        public double triggerDeficit { get; set; }
        [Description("Deficit to stop irrigaton (% PAWC)")]
        public double targetDeficit { get; set; }
        [Description("Minimum days for irrigation to return")]
        public double returndays { get; set; }
        [Description("Maximum irrigation application (mm/day)")]
        public double maximumAmount { get; set; }
        [Description("Depth to calculate PAWC (mm)")]
        public double depthPAWC { get; set; }

        //Class members
        [JsonIgnore] public double TopSWdeficit { get; set; }
        [JsonIgnore] public double TopSWC { get; set; }
        [JsonIgnore] public double DaysSinceIrrigation { get; set; }
        [JsonIgnore] public double AmountToApply { get; set; }
        [JsonIgnore] public double SeasonAppliedAmount { get; set; }
        
        private bool IrrigationIsAllowed { get; set; }
        private bool SeasonIsOpen { get; set; }
        private bool CropIsActive { get; set; }
        private bool IrrigatorIsAvailable { get; set; }
        private bool SoilIsDry { get; set; }

    
        //Calculate static soil variables
        [EventSubscribe("StartOfSimulation")]
        private void OnStartOfSimulation(object sender, EventArgs e)
        {   
            //Set the season dates
            StartDate = DateTime.Parse(seasonStart + "-" + Clock.Today.Year.ToString());
            EndDate = DateTime.Parse(seasonEnd + "-" + Clock.Today.Year.ToString());
            
            //Can we irrigate at all?
            IrrigationIsAllowed = false; 
            if (allowIrrigation)
                IrrigationIsAllowed = true; 

            //Calculate soil water variables
            double depthFromSurface = 0.0;
            double fracLayer = 0.0;
            nLayers = soilPhysical.Thickness.Length;
            for (int layer = 0; layer < nLayers; layer++)
            {
                fracLayer = Math.Min(1.0, (depthPAWC - depthFromSurface) / soilPhysical.Thickness[layer]);
                TopLL += soilPhysical.LL15mm[layer] * fracLayer;
                TopDUL += soilPhysical.DULmm[layer] * fracLayer;
                depthFromSurface += soilPhysical.Thickness[layer];
                if (depthFromSurface >= depthPAWC)
                    layer = nLayers;
            }
        }
             
        //Determine daily requirement for irrigation
        [EventSubscribe("StartOfDay")]
        private void OnStartOfDay(object sender, EventArgs e)
        {
            //Can we irrigate today?          
            SeasonIsOpen = isBetween(Clock.Today, StartDate, EndDate);
            if (!SeasonIsOpen)
                SeasonAppliedAmount = 0;

            //Is there a crop in the ground that needs irrigation?
            CropIsActive = false;
            if ((existingCrop != null) && (existingCrop.IsAlive))
                CropIsActive = true;
            //if ((existingCrop.Phenology.Stage >= 3.0) && (existingCrop.Phenology.Stage < 6.0))
          
            //Is the irrigator available?
            IrrigatorIsAvailable = false;
            DaysSinceIrrigation += 1;
            if (DaysSinceIrrigation >= returndays)
                IrrigatorIsAvailable = true;
          
            //Is the soil dry enough to require irrigation?
            SoilIsDry = false;
            double depthFromSurface = 0.0;
            double fracLayer = 0.0;
            TopSWC = 0.0;
            for (int layer = 0; layer < nLayers; layer++)
            //for (int layer = 0; depthFromSurface < depthPAWC + soilPhysical.Thickness[layer]; layer++)
            {
                fracLayer = Math.Min(1.0, (depthPAWC - depthFromSurface) / soilPhysical.Thickness[layer]);
                TopSWC += waterBalance.SWmm[layer] * fracLayer;
                depthFromSurface += soilPhysical.Thickness[layer];
                if (depthFromSurface >= depthPAWC)
                    layer = nLayers;
            }
            
            TopSWdeficit = TopSWC - TopDUL;
            if (Math.Max(0.0, -TopSWdeficit) >= (TopDUL - TopLL) * (100 - triggerDeficit) / 100)
                SoilIsDry = true;
                
            //Are all the conditions ratifying irrigation
            if (IrrigationIsAllowed && SeasonIsOpen && CropIsActive && IrrigatorIsAvailable && SoilIsDry)
            {
                //Lets bloody well irrigate then!!!!
                AmountToApply = TopDUL * targetDeficit / 100 - TopSWC;
                AmountToApply = Math.Max(0.0, Math.Min(AmountToApply, seasonsAllocation - SeasonAppliedAmount));
                AmountToApply = Math.Min(AmountToApply,maximumAmount);
                Irrigation.Apply(AmountToApply);
                DaysSinceIrrigation = 0;
                SeasonAppliedAmount += AmountToApply;
            }
        }
        
        ///Checks whether theDate is between iniDate and endDate (non-year specific)
        private bool isBetween(DateTime theDay, DateTime iniDate, DateTime endDate)
        {
            bool result = false;
            if (iniDate.DayOfYear < endDate.DayOfYear)
            {
                // period is within one year, ex: summer in the northern hemisphere
                if ((theDay.DayOfYear >= iniDate.DayOfYear) && (theDay.DayOfYear <= endDate.DayOfYear))
                    result = true;
            }
            else
            {
                // period goes over the end of the year, ex: summer in the southern hemisphere
                if ((theDay.DayOfYear >= iniDate.DayOfYear) || (theDay.DayOfYear <= endDate.DayOfYear))
                    result = true;
            }
            
            return result;
        }
    }
}
```
          Soil: SoilType=APS6Soil; LocalName=APS6Site; Site=APS6Site; NearestTown=Unknown; Region=Lawes; NaturalVegetation=Unknown; Latitude=0; Longitude=0
            Physical
              Thickness  ParticleSizeSand  ParticleSizeSilt  ParticleSizeClay  Rocks  BD    AirDry  LL15  DUL   SAT
              150        5                 65                30                0      1.38  0.1     0.2   0.38  0.43
              150        5                 65                30                0      1.34  0.1     0.2   0.38  0.43
              300        5                 65                30                0      1.35  0.1     0.22  0.4   0.43
              300        5                 65                30                0      1.5   0.1     0.18  0.4   0.43
              300        5                 65                30                0      1.49  0.1     0.14  0.39  0.42
              300        5                 65                30                0      1.46  0.1     0.2   0.38  0.4
              300        5                 65                30                0      1.46  0.1     0.2   0.38  0.4
              Rocks, ParticleSizeSand, ParticleSizeSilt, ParticleSizeClay source: Calculated
              SoilCrop SoybeanSoil: LL=[0.2, 0.2, 0.22, 0.18, 0.14, 0.25, 0.28]; KL=[0.06, 0.05, 0.05, 0.04, 0.04, 0.06, 0.06]; XF=[1, 1, 1, 1, 1, 1, 1]
            WaterBalance SoilWater: SummerDate=1-Nov; SummerU=6; SummerCona=3.5; WinterDate=1-Apr; WinterU=6; WinterCona=3.5; DiffusConst=88; DiffusSlope=35.4; Salb=0.13; CN2Bare=60; CNRed=20; CNCov=0.8; DischargeWidth=0; CatchmentArea=0; PSIDul=-100
              Thickness  SWCON  KLAT
              150        0.3    0
              150        0.3    0
              300        0.3    0
              300        0.3    0
              300        0.3    0
              300        0.3    0
              300        0.3    0
              RunoffModel: TillageCnCumWater=0; TillageCnRed=0; CumWaterSinceTillage=0
                CNReductionForCover
                  LinearInterpolationFunction EffectiveCoverMultiplier
                    XYPairs: X=[0, 600, 1800, 30000]; Y=[1, 1, 0, 0]
                    Constant XValue: FixedValue=0
                CNReductionForTillage: tillageCnCumWater=0; tillageCnRed=0
              EvaporationModel: t=0
              LateralFlowModel
              SaturatedFlowModel
              UnsaturatedFlowModel
              WaterTableModel
            Organic: FOMCNRatio=60; CarbonUnits=Total
              Thickness  Carbon  SoilCNRatio  FBiom  FInert  FOM
              150        2.2     14.5         0.03   0.45    34.7129
              150        1.6     14.5         0.02   0.6     27.0344
              300        1.15    14.5         0.01   0.78    16.3972
              300        1       14.5         0.01   0.9     9.94541
              300        0.8     14.5         0.01   0.99    6.0322
              300        0.45    14.5         0.01   0.99    3.65871
              300        0.45    14.5         0.01   0.99    2.21912
            Chemical: Thickness=[150, 150, 300, 300, 300, 300, 300]; PH=[7.5, 8, 8, 8, 8, 8, 8]; PHUnits=Water
            Water: Thickness=[150, 150, 300, 300, 300, 300, 300]; InitialValues=[0.326, 0.326, 0.346, 0.333, 0.315, 0.326, 0.326]; FilledFromTop=false
            Nutrient
            Solute NO3: Thickness=[150, 150, 300, 300, 300, 300, 300]; InitialValues=[100, 50, 3, 2, 1, 0.1, 0.1]; InitialValuesUnits=ppm; WaterTableConcentration=0; D0=0; DepthConstant=0; MaxDepthSoluteAccessible=0; RunoffEffectivenessAtMovingSolute=0; MaxEffectiveRunoff=0
            Solute NH4: Thickness=[150, 150, 300, 300, 300, 300, 300]; InitialValues=[3, 2, 1, 0.8, 0.8, 0.5, 0.5]; InitialValuesUnits=ppm; WaterTableConcentration=0; D0=0; DepthConstant=0; MaxDepthSoluteAccessible=0; RunoffEffectivenessAtMovingSolute=0; MaxEffectiveRunoff=0
            Solute Urea: Thickness=[150, 150, 300, 300, 300, 300, 300]; InitialValues=[0, 0, 0, 0, 0, 0, 0]; InitialValuesUnits=kg/ha; WaterTableConcentration=0; D0=0; DepthConstant=0; MaxDepthSoluteAccessible=0; RunoffEffectivenessAtMovingSolute=0; MaxEffectiveRunoff=0
            SoilTemperature Temperature
          Spectral: DrySoilNDVI=0.07; WetSoilNDVI=0.08; GreenCropNDVI=0.85; DeadCropNDVI=0.1
    Experiment ForestHill2023
      Factors
        Factor Cv: Specification=[SowingRule].Script.CultivarName=Hayman,Bunya,Kuranda,A6785
      Simulation ForestHill2023Base
        Clock: Start=2023-12-04; End=2024-04-01
        Summary summaryfile
        Weather: FileName=ForestHill_40079.met
        SoilArbitrator Soil Arbitrator
        Zone paddock: Area=1; Slope=0; AspectAngle=0; Altitude=50
          MicroClimate: a_interception=0; b_interception=1; c_interception=0; d_interception=0; SoilHeatFluxFraction=0.4; MinimumHeightDiffForNewLayer=0; NightInterceptionFraction=0.5; ReferenceHeight=2
          Irrigation
          Fertiliser
          SurfaceOrganicMatter: InitialResidueName=maize; InitialResidueType=maize; InitialResidueMass=500; InitialStandingFraction=0; InitialCPR=0; InitialCNR=55
          Report DailyReport: same as ForestHill.ForestHill2022.ForestHill2022Base.paddock.DailyReport
          Manager SowingRule
            RowSpacing = 500
            SowingDepth = 50
            SowingRate = 25
            CultivarName = Bidgee
            SowingDate = 12/04/2023 00:00:00
            script: same as in ForestHill.ForestHill2022.ForestHill2022Base.paddock.SowingRule
          Manager HarvestRule
            HarvestDate = 03/29/2024 00:00:00
            script: same as in ForestHill.ForestHill2022.ForestHill2022Base.paddock.HarvestRule
          Report HarvestReport: EventNames=[Soybean].Harvesting
            VariableNames:
              [Clock].Today
              [Soybean].Structure.MainStemPrimordiaNo
              [Soybean].Phenology.NFF
              [Soybean].Script.FinalTag
          Plant Soybean
          Manager AutomaticIrrigation
            allowIrrigation = True
            seasonStart = 04-dec
            seasonEnd = 15-mar
            seasonsAllocation = 10000
            triggerDeficit = 75
            targetDeficit = 95
            returndays = 3
            maximumAmount = 30
            depthPAWC = 650
            script: same as in ForestHill.ForestHill2022.ForestHill2022Base.paddock.AutomaticIrrigation
          Soil: same as ForestHill.ForestHill2022.ForestHill2022Base.paddock.Soil
          Spectral: DrySoilNDVI=0.07; WetSoilNDVI=0.08; GreenCropNDVI=0.85; DeadCropNDVI=0.1
    Experiment ForestHill2024
      Factors
        Factor Cv: Specification=[SowingRule].Script.CultivarName=Hayman,Bunya,Kuranda,A6785
      Simulation ForestHill2024Base
        Clock: Start=2024-01-17; End=2024-05-30
        Summary summaryfile
        Weather: FileName=ForestHill_40079.met
        SoilArbitrator Soil Arbitrator
        Zone paddock: Area=1; Slope=0; AspectAngle=0; Altitude=50
          MicroClimate: a_interception=0; b_interception=1; c_interception=0; d_interception=0; SoilHeatFluxFraction=0.4; MinimumHeightDiffForNewLayer=0; NightInterceptionFraction=0.5; ReferenceHeight=2
          Irrigation
          Fertiliser
          SurfaceOrganicMatter: InitialResidueName=maize; InitialResidueType=maize; InitialResidueMass=500; InitialStandingFraction=0; InitialCPR=0; InitialCNR=55
          Report DailyReport: same as ForestHill.ForestHill2022.ForestHill2022Base.paddock.DailyReport
          Manager SowingRule
            RowSpacing = 500
            SowingDepth = 50
            SowingRate = 25
            CultivarName = Bidgee
            SowingDate = 01/17/2024 00:00:00
            script: same as in ForestHill.ForestHill2022.ForestHill2022Base.paddock.SowingRule
          Manager HarvestRule
            HarvestDate = 05/21/2024 00:00:00
            script: same as in ForestHill.ForestHill2022.ForestHill2022Base.paddock.HarvestRule
          Report HarvestReport: EventNames=[Soybean].Harvesting
            VariableNames:
              [Clock].Today
              [Soybean].Structure.MainStemPrimordiaNo
              [Soybean].Phenology.NFF
              [Soybean].Script.FinalTag
          Plant Soybean
          Manager AutomaticIrrigation
            allowIrrigation = True
            seasonStart = 17-jan
            seasonEnd = 25-apr
            seasonsAllocation = 10000
            triggerDeficit = 75
            targetDeficit = 95
            returndays = 3
            maximumAmount = 30
            depthPAWC = 650
            script: same as in ForestHill.ForestHill2022.ForestHill2022Base.paddock.AutomaticIrrigation
          Soil: same as ForestHill.ForestHill2022.ForestHill2022Base.paddock.Soil
          Spectral: DrySoilNDVI=0.07; WetSoilNDVI=0.08; GreenCropNDVI=0.85; DeadCropNDVI=0.1
  Folder Gatton
    Experiment Gatton2010
      Factors
        Factor Cv
          Specification=[SowingRule].Script.CultivarName=Hayman,Bunya,Kuranda,A6785,Richmond
      Simulation Gatton2010Base
        Clock: Start=2010-12-21; End=2011-04-30
        Summary summaryfile
        Weather: FileName=Gatton_40082.met
        SoilArbitrator Soil Arbitrator
        Zone paddock: Area=1; Slope=0; AspectAngle=0; Altitude=50
          MicroClimate: a_interception=0; b_interception=1; c_interception=0; d_interception=0; SoilHeatFluxFraction=0.4; MinimumHeightDiffForNewLayer=0; NightInterceptionFraction=0.5; ReferenceHeight=2
          Irrigation
          Fertiliser
          SurfaceOrganicMatter: InitialResidueName=maize; InitialResidueType=maize; InitialResidueMass=500; InitialStandingFraction=0; InitialCPR=0; InitialCNR=55
          Report DailyReport: same as ForestHill.ForestHill2022.ForestHill2022Base.paddock.DailyReport
          Manager SowingRule
            RowSpacing = 750
            SowingDepth = 50
            SowingRate = 25
            CultivarName = Bidgee
            SowingDate = 12/22/2010 00:00:00
            script: same as in ForestHill.ForestHill2022.ForestHill2022Base.paddock.SowingRule
          Manager HarvestRule
            HarvestDate = 04/30/2011 00:00:00
            script: same as in ForestHill.ForestHill2022.ForestHill2022Base.paddock.HarvestRule
          Report HarvestReport: EventNames=[Soybean].Harvesting
            VariableNames:
              [Clock].Today
              [Soybean].Structure.MainStemPrimordiaNo
              [Soybean].Phenology.NFF
              [Soybean].Script.FinalTag
          Plant Soybean
          Manager AutomaticIrrigation
            allowIrrigation = True
            seasonStart = 22-dec
            seasonEnd = 25-apr
            seasonsAllocation = 10000
            triggerDeficit = 75
            targetDeficit = 95
            returndays = 3
            maximumAmount = 30
            depthPAWC = 650
            script: same as in ForestHill.ForestHill2022.ForestHill2022Base.paddock.AutomaticIrrigation
          Soil: same as ForestHill.ForestHill2022.ForestHill2022Base.paddock.Soil
          Spectral: DrySoilNDVI=0.07; WetSoilNDVI=0.08; GreenCropNDVI=0.85; DeadCropNDVI=0.1
    Experiment Gatton2011
      Factors
        Factor Cv
          Specification=[SowingRule].Script.CultivarName=Hayman,Bunya,Kuranda,A6785,Richmond
      Simulation Gatton2011Base
        Clock: Start=2011-01-03; End=2011-04-30
        Summary summaryfile
        Weather: FileName=Gatton_40082.met
        SoilArbitrator Soil Arbitrator
        Zone paddock: Area=1; Slope=0; AspectAngle=0; Altitude=50
          MicroClimate: a_interception=0; b_interception=1; c_interception=0; d_interception=0; SoilHeatFluxFraction=0.4; MinimumHeightDiffForNewLayer=0; NightInterceptionFraction=0.5; ReferenceHeight=2
          Irrigation
          Fertiliser
          SurfaceOrganicMatter: InitialResidueName=maize; InitialResidueType=maize; InitialResidueMass=500; InitialStandingFraction=0; InitialCPR=0; InitialCNR=55
          Report DailyReport: same as ForestHill.ForestHill2022.ForestHill2022Base.paddock.DailyReport
          Manager SowingRule
            RowSpacing = 750
            SowingDepth = 50
            SowingRate = 25
            CultivarName = Bidgee
            SowingDate = 01/04/2011 00:00:00
            script: same as in ForestHill.ForestHill2022.ForestHill2022Base.paddock.SowingRule
          Manager HarvestRule: same as Gatton.Gatton2010.Gatton2010Base.paddock.HarvestRule
          Report HarvestReport: EventNames=[Soybean].Harvesting
            VariableNames:
              [Clock].Today
              [Soybean].Structure.MainStemPrimordiaNo
              [Soybean].Phenology.NFF
              [Soybean].Script.FinalTag
          Plant Soybean
          Manager AutomaticIrrigation
            allowIrrigation = True
            seasonStart = 4-jan
            seasonEnd = 25-apr
            seasonsAllocation = 10000
            triggerDeficit = 75
            targetDeficit = 95
            returndays = 3
            maximumAmount = 30
            depthPAWC = 650
            script: same as in ForestHill.ForestHill2022.ForestHill2022Base.paddock.AutomaticIrrigation
          Soil: SoilType=APS6Soil; LocalName=APS6Site; Site=APS6Site; NearestTown=Unknown; Region=Lawes; NaturalVegetation=Unknown; Latitude=0; Longitude=0
            Physical: same as ForestHill.ForestHill2022.ForestHill2022Base.paddock.Soil.Physical
            WaterBalance SoilWater: SummerDate=1-Nov; SummerU=6; SummerCona=3.5; WinterDate=1-Apr; WinterU=6; WinterCona=3.5; DiffusConst=88; DiffusSlope=35.4; Salb=0.13; CN2Bare=60; CNRed=20; CNCov=0.8; DischargeWidth=0; CatchmentArea=0; PSIDul=-100
              Thickness  SWCON  KLAT
              150        0.3    0
              150        0.3    0
              300        0.3    0
              300        0.3    0
              300        0.3    0
              300        0.3    0
              300        0.3    0
            Organic: same as ForestHill.ForestHill2022.ForestHill2022Base.paddock.Soil.Organic
            Chemical: Thickness=[150, 150, 300, 300, 300, 300, 300]; PH=[7.5, 8, 8, 8, 8, 8, 8]; PHUnits=Water
            Water: Thickness=[150, 150, 300, 300, 300, 300, 300]; InitialValues=[0.326, 0.326, 0.346, 0.333, 0.315, 0.326, 0.326]; FilledFromTop=false
            Nutrient
            Solute NO3: same as ForestHill.ForestHill2022.ForestHill2022Base.paddock.Soil.NO3
            Solute NH4: same as ForestHill.ForestHill2022.ForestHill2022Base.paddock.Soil.NH4
            Solute Urea: same as ForestHill.ForestHill2022.ForestHill2022Base.paddock.Soil.Urea
            SoilTemperature Temperature
          Spectral: DrySoilNDVI=0.07; WetSoilNDVI=0.08; GreenCropNDVI=0.85; DeadCropNDVI=0.1
    Experiment Gatton2013
      Factors
        Permutation
          Factor Cv
            Specification=[SowingRule].Script.CultivarName=Hayman,Bunya,Kuranda,A6785,Richmond
          Factor Sow
            CompositeFactor Dec19 (disabled)
              Specifications:
                [SowingRule].Script.SowingDate=2013-12-19
                [SowingRule].Script.SowingDepth=50
                [HarvestRule].Script.HarvestDate=2014-05-06
                [Operations]
              Operations
                2013-12-19  [Irrigation].Apply(28)
            CompositeFactor Dec11
              Specifications:
                [SowingRule].Script.SowingDate=2013-12-11
                [SowingRule].Script.SowingDepth=50
                [HarvestRule].Script.HarvestDate=2014-04-25
                [Operations]
              Operations
                2013-12-11  [Irrigation].Apply(21)
                2013-12-24  [Irrigation].Apply(38)
                2014-01-02  [Irrigation].Apply(34)
      Simulation Gatton2013Base
        Clock: Start=2013-12-11; End=2014-05-06
        Summary summaryfile
        Weather: FileName=Gatton_40082.met
        SoilArbitrator Soil Arbitrator
        Zone paddock: Area=1; Slope=0; AspectAngle=0; Altitude=50
          MicroClimate: a_interception=0; b_interception=1; c_interception=0; d_interception=0; SoilHeatFluxFraction=0.4; MinimumHeightDiffForNewLayer=0; NightInterceptionFraction=0.5; ReferenceHeight=2
          Irrigation
          Fertiliser
          SurfaceOrganicMatter: InitialResidueName=maize; InitialResidueType=maize; InitialResidueMass=500; InitialStandingFraction=0; InitialCPR=0; InitialCNR=55
          Report DailyReport: same as ForestHill.ForestHill2022.ForestHill2022Base.paddock.DailyReport
          Manager SowingRule
            RowSpacing = 750
            SowingDepth = 50
            SowingRate = 25
            CultivarName = Bidgee
            SowingDate = 12/11/2013 00:00:00
            script: same as in ForestHill.ForestHill2022.ForestHill2022Base.paddock.SowingRule
          Manager HarvestRule
            HarvestDate = 05/06/2014 00:00:00
            script: same as in ForestHill.ForestHill2022.ForestHill2022Base.paddock.HarvestRule
          Report HarvestReport: EventNames=[Soybean].Harvesting
            VariableNames:
              [Clock].Today
              [Soybean].Structure.MainStemPrimordiaNo
              [Soybean].Phenology.NFF
              [Soybean].Script.FinalTag
          Plant Soybean
          Manager AutomaticIrrigation
            allowIrrigation = True
            seasonStart = 11-dec
            seasonEnd = 25-apr
            seasonsAllocation = 10000
            triggerDeficit = 75
            targetDeficit = 95
            returndays = 3
            maximumAmount = 30
            depthPAWC = 650
            script: same as in ForestHill.ForestHill2022.ForestHill2022Base.paddock.AutomaticIrrigation
          Soil: same as Gatton.Gatton2011.Gatton2011Base.paddock.Soil
          Operations: same as Gatton.Gatton2013.Factors.Permutation.Sow.Dec11.Operations
          Spectral: DrySoilNDVI=0.07; WetSoilNDVI=0.08; GreenCropNDVI=0.85; DeadCropNDVI=0.1
    Experiment Gatton2014
      Factors
        Factor Cv
          Specification=[SowingRule].Script.CultivarName=Hayman,Bunya,Kuranda,A6785,Richmond
      Simulation Gatton2014Base
        Clock: Start=2014-12-23; End=2015-05-30
        Summary summaryfile
        Weather: FileName=Gatton_40082.met
        SoilArbitrator Soil Arbitrator
        Zone paddock: Area=1; Slope=0; AspectAngle=0; Altitude=50
          MicroClimate: a_interception=0; b_interception=1; c_interception=0; d_interception=0; SoilHeatFluxFraction=0.4; MinimumHeightDiffForNewLayer=0; NightInterceptionFraction=0.5; ReferenceHeight=2
          Irrigation
          Fertiliser
          SurfaceOrganicMatter: InitialResidueName=maize; InitialResidueType=maize; InitialResidueMass=500; InitialStandingFraction=0; InitialCPR=0; InitialCNR=55
          Report DailyReport: same as ForestHill.ForestHill2022.ForestHill2022Base.paddock.DailyReport
          Manager SowingRule
            RowSpacing = 500
            SowingDepth = 50
            SowingRate = 25
            CultivarName = Bidgee
            SowingDate = 12/24/2014 00:00:00
            script: same as in ForestHill.ForestHill2022.ForestHill2022Base.paddock.SowingRule
          Manager HarvestRule
            HarvestDate = 04/29/2015 00:00:00
            script: same as in ForestHill.ForestHill2022.ForestHill2022Base.paddock.HarvestRule
          Report HarvestReport: EventNames=[Soybean].Harvesting
            VariableNames:
              [Clock].Today
              [Soybean].Structure.MainStemPrimordiaNo
              [Soybean].Phenology.NFF
              [Soybean].Script.FinalTag
          Plant Soybean
          Manager AutomaticIrrigation
            allowIrrigation = True
            seasonStart = 24-dec
            seasonEnd = 25-apr
            seasonsAllocation = 10000
            triggerDeficit = 75
            targetDeficit = 95
            returndays = 3
            maximumAmount = 30
            depthPAWC = 650
            script: same as in ForestHill.ForestHill2022.ForestHill2022Base.paddock.AutomaticIrrigation
          Soil: same as Gatton.Gatton2011.Gatton2011Base.paddock.Soil
          Spectral: DrySoilNDVI=0.07; WetSoilNDVI=0.08; GreenCropNDVI=0.85; DeadCropNDVI=0.1
    Experiment Gatton2018
      Factors
        Factor Cv
          Specification=[SowingRule].Script.CultivarName=Hayman,Bunya,Kuranda,A6785,Richmond,Leichhardt
      Simulation Gatton2018Base
        Clock: Start=2018-01-24; End=2018-05-22
        Summary summaryfile
        Weather: FileName=Gatton_40082.met
        SoilArbitrator Soil Arbitrator
        Zone paddock: Area=1; Slope=0; AspectAngle=0; Altitude=50
          MicroClimate: a_interception=0; b_interception=1; c_interception=0; d_interception=0; SoilHeatFluxFraction=0.4; MinimumHeightDiffForNewLayer=0; NightInterceptionFraction=0.5; ReferenceHeight=2
          Irrigation
          Fertiliser
          SurfaceOrganicMatter: InitialResidueName=maize; InitialResidueType=maize; InitialResidueMass=500; InitialStandingFraction=0; InitialCPR=0; InitialCNR=55
          Report DailyReport: same as ForestHill.ForestHill2022.ForestHill2022Base.paddock.DailyReport
          Manager SowingRule
            RowSpacing = 750
            SowingDepth = 50
            SowingRate = 25
            CultivarName = Bidgee
            SowingDate = 01/25/2018 00:00:00
            script: same as in ForestHill.ForestHill2022.ForestHill2022Base.paddock.SowingRule
          Manager HarvestRule
            HarvestDate = 05/22/2018 00:00:00
            script: same as in ForestHill.ForestHill2022.ForestHill2022Base.paddock.HarvestRule
          Report HarvestReport: EventNames=[Soybean].Harvesting
            VariableNames:
              [Clock].Today
              [Soybean].Structure.MainStemPrimordiaNo
              [Soybean].Phenology.NFF
              [Soybean].Script.FinalTag
          Plant Soybean
          Manager AutomaticIrrigation
            allowIrrigation = True
            seasonStart = 25-jan
            seasonEnd = 15-may
            seasonsAllocation = 10000
            triggerDeficit = 75
            targetDeficit = 95
            returndays = 3
            maximumAmount = 30
            depthPAWC = 650
            script: same as in ForestHill.ForestHill2022.ForestHill2022Base.paddock.AutomaticIrrigation
          Soil: same as Gatton.Gatton2011.Gatton2011Base.paddock.Soil
          Spectral: DrySoilNDVI=0.07; WetSoilNDVI=0.08; GreenCropNDVI=0.85; DeadCropNDVI=0.1
  Folder Ayr
    Experiment Ayr2018
      Factors
        Factor Cv
          Specification=[SowingRule].Script.CultivarName=Hayman,Bunya,Kuranda,A6785,Richmond,Leichhardt
      Simulation Ayr2018Base
        Clock: Start=2018-04-18; End=2018-08-07
        Summary summaryfile
        Weather: FileName=AyrResearchStation_33002.met
        SoilArbitrator Soil Arbitrator
        Zone paddock: Area=1; Slope=0; AspectAngle=0; Altitude=50
          MicroClimate: a_interception=0; b_interception=1; c_interception=0; d_interception=0; SoilHeatFluxFraction=0.4; MinimumHeightDiffForNewLayer=0; NightInterceptionFraction=0.5; ReferenceHeight=2
          Irrigation
          Fertiliser
          SurfaceOrganicMatter: InitialResidueName=maize; InitialResidueType=maize; InitialResidueMass=500; InitialStandingFraction=0; InitialCPR=0; InitialCNR=55
          Report DailyReport: same as ForestHill.ForestHill2022.ForestHill2022Base.paddock.DailyReport
          Manager SowingRule
            RowSpacing = 750
            SowingDepth = 50
            SowingRate = 25
            CultivarName = Bidgee
            SowingDate = 04/19/2018 00:00:00
            script: same as in ForestHill.ForestHill2022.ForestHill2022Base.paddock.SowingRule
          Manager HarvestRule
            HarvestDate = 08/07/2018 00:00:00
            script: same as in ForestHill.ForestHill2022.ForestHill2022Base.paddock.HarvestRule
          Report HarvestReport: EventNames=[Soybean].Harvesting
            VariableNames:
              [Clock].Today
              [Soybean].Structure.MainStemPrimordiaNo
              [Soybean].Phenology.NFF
              [Soybean].Script.FinalTag
          Plant Soybean
          Manager AutomaticIrrigation
            allowIrrigation = True
            seasonStart = 19-apr
            seasonEnd = 30-Jul
            seasonsAllocation = 10000
            triggerDeficit = 95
            targetDeficit = 100
            returndays = 7
            maximumAmount = 30
            depthPAWC = 1000
            script: same as in ForestHill.ForestHill2022.ForestHill2022Base.paddock.AutomaticIrrigation
          Soil: SoilType=Other; Site=Kalamia Mill; NearestTown=Ayr; Region=Herbert and Lower Burdekin; State=Queensland; Country=Australia; ApsoilNumber=707; Latitude=-19.522; Longitude=147.415; LocationAccuracy=Regional Soil Type; YearOfSampling=0; DataSource=CSIRO Sustainable Ecosystems, Townsville
            Comments=Silty clay - BK-04; Stewart, L.K., Charlesworth, P.B., Bristow, K.L., Thorburn, P.J., 2006. Estimating deep drainage and nitrate leaching from the root zone under sugarcane using APSIM-SWIM. Agric. Wat. Manage. 81, 315-334.
            Physical
              Thickness  ParticleSizeSand  ParticleSizeSilt  ParticleSizeClay  Rocks     BD     AirDry  LL15   DUL    SAT
              200        5                 65                30                0         1.373  0.05    0.22   0.329  0.405
              200        5                 65                30                0.206989  1.378  0.05    0.16   0.232  0.354
              200        5                 65                30                0.22043   1.484  0.03    0.126  0.198  0.319
              300        5                 65                30                0.230886  1.583  0.025   0.126  0.174  0.288
              300        5                 65                30                0.287634  1.71   0.01    0.106  0.116  0.235
              300        5                 65                30                0.400113  1.7    0.01    0.1    0.107  0.2
              300        5                 65                30                0.400113  1.7    0.01    0.107  0.118  0.2
              BD source: Field measured and checked for sensibility
              AirDry, LL15, DUL source: Estimated based on local knowledge
              SAT source: Calculated from measured, estimated or calculated BD
              Rocks, ParticleSizeSand, ParticleSizeSilt, ParticleSizeClay source: Calculated
              SoilCrop soybeanSoil: LL=[0.22, 0.16, 0.126, 0.126, 0.106, 0.1, 0.107]; KL=[0.1, 0.063, 0.049, 0.055, 0.064, 0.086, 0.075]; XF=[1, 1, 1, 1, 1, 1, 1]
                LL source: Estimated based on local knowledge
            WaterBalance SoilWater: SummerDate=1-Nov; SummerU=4; SummerCona=3; WinterDate=1-Apr; WinterU=4; WinterCona=3; DiffusConst=40; DiffusSlope=16; Salb=0.1; CN2Bare=65; CNRed=20; CNCov=0.8; PSIDul=-100; Thickness=[200, 200, 200, 300, 300, 300, 300]; SWCON=[0.5, 0.5, 0.9, 0.9, 0.9, 0.9, 0.9]
            Organic: FOMCNRatio=70; CarbonUnits=Total
              Thickness  Carbon  SoilCNRatio  FBiom  FInert  FOM
              200        1.3     12           0.12   0.39    686.278
              200        0.94    12           0.21   0.49    491.74
              200        0.6     12           0.07   0.42    352.347
              300        0.34    12           0.01   0.45    213.709
              300        0.148   12           0.01   0.48    129.621
              300        0.016   12           0.01   0.51    78.6193
              300        0.01    12           0.01   0.54    47.685
            Chemical: Thickness=[200, 200, 200, 300, 300, 300, 300]; PH=[6, 6, 6, 6, 6, 6, 6]; PHUnits=Water
              PH source: Measured
            Water: Thickness=[200, 200, 200, 300, 300, 300, 300]; InitialValues=[0.329, 0.232, 0.198, 0.174, 0.116, 0.107, 0.118]; FilledFromTop=true
            Solute NO3: Thickness=[200, 200, 200, 300, 300, 300, 300]; InitialValues=[8, 0, 0, 0, 0, 0, 0]; InitialValuesUnits=ppm; WaterTableConcentration=0; D0=0; DepthConstant=0; MaxDepthSoluteAccessible=0; RunoffEffectivenessAtMovingSolute=0; MaxEffectiveRunoff=0
            Solute NH4: Thickness=[200, 200, 200, 300, 300, 300, 300]; InitialValues=[0, 0, 0, 0, 0, 0, 0]; InitialValuesUnits=ppm; WaterTableConcentration=0; D0=0; DepthConstant=0; MaxDepthSoluteAccessible=0; RunoffEffectivenessAtMovingSolute=0; MaxEffectiveRunoff=0
            Solute Urea: same as Ayr.Ayr2018.Ayr2018Base.paddock.Soil.NH4
            Nutrient
            SoilTemperature Temperature
          Spectral: DrySoilNDVI=0.07; WetSoilNDVI=0.08; GreenCropNDVI=0.85; DeadCropNDVI=0.1
  Folder Bundaberg
    Experiment Bundaberg2011
      Factors
        Factor Cv
          Specification=[SowingRule].Script.CultivarName=Hayman,Bunya,Kuranda,A6785,Richmond,Warrigal
      Simulation Bundaberg2011Base
        Clock: Start=2011-12-16; End=2012-05-23
        Summary summaryfile
        Weather: FileName=Bundaberg_39128.met
        SoilArbitrator Soil Arbitrator
        Zone paddock: Area=1; Slope=0; AspectAngle=0; Altitude=50
          MicroClimate: a_interception=0; b_interception=1; c_interception=0; d_interception=0; SoilHeatFluxFraction=0.4; MinimumHeightDiffForNewLayer=0; NightInterceptionFraction=0.5; ReferenceHeight=2
          Irrigation
          Fertiliser
          SurfaceOrganicMatter: InitialResidueName=maize; InitialResidueType=maize; InitialResidueMass=500; InitialStandingFraction=0; InitialCPR=0; InitialCNR=55
          Report DailyReport: same as ForestHill.ForestHill2022.ForestHill2022Base.paddock.DailyReport
          Manager SowingRule
            RowSpacing = 850
            SowingDepth = 50
            SowingRate = 30
            CultivarName = Bidgee
            SowingDate = 12/17/2011 00:00:00
            script: same as in ForestHill.ForestHill2022.ForestHill2022Base.paddock.SowingRule
          Manager HarvestRule
            HarvestDate = 05/01/2012 00:00:00
            script: same as in ForestHill.ForestHill2022.ForestHill2022Base.paddock.HarvestRule
          Report HarvestReport: EventNames=[Soybean].Harvesting
            VariableNames:
              [Clock].Today
              [Soybean].Structure.MainStemPrimordiaNo
              [Soybean].Phenology.NFF
              [Soybean].Script.FinalTag
          Plant Soybean
          Manager AutomaticIrrigation (disabled)
            allowIrrigation = True
            seasonStart = 17-dec
            seasonEnd = 20-apr
            seasonsAllocation = 15000
            triggerDeficit = 98
            targetDeficit = 100
            returndays = 2
            maximumAmount = 50
            depthPAWC = 2000
            script: same as in ForestHill.ForestHill2022.ForestHill2022Base.paddock.AutomaticIrrigation
          Soil: ASCOrder=Kandosol; ASCSubOrder=Red; SoilType=Other; Site=Generic; NearestTown=Woongarra; Region=Wide Bay and Burnett; State=Queensland; Country=Australia; ApsoilNumber=1069; Latitude=-24.906093; Longitude=152.401241; LocationAccuracy=Regional Soil Type; YearOfSampling=0; Comments=Sandy loam - Sandy-Loam surface,Sandy-clay subsoil
            Physical
              Thickness  ParticleSizeSand  ParticleSizeSilt  ParticleSizeClay  Rocks     BD    AirDry  LL15   DUL    SAT
              200        5                 65                30                0.135742  1.44  0.05    0.164  0.278  0.367
              200        5                 65                30                0.13702   1.6   0.05    0.192  0.3    0.318
              100        5                 65                30                0         1.6   0.05    0.221  0.328  0.332
              100        5                 65                30                0         1.6   0.05    0.25   0.353  0.36
              200        5                 65                30                0         1.6   0.05    0.262  0.347  0.349
              200        5                 65                30                0         1.6   0.05    0.262  0.347  0.349
              300        5                 65                30                0         1.6   0.05    0.262  0.347  0.349
              300        5                 65                30                0         1.6   0.05    0.262  0.347  0.349
              300        5                 65                30                0         1.6   0.05    0.262  0.347  0.349
              BD, AirDry, LL15, DUL, SAT source: Unknown source or quality of data
              Rocks, ParticleSizeSand, ParticleSizeSilt, ParticleSizeClay source: Calculated
              SoilCrop peanutSoil
                LL=[0.164, 0.192, 0.221, 0.25, 0.262, 0.262, 0.262, 0.262, 0.262]
                KL=[0.08, 0.07, 0.06, 0.05, 0.04, 0.03, 0.02, 0.02, 0.02]
                XF=[1, 1, 1, 1, 1, 1, 1, 1, 1]
                LL source: Unknown source or quality of data
              SoilCrop soybeanSoil: same as Bundaberg.Bundaberg2011.Bundaberg2011Base.paddock.Soil.Physical.peanutSoil
              SoilCrop sugarSoil
                LL=[0.164, 0.192, 0.221, 0.25, 0.262, 0.262, 0.262, 0.262, 0.262]
                KL=[0.1, 0.1, 0.08, 0.07, 0.06, 0.05, 0.05, 0.05, 0.05]
                XF=[1, 1, 1, 1, 1, 1, 1, 1, 0]
                LL source: Unknown source or quality of data
            WaterBalance SoilWater: SummerDate=1-Nov; SummerU=6; SummerCona=3; WinterDate=1-Apr; WinterU=6; WinterCona=3; DiffusConst=40; DiffusSlope=16; Salb=0.1; CN2Bare=80; CNRed=20; CNCov=0.8; PSIDul=-100; Thickness=[200, 200, 100, 100, 200, 200, 300, 300, 300]; SWCON=[0.5, 0.5, 0.5, 0.5, 0.3, 0.3, 0.3, 0.3, 0.3]
            Organic: FOMCNRatio=40; CarbonUnits=Total
              Thickness  Carbon  SoilCNRatio  FBiom  FInert  FOM
              200        1       12           0.015  0.5     240.729
              100        0.8     12           0.01   0.75    207.197
              100        0.8     12           0.01   0.75    178.336
              200        0.7     12           0.005  0.85    132.115
              200        0.6     12           0.005  0.9     97.873
              300        0.6     12           0.005  0.95    62.4066
              300        0.6     12           0.005  0.95    39.7922
              300        0.6     12           0.005  0.95    25.3726
              300        0.6     12           0.005  0.95    16.1783
            Chemical: Thickness=[200, 100, 100, 200, 200, 300, 300, 300, 300]; PH=[6, 6, 6, 6, 6, 6, 6, 6, 6]; PHUnits=Water
              PH source: Unknown source or quality of data
            Water: Thickness=[200, 200, 100, 100, 200, 200, 300, 300, 300]; FilledFromTop=true
              InitialValues=[0.278, 0.3, 0.328, 0.353, 0.347, 0.347, 0.347, 0.347, 0.347]
            Solute NO3: Thickness=[200, 200, 100, 100, 200, 200, 300, 300, 300]; InitialValues=[10, 0, 0, 0, 0, 0, 0, 0, 0]; InitialValuesUnits=ppm; WaterTableConcentration=0; D0=0; DepthConstant=0; MaxDepthSoluteAccessible=0; RunoffEffectivenessAtMovingSolute=0; MaxEffectiveRunoff=0
            Solute NH4: Thickness=[200, 200, 100, 100, 200, 200, 300, 300, 300]; InitialValues=[0, 0, 0, 0, 0, 0, 0, 0, 0]; InitialValuesUnits=ppm; WaterTableConcentration=0; D0=0; DepthConstant=0; MaxDepthSoluteAccessible=0; RunoffEffectivenessAtMovingSolute=0; MaxEffectiveRunoff=0
            Solute Urea: same as Bundaberg.Bundaberg2011.Bundaberg2011Base.paddock.Soil.NH4
            Nutrient
            SoilTemperature Temperature
          Spectral: DrySoilNDVI=0.07; WetSoilNDVI=0.08; GreenCropNDVI=0.85; DeadCropNDVI=0.1
    Experiment Bundaberg2012
      Factors
        Factor Cv
          Specification=[SowingRule].Script.CultivarName=Hayman,Bunya,Kuranda,A6785,Richmond,Warrigal
      Simulation Bundaberg2012Base
        Clock: Start=2012-01-12; End=2012-05-17
        Summary summaryfile
        Weather: FileName=Bundaberg_39128.met
        SoilArbitrator Soil Arbitrator
        Zone paddock: Area=1; Slope=0; AspectAngle=0; Altitude=50
          MicroClimate: a_interception=0; b_interception=1; c_interception=0; d_interception=0; SoilHeatFluxFraction=0.4; MinimumHeightDiffForNewLayer=0; NightInterceptionFraction=0.5; ReferenceHeight=2
          Irrigation
          Fertiliser
          SurfaceOrganicMatter: InitialResidueName=maize; InitialResidueType=maize; InitialResidueMass=500; InitialStandingFraction=0; InitialCPR=0; InitialCNR=55
          Report DailyReport: same as ForestHill.ForestHill2022.ForestHill2022Base.paddock.DailyReport
          Manager SowingRule
            RowSpacing = 850
            SowingDepth = 50
            SowingRate = 30
            CultivarName = Bidgee
            SowingDate = 01/13/2012 00:00:00
            script: same as in ForestHill.ForestHill2022.ForestHill2022Base.paddock.SowingRule
          Manager HarvestRule
            HarvestDate = 05/16/2012 00:00:00
            script: same as in ForestHill.ForestHill2022.ForestHill2022Base.paddock.HarvestRule
          Report HarvestReport: EventNames=[Soybean].Harvesting
            VariableNames:
              [Clock].Today
              [Soybean].Structure.MainStemPrimordiaNo
              [Soybean].Phenology.NFF
              [Soybean].Script.FinalTag
          Plant Soybean
          Manager AutomaticIrrigation
            allowIrrigation = True
            seasonStart = 13-jan
            seasonEnd = 10-may
            seasonsAllocation = 20000
            triggerDeficit = 95
            targetDeficit = 100
            returndays = 3
            maximumAmount = 30
            depthPAWC = 1500
            script: same as in ForestHill.ForestHill2022.ForestHill2022Base.paddock.AutomaticIrrigation
          Soil: ASCOrder=Kandosol; ASCSubOrder=Red; SoilType=Other; Site=Generic; NearestTown=Woongarra; Region=Wide Bay and Burnett; State=Queensland; Country=Australia; ApsoilNumber=1069; Latitude=-24.906093; Longitude=152.401241; LocationAccuracy=Regional Soil Type; YearOfSampling=0; Comments=Sandy loam - Sandy-Loam surface,Sandy-clay subsoil
            Physical: same as Bundaberg.Bundaberg2011.Bundaberg2011Base.paddock.Soil.Physical
            WaterBalance SoilWater: same as Bundaberg.Bundaberg2011.Bundaberg2011Base.paddock.Soil.SoilWater
            Organic: same as Bundaberg.Bundaberg2011.Bundaberg2011Base.paddock.Soil.Organic
            Chemical: same as Bundaberg.Bundaberg2011.Bundaberg2011Base.paddock.Soil.Chemical
            Water: Thickness=[200, 200, 100, 100, 200, 200, 300, 300, 300]; FilledFromTop=true
              InitialValues=[0.278, 0.3, 0.328, 0.353, 0.347, 0.347, 0.347, 0.347, 0.347]
            Solute NO3: Thickness=[200, 200, 100, 100, 200, 200, 300, 300, 300]; InitialValues=[20, 0, 0, 0, 0, 0, 0, 0, 0]; InitialValuesUnits=ppm; WaterTableConcentration=0; D0=0; DepthConstant=0; MaxDepthSoluteAccessible=0; RunoffEffectivenessAtMovingSolute=0; MaxEffectiveRunoff=0
            Solute NH4: same as Bundaberg.Bundaberg2011.Bundaberg2011Base.paddock.Soil.NH4
            Solute Urea: same as Bundaberg.Bundaberg2011.Bundaberg2011Base.paddock.Soil.NH4
            Nutrient
            SoilTemperature Temperature
          Spectral: DrySoilNDVI=0.07; WetSoilNDVI=0.08; GreenCropNDVI=0.85; DeadCropNDVI=0.1
    Experiment Bundaberg2013
      Factors
        Factor Cv
          Specification=[SowingRule].Script.CultivarName=Hayman,Bunya,Kuranda,A6785,Richmond,Warrigal
      Simulation Bundaberg2013Base
        Clock: Start=2013-12-22; End=2014-04-23
        Summary summaryfile
        Weather: FileName=Bundaberg_39128.met
        SoilArbitrator Soil Arbitrator
        Zone paddock: Area=1; Slope=0; AspectAngle=0; Altitude=50
          MicroClimate: a_interception=0; b_interception=1; c_interception=0; d_interception=0; SoilHeatFluxFraction=0.4; MinimumHeightDiffForNewLayer=0; NightInterceptionFraction=0.5; ReferenceHeight=2
          Irrigation
          Fertiliser
          SurfaceOrganicMatter: InitialResidueName=maize; InitialResidueType=maize; InitialResidueMass=500; InitialStandingFraction=0; InitialCPR=0; InitialCNR=55
          Report DailyReport: same as ForestHill.ForestHill2022.ForestHill2022Base.paddock.DailyReport
          Manager SowingRule
            RowSpacing = 850
            SowingDepth = 50
            SowingRate = 30
            CultivarName = Bidgee
            SowingDate = 12/23/2013 00:00:00
            script: same as in ForestHill.ForestHill2022.ForestHill2022Base.paddock.SowingRule
          Manager HarvestRule
            HarvestDate = 04/23/2014 00:00:00
            script: same as in ForestHill.ForestHill2022.ForestHill2022Base.paddock.HarvestRule
          Report HarvestReport: EventNames=[Soybean].Harvesting
            VariableNames:
              [Clock].Today
              [Soybean].Structure.MainStemPrimordiaNo
              [Soybean].Phenology.NFF
              [Soybean].Script.FinalTag
          Plant Soybean
          Soil: ASCOrder=Ferrosol; ASCSubOrder=Red; SoilType=Other; Site=Generic; NearestTown=Kepnock; Region=Wide Bay and Burnett; State=Queensland; Country=Australia; ApsoilNumber=1065; Latitude=-24.8777; Longitude=152.37375; LocationAccuracy=Regional Soil Type; YearOfSampling=0
            Comments=Loam - Changed SWCON from 0.5 to 0.9 based on local advice about this regions Ferrosols from Mike Bell, Graeme Wright, Yash Chauhan
            Physical
              Thickness  ParticleSizeSand  ParticleSizeSilt  ParticleSizeClay  Rocks  BD   AirDry  LL15   DUL    SAT
              200        5                 65                30                0      1.3  0.05    0.274  0.478  0.494
              200        5                 65                30                0      1.3  0.05    0.286  0.468  0.489
              100        5                 65                30                0      1.3  0.05    0.298  0.46   0.485
              100        5                 65                30                0      1.3  0.05    0.314  0.453  0.481
              200        5                 65                30                0      1.3  0.05    0.331  0.453  0.481
              200        5                 65                30                0      1.3  0.05    0.347  0.452  0.481
              300        5                 65                30                0      1.3  0.05    0.347  0.452  0.481
              300        5                 65                30                0      1.3  0.05    0.347  0.452  0.481
              300        5                 65                30                0      1.3  0.05    0.347  0.452  0.481
              BD, AirDry, LL15, DUL, SAT source: Unknown source or quality of data
              Rocks, ParticleSizeSand, ParticleSizeSilt, ParticleSizeClay source: Calculated
              SoilCrop peanutSoil
                LL=[0.274, 0.286, 0.298, 0.314, 0.331, 0.347, 0.347, 0.347, 0.347]
                KL=[0.08, 0.07, 0.06, 0.05, 0.04, 0.03, 0.02, 0.02, 0.02]
                XF=[1, 1, 1, 1, 1, 1, 1, 1, 1]
                LL source: Unknown source or quality of data
              SoilCrop soybeanSoil: same as Bundaberg.Bundaberg2013.Bundaberg2013Base.paddock.Soil.Physical.peanutSoil
              SoilCrop sugarSoil
                LL=[0.274, 0.286, 0.298, 0.314, 0.331, 0.347, 0.347, 0.347, 0.347]
                KL=[0.01, 0.01, 0.08, 0.07, 0.06, 0.05, 0.05, 0.05, 0.05]
                XF=[1, 1, 1, 1, 1, 1, 1, 1, 1]
                LL source: Unknown source or quality of data
            WaterBalance SoilWater: SummerDate=1-Nov; SummerU=6; SummerCona=3; WinterDate=1-Apr; WinterU=6; WinterCona=3; DiffusConst=40; DiffusSlope=16; Salb=0.1; CN2Bare=75; CNRed=20; CNCov=0.8; PSIDul=-100; Thickness=[200, 200, 100, 100, 200, 200, 300, 300, 300]; SWCON=[0.9, 0.9, 0.9, 0.9, 0.9, 0.9, 0.9, 0.9, 0.9]
            Organic: FOMCNRatio=40; CarbonUnits=Total
              Thickness  Carbon  SoilCNRatio  FBiom  FInert  FOM
              200        1       12           0.015  0.5     255.873
              200        0.8     12           0.01   0.75    186.586
              100        0.8     12           0.01   0.75    159.333
              100        0.7     12           0.005  0.85    136.061
              200        0.6     12           0.005  0.9     99.2175
              200        0.6     12           0.005  0.95    72.3507
              300        0.6     12           0.005  0.95    45.0531
              300        0.6     12           0.005  0.95    28.0547
              300        0.6     12           0.005  0.95    17.4698
            Chemical: Thickness=[200, 200, 100, 100, 200, 200, 300, 300, 300]; PH=[6, 6, 6, 6, 6, 6, 6, 6, 6]; PHUnits=Water
              PH source: Unknown source or quality of data
            Water: Thickness=[200, 200, 100, 100, 200, 200, 300, 300, 300]; FilledFromTop=true
              InitialValues=[0.478, 0.468, 0.46, 0.453, 0.453, 0.452, 0.452, 0.452, 0.452]
            Solute NO3: Thickness=[200, 200, 100, 100, 200, 200, 300, 300, 300]; InitialValues=[10, 8, 0, 0, 0, 0, 0, 0, 0]; InitialValuesUnits=ppm; WaterTableConcentration=0; D0=0; DepthConstant=0; MaxDepthSoluteAccessible=0; RunoffEffectivenessAtMovingSolute=0; MaxEffectiveRunoff=0
            Solute NH4: same as Bundaberg.Bundaberg2011.Bundaberg2011Base.paddock.Soil.NH4
            Solute Urea: same as Bundaberg.Bundaberg2011.Bundaberg2011Base.paddock.Soil.NH4
            Nutrient
            SoilTemperature Temperature
          Operations
            2013-12-23  [Irrigation].Apply(50)
            2014-01-20  [Irrigation].Apply(35)
            2014-02-17  [Irrigation].Apply(35)
            2014-02-27  [Irrigation].Apply(35)
            2014-03-08  [Irrigation].Apply(35)
            2014-03-22  [Irrigation].Apply(35)
          Spectral: DrySoilNDVI=0.07; WetSoilNDVI=0.08; GreenCropNDVI=0.85; DeadCropNDVI=0.1
    Experiment Bundaberg2017
      Factors
        Factor Cv
          Specification=[SowingRule].Script.CultivarName=Hayman,Bunya,Kuranda,A6785,Richmond
      Simulation Bundaberg2017Base
        Clock: Start=2017-12-17; End=2018-04-24
        Summary summaryfile
        Weather: FileName=Bundaberg_39128.met
        SoilArbitrator Soil Arbitrator
        Zone paddock: Area=1; Slope=0; AspectAngle=0; Altitude=50
          MicroClimate: a_interception=0; b_interception=1; c_interception=0; d_interception=0; SoilHeatFluxFraction=0.4; MinimumHeightDiffForNewLayer=0; NightInterceptionFraction=0.5; ReferenceHeight=2
          Irrigation
          Fertiliser
          SurfaceOrganicMatter: InitialResidueName=maize; InitialResidueType=maize; InitialResidueMass=500; InitialStandingFraction=0; InitialCPR=0; InitialCNR=55
          Report DailyReport: same as ForestHill.ForestHill2022.ForestHill2022Base.paddock.DailyReport
          Manager SowingRule
            RowSpacing = 900
            SowingDepth = 50
            SowingRate = 32.5
            CultivarName = Bidgee
            SowingDate = 12/18/2017 00:00:00
            script: same as in ForestHill.ForestHill2022.ForestHill2022Base.paddock.SowingRule
          Manager HarvestRule
            HarvestDate = 04/24/2018 00:00:00
            script: same as in ForestHill.ForestHill2022.ForestHill2022Base.paddock.HarvestRule
          Report HarvestReport: EventNames=[Soybean].Harvesting
            VariableNames:
              [Clock].Today
              [Soybean].Structure.MainStemPrimordiaNo
              [Soybean].Phenology.NFF
              [Soybean].Script.FinalTag
          Plant Soybean
          Manager AutomaticIrrigation (disabled)
            allowIrrigation = True
            seasonStart = 18-dec
            seasonEnd = 20-apr
            seasonsAllocation = 10000
            triggerDeficit = 95
            targetDeficit = 100
            returndays = 3
            maximumAmount = 30
            depthPAWC = 1000
            script: same as in ForestHill.ForestHill2022.ForestHill2022Base.paddock.AutomaticIrrigation
          Soil: ASCOrder=Kandosol; ASCSubOrder=Red; SoilType=Other; Site=Generic; NearestTown=Woongarra; Region=Wide Bay and Burnett; State=Queensland; Country=Australia; ApsoilNumber=1069; Latitude=-24.906093; Longitude=152.401241; LocationAccuracy=Regional Soil Type; YearOfSampling=0; Comments=Sandy loam - Sandy-Loam surface,Sandy-clay subsoil
            Physical
              Thickness  ParticleSizeSand  ParticleSizeSilt  ParticleSizeClay  Rocks     BD    AirDry  LL15   DUL    SAT
              200        5                 65                30                0.135742  1.44  0.05    0.164  0.278  0.367
              200        5                 65                30                0.13702   1.6   0.05    0.192  0.3    0.318
              100        5                 65                30                0         1.6   0.05    0.221  0.328  0.332
              100        5                 65                30                0         1.6   0.05    0.25   0.353  0.36
              200        5                 65                30                0         1.6   0.05    0.262  0.347  0.349
              200        5                 65                30                0         1.6   0.05    0.262  0.347  0.349
              300        5                 65                30                0         1.6   0.05    0.262  0.347  0.349
              300        5                 65                30                0         1.6   0.05    0.262  0.347  0.349
              300        5                 65                30                0         1.6   0.05    0.262  0.347  0.349
              BD, AirDry, LL15, DUL, SAT source: Unknown source or quality of data
              Rocks, ParticleSizeSand, ParticleSizeSilt, ParticleSizeClay source: Calculated
              SoilCrop peanutSoil: same as Bundaberg.Bundaberg2011.Bundaberg2011Base.paddock.Soil.Physical.peanutSoil
              SoilCrop soybeanSoil
                LL=[0.164, 0.192, 0.221, 0.25, 0.262, 0.262, 0.262, 0.262, 0.262]
                KL=[0.08, 0.07, 0.06, 0.06, 0.06, 0.06, 0.06, 0.06, 0.06]
                XF=[1, 1, 1, 1, 1, 1, 1, 1, 1]
                LL source: Unknown source or quality of data
              SoilCrop sugarSoil: same as Bundaberg.Bundaberg2011.Bundaberg2011Base.paddock.Soil.Physical.sugarSoil
            WaterBalance SoilWater: same as Bundaberg.Bundaberg2011.Bundaberg2011Base.paddock.Soil.SoilWater
            Organic: same as Bundaberg.Bundaberg2011.Bundaberg2011Base.paddock.Soil.Organic
            Chemical: same as Bundaberg.Bundaberg2011.Bundaberg2011Base.paddock.Soil.Chemical
            Water: Thickness=[200, 200, 100, 100, 200, 200, 300, 300, 300]; FilledFromTop=true
              InitialValues=[0.278, 0.3, 0.328, 0.353, 0.347, 0.347, 0.347, 0.347, 0.347]
            Solute NO3: Thickness=[200, 200, 100, 100, 200, 200, 300, 300, 300]; InitialValues=[30, 20, 0, 0, 0, 0, 0, 0, 0]; InitialValuesUnits=ppm; WaterTableConcentration=0; D0=0; DepthConstant=0; MaxDepthSoluteAccessible=0; RunoffEffectivenessAtMovingSolute=0; MaxEffectiveRunoff=0
            Solute NH4: same as Bundaberg.Bundaberg2011.Bundaberg2011Base.paddock.Soil.NH4
            Solute Urea: same as Bundaberg.Bundaberg2011.Bundaberg2011Base.paddock.Soil.NH4
            Nutrient
            SoilTemperature Temperature
          Operations
            2018-01-18  [Irrigation].Apply(30)
            2018-04-13  [Irrigation].Apply(30)
          Spectral: DrySoilNDVI=0.07; WetSoilNDVI=0.08; GreenCropNDVI=0.85; DeadCropNDVI=0.1
    Experiment Bundaberg2018
      Factors
        Factor Cv
          Specification=[SowingRule].Script.CultivarName=Hayman,Bunya,Kuranda,A6785,Richmond
      Simulation Bundaberg2018Base
        Clock: Start=2018-01-11; End=2018-05-14
        Summary summaryfile
        Weather: FileName=Bundaberg_39128.met
        SoilArbitrator Soil Arbitrator
        Zone paddock: Area=1; Slope=0; AspectAngle=0; Altitude=50
          MicroClimate: a_interception=0; b_interception=1; c_interception=0; d_interception=0; SoilHeatFluxFraction=0.4; MinimumHeightDiffForNewLayer=0; NightInterceptionFraction=0.5; ReferenceHeight=2
          Irrigation
          Fertiliser
          SurfaceOrganicMatter: InitialResidueName=maize; InitialResidueType=maize; InitialResidueMass=500; InitialStandingFraction=0; InitialCPR=0; InitialCNR=55
          Report DailyReport: same as ForestHill.ForestHill2022.ForestHill2022Base.paddock.DailyReport
          Manager SowingRule
            RowSpacing = 900
            SowingDepth = 50
            SowingRate = 32.5
            CultivarName = Bidgee
            SowingDate = 01/12/2018 00:00:00
            script: same as in ForestHill.ForestHill2022.ForestHill2022Base.paddock.SowingRule
          Manager HarvestRule
            HarvestDate = 05/14/2018 00:00:00
            script: same as in ForestHill.ForestHill2022.ForestHill2022Base.paddock.HarvestRule
          Report HarvestReport: EventNames=[Soybean].Harvesting
            VariableNames:
              [Clock].Today
              [Soybean].Structure.MainStemPrimordiaNo
              [Soybean].Phenology.NFF
              [Soybean].Script.FinalTag
          Plant Soybean
          Manager AutomaticIrrigation
            allowIrrigation = True
            seasonStart = 12-jan
            seasonEnd = 10-may
            seasonsAllocation = 10000
            triggerDeficit = 95
            targetDeficit = 100
            returndays = 3
            maximumAmount = 30
            depthPAWC = 1500
            script: same as in ForestHill.ForestHill2022.ForestHill2022Base.paddock.AutomaticIrrigation
          Soil: ASCOrder=Kandosol; ASCSubOrder=Red; SoilType=Other; Site=Generic; NearestTown=Woongarra; Region=Wide Bay and Burnett; State=Queensland; Country=Australia; ApsoilNumber=1069; Latitude=-24.906093; Longitude=152.401241; LocationAccuracy=Regional Soil Type; YearOfSampling=0; Comments=Sandy loam - Sandy-Loam surface,Sandy-clay subsoil
            Physical: same as Bundaberg.Bundaberg2011.Bundaberg2011Base.paddock.Soil.Physical
            WaterBalance SoilWater: same as Bundaberg.Bundaberg2011.Bundaberg2011Base.paddock.Soil.SoilWater
            Organic: same as Bundaberg.Bundaberg2011.Bundaberg2011Base.paddock.Soil.Organic
            Chemical: same as Bundaberg.Bundaberg2011.Bundaberg2011Base.paddock.Soil.Chemical
            Water: Thickness=[200, 200, 100, 100, 200, 200, 300, 300, 300]; FilledFromTop=true
              InitialValues=[0.278, 0.3, 0.328, 0.353, 0.347, 0.347, 0.347, 0.347, 0.347]
            Solute NO3: same as Bundaberg.Bundaberg2017.Bundaberg2017Base.paddock.Soil.NO3
            Solute NH4: same as Bundaberg.Bundaberg2011.Bundaberg2011Base.paddock.Soil.NH4
            Solute Urea: same as Bundaberg.Bundaberg2011.Bundaberg2011Base.paddock.Soil.NH4
            Nutrient
            SoilTemperature Temperature
          Spectral: DrySoilNDVI=0.07; WetSoilNDVI=0.08; GreenCropNDVI=0.85; DeadCropNDVI=0.1
  Folder Narrabri
    Experiment Narrabri2012
      Factors
        Permutation
          Factor Cv
            Specification=[SowingRule].Script.CultivarName=Hayman,Bunya,Kuranda,A6785,Richmond
          Factor RowSpacing
            CompositeFactor 025: Specifications=[SowingRule].Script.RowSpacing=250
            CompositeFactor 100: Specifications=[SowingRule].Script.RowSpacing=1000
      Simulation Narrabri2012Base
        Clock: Start=2012-12-14; End=2013-05-25
        Summary summaryfile
        Weather: FileName=Narrabi_72101.met
        SoilArbitrator Soil Arbitrator
        Zone paddock: Area=1; Slope=0; AspectAngle=0; Altitude=50
          MicroClimate: a_interception=0; b_interception=1; c_interception=0; d_interception=0; SoilHeatFluxFraction=0.4; MinimumHeightDiffForNewLayer=0; NightInterceptionFraction=0.5; ReferenceHeight=2
          Irrigation
          Fertiliser
          SurfaceOrganicMatter: InitialResidueName=maize; InitialResidueType=maize; InitialResidueMass=500; InitialStandingFraction=0; InitialCPR=0; InitialCNR=55
          Report DailyReport: same as ForestHill.ForestHill2022.ForestHill2022Base.paddock.DailyReport
          Manager SowingRule
            RowSpacing = 500
            SowingDepth = 50
            SowingRate = 25
            CultivarName = Bidgee
            SowingDate = 12/15/2012 00:00:00
            script: same as in ForestHill.ForestHill2022.ForestHill2022Base.paddock.SowingRule
          Manager HarvestRule
            HarvestDate = 05/24/2013 00:00:00
            script: same as in ForestHill.ForestHill2022.ForestHill2022Base.paddock.HarvestRule
          Report HarvestReport: EventNames=[Soybean].Harvesting
            VariableNames:
              [Clock].Today
              [Soybean].Structure.MainStemPrimordiaNo
              [Soybean].Phenology.NFF
              [Soybean].Script.FinalTag
          Plant Soybean
          Manager AutomaticIrrigation
            allowIrrigation = True
            seasonStart = 15-dec
            seasonEnd = 20-apr
            seasonsAllocation = 1000
            triggerDeficit = 98
            targetDeficit = 100
            returndays = 10
            maximumAmount = 30
            depthPAWC = 800
            script: same as in ForestHill.ForestHill2022.ForestHill2022Base.paddock.AutomaticIrrigation
          Soil: SoilType=Other; Site=Narrabri; NearestTown=Narrabri, NSW 2390; Region=North West Slopes and Plains; State=New South Wales; Country=Australia; ApsoilNumber=615-YP; Latitude=-30.28; Longitude=149.807; YearOfSampling=0; DataSource=YP. A Peake CSE Toowoomba; Comments=Loam - PBI Narrabri Loam over clay.
            Physical
              Thickness  ParticleSizeSand  ParticleSizeSilt  ParticleSizeClay  Rocks  BD    AirDry  LL15  DUL    SAT
              150        5                 65                30                0      1.45  0.08    0.18  0.3    0.423
              150        5                 65                30                0      1.46  0.1     0.18  0.3    0.419
              300        5                 65                30                0      1.46  0.15    0.24  0.355  0.419
              300        5                 65                30                0      1.47  0.15    0.25  0.355  0.415
              300        5                 65                30                0      1.48  0.15    0.26  0.355  0.412
              300        5                 65                30                0      1.49  0.15    0.27  0.35   0.408
              300        5                 65                30                0      1.5   0.15    0.28  0.35   0.404
              BD, AirDry, LL15, DUL, SAT source: Unknown source or quality of data
              Rocks, ParticleSizeSand, ParticleSizeSilt, ParticleSizeClay source: Calculated
              SoilCrop SoybeanSoil: LL=[0.2, 0.18, 0.24, 0.25, 0.26, 0.27, 0.28]; KL=[0.09, 0.06, 0.06, 0.04, 0.04, 0.02, 0.02]; XF=[1, 1, 1, 1, 1, 1, 1]
            WaterBalance SoilWater: SummerDate=1-Nov; SummerU=6; SummerCona=3.5; WinterDate=1-Apr; WinterU=4; WinterCona=2.5; DiffusConst=40; DiffusSlope=16; Salb=0.12; CN2Bare=73; CNRed=20; CNCov=0.8; PSIDul=-100; Thickness=[150, 150, 300, 300, 300, 300, 300]; SWCON=[0.4, 0.4, 0.3, 0.3, 0.3, 0.3, 0.3]
            Organic: FOMCNRatio=40; CarbonUnits=Total
              Thickness  Carbon  SoilCNRatio  FBiom  FInert  FOM
              150        0.88    12           0.04   0.4     347.129
              150        0.76    12           0.02   0.6     270.344
              300        0.62    12           0.02   0.8     163.972
              300        0.32    12           0.02   1       99.4541
              300        0.12    12           0.01   1       60.322
              300        0.1     12           0.01   1       36.5871
              300        0.05    12           0.01   1       22.1912
            Chemical: Thickness=[150, 150, 300, 300, 300, 300, 300]; PH=[8.9, 9.2, 9.3, 9, 8.8, 7.5, 8.4]; PHUnits=Water
              PH source: Unknown source or quality of data
            Water: Thickness=[150, 150, 300, 300, 300, 300, 300]; InitialValues=[0.3, 0.3, 0.355, 0.355, 0.355, 0.35, 0.35]; FilledFromTop=true
            Solute NO3: Thickness=[150, 150, 300, 300, 300, 300, 300]; InitialValues=[8, 5, 0, 0, 0, 0, 0]; InitialValuesUnits=ppm; WaterTableConcentration=0; D0=0; DepthConstant=0; MaxDepthSoluteAccessible=0; RunoffEffectivenessAtMovingSolute=0; MaxEffectiveRunoff=0
            Solute NH4: Thickness=[150, 150, 300, 300, 300, 300, 300]; InitialValues=[0, 0, 0, 0, 0, 0, 0]; InitialValuesUnits=ppm; WaterTableConcentration=0; D0=0; DepthConstant=0; MaxDepthSoluteAccessible=0; RunoffEffectivenessAtMovingSolute=0; MaxEffectiveRunoff=0
            Solute Urea: same as Narrabri.Narrabri2012.Narrabri2012Base.paddock.Soil.NH4
            Nutrient
            SoilTemperature Temperature
          Spectral: DrySoilNDVI=0.07; WetSoilNDVI=0.08; GreenCropNDVI=0.85; DeadCropNDVI=0.1
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