Simulations: Version=183
  Memo TitlePage
    # The APSIM Soybean Model

    The APSIM Soybean model has been developed using the Plant Modelling Framework (PMF) of ([brown_plant_2014]). This new framework provides a library of plant organ and process submodels that can be coupled, at runtime, to construct a model in much the same way that models can be coupled to construct a simulation. This means that dynamic composition of lower level process and organ classes (e.g. photosynthesis, leaf) into larger constructions (e.g. maize, wheat, sorghum) can be achieved by the model developer without additional coding.

    The model consists of:

    * a phenology model to simulate development between growth phases
    * a structure model to simulate plant morphology
    * a collection of organs to simulate the various plant parts
    * an arbitrator to allocate resources (N, biomass) to the various plant organs
  Folder Replacements
    Report DailyReport: EventNames=[Clock].DoReport
      VariableNames:
        [Clock].Today
        [Clock].Today.DayOfYear
        [Soybean].DaysAfterSowing as Soybean.Phenology.DaysAfterSowing
        [Soybean].Phenology.Stage
        [Weather].MeanT
        [Weather].Radn
        [Weather].MaxT
        [Weather].MinT
        [Soybean].Arbitrator.DM.TotalFixationSupply
        sum([Soybean].Arbitrator.N.Fixation) as NFixed
        [Soybean].Arbitrator.DM.TotalPlantDemand
        [Soybean].Phenology.CurrentStageName
        [Soybean].Phenology.Photoperiod
        [Soybean].AboveGround.Wt
        [Soybean].AboveGround.N
        [Soybean].Leaf.NodeNumber
        [Soybean].Leaf.Fw
        [Soybean].Leaf.Fn
        [Soybean].Leaf.Photosynthesis.FT
        [Soybean].Leaf.LAI
        [Soybean].Leaf.LAITotal
        [Soybean].Leaf.CoverGreen
        [Soybean].Leaf.CoverTotal
        [Soybean].Leaf.Live.Wt
        [Soybean].Leaf.Live.StructuralWt
        [Soybean].Leaf.Live.MetabolicWt
        [Soybean].Leaf.Allocated.MetabolicWt
        [Soybean].Leaf.Allocated.StructuralWt
        [Soybean].Leaf.Dead.StructuralWt
        [Soybean].Leaf.Dead.MetabolicWt
        [Soybean].Leaf.Live.N
        [Soybean].Leaf.Live.NConc
        [Soybean].Leaf.SpecificArea
        [Soybean].Leaf.Wt
        [Soybean].Leaf.Nconc
        [Soybean].Leaf.Senesced.Wt
        [Soybean].Leaf.Height
        [Soybean].Stem.Wt
        [Soybean].Stem.Total.StructuralWt
        [Soybean].Stem.Live.StructuralWt
        [Soybean].Stem.Live.StructuralN
        [Soybean].Stem.N
        [Soybean].Stem.Nconc
        [Soybean].Shell.Wt
        [Soybean].Shell.Live.Wt
        [Soybean].Shell.N
        [Soybean].Shell.Nconc
        [Soybean].Grain.Wt
        [Soybean].Grain.N
        [Soybean].Grain.Nconc
        [Soybean].Shell.Wt
        [Soybean].Pod.Wt
        [Soybean].Pod.N
        [Soybean].Pod.NConc
        [Soybean].Nodule.NFixed
        [Soybean].Root.Wt
        sum([Soil].NO3.kgha) as TotalSoilNO3
        sum([Soil].NH4.kgha) as TotalSoilNH4
        sum([Soil].Water.MM) as TotalSW
        [Soil].Water.Volumetric[1:3]
        [Soybean].Leaf.Height
        [Soybean].Root.Depth
        sum([Soil].SoilWater.ESW) as TotalESW
    Report HarvestReport: EventNames=[Soybean].Harvesting
      VariableNames:
        [Clock].Today
        [Soybean].Phenology.CurrentStageName
        [Soybean].Phenology.EmergenceDAS
        [Soybean].Phenology.FloweringDAS
        [Soybean].Phenology.MaturityDAS
        [Soybean].AboveGround.Wt
        [Soybean].Grain.Wt
    Report FACTSReport: EventNames=[Clock].DoReport
      VariableNames:
        [Clock].Today
        [Soil].Water.Volumetric[4] as SW15cm
        ([Soil].Water.Volumetric[6]+[Soil].Water.Volumetric[7])/2 as SW45cm
        [Soil].Temperature.Value[4] as ST15cm
        ([Soil].Temperature.Value[6]+[Soil].Temperature.Value[7])/2 as ST45cm
        [Soil].SoilWater.WaterTable
        ([Soybean].Leaf.Transpiration + [Soil].SoilWater.Es + [MicroClimate].PrecipitationInterception) as ET
        [Soybean].Nodule.FixationRate
        [Soybean].Root.Depth
        sum([Soil].NO3.kgha[1:13]) as RootZoneNO3
        sum([Soil].NH4.kgha[1:13]) as RootZoneNH4
        sum([Soil].NO3.kgha[1:5]) as SoilNO3_30cm
        sum([Soil].NH4.kgha[1:5]) as SoilNH4_30cm
        sum([Soil].NO3.kgha[6:7]) as SoilNO3_60cm
        sum([Soil].NH4.kgha[6:7]) as SoilNH4_60cm
        [SurfaceOrganicMatter].N
        [SurfaceOrganicMatter].C
        [SurfaceOrganicMatter].Wt
        sum([Soil].Nutrient.FOM.C[1:13]) as FOM
  DataStore
    ExcelInput ExcelMultiInput: FileNames=[Observed.xlsx, ObservedFACTS.xlsx]
      SheetNames=[Observed, ObservedET, ObservedFACTSSW, ObservedFACTSST, ObservedLeafSize, ObservedFACTSSoilN]
    PredictedObserved: PredictedTableName=DailyReport; ObservedTableName=Observed; FieldNameUsedForMatch=SimulationName; FieldName2UsedForMatch=Clock.Today; AllColumns=false
    PredictedObserved PredictedObservedHarvest: PredictedTableName=HarvestReport; ObservedTableName=Observed; FieldNameUsedForMatch=SimulationName; FieldName2UsedForMatch=Soybean.Phenology.CurrentStageName; AllColumns=false
    PredictedObserved PredictedObservedET: PredictedTableName=FACTSReport; ObservedTableName=ObservedET; FieldNameUsedForMatch=SimulationName; FieldName2UsedForMatch=Clock.Today; AllColumns=false
    PredictedObserved PredictedObservedFACTSSW: PredictedTableName=FACTSReport; ObservedTableName=ObservedFACTSSW; FieldNameUsedForMatch=SimulationName; FieldName2UsedForMatch=Clock.Today; AllColumns=false
    PredictedObserved PredictedObservedFACTSSoilN: PredictedTableName=FACTSReport; ObservedTableName=ObservedFACTSSoilN; FieldNameUsedForMatch=SimulationName; FieldName2UsedForMatch=Clock.Today; AllColumns=false
    PredictedObserved PredictedObservedFACTSST: PredictedTableName=FACTSReport; ObservedTableName=ObservedFACTSST; FieldNameUsedForMatch=SimulationName; FieldName2UsedForMatch=Clock.Today; AllColumns=false
    Probability: TableName=SensibilityReport; Exceedence=false; FieldToSplitOn=SimulationName
  Folder Validation
    Memo
      The soybean model has been tested across a range of planting and agronomic conditions.  These include datasets from Australia, USA and China covering a wide range of weather conditions (See graphs that follow) and agronomic factors (irrigation, fertiliser, sowing dates).
    Folder USA
      Folder FACTS
        Memo FACTS data description
          This trial was conducted on deep fertile soils, in central Iowa (Ames) and in northwest Iowa (Sutherland), USA, in years 2015, 2016 and 2017. In each year two planting date were studied, early versus late. Row spacing was 76 cm, and plant population was around 35 plants/m2 (see details in APSIM managers). No nitrogen or irrigation applied. This region has shallow water tables (about 1.2 m below surface, range 0.3 to 3m) and the soil has no subsurface drainage. Data from years 2015 and 2017 have been incorporated while data from year 2016 will be added later. Local weather data (the station was positioned 10 m from the trial) and actual soil profile data (measured in Nov 2014 up to 1.2 meter, soil organic matter, texture, and pH by layer) were used. Additional soil data were taken from ssurgo. The following measurements were taken per plot (each treatment was replicated 3 times): Phenology (visual observations in the field using the V/R coding system); biomass samplings 6-9 times per season and per treatment (destructive sampling of 1 m2 per plot); biomass partitioning and dry weight of each plant tissue including green and yellow leaves, stem plus petioles, and pod-walls plus seeds (note that seeds were separated at the final harvest only); carbon and nitrogen concentration of each plant tissue (LECO CN analyzer); green leaf area index (LI Area Meter); node number and pod number per plant; leaf area per node in year 2015 only; root front depth over time (manual soil core technique) and maximum root depth, mass and length (mechanical gidding prode technique, depth of 240 cm) at approximately middle grain fill stage; daily soil water and temperature at two depths, 15 and 45 cm (5TM sensors placed horizontally, METEO group), daily water table depth (CTD-10 sensors, METEO group), and soil nitrate and ammonium approximately 10 times over each season and treatment at two depths 0-30 and 30-60 cm (sample was extracted in 2 M potassium chloride), and N-fixation over time (Isotope dilution method); soybean leaf senescence (gages to measure drop leaves dry matter and CN concentration, 1m2 size, 3-4 measurements per season per treatment); crop residue dry matter, soil cover and soil nitrogen and water measurements (manual samplings 10 times from crop harvest to planting of the next crop). This dataset is licensed by the Iowa State University Research Foundation.
        Experiment Ames2015
          Factors
            Factor Sow
              CompositeFactor Early: Specifications=[SowingRule].Script.SowingDate=2015-05-01
              CompositeFactor Late: Specifications=[SowingRule].Script.SowingDate=2015-06-01
          Simulation Ames2015Base
            Clock: Start=2015-01-01; End=2015-12-31
            Summary summaryfile
            Weather: FileName=Ames.met; Latitude=42.03; Tav=9.402837; Amp=29.60712
            SoilArbitrator Soil Arbitrator
            Zone paddock: Area=1; Slope=0; AspectAngle=0; Altitude=50
              MicroClimate: a_interception=0; b_interception=1; c_interception=0.1; d_interception=0; SoilHeatFluxFraction=0.4; MinimumHeightDiffForNewLayer=0; NightInterceptionFraction=0.5; ReferenceHeight=2
              Irrigation
              Fertiliser
              SurfaceOrganicMatter: InitialResidueName=maize; InitialResidueType=maize; InitialResidueMass=3024; InitialStandingFraction=0; InitialCPR=0; InitialCNR=52
              Report DailyReport: EventNames=[Clock].DoReport
                VariableNames:
                  [Clock].Today
                  [DiagnosticsVariables].Script.AccumPlantN
                  [DiagnosticsVariables].Script.AccumMineralisation
                  [DiagnosticsVariables].Script.AccumDenit
                  [DiagnosticsVariables].Script.AccumFert
                  [DiagnosticsVariables].Script.AccumLeach
                  [DiagnosticsVariables].Script.AccumDetach
                  [DiagnosticsVariables].Script.DeltaSoilOMN
                  [DiagnosticsVariables].Script.DeltaSurfaceOMN
                  [DiagnosticsVariables].Script.DeltaSoilMineralN
                  [Soybean].Root.NSupply
                  [Soil].SoilWater.Eo
                  [Soil].SoilWater.Es
                  [DiagnosticsVariables].Script.SWC
                  [DiagnosticsVariables].Script.DUL
                  [Soil].SoilWater.Drainage
                  [Soil].SoilWater.Runoff
                  [DiagnosticsVariables].Script.OutFlowLat
                  [Soil].SoilWater.pond
                  [DiagnosticsVariables].Script.AccumEO
                  [DiagnosticsVariables].Script.AccumEP
                  [DiagnosticsVariables].Script.AccumES
                  [DiagnosticsVariables].Script.AccumDrainage
                  [DiagnosticsVariables].Script.AccumRunoff
                  [DiagnosticsVariables].Script.AccumRainfall
                  [DiagnosticsVariables].Script.AccumIrrigation
                  [DiagnosticsVariables].Script.AccumOutflowLat
                  [DiagnosticsVariables].Script.SoilWaterDeficit
                  [Soybean].Grain.Live.Wt
                  [Soybean].Shell.Live.Wt
                  [Soybean].Stem.Live.Wt
                  [Soybean].Stem.Live.Wt
                  [Soybean].Grain.Live.N
                  [Soybean].Shell.Live.N
                  [Soybean].Leaf.Live.Wt
                  [Soybean].Root.Live.Wt
                  [Soybean].Leaf.Live.N
                  [Soybean].Root.Live.N
                  [Soybean].Leaf.Live.NConc
                  [Soybean].Root.Live.NConc
                  [Soybean].Root.WaterSupply
                  [Soybean].Root.WaterUptake
                  [Soybean].Leaf.Transpiration
                  [Soybean].Leaf.WaterDemand
                  [Soybean].Root.Depth
                  [Soybean].Leaf.CoverTotal
                  [Soybean].Leaf.CoverDead
                  [Soybean].Leaf.LAI
                  [Soybean].Leaf.Height
                  [Soybean].Leaf.PotentialBiomass
                  [Soil].Water.MM
                  [Soil].NO3.kgha
                  [DiagnosticsVariables].Script.SoilNitrogenContent
                  [Soybean].Arbitrator.N.TotalPlantDemand
                  [MicroClimate].net_radn
                  [MicroClimate].peta
                  [MicroClimate].petr
                  [DiagnosticsVariables].Script.FomN
                  [DiagnosticsVariables].Script.HumN
                  [DiagnosticsVariables].Script.BiomN
                  [DiagnosticsVariables].Script.DltNMinRes
                  [DiagnosticsVariables].Script.DltNMinTot
                  [Soybean].Leaf.Fw
                  [Soybean].Leaf.Fn
                  [Soybean].Phenology.CurrentPhase.Name
                  [Soybean].Phenology.Stage
                  [Soybean].Pod.Wt
                  [Soybean].Pod.N
                  [Soybean].Structure.LeafTipsAppeared
                  [Soybean].Structure.MainStemPrimordiaNo
                  [Soybean].Leaf.CohortArea[1]
                  [Soybean].Leaf.CohortArea[2]
                  [Soybean].Leaf.CohortArea[3]
                  [Soybean].Leaf.CohortArea[4]
                  [Soybean].Leaf.CohortArea[5]
                  [Soybean].Leaf.CohortArea[6]
                  [Soybean].Leaf.CohortArea[7]
                  [Soybean].Leaf.CohortArea[8]
                  [Soybean].Leaf.CohortArea[9]
                  [Soybean].Leaf.CohortArea[10]
                  [Soybean].Leaf.CohortArea[11]
                  [Soybean].Leaf.CohortArea[12]
                  [Soybean].Leaf.CohortArea[13]
                  [Soybean].Leaf.CohortArea[14]
                  [Soybean].Leaf.CohortArea[15]
                  [Soybean].Leaf.AppearedCohortNo
                  [Soybean].Leaf.DeadCohortNo
                  [Soybean].AboveGround.Wt
                  [Soybean].Phenology.Stage
                  [Soybean].Structure.MainStemPrimordiaNo
                  [Soybean].Phenology.NFF
                  [SoybeanHarvestRule].Script.FinalTag
                  [Soybean].Grain.NumberFunction
                  [Soybean].Shell.PodNumber
                  [Soybean].Phenology.FN
                  [Soybean].Phenology.FN.TotalNodes
                  [Soybean].Phenology.FN.VegetativeNodes
              Manager SowingRule
                RowSpacing = 760
                SowingDepth = 50
                SowingRate = 35
                CultivarName = PioneerP22T61_MG22
                SowingDate = 12/23/1997 00:00:00
```csharp
using Models.Soils;
using System;
using Models.Core;
using Models.PMF;
using APSIM.Shared.Utilities;
        
        namespace Models
        {
           [Serializable] 
           [System.Xml.Serialization.XmlInclude(typeof(Model))]
            public class Script : Model
            {      
               [Link] Plant Soybean;
               [Link] Clock Clock;

               [Description("Spacing (mm) between rows")]
               public double RowSpacing { get; set; }
               [Description("Depth (mm) Grains are planted")]
               public double SowingDepth { get; set; }
               [Description("Seeds sown (/m2)")]
               public double SowingRate { get; set; }
               [Description("Cultivar")]
               [Display(Type=DisplayType.CultivarName)]
               public string CultivarName { get; set; }
               [Description("Sowing Date")]
               public DateTime SowingDate { get; set; }

               [EventSubscribe("DoManagement")]
               private void OnDoManagement(object sender, EventArgs e)
               {
                if (Clock.Today.Date == SowingDate)
                    Soybean.Sow(population:SowingRate, cultivar:CultivarName, depth:SowingDepth, rowSpacing:RowSpacing, budNumber:1);
               }
            }
        }
```
              Report HarvestReport: EventNames=[Soybean].Harvesting
                VariableNames:
                  [Clock].Today
                  [Soybean].Structure.MainStemPrimordiaNo
                  [Soybean].Phenology.NFF
                  [Soybean].Script.FinalTag
              Operations
              Plant Soybean
              Soil: SoilType=Nicollet; LocalName=SoilAmesCorn; NearestTown=Ames; Region=Boone; State=Iowa; Country=US; ApsoilNumber=34; Latitude=42.02204; Longitude=-93.769115; DataSource=mesured data and web soil survey; Comments=hydrological parameters and BD from Saxton and Rawls, 2006
                Physical
                  Thickness  BD    AirDry  LL15   DUL    SAT    KS
                  25         1.25  0.135   0.174  0.31   0.445  151
                  25         1.25  0.135   0.174  0.31   0.455  128
                  50         1.25  0.15    0.174  0.3    0.42   239
                  100        1.25  0.165   0.165  0.25   0.43   158
                  100        1.25  0.12    0.12   0.22   0.35   144
                  150        1.35  0.11    0.11   0.21   0.34   115
                  150        1.35  0.102   0.102  0.22   0.33   103
                  150        1.36  0.126   0.126  0.265  0.393  182
                  150        1.36  0.133   0.133  0.261  0.364  168
                  150        1.36  0.128   0.128  0.253  0.335  159
                  150        1.4   0.128   0.128  0.2    0.37   2
                  300        1.4   0.09    0.09   0.28   0.332  2
                  300        1.4   0.09    0.09   0.18   0.242  2
                  300        1.4   0.09    0.09   0.2    0.256  2
                  400        1.4   0.09    0.09   0.191  0.234  2
                  SoilCrop SoybeanSoil
                    LL=[0.174, 0.174, 0.174, 0.165, 0.12, 0.11, 0.102, 0.126, 0.133, 0.128, 0.128, 0.09, 0.09, 0.09, 0.09]
                    KL=[0.08, 0.08, 0.08, 0.08, 0.08, 0.08, 0.07, 0.06, 0.06, 0.04, 0.01, 0.01, 0.01, 0, 0]
                    XF=[1, 1, 1, 1, 1, 1, 1, 1, 1, 1, 1, 1, 0.5, 0, 0]
                Organic: FOMCNRatio=46; CarbonUnits=Total
                  Thickness  Carbon  SoilCNRatio  FBiom  FInert  FOM
                  25         2.43    12.5         0.191  0.4     483.114
                  25         2.34    12.5         0.164  0.4     468.836
                  50         2.44    12.5         0.162  0.4     441.533
                  100        2.37    12.5         0.055  0.441   391.605
                  100        1.98    12.5         0.017  0.52    347.322
                  150        1.95    12.5         0.018  0.619   290.108
                  150        0.97    12.5         0.034  0.738   242.318
                  150        0.98    12.5         0.04   0.802   202.401
                  150        0.49    12.5         0.061  0.797   169.06
                  150        0.49    12.5         0.053  0.798   141.211
                  150        0.49    12.5         0.011  0.808   117.949
                  300        0.49    12.5         0.01   0.857   82.2903
                  300        0.49    12.5         0.012  0.95    57.412
                  300        0.49    12.5         0.016  0.99    40.055
                  400        0.49    12.5         0.01   0.99    24.7854
                Chemical: PHUnits=Water
                  Thickness=[25, 25, 50, 100, 100, 150, 150, 150, 150, 150, 150, 300, 300, 300, 400]
                  PH=[7.48, 7.48, 7.48, 7.38, 7.43, 7.43, 7.73, 7.73, 8.08, 8.08, 8.08, 8.08, 8.08, 8.08, 8.08]
                Water: InitialPAWmm=453.25; RelativeTo=LL15; FilledFromTop=false
                  Thickness=[25, 25, 50, 100, 100, 150, 150, 150, 150, 150, 150, 300, 300, 300, 400]
                  InitialValues=[0.31, 0.31, 0.32, 0.25, 0.327, 0.304, 0.298, 0.285, 0.364, 0.335, 0.37, 0.332, 0.242, 0.256, 0.234]
                WaterBalance SoilWater: SummerDate=1-Nov; SummerU=6; SummerCona=3.5; WinterDate=1-Apr; WinterU=6; WinterCona=3.5; DiffusConst=88; DiffusSlope=35.4; Salb=0.2; CN2Bare=85; CNRed=20; CNCov=0.8; DischargeWidth=0; CatchmentArea=0; PSIDul=-100; Thickness=[150, 150, 150, 150, 150, 150, 300, 300, 1000]; SWCON=[0.7, 0.7, 0.7, 0.7, 0.7, 0.7, 0.2, 0.2, 0.2]
                CERESSoilTemperature Temperature
                Nutrient
                Solute NO3: InitialValuesUnits=ppm; WaterTableConcentration=0; D0=0; DepthConstant=0; MaxDepthSoluteAccessible=0; RunoffEffectivenessAtMovingSolute=0; MaxEffectiveRunoff=0
                  Thickness=[25, 25, 50, 100, 100, 150, 150, 150, 150, 150, 150, 300, 300, 300, 400]
                  InitialValues=[4.7, 5, 3.5, 4.4, 5.1, 3.9, 2.9, 1.7, 0.539216, 0.441176, 0.380952, 0.261905, 0.119048, 0.0952381, 0]
                Solute NH4: InitialValuesUnits=ppm; WaterTableConcentration=0; D0=0; DepthConstant=0; MaxDepthSoluteAccessible=0; RunoffEffectivenessAtMovingSolute=0; MaxEffectiveRunoff=0
                  Thickness=[25, 25, 50, 100, 100, 150, 150, 150, 150, 150, 150, 300, 300, 300, 400]
                  InitialValues=[8.8, 14.7, 2.9, 3.7, 2.19, 1.35, 0.84, 0.735294, 0.735294, 0.0490196, 0.0952381, 0.0714286, 0.0952381, 0, 0]
                Solute Urea: InitialValues=[0, 0, 0, 0, 0, 0, 0, 0, 0, 0, 0, 0, 0, 0, 0]; InitialValuesUnits=kg/ha; WaterTableConcentration=0; D0=0; DepthConstant=0; MaxDepthSoluteAccessible=0; RunoffEffectivenessAtMovingSolute=0; MaxEffectiveRunoff=0
                  Thickness=[25, 25, 50, 100, 100, 150, 150, 150, 150, 150, 150, 300, 300, 300, 400]
              Report FACTSReport: EventNames=[Clock].DoReport
                VariableNames:
                  [Clock].Today
                  [Soil].Water.Volumetric[4] as SW15cm
                  ([Soil].Water.Volumetric[6]+[Soil].Water.Volumetric[7])/2 as SW45cm
                  [Soil].Temperature.Value[4] as ST15cm
                  ([Soil].Temperature.Value[6]+[Soil].Temperature.Value[7])/2 as ST45cm
              Manager WaterTableManager
                InitialWaterTableDepth = 2000
                InSeasonWaterTableDepth = 1000
                StartDate = 2017-05-01
                EndDate = 2017-05-20
```csharp
using Models.Interfaces;
using Models.Soils;
using APSIM.Shared.Utilities;
using Models.PMF;
using Models.Core;
using System;
using Models.Soils.Nutrients;
        
        namespace Models
        {
           [Serializable] 
           [System.Xml.Serialization.XmlInclude(typeof(Model))]
            public class Script : Model
            {      
        [Link] private Soil Soil;
        [Link] private Clock Clock;
        [Link]
        private ISoilWater waterBalance;

               [Description("Initial Water Table Depth (mm)")]
               public double InitialWaterTableDepth { get; set; }

              [Description("InSeason Table Depth (mm)")]
               public double InSeasonWaterTableDepth { get; set; }

               [Description("Start Date")]
               public DateTime StartDate { get; set; }

               [Description("End Date")]
               public DateTime EndDate { get; set; }


        [EventSubscribe("StartOfSimulation")]
        private void OnSimulationCommencing(object sender, EventArgs e)
        {
        //(waterBalance).WaterTable = InitialWaterTableDepth;
        }       

               [EventSubscribe("DoManagement")]
               private void OnDoManagement(object sender, EventArgs e)
               {
                if (Clock.Today.Date >= StartDate && Clock.Today.Date >= EndDate)
                   (waterBalance).WaterTable = InSeasonWaterTableDepth;
                else
                    (waterBalance).WaterTable = InitialWaterTableDepth;
               }
            }
        }
```
              Operations Harvesting
                2015-10-17  [Soybean].Harvest();
                2015-10-17  [Soybean].EndCrop();
        Experiment Ames2017
          Factors
            Factor Sow
              CompositeFactor Early
                Specifications:
                  [SowingRule].Script.SowingDate=2017-05-16
                  [SowingRule].Script.SowingRate=32
                  [SowingRule].Script.SowingDepth=50
              CompositeFactor Late
                Specifications:
                  [SowingRule].Script.SowingDate=2017-05-30
                  [SowingRule].Script.SowingRate=35
                  [SowingRule].Script.SowingDepth=5
          Simulation Ames2017Base
            Clock: Start=2017-01-01; End=2017-12-31
            Summary summaryfile
            Weather: FileName=Ames.met; Latitude=42.03; Tav=9.402837; Amp=29.60712
            SoilArbitrator Soil Arbitrator
            Zone paddock: Area=1; Slope=0; AspectAngle=0; Altitude=50
              MicroClimate: a_interception=0; b_interception=1; c_interception=0.1; d_interception=0; SoilHeatFluxFraction=0.4; MinimumHeightDiffForNewLayer=0; NightInterceptionFraction=0.5; ReferenceHeight=2
              Irrigation
              Fertiliser
              SurfaceOrganicMatter: InitialResidueName=maize; InitialResidueType=maize; InitialResidueMass=2000; InitialStandingFraction=0; InitialCPR=0; InitialCNR=80
              Report DailyReport: same as Validation.USA.FACTS.Ames2015.Ames2015Base.paddock.DailyReport
              Manager SowingRule
                RowSpacing = 760
                SowingDepth = 50
                SowingRate = 32
                CultivarName = PioneerP932T16R_MG32
                SowingDate = 12/23/1997 00:00:00
                script: same as in Validation.USA.FACTS.Ames2015.Ames2015Base.paddock.SowingRule
              Report HarvestReport: EventNames=[Soybean].Harvesting
                VariableNames:
                  [Clock].Today
                  [Soybean].Structure.MainStemPrimordiaNo
                  [Soybean].Phenology.NFF
                  [Soybean].Script.FinalTag
              Operations
              Plant Soybean
              Soil: SoilType=Nicollet; LocalName=SoilAmesCorn; NearestTown=Ames; Region=Boone; State=Iowa; Country=US; ApsoilNumber=34; Latitude=42.02204; Longitude=-93.769115; DataSource=mesured data and web soil survey; Comments=hydrological parameters and BD from Saxton and Rawls, 2006
                Physical: same as Validation.USA.FACTS.Ames2015.Ames2015Base.paddock.Soil.Physical
                Organic: same as Validation.USA.FACTS.Ames2015.Ames2015Base.paddock.Soil.Organic
                Chemical: same as Validation.USA.FACTS.Ames2015.Ames2015Base.paddock.Soil.Chemical
                Water: InitialPAWmm=453.25; RelativeTo=LL15; FilledFromTop=false
                  Thickness=[25, 25, 50, 100, 100, 150, 150, 150, 150, 150, 150, 300, 300, 300, 400]
                  InitialValues=[0.31, 0.31, 0.32, 0.25, 0.327, 0.304, 0.298, 0.285, 0.364, 0.335, 0.37, 0.332, 0.242, 0.256, 0.234]
                WaterBalance SoilWater: SummerDate=1-Nov; SummerU=6; SummerCona=3.5; WinterDate=1-Apr; WinterU=6; WinterCona=3.5; DiffusConst=88; DiffusSlope=35.4; Salb=0.2; CN2Bare=85; CNRed=20; CNCov=0.8; DischargeWidth=0; CatchmentArea=0; PSIDul=-100; Thickness=[150, 150, 150, 150, 150, 150, 300, 300, 1000]; SWCON=[0.7, 0.7, 0.7, 0.7, 0.7, 0.7, 0.7, 0.7, 0.7]
                CERESSoilTemperature Temperature
                Nutrient
                Solute NO3: InitialValuesUnits=ppm; WaterTableConcentration=0; D0=0; DepthConstant=0; MaxDepthSoluteAccessible=0; RunoffEffectivenessAtMovingSolute=0; MaxEffectiveRunoff=0
                  Thickness=[25, 25, 50, 100, 100, 150, 150, 150, 150, 150, 150, 300, 300, 300, 400]
                  InitialValues=[3.2, 4.8, 3.2, 1.2, 1.2, 0.592593, 0.493827, 0.490196, 0.539216, 0.441176, 0.380952, 0.261905, 0.119048, 0.0952381, 0]
                Solute NH4: InitialValuesUnits=ppm; WaterTableConcentration=0; D0=0; DepthConstant=0; MaxDepthSoluteAccessible=0; RunoffEffectivenessAtMovingSolute=0; MaxEffectiveRunoff=0
                  Thickness=[25, 25, 50, 100, 100, 150, 150, 150, 150, 150, 150, 300, 300, 300, 400]
                  InitialValues=[12.8, 12.8, 6.4, 3.2, 3.2, 1.97531, 1.97531, 0.735294, 0.735294, 0.0490196, 0.0952381, 0.0714286, 0.0952381, 0, 0]
                Solute Urea: same as Validation.USA.FACTS.Ames2015.Ames2015Base.paddock.Soil.Urea
              Report FACTSReport: EventNames=[Clock].DoReport
                VariableNames:
                  [Clock].Today
                  [Soil].Water.Volumetric[4] as SW15cm
                  ([Soil].Water.Volumetric[6]+[Soil].Water.Volumetric[7])/2 as SW45cm
                  [Soil].Temperature.Value[4] as ST15cm
                  ([Soil].Temperature.Value[6]+[Soil].Temperature.Value[7])/2 as ST45cm
              Manager WaterTableManager
                InitialWaterTableDepth = 2000
                InSeasonWaterTableDepth = 1000
                StartDate = 05/01/2017 00:00:00
                EndDate = 05/20/2017 00:00:00
                script: same as in Validation.USA.FACTS.Ames2015.Ames2015Base.paddock.WaterTableManager
              Operations Harvesting
                2017-10-20  [Soybean].Harvest();
                2017-10-20  [Soybean].EndCrop();
        Experiment Sutherland2015
          Factors
            Factor Sow
              CompositeFactor Early
                Specifications:
                  [SowingRule].Script.SowingDate=2015-04-30
                  [SowingRule].Script.SowingRate=33
                  [SowingRule].Script.SowingDepth=40
              CompositeFactor Late
                Specifications:
                  [SowingRule].Script.SowingDate=2015-06-01
                  [SowingRule].Script.SowingRate=48
                  [SowingRule].Script.SowingDepth=20
          Simulation Sutherland2015Base
            Clock: Start=2015-01-01; End=2015-12-31
            Summary summaryfile
            Weather: FileName=Sutherland.met; Latitude=42.9; Tav=8.193954; Amp=30.75748
            SoilArbitrator Soil Arbitrator
            Zone paddock: Area=1; Slope=0; AspectAngle=0; Altitude=50
              MicroClimate: a_interception=0; b_interception=1; c_interception=0; d_interception=0; SoilHeatFluxFraction=0.4; MinimumHeightDiffForNewLayer=0; NightInterceptionFraction=0.5; ReferenceHeight=2
              Irrigation
              Fertiliser
              SurfaceOrganicMatter: InitialResidueName=maize; InitialResidueType=maize; InitialResidueMass=4000; InitialStandingFraction=0; InitialCPR=0; InitialCNR=70
              Report DailyReport: same as Validation.USA.FACTS.Ames2015.Ames2015Base.paddock.DailyReport
              Manager SowingRule
                RowSpacing = 760
                SowingDepth = 50
                SowingRate = 30
                CultivarName = PioneerP932T16R_MG32
                SowingDate = 12/23/1997 00:00:00
                script: same as in Validation.USA.FACTS.Ames2015.Ames2015Base.paddock.SowingRule
              Report HarvestReport: EventNames=[Soybean].Harvesting
                VariableNames:
                  [Clock].Today
                  [Soybean].Structure.MainStemPrimordiaNo
                  [Soybean].Phenology.NFF
                  [Soybean].Script.FinalTag
              Operations
                1998-01-07  [Irrigation].Apply(25);
                1998-01-14  [Irrigation].Apply(25);
                1998-01-21  [Irrigation].Apply(25);
                1998-01-28  [Irrigation].Apply(25);
                1998-02-07  [Irrigation].Apply(25);
                1998-02-14  [Irrigation].Apply(25);
                1998-02-21  [Irrigation].Apply(25);
                1998-02-28  [Irrigation].Apply(25);
                1998-03-07  [Irrigation].Apply(25);
                1998-03-14  [Irrigation].Apply(25);
                1998-03-21  [Irrigation].Apply(25);
                1998-03-28  [Irrigation].Apply(25);
              Plant Soybean
              Soil: SoilType=Primghar; NearestTown=Sutherland; State=Iowa; Country=US; Latitude=42.92; Longitude=-95.53; DataSource=web soil survey; Comments=hydrological parameters and BD from Saxton and Rawls, 2006
                Physical
                  Thickness  BD    AirDry  LL15   DUL    SAT
                  25         1.25  0.115   0.171  0.28   0.487
                  25         1.25  0.115   0.171  0.28   0.487
                  50         1.25  0.145   0.171  0.28   0.44
                  100        1.25  0.171   0.171  0.315  0.415
                  100        1.25  0.171   0.171  0.3    0.421
                  150        1.35  0.171   0.171  0.29   0.44
                  150        1.35  0.14    0.14   0.26   0.438
                  150        1.36  0.14    0.14   0.27   0.438
                  150        1.36  0.14    0.14   0.263  0.438
                  150        1.36  0.14    0.14   0.26   0.438
                  150        1.4   0.14    0.14   0.24   0.438
                  300        1.4   0.11    0.11   0.24   0.3
                  300        1.4   0.11    0.11   0.24   0.3
                  300        1.4   0.11    0.11   0.24   0.3
                  400        1.4   0.11    0.11   0.24   0.3
                  SoilCrop SoybeanSoil
                    LL=[0.171, 0.171, 0.171, 0.171, 0.171, 0.171, 0.14, 0.14, 0.14, 0.14, 0.14, 0.11, 0.11, 0.11, 0.11]
                    KL=[0.03, 0.05, 0.08, 0.08, 0.08, 0.08, 0.08, 0.05, 0.05, 0.01, 0.01, 0.01, 0.01, 0.01, 0.01]
                    XF=[1, 1, 1, 1, 1, 1, 1, 1, 1, 1, 1, 1, 1, 1, 1]
                Organic: FOMCNRatio=58.1; CarbonUnits=Total
                  Thickness  Carbon  SoilCNRatio  FBiom  FInert  FOM
                  25         2.5     12           0.228  0.4     345.082
                  25         2.45    12           0.18   0.4     334.883
                  50         2.46    12           0.186  0.401   315.381
                  100        2.17    12           0.043  0.44    279.718
                  100        1.85    12           0.018  0.52    248.087
                  150        1.86    12           0.019  0.621   207.22
                  150        1.11    12           0.026  0.739   173.085
                  150        1.12    12           0.03   0.803   144.572
                  150        0.39    12           0.057  0.796   120.757
                  150        0.39    12           0.046  0.798   100.865
                  150        0.39    12           0.033  0.8     84.2493
                  300        0.39    12           0.029  0.852   58.7788
                  300        0.2     12           0.011  0.948   41.0086
                  300        0.1     12           0.019  0.99    28.6107
                  400        0.1     12           0.009  0.99    17.7038
                Chemical: PHUnits=Water
                  Thickness=[25, 25, 50, 100, 100, 150, 150, 150, 150, 150, 150, 300, 300, 300, 400]
                  PH=[5.48, 5.48, 5.48, 5.68, 5.98, 5.98, 6.75, 6.75, 7.97, 7.97, 7.97, 7.97, 7.97, 7.97, 7.97]
                Water: InitialPAWmm=361; RelativeTo=LL15; FilledFromTop=false
                  Thickness=[25, 25, 50, 100, 100, 150, 150, 150, 150, 150, 150, 300, 300, 300, 400]
                  InitialValues=[0.22, 0.24, 0.24, 0.25, 0.25, 0.3, 0.27, 0.27, 0.263, 0.26, 0.24, 0.24, 0.3, 0.3, 0.3]
                CERESSoilTemperature Temperature
                WaterBalance SoilWater: SummerDate=1-Nov; SummerU=6; SummerCona=3.5; WinterDate=1-Apr; WinterU=6; WinterCona=3.5; DiffusConst=88; DiffusSlope=35.4; Salb=0.2; CN2Bare=85; CNRed=20; CNCov=0.8; DischargeWidth=0; CatchmentArea=0; PSIDul=-100; Thickness=[150, 150, 150, 150, 150, 150, 300, 300, 300]; SWCON=[0.7, 0.7, 0.7, 0.7, 0.7, 0.7, 0.7, 0.7, 0.7]
                Nutrient
                Solute NO3: InitialValuesUnits=ppm; WaterTableConcentration=0; D0=0; DepthConstant=0; MaxDepthSoluteAccessible=0; RunoffEffectivenessAtMovingSolute=0; MaxEffectiveRunoff=0
                  Thickness=[25, 25, 50, 100, 100, 150, 150, 150, 150, 150, 150, 300, 300, 300, 400]
                  InitialValues=[28, 49, 31, 17, 11, 3, 7, 7, 2, 1, 0.47619, 0.238095, 0.47619, 0.904762, 0]
                Solute NH4: InitialValuesUnits=ppm; WaterTableConcentration=0; D0=0; DepthConstant=0; MaxDepthSoluteAccessible=0; RunoffEffectivenessAtMovingSolute=0; MaxEffectiveRunoff=0
                  Thickness=[25, 25, 50, 100, 100, 150, 150, 150, 150, 150, 150, 300, 300, 300, 400]
                  InitialValues=[46, 39, 23, 2.7, 9.6, 22, 1.97531, 0.490196, 0.490196, 0, 0, 0.0238095, 0.238095, 0, 0]
                Solute Urea: same as Validation.USA.FACTS.Ames2015.Ames2015Base.paddock.Soil.Urea
              Manager WaterTableManager: same as Validation.USA.FACTS.Ames2017.Ames2017Base.paddock.WaterTableManager
              Operations Harvesting
                2015-10-13  [Soybean].Harvest();
                2015-10-13  [Soybean].EndCrop();
              Report FACTSReport: EventNames=[Clock].DoReport
                VariableNames:
                  [Clock].Today
                  [Soil].Water.Volumetric[4] as SW15cm
                  ([Soil].Water.Volumetric[6]+[Soil].Water.Volumetric[7])/2 as SW45cm
                  [Soil].Temperature.Value[4] as ST15cm
                  ([Soil].Temperature.Value[6]+[Soil].Temperature.Value[7])/2 as ST45cm
                  [Soil].Temperature.Value[6] as ST1111115cm
        Experiment Sutherland2017
          Factors
            Factor Sow
              CompositeFactor Early: Specifications=[SowingRule].Script.SowingDate=2017-05-08
              CompositeFactor Late: Specifications=[SowingRule].Script.SowingDate=2017-05-25
          Simulation Sutherland2017Base
            Clock: Start=2017-01-01; End=2017-12-31
            Summary summaryfile
            Weather: FileName=Sutherland.met; Latitude=42.9; Tav=8.193954; Amp=30.75748
            SoilArbitrator Soil Arbitrator
            Zone paddock: Area=1; Slope=0; AspectAngle=0; Altitude=50
              MicroClimate: a_interception=0; b_interception=1; c_interception=0; d_interception=0; SoilHeatFluxFraction=0.4; MinimumHeightDiffForNewLayer=0; NightInterceptionFraction=0.5; ReferenceHeight=2
              Irrigation
              Fertiliser
              SurfaceOrganicMatter: InitialResidueName=maize; InitialResidueType=maize; InitialResidueMass=2800; InitialStandingFraction=0; InitialCPR=0; InitialCNR=60
              Report DailyReport: same as Validation.USA.FACTS.Ames2015.Ames2015Base.paddock.DailyReport
              Manager SowingRule
                SowingDate = 1997-12-23
                RowSpacing = 760
                SowingDepth = 50
                SowingRate = 30
                CultivarName = PioneerP22T69R_MG22
                script: same as in Validation.USA.FACTS.Ames2015.Ames2015Base.paddock.SowingRule
              Manager HarvestRule
```csharp
using Models.PMF.Phen;
using APSIM.Shared.Utilities;
using System.Xml.Serialization;
using Models;
using Models.PMF;
using Models.Soils;
using System.Text;
using System.Collections.Generic;
using Models.Core;
using System;
using Models.Soils.Nutrients;

namespace Models
{
    [Serializable] 
    public class Script : Model
    {      
        [Link] private Plant Soybean;
        [Link] private Zone zone;
        [Link(Type = LinkType.Path, Path = "[Soybean].Phenology")]
        private Phenology phenology;
                    
        
        [EventSubscribe("StartOfSimulation")]
        private void OnSimulationCommencing(object sender, EventArgs e)
        {
        }       
        
        [EventSubscribe("DoManagement")]
        private void OnDoManagement(object sender, EventArgs e)
        {
        if (phenology.CurrentPhase.Name=="ReadyForHarvesting")
           {
           Soybean.Harvest();
           Soybean.EndCrop();
           }
        }
        
        [EventSubscribe("DoManagementCalculations")]
        private void OnDoManagementCalculations(object sender, EventArgs e)
        {
            
        }
    }
}
```
              Report HarvestReport: EventNames=[Soybean].Harvesting
                VariableNames:
                  [Clock].Today
                  [Soybean].Structure.MainStemPrimordiaNo
                  [Soybean].Phenology.NFF
                  [Soybean].Script.FinalTag
              Operations: same as Validation.USA.FACTS.Sutherland2015.Sutherland2015Base.paddock.Operations
              Plant Soybean
              Soil: SoilType=Primghar; NearestTown=Sutherland; State=Iowa; Country=US; Latitude=42.92; Longitude=-95.53; DataSource=web soil survey; Comments=hydrological parameters and BD from Saxton and Rawls, 2006
                Physical: same as Validation.USA.FACTS.Sutherland2015.Sutherland2015Base.paddock.Soil.Physical
                Organic: same as Validation.USA.FACTS.Sutherland2015.Sutherland2015Base.paddock.Soil.Organic
                Chemical: same as Validation.USA.FACTS.Sutherland2015.Sutherland2015Base.paddock.Soil.Chemical
                Water: InitialPAWmm=361; RelativeTo=LL15; FilledFromTop=false
                  Thickness=[25, 25, 50, 100, 100, 150, 150, 150, 150, 150, 150, 300, 300, 300, 400]
                  InitialValues=[0.22, 0.24, 0.24, 0.25, 0.25, 0.3, 0.27, 0.27, 0.263, 0.26, 0.24, 0.24, 0.3, 0.3, 0.3]
                CERESSoilTemperature Temperature
                WaterBalance SoilWater: same as Validation.USA.FACTS.Sutherland2015.Sutherland2015Base.paddock.Soil.SoilWater
                Nutrient
                Solute NO3: InitialValuesUnits=ppm; WaterTableConcentration=0; D0=0; DepthConstant=0; MaxDepthSoluteAccessible=0; RunoffEffectivenessAtMovingSolute=0; MaxEffectiveRunoff=0
                  Thickness=[25, 25, 50, 100, 100, 150, 150, 150, 150, 150, 150, 300, 300, 300, 400]
                  InitialValues=[8, 8, 4, 2, 1.6, 1.7, 1.2, 1.47059, 1.47059, 1.47059, 0.47619, 0.238095, 0.47619, 0.904762, 0]
                Solute NH4: InitialValuesUnits=ppm; WaterTableConcentration=0; D0=0; DepthConstant=0; MaxDepthSoluteAccessible=0; RunoffEffectivenessAtMovingSolute=0; MaxEffectiveRunoff=0
                  Thickness=[25, 25, 50, 100, 100, 150, 150, 150, 150, 150, 150, 300, 300, 300, 400]
                  InitialValues=[12.8, 12.8, 6.4, 3.44, 5.6, 7.8, 1.97531, 0.490196, 0.490196, 0, 0, 0.0238095, 0.238095, 0, 0]
                Solute Urea: same as Validation.USA.FACTS.Ames2015.Ames2015Base.paddock.Soil.Urea
              Manager WaterTableManager: same as Validation.USA.FACTS.Ames2015.Ames2015Base.paddock.WaterTableManager
              Report FACTSReport: EventNames=[Clock].DoReport
                VariableNames:
                  [Clock].Today
                  [Soil].Water.Volumetric[4] as SW15cm
                  ([Soil].Water.Volumetric[6]+[Soil].Water.Volumetric[7])/2 as SW45cm
                  [Soil].Temperature.Value[4] as ST15cm
                  ([Soil].Temperature.Value[6]+[Soil].Temperature.Value[7])/2 as ST45cm
      Folder Arkansas
        Memo Arkansas data description
          This trial ([EdwardsAndPurcell_2005]) was conducted on a silt loam soil in Fayetteville Arkansas, USA, in years 2001, 2002 and 2003. The factor studied were seven soybean maturity groups (from mg 00 to mg 6) and in some year multiple varieties within a maturity group. Crops were irrigated. No N fertilization was applied. This region has no shallow water tables. Phenology data were collected at different growth stages and were used in this work. Weather and soil data for the site were estimated from public sources. For additional information about this trial, see [ARCHONTOULIS2014465].
        Experiment Arkansas2001
          Factors
            Factor Cv
              Specification=[SowingRule].Script.CultivarName=Trial_MG00,Lambert_MG0,IA1006_MG10,IA2008_MG20,Macon_MG30,Pioneer94B01_MG40,Hutcheson_MG50,NK622_MG60
          Simulation Arkansas2001Base
            Clock: Start=2001-01-01; End=2001-12-31
            Summary summaryfile
            Weather: FileName=Arkansas.met; Latitude=36.083; Tav=14.53719; Amp=23.64289
            SoilArbitrator Soil Arbitrator
            Zone paddock: Area=1; Slope=0; AspectAngle=0; Altitude=50
              MicroClimate: a_interception=0; b_interception=1; c_interception=0; d_interception=0; SoilHeatFluxFraction=0.4; MinimumHeightDiffForNewLayer=0; NightInterceptionFraction=0.5; ReferenceHeight=2
              Irrigation
              Fertiliser
              SurfaceOrganicMatter: InitialResidueName=maize; InitialResidueType=maize; InitialResidueMass=4500; InitialStandingFraction=0; InitialCPR=0; InitialCNR=55
              Report DailyReport: same as Validation.USA.FACTS.Ames2015.Ames2015Base.paddock.DailyReport
              Manager SowingRule
                RowSpacing = 380
                SowingDepth = 50
                SowingRate = 43
                CultivarName = Ames_P932T16R_32MG
                SowingDate = 2001-06-10
                script: same as in Validation.USA.FACTS.Ames2015.Ames2015Base.paddock.SowingRule
              Manager HarvestRule: same as Validation.USA.FACTS.Sutherland2017.Sutherland2017Base.paddock.HarvestRule
              Report HarvestReport: EventNames=[Soybean].Harvesting
                VariableNames:
                  [Clock].Today
                  [Soybean].Structure.MainStemPrimordiaNo
                  [Soybean].Phenology.NFF
                  [Soybean].Script.FinalTag
              Plant Soybean
              Soil: LocalName=Plano (Wisconsin); NearestTown=Ames; State=Iowa; Country=US; ApsoilNumber=34; Latitude=0; Longitude=0; DataSource=for palle paper; Comments=data from WSS and saxton equations
                Physical
                  Thickness  BD     AirDry  LL15   DUL    SAT
                  150        1.195  0.078   0.155  0.367  0.522
                  150        1.195  0.14    0.155  0.367  0.522
                  300        1.428  0.183   0.183  0.363  0.438
                  300        1.428  0.183   0.183  0.363  0.438
                  300        1.452  0.18    0.18   0.351  0.429
                  320        1.614  0.142   0.142  0.226  0.372
                  SoilCrop SoybeanSoil: LL=[0.155, 0.155, 0.183, 0.183, 0.18, 0.142]; KL=[0.08, 0.08, 0.08, 0.08, 0.066, 0.034]; XF=[1, 1, 1, 1, 1, 0.053]
                WaterBalance SoilWater: SummerDate=1-jun; SummerU=8.62; SummerCona=3.81; WinterDate=1-dec; WinterU=8.62; WinterCona=3.81; DiffusConst=40; DiffusSlope=16; Salb=0.13; CN2Bare=73; CNRed=20; CNCov=0.8; PSIDul=-100; Thickness=[150, 150, 300, 300, 300, 320]; SWCON=[0.332, 0.332, 0.212, 0.212, 0.223, 0.423]
                Organic: FOMCNRatio=45; CarbonUnits=Total
                  Thickness  Carbon  SoilCNRatio  FBiom  FInert  FOM
                  150        2.326   14           0.035  0.4     388.264
                  150        2.326   14           0.019  0.5     288.771
                  300        0.349   14           0.013  0.68    159.737
                  300        0.349   14           0.01   0.8     88.3603
                  300        0.331   14           0.01   0.8     48.8775
                  320        0.174   14           0.01   0.855   25.9907
                Chemical: Thickness=[150, 150, 300, 300, 300, 320]; PH=[6.582, 6.582, 6.052, 6.052, 6.0785, 6.317]; PHUnits=Water
                Water: Thickness=[150, 150, 300, 300, 300, 320]; InitialValues=[0.155, 0.155, 0.183, 0.183, 0.18, 0.142]; InitialPAWmm=0; RelativeTo=LL15; FilledFromTop=true
                CERESSoilTemperature Temperature
                Nutrient
                Solute NO3: Thickness=[150, 150, 300, 300, 300, 320]; InitialValues=[15.0628, 5.5788, 0.70028, 0, 0, 0]; InitialValuesUnits=ppm; WaterTableConcentration=0; D0=0; DepthConstant=0; MaxDepthSoluteAccessible=0; RunoffEffectivenessAtMovingSolute=0; MaxEffectiveRunoff=0
                Solute NH4: Thickness=[150, 150, 300, 300, 300, 320]; InitialValues=[6.69456, 1.67364, 0.233427, 0, 0, 0]; InitialValuesUnits=ppm; WaterTableConcentration=0; D0=0; DepthConstant=0; MaxDepthSoluteAccessible=0; RunoffEffectivenessAtMovingSolute=0; MaxEffectiveRunoff=0
                Solute Urea: Thickness=[150, 150, 300, 300, 300, 320]; InitialValues=[0, 0, 0, 0, 0, 0]; InitialValuesUnits=kg/ha; WaterTableConcentration=0; D0=0; DepthConstant=0; MaxDepthSoluteAccessible=0; RunoffEffectivenessAtMovingSolute=0; MaxEffectiveRunoff=0
        Experiment Arkansas2002
          Factors
            Factor Cv
              Specification=[SowingRule].Script.CultivarName=Trial_MG00,Lambert_MG0,IA1006_MG10,IA2008_MG20,Macon_MG30,Pioneer94B01_MG40,Hutcheson_MG50,NK622_MG60
          Simulation Arkansas2002Base
            Clock: Start=2002-01-01; End=2002-12-31
            Summary summaryfile
            Weather: FileName=Arkansas.met; Latitude=36.083; Tav=14.53719; Amp=23.64289
            SoilArbitrator Soil Arbitrator
            Zone paddock: Area=1; Slope=0; AspectAngle=0; Altitude=50
              MicroClimate: a_interception=0; b_interception=1; c_interception=0; d_interception=0; SoilHeatFluxFraction=0.4; MinimumHeightDiffForNewLayer=0; NightInterceptionFraction=0.5; ReferenceHeight=2
              Irrigation
              Fertiliser
              SurfaceOrganicMatter: InitialResidueName=maize; InitialResidueType=maize; InitialResidueMass=4500; InitialStandingFraction=0; InitialCPR=0; InitialCNR=55
              Report DailyReport: same as Validation.USA.FACTS.Ames2015.Ames2015Base.paddock.DailyReport
              Manager SowingRule
                RowSpacing = 380
                SowingDepth = 70
                SowingRate = 43
                CultivarName = Ames_P932T16R_32MG
                SowingDate = 2002-05-07
                script: same as in Validation.USA.FACTS.Ames2015.Ames2015Base.paddock.SowingRule
              Manager HarvestRule: same as Validation.USA.FACTS.Sutherland2017.Sutherland2017Base.paddock.HarvestRule
              Report HarvestReport: EventNames=[Soybean].Harvesting
                VariableNames:
                  [Clock].Today
                  [Soybean].Structure.MainStemPrimordiaNo
                  [Soybean].Phenology.NFF
                  [Soybean].Script.FinalTag
              Plant Soybean
              Soil: same as Validation.USA.Arkansas.Arkansas2001.Arkansas2001Base.paddock.Soil
        Experiment Arkansas2003
          Factors
            Factor Cv
              Specification=[SowingRule].Script.CultivarName=Trial_MG00,Lambert_MG0,IA1006_MG10,IA2008_MG20,Macon_MG30,Pioneer94B01_MG40,Hutcheson_MG50,NK622_MG60
          Simulation Arkansas2003Base
            Clock: Start=2003-01-01; End=2003-12-31
            Summary summaryfile
            Weather: FileName=Arkansas.met; Latitude=36.083; Tav=14.53719; Amp=23.64289
            SoilArbitrator Soil Arbitrator
            Zone paddock: Area=1; Slope=0; AspectAngle=0; Altitude=50
              MicroClimate: a_interception=0; b_interception=1; c_interception=0; d_interception=0; SoilHeatFluxFraction=0.4; MinimumHeightDiffForNewLayer=0; NightInterceptionFraction=0.5; ReferenceHeight=2
              Irrigation
              Fertiliser
              SurfaceOrganicMatter: InitialResidueName=maize; InitialResidueType=maize; InitialResidueMass=4500; InitialStandingFraction=0; InitialCPR=0; InitialCNR=55
              Report DailyReport: same as Validation.USA.FACTS.Ames2015.Ames2015Base.paddock.DailyReport
              Manager SowingRule
                RowSpacing = 380
                SowingDepth = 50
                SowingRate = 43
                CultivarName = Ames_P932T16R_32MG
                SowingDate = 2003-05-27
                script: same as in Validation.USA.FACTS.Ames2015.Ames2015Base.paddock.SowingRule
              Manager HarvestRule: same as Validation.USA.FACTS.Sutherland2017.Sutherland2017Base.paddock.HarvestRule
              Report HarvestReport: EventNames=[Soybean].Harvesting
                VariableNames:
                  [Clock].Today
                  [Soybean].Structure.MainStemPrimordiaNo
                  [Soybean].Phenology.NFF
                  [Soybean].Script.FinalTag
              Plant Soybean
              Soil: same as Validation.USA.Arkansas.Arkansas2001.Arkansas2001Base.paddock.Soil
      Folder Indiana
        Memo Indiana data description
          This trial ([Robinsonetal_2009]) conducted in West Lafayette Indiana, USA, in years 2006 and 2007. The factors studied were six planting dates x three varieties (from mg 2.6 to mg 3.7). No irrigation or fertilization applied. Phenology, gravimetric soil moisture at three depth (manual soil cores), pod numbers, seed size, grain yield, protein and oil data were collected. Weather and soil data for the site were estimated from public sources. For additional information about this trial, see [ARCHONTOULIS2014465].
        Experiment Indiana2006
          Factors
            Permutation
              Factor Sow
                CompositeFactor Mar30
                  Specifications:
                    [SowingRule].Script.SowingDate=2006-03-30
                    [SowingRule].Script.SowingDepth=65
                CompositeFactor Apr13
                  Specifications:
                    [SowingRule].Script.SowingDate=2006-04-13
                    [SowingRule].Script.SowingDepth=80
                CompositeFactor Apr27
                  Specifications:
                    [SowingRule].Script.SowingDate=2006-04-27
                    [SowingRule].Script.SowingDepth=50
                CompositeFactor May10
                  Specifications:
                    [SowingRule].Script.SowingDate=2006-05-10
                    [SowingRule].Script.SowingDepth=35
                CompositeFactor May30
                  Specifications:
                    [SowingRule].Script.SowingDate=2006-05-30
                    [SowingRule].Script.SowingDepth=80
                CompositeFactor Jun06
                  Specifications:
                    [SowingRule].Script.SowingDate=2006-06-06
                    [SowingRule].Script.SowingDepth=100
              Factor Cv
                Specification=[SowingRule].Script.CultivarName=Becks367NRR_MG37,Becks321NRR_MG32,Pioneer92MGI_MG26
          Simulation Indiana2006Base
            Clock: Start=2006-01-01; End=2006-12-31
            Summary summaryfile
            Weather: FileName=Indiana.met; Latitude=40.8; Tav=10.2994; Amp=27.44909
            SoilArbitrator Soil Arbitrator
            Zone paddock: Area=1; Slope=0; AspectAngle=0; Altitude=50
              MicroClimate: a_interception=0; b_interception=1; c_interception=0; d_interception=0; SoilHeatFluxFraction=0.4; MinimumHeightDiffForNewLayer=0; NightInterceptionFraction=0.5; ReferenceHeight=2
              Irrigation
              Manager Automatic irrigation based on water deficit
                FASW = 0
                WaterDeficit = 0
                AutoIrrigationOn = True
                FASWThreshold = 0.9
                FASWDepth = 900
```csharp
using Models.Interfaces;
using APSIM.Shared.Utilities;
using System.Xml.Serialization;
using Models;
using Models.PMF;
using Models.Soils;
using System.Text;
using System.Collections.Generic;
using Models.Core;
using System;
using Models.Soils.Nutrients;

namespace Models
{
    [Serializable] 
    public class Script : Model
    {
        [Link] private Zone zone;
        [Link] private Irrigation irrigation;
        [Link] private Soil soil;
        [Link]
        private IPhysical soilPhysical;
        [Link]
        private ISoilWater waterBalance;
        public double FASW { get; set; }
        public double WaterDeficit  { get; set; }
    
        
        [Description("Auto irrigation on?")]
        public bool AutoIrrigationOn { get; set; }

        [Description("Threshold fraction available water (0-1)")]
        public double FASWThreshold { get; set; }

        [Description("Soil depth (mm) to which fraction available water is calculated")]
        public double FASWDepth { get; set; }

        [EventSubscribe("DoManagement")]
        private void OnDoManagement(object sender, EventArgs e)
        {
            CalculateFASW();
            if (AutoIrrigationOn)
            {
                if (FASW < FASWThreshold)
                {
                    double amount = 10;
                    irrigation.Apply(WaterDeficit, depth: 0);
                }
            }
        }
        
        private void CalculateFASW()
        {
            double[] LL15 = MathUtilities.Multiply(soilPhysical.LL15, soilPhysical.Thickness);
            double[] DUL = MathUtilities.Multiply(soilPhysical.DUL, soilPhysical.Thickness);
        
            int nlayr = GetLayerIndex();
            double cumdep = MathUtilities.Sum(soilPhysical.Thickness, 0, nlayr, 0.0);

            double excess_fr = MathUtilities.Divide((cumdep - FASWDepth), soilPhysical.Thickness[nlayr], 0.0);

            // note that results may be strange if swdep < ll15
            double avail_sw = (MathUtilities.Sum(waterBalance.SWmm, 0, nlayr, 0.0)
                              - excess_fr * waterBalance.SWmm[nlayr])
                              - (MathUtilities.Sum(LL15, 0, nlayr, 0.0)
                              - excess_fr * LL15[nlayr]);


            double pot_avail_sw = (MathUtilities.Sum(DUL, 0, nlayr, 0.0)
                                  - excess_fr * DUL[nlayr])
                                  - (MathUtilities.Sum(LL15, 0, nlayr, 0.0)
                                  - excess_fr * LL15[nlayr]);

            FASW = MathUtilities.Divide(avail_sw, pot_avail_sw, 0.0);
            WaterDeficit = MathUtilities.Constrain(pot_avail_sw - avail_sw, 0.0, 100000);
        }

        private int GetLayerIndex()
        {
            double[] cumThickness = soilPhysical.ThicknessCumulative;
            for (int i = 1; i < cumThickness.Length; i++)
            {
                if (FASWDepth < cumThickness[i])
                    return i - 1;
            }
            
            return cumThickness.Length - 1;
        }

    }
}
```
              Fertiliser
              SurfaceOrganicMatter: InitialResidueName=maize; InitialResidueType=maize; InitialResidueMass=4500; InitialStandingFraction=0; InitialCPR=0; InitialCNR=55
              Report DailyReport: same as Validation.USA.FACTS.Ames2015.Ames2015Base.paddock.DailyReport
              Manager SowingRule
                SowingDate = 2001-06-10
                RowSpacing = 380
                SowingDepth = 50
                SowingRate = 38
                CultivarName = Ames_P932T16R_32MG
                script: same as in Validation.USA.FACTS.Ames2015.Ames2015Base.paddock.SowingRule
              Manager HarvestRule: same as Validation.USA.FACTS.Sutherland2017.Sutherland2017Base.paddock.HarvestRule
              Report HarvestReport: EventNames=[Soybean].Harvesting
                VariableNames:
                  [Clock].Today
                  [Soybean].Structure.MainStemPrimordiaNo
                  [Soybean].Phenology.NFF
                  [Soybean].Script.FinalTag
              Plant Soybean
              Soil: LocalName=Clarion (near Newell); NearestTown=Ames; State=Iowa; Country=US; ApsoilNumber=34; Latitude=0; Longitude=0; Comments=all data only from WSS
                DataSource=for Mahli al-Kaisi paper (Marsden Research farm), tes file , long term soybean
                Physical
                  Thickness  BD     AirDry  LL15   DUL    SAT
                  180        1.425  0.144   0.16   0.297  0.412
                  120        1.425  0.132   0.147  0.289  0.412
                  160        1.425  0.147   0.147  0.289  0.412
                  200        1.6    0.165   0.165  0.293  0.346
                  250        1.6    0.165   0.165  0.293  0.346
                  410        1.6    0.105   0.105  0.25   0.346
                  200        1.6    0.105   0.105  0.25   0.346
                  280        1.6    0.105   0.105  0.25   0.346
                  300        1.6    0.105   0.105  0.25   0.346
                  SoilCrop SoybeanSoil
                    LL=[0.16, 0.147, 0.147, 0.165, 0.165, 0.105, 0.105, 0.105, 0.105]
                    KL=[0.08, 0.08, 0.08, 0.08, 0.08, 0.08, 0.08, 0.08, 0.08]
                    XF=[1, 1, 1, 1, 1, 1, 1, 1, 1]
                WaterBalance SoilWater: SummerDate=1-jun; SummerU=6; SummerCona=3.5; WinterDate=1-dec; WinterU=6; WinterCona=3.5; DiffusConst=40; DiffusSlope=16; Salb=0.13; CN2Bare=73; CNRed=20; CNCov=0.8; PSIDul=-100; Thickness=[180, 120, 160, 200, 250, 410, 200]; SWCON=[0.358, 0.375, 0.375, 0.261, 0.261, 0.369, 0.369]
                Organic: FOMCNRatio=45; CarbonUnits=Total
                  Thickness  Carbon  SoilCNRatio  FBiom  FInert  FOM
                  180        2.035   14           0.035  0.4     315.909
                  120        1.453   14           0.018  0.512   249.288
                  160        1.453   14           0.014  0.624   181.784
                  200        0.727   14           0.01   0.768   122.497
                  250        0.727   14           0.01   0.8     74.7884
                  410        0.145   14           0.01   0.8     33.2965
                  200        0.145   14           0.01   0.874   22.4371
                Chemical: Thickness=[180, 120, 160, 200, 250, 410, 200]; PH=[6.317, 6.317, 6.317, 6.582, 6.582, 7.96, 7.96]; PHUnits=Water
                Water: Thickness=[180, 120, 160, 200, 250, 410, 200, 280, 300]; InitialValues=[0.297, 0.289, 0.289, 0.293, 0.293, 0.25, 0.25, 0.25, 0.25]; InitialPAWmm=294.57; RelativeTo=LL15; FilledFromTop=true
                CERESSoilTemperature Temperature
                Nutrient
                Solute NO3: Thickness=[180, 120, 160, 200, 250, 410, 200]; InitialValues=[10.5263, 5.84795, 1.31579, 0, 0, 0, 0]; InitialValuesUnits=ppm; WaterTableConcentration=0; D0=0; DepthConstant=0; MaxDepthSoluteAccessible=0; RunoffEffectivenessAtMovingSolute=0; MaxEffectiveRunoff=0
                Solute NH4: Thickness=[180, 120, 160, 200, 250, 410, 200]; InitialValues=[4.67836, 1.75439, 0.438596, 0, 0, 0, 0]; InitialValuesUnits=ppm; WaterTableConcentration=0; D0=0; DepthConstant=0; MaxDepthSoluteAccessible=0; RunoffEffectivenessAtMovingSolute=0; MaxEffectiveRunoff=0
                Solute Urea: Thickness=[180, 120, 160, 200, 250, 410, 200]; InitialValues=[0, 0, 0, 0, 0, 0, 0]; InitialValuesUnits=kg/ha; WaterTableConcentration=0; D0=0; DepthConstant=0; MaxDepthSoluteAccessible=0; RunoffEffectivenessAtMovingSolute=0; MaxEffectiveRunoff=0
        Experiment Indiana2007
          Factors
            Permutation
              Factor Sow
                CompositeFactor Mar27
                  Specifications:
                    [SowingRule].Script.SowingDate=2007-03-27
                    [SowingRule].Script.SowingDepth=50
                CompositeFactor Apr10
                  Specifications:
                    [SowingRule].Script.SowingDate=2007-04-10
                    [SowingRule].Script.SowingDepth=75
                CompositeFactor Apr30
                  Specifications:
                    [SowingRule].Script.SowingDate=2007-04-30
                    [SowingRule].Script.SowingDepth=55
                CompositeFactor May09
                  Specifications:
                    [SowingRule].Script.SowingDate=2007-05-09
                    [SowingRule].Script.SowingDepth=55
                CompositeFactor Jun01
                  Specifications:
                    [SowingRule].Script.SowingDate=2007-06-01
                    [SowingRule].Script.SowingDepth=55
                CompositeFactor Jun07
                  Specifications:
                    [SowingRule].Script.SowingDate=2007-06-07
                    [SowingRule].Script.SowingDepth=80
              Factor Cv
                Specification=[SowingRule].Script.CultivarName=Becks367NRR_MG37,Becks321NRR_MG32,Pioneer92MGI_MG26
          Simulation Indiana2007Base
            Clock: Start=2007-01-01; End=2007-12-31
            Summary summaryfile
            Weather: FileName=Indiana.met; Latitude=40.8; Tav=10.2994; Amp=27.44909
            SoilArbitrator Soil Arbitrator
            Zone paddock: Area=1; Slope=0; AspectAngle=0; Altitude=50
              MicroClimate: a_interception=0; b_interception=1; c_interception=0; d_interception=0; SoilHeatFluxFraction=0.4; MinimumHeightDiffForNewLayer=0; NightInterceptionFraction=0.5; ReferenceHeight=2
              Irrigation
              Manager Automatic irrigation based on water deficit: same as Validation.USA.Indiana.Indiana2006.Indiana2006Base.paddock.Automatic irrigation based on water deficit
              Fertiliser
              SurfaceOrganicMatter: InitialResidueName=maize; InitialResidueType=maize; InitialResidueMass=4500; InitialStandingFraction=0; InitialCPR=0; InitialCNR=55
              Report DailyReport: same as Validation.USA.FACTS.Ames2015.Ames2015Base.paddock.DailyReport
              Manager SowingRule: same as Validation.USA.Indiana.Indiana2006.Indiana2006Base.paddock.SowingRule
              Manager HarvestRule: same as Validation.USA.FACTS.Sutherland2017.Sutherland2017Base.paddock.HarvestRule
              Report HarvestReport: EventNames=[Soybean].Harvesting
                VariableNames:
                  [Clock].Today
                  [Soybean].Structure.MainStemPrimordiaNo
                  [Soybean].Phenology.NFF
                  [Soybean].Script.FinalTag
              Plant Soybean
              Soil: LocalName=Clarion (near Newell); NearestTown=Ames; State=Iowa; Country=US; ApsoilNumber=34; Latitude=0; Longitude=0; Comments=all data only from WSS
                DataSource=for Mahli al-Kaisi paper (Marsden Research farm), tes file , long term soybean
                Physical: same as Validation.USA.Indiana.Indiana2006.Indiana2006Base.paddock.Soil.Physical
                WaterBalance SoilWater: SummerDate=1-jun; SummerU=7.975; SummerCona=3.675; WinterDate=1-dec; WinterU=3.975; WinterCona=3.675; DiffusConst=40; DiffusSlope=16; Salb=0.13; CN2Bare=73; CNRed=20; CNCov=0.8; PSIDul=-100; Thickness=[180, 120, 160, 200, 250, 410, 200]; SWCON=[0.358, 0.375, 0.375, 0.261, 0.261, 0.369, 0.369]
                Organic: same as Validation.USA.Indiana.Indiana2006.Indiana2006Base.paddock.Soil.Organic
                Chemical: Thickness=[180, 120, 160, 200, 250, 410, 200]; PH=[6.317, 6.317, 6.317, 6.582, 6.582, 7.96, 7.96]; PHUnits=Water
                Water: Thickness=[180, 120, 160, 200, 250, 410, 200, 280, 300]; InitialValues=[0.297, 0.289, 0.289, 0.293, 0.293, 0.25, 0.25, 0.25, 0.25]; InitialPAWmm=294.57; RelativeTo=LL15; FilledFromTop=true
                CERESSoilTemperature Temperature
                Nutrient
                Solute NO3: same as Validation.USA.Indiana.Indiana2006.Indiana2006Base.paddock.Soil.NO3
                Solute NH4: same as Validation.USA.Indiana.Indiana2006.Indiana2006Base.paddock.Soil.NH4
                Solute Urea: same as Validation.USA.Indiana.Indiana2006.Indiana2006Base.paddock.Soil.Urea
      Folder Mississippi
        Memo Mississippi data description
          This trial ([Zhangetal_2004]) was conducted in Stoneville Mississippi USA, in years 1998 to 2002. The factors studied were planting dates (ranged from early March to early July) and varieties (from mg 3.4 to mg 5.6). Crops were irrigated. Phenological measurements were obtained in the field following the V/R staging system. For additional information about this trial, see [ARCHONTOULIS2014465].
        Experiment Mississippi2002
          Factors
            Permutation
              Factor Cv
                Specification=[SowingRule].Script.CultivarName=AsgrowAG4403_MG40,HornbeckHBK4891_MG40,AsgrowAG5701_MG50,PioneerP9504_MG50
              Factor Sow
                CompositeFactor Early: Specifications=[SowingRule].Script.SowingDate=2002-04-16
                CompositeFactor Late: Specifications=[SowingRule].Script.SowingDate=2002-05-08
          Simulation Mississippi2002Base
            Clock: Start=2002-01-01; End=2002-12-31
            Summary summaryfile
            Weather: FileName=StonevilleMississippi.met; Latitude=33.42; Tav=17.73499; Amp=21.70552
            SoilArbitrator Soil Arbitrator
            Zone paddock: Area=1; Slope=0; AspectAngle=0; Altitude=50
              MicroClimate: a_interception=0; b_interception=1; c_interception=0; d_interception=0; SoilHeatFluxFraction=0.4; MinimumHeightDiffForNewLayer=0; NightInterceptionFraction=0.5; ReferenceHeight=2
              Irrigation
              Fertiliser
              SurfaceOrganicMatter: InitialResidueName=maize; InitialResidueType=maize; InitialResidueMass=4500; InitialStandingFraction=0; InitialCPR=0; InitialCNR=55
              Report DailyReport: same as Validation.USA.FACTS.Ames2015.Ames2015Base.paddock.DailyReport
              Manager SowingRule
                RowSpacing = 760
                SowingDepth = 50
                SowingRate = 38
                CultivarName = Ames_P932T16R_32MG
                SowingDate = 2001-06-10
                script: same as in Validation.USA.FACTS.Ames2015.Ames2015Base.paddock.SowingRule
              Manager HarvestRule: same as Validation.USA.FACTS.Sutherland2017.Sutherland2017Base.paddock.HarvestRule
              Report HarvestReport: EventNames=[Soybean].Harvesting
                VariableNames:
                  [Clock].Today
                  [Soybean].Structure.MainStemPrimordiaNo
                  [Soybean].Phenology.NFF
                  [Soybean].Script.FinalTag
              Plant Soybean
              Soil: LocalName=Clarion (near Newell); NearestTown=Ames; State=Iowa; Country=US; ApsoilNumber=34; Latitude=0; Longitude=0; Comments=all data only from WSS
                DataSource=for Mahli al-Kaisi paper (Marsden Research farm), tes file , long term soybean
                Physical
                  Thickness  BD     AirDry  LL15   DUL    SAT
                  180        1.425  0.144   0.16   0.297  0.412
                  120        1.425  0.132   0.147  0.289  0.412
                  160        1.425  0.147   0.147  0.289  0.412
                  200        1.6    0.165   0.165  0.293  0.346
                  250        1.6    0.165   0.165  0.293  0.346
                  410        1.6    0.105   0.105  0.25   0.346
                  200        1.6    0.105   0.105  0.25   0.346
                  SoilCrop SoybeanSoil: LL=[0.16, 0.147, 0.147, 0.165, 0.165, 0.105, 0.105]; KL=[0.08, 0.08, 0.08, 0.08, 0.08, 0.06, 0.03]; XF=[1, 1, 1, 1, 1, 0.09, 0.05]
                WaterBalance SoilWater: same as Validation.USA.Indiana.Indiana2007.Indiana2007Base.paddock.Soil.SoilWater
                Organic: same as Validation.USA.Indiana.Indiana2006.Indiana2006Base.paddock.Soil.Organic
                Chemical: Thickness=[180, 120, 160, 200, 250, 410, 200]; PH=[6.317, 6.317, 6.317, 6.582, 6.582, 7.96, 7.96]; PHUnits=Water
                Water: Thickness=[180, 120, 160, 200, 250, 410, 200]; InitialValues=[0.16, 0.147, 0.147, 0.165, 0.165, 0.105, 0.105]; InitialPAWmm=0; RelativeTo=LL15; FilledFromTop=true
                CERESSoilTemperature Temperature
                Nutrient
                Solute NO3: same as Validation.USA.Indiana.Indiana2006.Indiana2006Base.paddock.Soil.NO3
                Solute NH4: same as Validation.USA.Indiana.Indiana2006.Indiana2006Base.paddock.Soil.NH4
                Solute Urea: same as Validation.USA.Indiana.Indiana2006.Indiana2006Base.paddock.Soil.Urea
        Experiment Mississippi2003
          Factors
            Permutation
              Factor Cv
                Specification=[SowingRule].Script.CultivarName=AsgrowAG4403_MG40,HornbeckHBK4891_MG40,AsgrowAG5701_MG50,PioneerP9504_MG50
              Factor Sow
                CompositeFactor Early: Specifications=[SowingRule].Script.SowingDate=2003-04-03
                CompositeFactor Late: Specifications=[SowingRule].Script.SowingDate=2003-05-06
          Simulation Mississippi2003Base
            Clock: Start=2003-01-01; End=2003-12-31
            Summary summaryfile
            Weather: FileName=StonevilleMississippi.met; Latitude=33.42; Tav=17.73499; Amp=21.70552
            SoilArbitrator Soil Arbitrator
            Zone paddock: same as Validation.USA.Mississippi.Mississippi2002.Mississippi2002Base.paddock
      Folder Nebraska
        Memo Nebraska data description
          This trial ([Salvagiotti_et_al_2009])was conducted on a deep silt loam soil in Lincoln Nebraska USA, in years 2006 and 2007. The factors studied were different crop histories (normal N applied to corn-soy rotation and high N applied to the rotation) and 4 N fertilization treatments to the soybean crop (zero N, 180 kg N/ha at planting, 180 kg N/ha as split between preplanting and V6 leaf stage, and 180 kg N/ha at R5 stage). Crops were irrigated. Row spacing was 76 cm, plant density about 31 pl/m2 and planting date around late april to early May. The following measurements were taken: initial soil nitrate, destructive biomass samples six times during the season (size 0.46 m2 per plot) per year and per treatment, biomass partitioning, dry weight and N concentrations of each tissue (Dumas method in Rapid N Cube; Elementer, Germany), fallen leaves, phenology, and N-fixation during the growing season using the ureide method. Local weather data and public soil data were used to drive the simulations.
        Experiment Nebraska2006
          Factors
            Factor N: Specification=[Operations]
              Operations 1
                2006-05-09  [Soybean].Sow(population: 28, cultivar: "PioneerP93M11_MG31", depth: 10, rowSpacing: 762);
                2006-07-09  [Irrigation].Apply(amount: 36)
                2006-07-11  [Irrigation].Apply(amount: 97)
                2006-07-27  [Irrigation].Apply(amount: 60)
                2006-08-03  [Irrigation].Apply(amount: 58)
                2006-09-08  [Soybean].Harvest()
                2006-09-08  [Soybean].EndCrop()
              Operations 2
                2006-04-28  [Fertiliser].Apply(Amount: 180, Type: Fertiliser.Types.UreaN, Depth: 210)
                2006-05-09  [Soybean].Sow(population: 28, cultivar: "PioneerP93M11_MG31", depth: 10, rowSpacing: 762);
                2006-07-09  [Irrigation].Apply(amount: 36)
                2006-07-11  [Irrigation].Apply(amount: 97)
                2006-07-27  [Irrigation].Apply(amount: 60)
                2006-08-03  [Irrigation].Apply(amount: 58)
                2006-09-08  [Soybean].Harvest()
                2006-09-08  [Soybean].EndCrop()
              Operations 3
                2006-05-09  [Soybean].Sow(population: 28, cultivar: "PioneerP93M11_MG31", depth: 10, rowSpacing: 762);
                2006-06-20  [Fertiliser].Apply(Amount: 90, Type: Fertiliser.Types.NH4NO3N, Depth: 1)
                2006-07-09  [Irrigation].Apply(amount: 36)
                2006-07-11  [Irrigation].Apply(amount: 97)
                2006-07-26  [Fertiliser].Apply(Amount: 90, Type: Fertiliser.Types.NH4NO3N, Depth: 1)
                2006-07-27  [Irrigation].Apply(amount: 60)
                2006-08-03  [Irrigation].Apply(amount: 58)
                2006-09-08  [Soybean].Harvest()
                2006-09-08  [Soybean].EndCrop()
              Operations 4
                2006-05-09  [Soybean].Sow(population: 28, cultivar: "PioneerP93M11_MG31", depth: 10, rowSpacing: 762);
                2006-07-09  [Irrigation].Apply(amount: 36)
                2006-07-11  [Irrigation].Apply(amount: 97)
                2006-07-26  [Fertiliser].Apply(Amount: 180, Type: Fertiliser.Types.NH4NO3N, Depth: 1)
                2006-07-27  [Irrigation].Apply(amount: 60)
                2006-08-03  [Irrigation].Apply(amount: 58)
                2006-09-08  [Soybean].Harvest()
                2006-09-08  [Soybean].EndCrop()
          Simulation Sal2006Base
            Clock: Start=2006-01-01; End=2006-12-25
            Weather: FileName=Nebraska_Salvagiotti.met; Latitude=40.83; Tav=11.51039; Amp=28.57175
            Summary summaryfile
            SoilArbitrator
            Zone Field: Area=1; Slope=0; AspectAngle=0; Altitude=50
              Operations
                2016-05-06  [Soybean].Sow(population: 34, cultivar: "Ames_P92Y75_27MG", depth: 60, rowSpacing: 760);
              SurfaceOrganicMatter: InitialResidueName=maize; InitialResidueType=maize; InitialResidueMass=996; InitialStandingFraction=0; InitialCPR=0; InitialCNR=45.7
              Plant Soybean
              MicroClimate: a_interception=0; b_interception=1; c_interception=0; d_interception=0; SoilHeatFluxFraction=0.4; MinimumHeightDiffForNewLayer=0; NightInterceptionFraction=0.5; ReferenceHeight=2
              Fertiliser
              Irrigation
              Soil SoilSalvagiotti1: SoilType=Clarion; NearestTown=Ames; Region=Boone; State=Iowa; Country=US; ApsoilNumber=34; Latitude=42.02204; Longitude=-93.769115; DataSource=web soil sruvey; Comments=hydrological parameters and BD from Saxton and Rawls, 2006
                Physical
                  Thickness  ParticleSizeClay  BD     AirDry  LL15   DUL    SAT    KS
                  50         25                1.275  0.11    0.164  0.364  0.493  151.1
                  50         25                1.275  0.134   0.164  0.364  0.493  151.1
                  100        25                1.275  0.151   0.164  0.364  0.493  151.1
                  200        24                1.314  0.157   0.157  0.36   0.479  122.6
                  300        24                1.314  0.157   0.157  0.36   0.479  122.6
                  340        24                1.314  0.157   0.157  0.36   0.479  122.6
                  330        27                1.376  0.17    0.17   0.363  0.457  60.7
                  200        28                1.4    0.174   0.174  0.364  0.448  45
                  200        28                1.4    0.174   0.174  0.364  0.448  45
                  240        28                1.4    0.174   0.174  0.364  0.448  45
                  BD source: Field measured and checked for sensibility (layer 2, 3, 4)
                  AirDry source: Estimated based on local knowledge (layer 1, 2, 3, 4)
                  LL15 source: Estimated based on local knowledge (layer 2, 3, 4)
                  DUL source: Field measured and checked for sensibility (layer 1, 2, 3, 4)
                  SAT source: Calculated from measured, estimated or calculated BD (layer 1, 2, 3, 4)
                  SoilCrop SoybeanSoil
                    LL=[0.164, 0.164, 0.164, 0.157, 0.157, 0.157, 0.17, 0.22, 0.25, 0.28]
                    KL=[0.08, 0.08, 0.08, 0.08, 0.08, 0.08, 0.07, 0.06, 0.06, 0.04]
                    XF=[1, 1, 1, 1, 1, 1, 1, 1, 1, 0.4]
                Organic: FOMCNRatio=40.59; CarbonUnits=Total
                  Thickness  Carbon  SoilCNRatio  FBiom  FInert  FOM
                  50         1.967   12           0.121  0.354   836.468
                  50         1.902   12           0.099  0.366   776.318
                  100        1.579   12           0.024  0.485   668.682
                  200        1.325   12           0.016  0.613   496.111
                  300        1.389   12           0.015  0.793   317.044
                  340        1.401   12           0.015  0.828   190.867
                  330        0.844   12           0.015  0.835   116.634
                  200        0.629   12           0.013  0.906   86.5335
                  200        0.635   12           0.016  0.957   64.2014
                  240        0.639   12           0.008  0.992   44.8721
                Chemical: Thickness=[50, 50, 100, 200, 300, 340, 330, 200, 200, 240]; PHUnits=Water
                  PH=[6.37, 6.37, 6.37, 6.37, 6.37, 6.37, 6.37, 6.37, 6.37, 6.37]
                Water: Thickness=[50, 50, 100, 200, 300, 340, 330, 200, 200, 240]; InitialPAWmm=392.64; RelativeTo=LL15; FilledFromTop=false
                  InitialValues=[0.39, 0.363, 0.363, 0.371, 0.38, 0.377, 0.369, 0.351, 0.35, 0.302]
                CERESSoilTemperature Temperature
                WaterBalance SoilWater: SummerDate=01-Jun; SummerU=8.8; SummerCona=3.9; WinterDate=01-Nov; WinterU=8.8; WinterCona=3.9; DiffusConst=88; DiffusSlope=35; Salb=0.13; CN2Bare=65; CNRed=20; CNCov=0.8; PSIDul=-100; Thickness=[50, 50, 100, 200, 300, 340, 330, 200, 200, 240]
                Nutrient
                Solute NO3: Thickness=[50, 50, 100, 200, 300, 340, 330, 200, 200, 240]; InitialValuesUnits=ppm; WaterTableConcentration=0; D0=0; DepthConstant=0; MaxDepthSoluteAccessible=0; RunoffEffectivenessAtMovingSolute=0; MaxEffectiveRunoff=0
                  InitialValues=[3.13725, 3.29412, 3.29412, 4.68037, 5.02283, 4.09616, 2.53259, 1.03571, 0.928571, 0]
                Solute NH4: Thickness=[50, 50, 100, 200, 300, 340, 330, 200, 200, 240]; InitialValuesUnits=ppm; WaterTableConcentration=0; D0=0; DepthConstant=0; MaxDepthSoluteAccessible=0; RunoffEffectivenessAtMovingSolute=0; MaxEffectiveRunoff=0
                  InitialValues=[0, 0, 0, 0.152207, 0.0761035, 0.0671501, 0.0440451, 0.0357143, 0, 0]
                Solute Urea: Thickness=[50, 50, 100, 200, 300, 340, 330, 200, 200, 240]; InitialValues=[0, 0, 0, 0, 0, 0, 0, 0, 0, 0]; InitialValuesUnits=kg/ha; WaterTableConcentration=0; D0=0; DepthConstant=0; MaxDepthSoluteAccessible=0; RunoffEffectivenessAtMovingSolute=0; MaxEffectiveRunoff=0
              Report DailyReport: EventNames=[Clock].DoReport
                VariableNames:
                  [Clock].Today
                  [Soybean].Root.NSupply
                  [Soil].SoilWater.Eo
                  [Soil].SoilWater.Es
                  [DiagnosticsVariables].Script.SWC
                  [DiagnosticsVariables].Script.DUL
                  [Soil].SoilWater.Drainage
                  [Soil].SoilWater.Runoff
                  [DiagnosticsVariables].Script.OutFlowLat
                  [Soil].SoilWater.pond
                  [DiagnosticsVariables].Script.AccumEO
                  [DiagnosticsVariables].Script.AccumEP
                  [DiagnosticsVariables].Script.AccumES
                  [DiagnosticsVariables].Script.AccumDrainage
                  [DiagnosticsVariables].Script.AccumRunoff
                  [DiagnosticsVariables].Script.AccumRainfall
                  [DiagnosticsVariables].Script.AccumIrrigation
                  [DiagnosticsVariables].Script.AccumOutflowLat
                  [DiagnosticsVariables].Script.SoilWaterDeficit
                  [Soybean].Grain.Live.Wt
                  [Soybean].Shell.Live.Wt
                  [Soybean].Stem.Live.Wt
                  [Soybean].Stem.Live.Wt
                  [Soybean].Grain.Live.N
                  [Soybean].Shell.Live.N
                  [Soybean].Leaf.Live.Wt
                  [Soybean].Root.Live.Wt
                  [Soybean].Leaf.Live.N
                  [Soybean].Root.Live.N
                  [Soybean].Leaf.Live.NConc
                  [Soybean].Root.Live.NConc
                  [Soybean].Root.WaterSupply
                  [Soybean].Root.WaterUptake
                  [Soybean].Leaf.Transpiration
                  [Soybean].Leaf.WaterDemand
                  [Soybean].Root.Depth
                  [Soybean].Leaf.CoverTotal
                  [Soybean].Leaf.CoverDead
                  [Soybean].Leaf.LAI
                  [Soybean].Leaf.Height
                  [Soybean].Leaf.PotentialBiomass
                  [Soil].Water.MM
                  [Soil].NO3.kgha
                  [DiagnosticsVariables].Script.SoilNitrogenContent
                  [Soybean].Arbitrator.N.TotalPlantDemand
                  [MicroClimate].net_radn
                  [MicroClimate].peta
                  [MicroClimate].petr
                  [DiagnosticsVariables].Script.FomN
                  [DiagnosticsVariables].Script.HumN
                  [DiagnosticsVariables].Script.BiomN
                  [DiagnosticsVariables].Script.DltNMinRes
                  [DiagnosticsVariables].Script.DltNMinTot
                  [Soybean].Leaf.Fw
                  [Soybean].Leaf.Fn
                  [Soybean].Phenology.CurrentPhase.Name
                  [Soybean].Phenology.Stage
                  [Soybean].Pod.Wt
                  [Soybean].Pod.N
                  [Soybean].Structure.LeafTipsAppeared
                  [Soybean].Structure.MainStemPrimordiaNo
                  [Soybean].Leaf.CohortArea[1]
                  [Soybean].Leaf.CohortArea[2]
                  [Soybean].Leaf.CohortArea[3]
                  [Soybean].Leaf.CohortArea[4]
                  [Soybean].Leaf.CohortArea[5]
                  [Soybean].Leaf.CohortArea[6]
                  [Soybean].Leaf.CohortArea[7]
                  [Soybean].Leaf.CohortArea[8]
                  [Soybean].Leaf.CohortArea[9]
                  [Soybean].Leaf.CohortArea[10]
                  [Soybean].Leaf.CohortArea[11]
                  [Soybean].Leaf.CohortArea[12]
                  [Soybean].Leaf.CohortArea[13]
                  [Soybean].Leaf.CohortArea[14]
                  [Soybean].Leaf.CohortArea[15]
                  [Soybean].Leaf.AppearedCohortNo
                  [Soybean].Leaf.DeadCohortNo
                  [Soybean].AboveGround.Wt
                  [Soybean].Phenology.Stage
                  [Soybean].Structure.MainStemPrimordiaNo
                  [Soybean].Phenology.NFF
                  [SoybeanHarvestRule].Script.FinalTag
                  [Soybean].Grain.NumberFunction
                  [Soybean].Shell.PodNumber
                  [Soybean].Phenology.FN
                  [Soybean].Phenology.FN.TotalNodes
                  [Soybean].Phenology.FN.VegetativeNodes
              Report HarvestReport: EventNames=[Soybean].Harvesting
                VariableNames:
                  [Clock].Today
                  [Soybean].Phenology.CurrentStageName
                  [Soybean].Phenology.EmergenceDAS
                  [Soybean].Phenology.FloweringDAS
                  [Soybean].Phenology.MaturityDAS
                  [Soybean].AboveGround.Wt
                  [Soybean].Grain.Wt
        Experiment Nebraska2007
          Factors
            Factor N: Specification=[Operations]
              Operations 1
                2007-04-30  [Soybean].Sow(population: 29, cultivar: "PioneerP93M11_MG31", depth: 50, rowSpacing: 762);
                2007-07-05  [Irrigation].Apply(amount: 54.4)
                2007-07-08  [Irrigation].Apply(amount: 91)
                2007-07-15  [Irrigation].Apply(amount: 53)
                2007-07-27  [Irrigation].Apply(amount: 43.7)
                2007-08-19  [Irrigation].Apply(amount: 50.8)
              Operations 2
                2007-04-30  [Soybean].Sow(population: 29, cultivar: "PioneerP93M11_MG31", depth: 50, rowSpacing: 762);
                2007-04-30  [Fertiliser].Apply(Amount: 180, Type: Fertiliser.Types.UreaN, Depth: 210)
                2007-07-05  [Irrigation].Apply(amount: 54.4)
                2007-07-08  [Irrigation].Apply(amount: 91)
                2007-07-15  [Irrigation].Apply(amount: 53)
                2007-07-27  [Irrigation].Apply(amount: 43.7)
                2007-08-19  [Irrigation].Apply(amount: 50.8)
                2007-09-04  [Soybean].Harvest()
                2007-09-04  [Soybean].EndCrop()
              Operations 3
                2007-04-28  [Fertiliser].Apply(Amount: 90, Type: Fertiliser.Types.NH4NO3N, Depth: 1)
                2007-04-30  [Soybean].Sow(population: 29, cultivar: "PioneerP93M11_MG31", depth: 50, rowSpacing: 762);
                2007-06-16  [Fertiliser].Apply(Amount: 90, Type: Fertiliser.Types.NH4NO3N, Depth: 1)
                2007-07-05  [Irrigation].Apply(amount: 54.4)
                2007-07-08  [Irrigation].Apply(amount: 91)
                2007-07-15  [Irrigation].Apply(amount: 53)
                2007-07-27  [Irrigation].Apply(amount: 43.7)
                2007-08-19  [Irrigation].Apply(amount: 50.8)
                2007-09-04  [Soybean].Harvest()
                2007-09-04  [Soybean].EndCrop()
              Operations 4
                2007-04-30  [Soybean].Sow(population: 29, cultivar: "PioneerP93M11_MG31", depth: 50, rowSpacing: 762);
                2007-07-05  [Irrigation].Apply(amount: 54.4)
                2007-07-08  [Irrigation].Apply(amount: 91)
                2007-07-15  [Irrigation].Apply(amount: 53)
                2007-07-25  [Fertiliser].Apply(Amount: 180, Type: Fertiliser.Types.NH4NO3N, Depth: 1)
                2007-07-27  [Irrigation].Apply(amount: 43.7)
                2007-08-19  [Irrigation].Apply(amount: 50.8)
                2007-09-04  [Soybean].Harvest()
                2007-09-04  [Soybean].EndCrop()
          Simulation Sal2007Base
            Clock: Start=2007-01-01; End=2007-12-25
            Weather: FileName=Nebraska_Salvagiotti.met; Latitude=40.83; Tav=11.51039; Amp=28.57175
            Summary summaryfile
            SoilArbitrator
            Zone Field: Area=1; Slope=0; AspectAngle=0; Altitude=50
              Operations
                2016-05-06  [Soybean].Sow(population: 34, cultivar: "Ames_P92Y75_27MG", depth: 60, rowSpacing: 760);
              SurfaceOrganicMatter: InitialResidueName=maize; InitialResidueType=maize; InitialResidueMass=996; InitialStandingFraction=0; InitialCPR=0; InitialCNR=45.7
              Plant Soybean
              MicroClimate: a_interception=0; b_interception=1; c_interception=0; d_interception=0; SoilHeatFluxFraction=0.4; MinimumHeightDiffForNewLayer=0; NightInterceptionFraction=0.5; ReferenceHeight=2
              Fertiliser
              Irrigation
              Soil SoilSalvagiotti1: SoilType=Clarion; NearestTown=Ames; Region=Boone; State=Iowa; Country=US; ApsoilNumber=34; Latitude=42.02204; Longitude=-93.769115; DataSource=web soil sruvey; Comments=hydrological parameters and BD from Saxton and Rawls, 2006
                Physical: same as Validation.USA.Nebraska.Nebraska2006.Sal2006Base.Field.SoilSalvagiotti1.Physical
                Organic: same as Validation.USA.Nebraska.Nebraska2006.Sal2006Base.Field.SoilSalvagiotti1.Organic
                Chemical: Thickness=[50, 50, 100, 200, 300, 340, 330, 200, 200, 240]; PHUnits=Water
                  PH=[6.37, 6.37, 6.37, 6.37, 6.37, 6.37, 6.37, 6.37, 6.37, 6.37]
                Water: Thickness=[50, 50, 100, 200, 300, 340, 330, 200, 200, 240]; InitialPAWmm=392.64; RelativeTo=LL15; FilledFromTop=false
                  InitialValues=[0.39, 0.363, 0.363, 0.371, 0.38, 0.377, 0.369, 0.351, 0.35, 0.302]
                CERESSoilTemperature Temperature
                WaterBalance SoilWater: SummerDate=01-Jun; SummerU=8.8; SummerCona=3.9; WinterDate=01-Nov; WinterU=8.8; WinterCona=3.9; DiffusConst=40; DiffusSlope=16; Salb=0.13; CN2Bare=65; CNRed=20; CNCov=0.8; PSIDul=-100; Thickness=[50, 50, 100, 200, 300, 340, 330, 200, 200, 240]
                Nutrient
                Solute NO3: same as Validation.USA.Nebraska.Nebraska2006.Sal2006Base.Field.SoilSalvagiotti1.NO3
                Solute NH4: same as Validation.USA.Nebraska.Nebraska2006.Sal2006Base.Field.SoilSalvagiotti1.NH4
                Solute Urea: same as Validation.USA.Nebraska.Nebraska2006.Sal2006Base.Field.SoilSalvagiotti1.Urea
              Report DailyReport: same as Validation.USA.FACTS.Ames2015.Ames2015Base.paddock.DailyReport
              Report HarvestReport: EventNames=[Soybean].Harvesting
                VariableNames:
                  [Clock].Today
                  [Soybean].Phenology.CurrentStageName
                  [Soybean].Phenology.EmergenceDAS
                  [Soybean].Phenology.FloweringDAS
                  [Soybean].Phenology.MaturityDAS
                  [Soybean].AboveGround.Wt
                  [Soybean].Grain.Wt
    Folder Australia
      Folder Coleambally
        Experiment Coleambally
          Factors
            Factor Sow
              CompositeFactor Dec09: Specifications=[SowingRule].Script.SowingDate=2003-12-09
          Simulation ColeaballyBase
            Clock: Start=2003-12-01; End=2004-05-31
            Summary summaryfile
            Weather: FileName=Coleambally.met; Latitude=-34.8; Tav=16.95; Amp=17.14
            SoilArbitrator Soil Arbitrator
            Zone paddock: Area=1; Slope=0; AspectAngle=0; Altitude=50
              MicroClimate: a_interception=0; b_interception=1; c_interception=0; d_interception=0; SoilHeatFluxFraction=0.4; MinimumHeightDiffForNewLayer=0; NightInterceptionFraction=0.5; ReferenceHeight=2
              Irrigation
              Fertiliser
              SurfaceOrganicMatter: InitialResidueName=maize; InitialResidueType=maize; InitialResidueMass=100; InitialStandingFraction=0; InitialCPR=0; InitialCNR=55
              Report DailyReport: same as Validation.USA.FACTS.Ames2015.Ames2015Base.paddock.DailyReport
              Manager SowingRule
                RowSpacing = 760
                SowingDepth = 50
                SowingRate = 20
                CultivarName = Djakal
                SowingDate = 2001-06-10
                script: same as in Validation.USA.FACTS.Ames2015.Ames2015Base.paddock.SowingRule
              Report HarvestReport: EventNames=[Soybean].Harvesting
                VariableNames:
                  [Clock].Today
                  [Soybean].Structure.MainStemPrimordiaNo
                  [Soybean].Phenology.NFF
                  [Soybean].Script.FinalTag
              Plant Soybean
              Soil: SoilType=APS6Soil; LocalName=APS6Site; Site=APS6Site; NearestTown=Unknown; Region=Lawes; NaturalVegetation=Unknown; Latitude=0; Longitude=0
                Physical
                  Thickness  BD    AirDry  LL15  DUL   SAT
                  150        1.38  0.1     0.2   0.38  0.43
                  150        1.34  0.1     0.2   0.38  0.43
                  300        1.35  0.1     0.22  0.4   0.43
                  300        1.5   0.1     0.18  0.4   0.43
                  300        1.49  0.1     0.14  0.39  0.42
                  300        1.46  0.1     0.2   0.38  0.4
                  300        1.46  0.1     0.2   0.38  0.4
                  SoilCrop SoybeanSoil: LL=[0.2, 0.2, 0.22, 0.18, 0.14, 0.25, 0.28]; KL=[0.06, 0.05, 0.05, 0.04, 0.04, 0.06, 0.06]; XF=[1, 1, 1, 1, 1, 1, 1]
                WaterBalance SoilWater: SummerDate=1-Nov; SummerU=6; SummerCona=3.5; WinterDate=1-Apr; WinterU=6; WinterCona=3.5; DiffusConst=88; DiffusSlope=35.4; Salb=0.13; CN2Bare=60; CNRed=20; CNCov=0.8; DischargeWidth=0; CatchmentArea=0; PSIDul=-100
                  Thickness  SWCON  KLAT
                  150        0.3    0
                  150        0.3    0
                  300        0.3    0
                  300        0.3    0
                  300        0.3    0
                  300        0.3    0
                  300        0.3    0
                Organic: FOMCNRatio=60; CarbonUnits=Total
                  Thickness  Carbon  SoilCNRatio  FBiom  FInert  FOM
                  150        2.2     14.5         0.03   0.45    34.7129
                  150        1.6     14.5         0.02   0.6     27.0344
                  300        1.15    14.5         0.01   0.78    16.3972
                  300        1       14.5         0.01   0.9     9.94541
                  300        0.8     14.5         0.01   0.99    6.0322
                  300        0.45    14.5         0.01   0.99    3.65871
                  300        0.45    14.5         0.01   0.99    2.21912
                Chemical: Thickness=[150, 150, 300, 300, 300, 300, 300]; PH=[7.5, 8, 8, 8, 8, 8, 8]; PHUnits=Water
                Water: Thickness=[150, 150, 300, 300, 300, 300, 300]; InitialValues=[0.326, 0.326, 0.346, 0.333, 0.315, 0.326, 0.326]; InitialPAWmm=249.6; RelativeTo=LL15; FilledFromTop=false
                CERESSoilTemperature Temperature
                Nutrient
                Solute NO3: Thickness=[150, 150, 300, 300, 300, 300, 300]; InitialValues=[10, 5, 3, 2, 1, 0.1, 0.1]; InitialValuesUnits=ppm; WaterTableConcentration=0; D0=0; DepthConstant=0; MaxDepthSoluteAccessible=0; RunoffEffectivenessAtMovingSolute=0; MaxEffectiveRunoff=0
                Solute NH4: Thickness=[150, 150, 300, 300, 300, 300, 300]; InitialValues=[3, 2, 1, 0.8, 0.8, 0.5, 0.5]; InitialValuesUnits=ppm; WaterTableConcentration=0; D0=0; DepthConstant=0; MaxDepthSoluteAccessible=0; RunoffEffectivenessAtMovingSolute=0; MaxEffectiveRunoff=0
                Solute Urea: Thickness=[150, 150, 300, 300, 300, 300, 300]; InitialValues=[0, 0, 0, 0, 0, 0, 0]; InitialValuesUnits=kg/ha; WaterTableConcentration=0; D0=0; DepthConstant=0; MaxDepthSoluteAccessible=0; RunoffEffectivenessAtMovingSolute=0; MaxEffectiveRunoff=0
              Manager Automatic irrigation based on water deficit: same as Validation.USA.Indiana.Indiana2006.Indiana2006Base.paddock.Automatic irrigation based on water deficit
              Operations Harvesting
                2004-04-16  [Soybean].Harvest();
                2004-04-16  [Soybean].EndCrop();
      Folder Gatton
        Memo
          This dataset ([Muchow_etal_1993]) includes the cultvar "Davis" grown under irrigated conditions in a subtropical environment at the Gatton Research Station in southeastern Queensland, Australia.  Plants were sampled almost weekly for biomass partitioning, nitrogen and plant development.
        Experiment Gatton
          Factors
            Factor Sow
              CompositeFactor Jan9: Specifications=[SowingRule].Script.SowingDate=1990-01-09
          Simulation GattonBase
            Clock: Start=1990-01-01; End=1990-05-31
            Summary summaryfile
            Weather: FileName=Gatton.met; Latitude=-27.55; Tav=19.83; Amp=12.77
            SoilArbitrator Soil Arbitrator
            Zone paddock: Area=1; Slope=0; AspectAngle=0; Altitude=50
              MicroClimate: a_interception=0; b_interception=1; c_interception=0; d_interception=0; SoilHeatFluxFraction=0.4; MinimumHeightDiffForNewLayer=0; NightInterceptionFraction=0.5; ReferenceHeight=2
              Irrigation
              Fertiliser
              SurfaceOrganicMatter: InitialResidueName=maize; InitialResidueType=maize; InitialResidueMass=100; InitialStandingFraction=0; InitialCPR=0; InitialCNR=55
              Report DailyReport: same as Validation.USA.FACTS.Ames2015.Ames2015Base.paddock.DailyReport
              Manager SowingRule
                RowSpacing = 200
                SowingDepth = 50
                SowingRate = 38
                CultivarName = Davis
                SowingDate = 06/10/2001 00:00:00
                script: same as in Validation.USA.FACTS.Ames2015.Ames2015Base.paddock.SowingRule
              Report HarvestReport: EventNames=[Soybean].Harvesting
                VariableNames:
                  [Clock].Today
                  [Soybean].Structure.MainStemPrimordiaNo
                  [Soybean].Phenology.NFF
                  [Soybean].Script.FinalTag
              Plant Soybean
              Soil: same as Validation.Australia.Coleambally.Coleambally.ColeaballyBase.paddock.Soil
              Operations Harvesting
                1990-05-08  [Soybean].Harvest();
                1990-05-08  [Soybean].EndCrop();
      Folder Griffith
        Memo
          These data [Timsina2007] were obtained from a field experiment conducted in 1999–2000 on a Hanwood loam soil at CSIRO Land and Water, Griffith, Australia.  Two indeterminate soybean cultivars (Hooper and Stephens belonging to late maturity group [MG] 3 or early MG 4) were on 15 November, 8 December, and 6 January.
        Experiment Griffith
          Factors
            Permutation
              Factor Sow
                CompositeFactor Nov15
                  Specifications:
                    [SowingRule].Script.SowingDate=1999-11-15
                    [SowingRule].Script.SowingDepth=50
                    [HarvestRule].Script.HarvestDate=2000-04-06
                CompositeFactor Dec08
                  Specifications:
                    [SowingRule].Script.SowingDate=1999-12-08
                    [SowingRule].Script.SowingDepth=50
                    [HarvestRule].Script.HarvestDate=2000-04-12
                CompositeFactor Jan06
                  Specifications:
                    [SowingRule].Script.SowingDate=2000-01-06
                    [SowingRule].Script.SowingDepth=50
                    [HarvestRule].Script.HarvestDate=2000-04-27
              Factor Cv: Specification=[SowingRule].Script.CultivarName=Hooper_MG40,Stephens_MG40
          Simulation GriffithBase
            Clock: Start=1999-11-10; End=2000-05-31
            Summary summaryfile
            Weather: FileName=Griffith.met; Latitude=-34.32; Tav=17.09; Amp=17.06
            SoilArbitrator Soil Arbitrator
            Zone paddock: Area=1; Slope=0; AspectAngle=0; Altitude=50
              MicroClimate: a_interception=0; b_interception=1; c_interception=0; d_interception=0; SoilHeatFluxFraction=0.4; MinimumHeightDiffForNewLayer=0; NightInterceptionFraction=0.5; ReferenceHeight=2
              Irrigation
              Manager Automatic irrigation based on water deficit: same as Validation.USA.Indiana.Indiana2006.Indiana2006Base.paddock.Automatic irrigation based on water deficit
              Fertiliser
              SurfaceOrganicMatter: InitialResidueName=maize; InitialResidueType=maize; InitialResidueMass=4500; InitialStandingFraction=0; InitialCPR=0; InitialCNR=55
              Report DailyReport: same as Validation.USA.FACTS.Ames2015.Ames2015Base.paddock.DailyReport
              Manager SowingRule
                RowSpacing = 760
                SowingDepth = 50
                SowingRate = 30
                CultivarName = Ames_P932T16R_32MG
                SowingDate = 06/10/2001 00:00:00
                script: same as in Validation.USA.FACTS.Ames2015.Ames2015Base.paddock.SowingRule
              Manager HarvestRule
                HarvestDate = 2000-04-04
```csharp
using Models.Soils.Nutrients;
using System;
using Models.Core;
using System.Collections.Generic;
using System.Text;
using Models.Soils;
using Models.Soils.Nutrients;
using Models.PMF;
using Models;
using System.Xml.Serialization;
using APSIM.Shared.Utilities;

namespace Models
{
    [Serializable] 
    public class Script : Model
    {      
        [Link] Plant Soybean;          
        [Link] Clock Clock;

                    
        [Description("Harvest Date")]
        public DateTime HarvestDate { get; set; }

        [EventSubscribe("StartOfSimulation")]
        private void OnSimulationCommencing(object sender, EventArgs e)
        {
        }       
        
        [EventSubscribe("DoManagement")]
        private void OnDoManagement(object sender, EventArgs e)
        {
           if (Clock.Today.Date == HarvestDate)
           {
           Soybean.Harvest();
           Soybean.EndCrop();
           }
        }
        
        [EventSubscribe("DoManagementCalculations")]
        private void OnDoManagementCalculations(object sender, EventArgs e)
        {
            
        }
    }
}
```
              Report HarvestReport: EventNames=[Soybean].Harvesting
                VariableNames:
                  [Clock].Today
                  [Soybean].Structure.MainStemPrimordiaNo
                  [Soybean].Phenology.NFF
                  [Soybean].Script.FinalTag
              Plant Soybean
              Soil: same as Validation.USA.Mississippi.Mississippi2002.Mississippi2002Base.paddock.Soil
      Folder Katherine
        Memo
          This dataset ([Muchow_etal_1993]) includes the cultvar "Buchanan" grown under a range of conditions in a tropical environment at the Katherin Research Station in the Northern Territory, Australia.  This includes two irrigated conditions in 1988 and two planting dates in 1989.
        Experiment Katherine1988
          Factors
            Factor Water: Specification=[AutomaticIrrigation]
              Manager Irrigated
                FASW = 0
                WaterDeficit = 0
                AutoIrrigationOn = True
                FASWThreshold = 0.7
                FASWDepth = 1200
                script: same as in Validation.USA.Indiana.Indiana2006.Indiana2006Base.paddock.Automatic irrigation based on water deficit
              Manager Rainfed
                FASW = 0
                WaterDeficit = 0
                AutoIrrigationOn = False
                FASWThreshold = 0.7
                FASWDepth = 1200
                script: same as in Validation.USA.Indiana.Indiana2006.Indiana2006Base.paddock.Automatic irrigation based on water deficit
          Simulation Katherine1988Base
            Clock: Start=1988-01-01; End=1988-05-31
            Summary summaryfile
            Weather: FileName=Katherine1988.met; Latitude=-14.47; Tav=19.5; Amp=11.8
            SoilArbitrator Soil Arbitrator
            Zone paddock: Area=1; Slope=0; AspectAngle=0; Altitude=50
              MicroClimate: a_interception=0; b_interception=1; c_interception=0; d_interception=0; SoilHeatFluxFraction=0.4; MinimumHeightDiffForNewLayer=0; NightInterceptionFraction=0.5; ReferenceHeight=2
              Irrigation
              Manager AutomaticIrrigation: same as Validation.USA.Indiana.Indiana2006.Indiana2006Base.paddock.Automatic irrigation based on water deficit
              Fertiliser
              SurfaceOrganicMatter: InitialResidueName=maize; InitialResidueType=maize; InitialResidueMass=4500; InitialStandingFraction=0; InitialCPR=0; InitialCNR=55
              Report DailyReport: same as Validation.USA.FACTS.Ames2015.Ames2015Base.paddock.DailyReport
              Manager SowingRule
                RowSpacing = 500
                SowingDepth = 40
                SowingRate = 35
                CultivarName = Buchanan
                SowingDate = 01/05/1988 00:00:00
                script: same as in Validation.USA.FACTS.Ames2015.Ames2015Base.paddock.SowingRule
              Report HarvestReport: EventNames=[Soybean].Harvesting
                VariableNames:
                  [Clock].Today
                  [Soybean].Structure.MainStemPrimordiaNo
                  [Soybean].Phenology.NFF
                  [Soybean].Script.FinalTag
              Plant Soybean
              Soil: Latitude=0; Longitude=0
                Physical
                  Thickness  BD    AirDry  LL15  DUL   SAT
                  150        1.56  0.05    0.19  0.3   0.31
                  150        1.52  0.08    0.21  0.31  0.33
                  150        1.46  0.21    0.21  0.31  0.34
                  150        1.46  0.22    0.22  0.32  0.34
                  150        1.42  0.22    0.22  0.33  0.34
                  150        1.42  0.22    0.22  0.33  0.34
                  300        1.46  0.22    0.22  0.32  0.34
                  300        1.5   0.23    0.23  0.34  0.35
                  300        1.53  0.24    0.24  0.35  0.37
                  SoilCrop SoybeanSoil: LL=[0.19, 0.21, 0.21, 0.23, 0.23, 0.24, 0.25, 0.28, 0.28]; KL=[0.16, 0.16, 0.12, 0.1, 0.1, 0.08, 0.06, 0.04, 0.03]; XF=[1, 1, 1, 1, 1, 1, 1, 0, 0]
                WaterBalance SoilWater: SummerDate=1-Nov; SummerU=1.5; SummerCona=6.6; WinterDate=1-Apr; WinterU=1.5; WinterCona=6.6; DiffusConst=88; DiffusSlope=35.4; Salb=0.2; CN2Bare=70; CNRed=20; CNCov=0.8; DischargeWidth=0; CatchmentArea=0; PSIDul=-100; Thickness=[150, 150, 150, 150, 150, 150, 300, 300, 300]; SWCON=[0.7, 0.7, 0.7, 0.7, 0.7, 0.7, 0.7, 0.7, 0.7]
                Organic: FOMCNRatio=36; CarbonUnits=Total
                  Thickness  Carbon  SoilCNRatio  FBiom  FInert  FOM
                  150        1.27    14.5         0.04   0.39    518.782
                  150        0.59    14.5         0.02   0.47    404.028
                  150        0.34    14.5         0.01   0.52    314.657
                  150        0.34    14.5         0.01   0.62    245.055
                  150        0.26    14.5         0.01   0.74    190.849
                  150        0.26    14.5         0.01   0.83    148.634
                  300        0.25    14.5         0.01   0.93    90.1508
                  300        0.19    14.5         0.01   0.93    54.6792
                  300        0.21    14.5         0.01   0.93    33.1646
                Chemical: Thickness=[150, 150, 150, 150, 150, 150, 300, 300, 300]; PH=[6.5, 6.2, 6.3, 6.4, 6.5, 6.6, 6.6, 6.5, 6.5]; PHUnits=Water
                Water: Thickness=[150, 150, 150, 150, 150, 150, 300, 300, 300]; InitialPAWmm=191.7; RelativeTo=LL15; FilledFromTop=false
                  InitialValues=[0.304, 0.31, 0.31, 0.324, 0.328, 0.328, 0.325, 0.337, 0.35]
                CERESSoilTemperature Temperature
                Nutrient
                Solute NO3: Thickness=[150, 150, 150, 150, 150, 150, 300, 300, 300]; InitialValues=[2, 2, 2, 2, 2, 2, 2, 2, 2]; InitialValuesUnits=ppm; WaterTableConcentration=0; D0=0; DepthConstant=0; MaxDepthSoluteAccessible=0; RunoffEffectivenessAtMovingSolute=0; MaxEffectiveRunoff=0
                Solute NH4: Thickness=[150, 150, 150, 150, 150, 150, 300, 300, 300]; InitialValues=[1, 1, 1, 1, 1, 1, 1, 1, 1]; InitialValuesUnits=ppm; WaterTableConcentration=0; D0=0; DepthConstant=0; MaxDepthSoluteAccessible=0; RunoffEffectivenessAtMovingSolute=0; MaxEffectiveRunoff=0
                Solute Urea: Thickness=[150, 150, 150, 150, 150, 150, 300, 300, 300]; InitialValues=[0, 0, 0, 0, 0, 0, 0, 0, 0]; InitialValuesUnits=kg/ha; WaterTableConcentration=0; D0=0; DepthConstant=0; MaxDepthSoluteAccessible=0; RunoffEffectivenessAtMovingSolute=0; MaxEffectiveRunoff=0
              Operations Harvesting
                1988-04-05  [Soybean].Harvest();
                1988-04-05  [Soybean].EndCrop();
        Experiment Katherine1989
          Factors
            Factor Sow: Specification=[Operations]
              Operations Jan10
                1989-01-10  [Soybean].Sow(population:35, cultivar:Buchanan, depth:40, rowSpacing:360, budNumber:1);
                1989-01-15  [Irrigation].Apply(17)
              Operations Feb07
                1989-02-07  [Soybean].Sow(population:35, cultivar:Buchanan, depth:40, rowSpacing:360, budNumber:1);
          Simulation Katherine1989Base
            Clock: Start=1989-01-10; End=1989-05-31
            Summary summaryfile
            Weather: FileName=katherine1989.met; Latitude=-14.47; Tav=19.5; Amp=11.8
            SoilArbitrator Soil Arbitrator
            Zone paddock: Area=1; Slope=0; AspectAngle=0; Altitude=50
              MicroClimate: a_interception=0; b_interception=1; c_interception=0; d_interception=0; SoilHeatFluxFraction=0.4; MinimumHeightDiffForNewLayer=0; NightInterceptionFraction=0.5; ReferenceHeight=2
              Irrigation
              Fertiliser
              SurfaceOrganicMatter: InitialResidueName=maize; InitialResidueType=maize; InitialResidueMass=4500; InitialStandingFraction=0; InitialCPR=0; InitialCNR=55
              Report DailyReport: same as Validation.USA.FACTS.Ames2015.Ames2015Base.paddock.DailyReport
              Manager HarvestRule: same as Validation.USA.FACTS.Sutherland2017.Sutherland2017Base.paddock.HarvestRule
              Report HarvestReport: EventNames=[Soybean].Harvesting
                VariableNames:
                  [Clock].Today
                  [Soybean].Structure.MainStemPrimordiaNo
                  [Soybean].Phenology.NFF
                  [Soybean].Script.FinalTag
              Plant Soybean
              Soil: same as Validation.Australia.Katherine.Katherine1988.Katherine1988Base.paddock.Soil
              Operations
      Folder Kununurra
        Memo
          This dataset [MuchowSinclair1986] includes a short-season and a long-season cultivar grown on two different soil types under both irrigated and water-limited conditions in a semi-arid tropical environment at the Kimberley Research Station (15 ° 38' S, 128°43 ' E) in northern Western Australia.  Crops were grown over the winter months because of the tropical location.
        Experiment Kununurra1980
          Factors
            Factor Water: Specification=[IrrigationSchedule]
              Operations Wet
                1980-04-01  [Irrigation].Apply(20)
                1980-04-04  [Irrigation].Apply(20)
                1980-04-07  [Irrigation].Apply(20)
                1980-04-15  [Irrigation].Apply(50)
                1980-04-22  [Irrigation].Apply(50)
                1980-04-29  [Irrigation].Apply(50)
                1980-05-06  [Irrigation].Apply(50)
                1980-05-13  [Irrigation].Apply(50)
                1980-05-20  [Irrigation].Apply(50)
                1980-05-27  [Irrigation].Apply(50)
                1980-06-03  [Irrigation].Apply(50)
                1980-06-10  [Irrigation].Apply(50)
                1980-06-17  [Irrigation].Apply(50)
                1980-06-24  [Irrigation].Apply(50)
                1980-07-01  [Irrigation].Apply(50)
                1980-07-08  [Irrigation].Apply(50)
                1980-07-15  [Irrigation].Apply(50)
                1980-07-22  [Irrigation].Apply(50)
              Operations Dry
                1980-04-01  [Irrigation].Apply(20)
                1980-04-04  [Irrigation].Apply(20)
                1980-04-07  [Irrigation].Apply(20)
                1980-04-15  [Irrigation].Apply(50)
              Operations WetDry
                1980-04-01  [Irrigation].Apply(20)
                1980-04-04  [Irrigation].Apply(20)
                1980-04-07  [Irrigation].Apply(20)
                1980-04-15  [Irrigation].Apply(50)
                1980-04-22  [Irrigation].Apply(50)
                1980-04-29  [Irrigation].Apply(50)
                1980-05-06  [Irrigation].Apply(50)
                1980-05-13  [Irrigation].Apply(50)
          Simulation Kununurra1980Base
            Clock: Start=1980-04-01; End=1980-07-31
            Summary summaryfile
            Weather: FileName=Kununurra.met; Latitude=-15.78; Tav=26.83; Amp=8.28
            SoilArbitrator Soil Arbitrator
            Zone paddock: Area=1; Slope=0; AspectAngle=0; Altitude=50
              MicroClimate: a_interception=0; b_interception=1; c_interception=0; d_interception=0; SoilHeatFluxFraction=0.4; MinimumHeightDiffForNewLayer=0; NightInterceptionFraction=0.5; ReferenceHeight=2
              Irrigation
              Fertiliser
              SurfaceOrganicMatter: InitialResidueName=maize; InitialResidueType=maize; InitialResidueMass=4500; InitialStandingFraction=0; InitialCPR=0; InitialCNR=55
              Report DailyReport: same as Validation.USA.FACTS.Ames2015.Ames2015Base.paddock.DailyReport
              Manager SowingRule
                RowSpacing = 250
                SowingDepth = 40
                SowingRate = 35
                CultivarName = Buchanan
                SowingDate = 1980-04-01
                script: same as in Validation.USA.FACTS.Ames2015.Ames2015Base.paddock.SowingRule
              Report HarvestReport: EventNames=[Soybean].Harvesting
                VariableNames:
                  [Clock].Today
                  [Soybean].Structure.MainStemPrimordiaNo
                  [Soybean].Phenology.NFF
                  [Soybean].Script.FinalTag
              Plant Soybean
              Soil: Latitude=0; Longitude=0
                Physical
                  Thickness  BD    AirDry  LL15  DUL   SAT
                  150        1.56  0.05    0.19  0.3   0.31
                  150        1.52  0.08    0.21  0.31  0.33
                  150        1.46  0.21    0.21  0.31  0.34
                  150        1.46  0.22    0.22  0.32  0.34
                  150        1.42  0.22    0.22  0.33  0.34
                  150        1.42  0.22    0.22  0.33  0.34
                  300        1.46  0.22    0.22  0.32  0.34
                  SoilCrop SoybeanSoil: LL=[0.19, 0.21, 0.21, 0.23, 0.23, 0.24, 0.25]; KL=[0.16, 0.16, 0.12, 0.1, 0.1, 0.08, 0.06]; XF=[1, 1, 1, 1, 1, 1, 1]
                WaterBalance SoilWater: same as Validation.Australia.Katherine.Katherine1988.Katherine1988Base.paddock.Soil.SoilWater
                Organic: same as Validation.Australia.Katherine.Katherine1988.Katherine1988Base.paddock.Soil.Organic
                Chemical: Thickness=[150, 150, 150, 150, 150, 150, 300, 300, 300]; PH=[6.5, 6.2, 6.3, 6.4, 6.5, 6.6, 6.6, 6.5, 6.5]; PHUnits=Water
                CERESSoilTemperature Temperature
                Nutrient
                Water: Thickness=[150, 150, 150, 150, 150, 150, 300]; InitialValues=[0.3, 0.31, 0.31, 0.32, 0.31, 0.22, 0.22]; InitialPAWmm=75; RelativeTo=LL15; FilledFromTop=true
                Solute NO3: same as Validation.Australia.Katherine.Katherine1988.Katherine1988Base.paddock.Soil.NO3
                Solute NH4: same as Validation.Australia.Katherine.Katherine1988.Katherine1988Base.paddock.Soil.NH4
                Solute Urea: same as Validation.Australia.Katherine.Katherine1988.Katherine1988Base.paddock.Soil.Urea
              Operations IrrigationSchedule
              Operations Harvesting
                1980-06-22  [Soybean].Harvest();
                1980-06-22  [Soybean].EndCrop();
        Experiment Kununurra1979
          Factors
            Factor Water: Specification=[IrrigationSchedule]
              Operations Wet
                1979-04-10  [Irrigation].Apply(20)
                1979-04-13  [Irrigation].Apply(20)
                1979-04-16  [Irrigation].Apply(20)
                1979-04-23  [Irrigation].Apply(50)
                1979-04-30  [Irrigation].Apply(50)
                1979-05-07  [Irrigation].Apply(50)
                1979-05-14  [Irrigation].Apply(50)
                1979-05-21  [Irrigation].Apply(50)
                1979-05-28  [Irrigation].Apply(50)
                1979-06-04  [Irrigation].Apply(50)
                1979-06-11  [Irrigation].Apply(50)
                1979-06-18  [Irrigation].Apply(50)
                1979-06-25  [Irrigation].Apply(50)
                1979-07-02  [Irrigation].Apply(50)
                1979-07-09  [Irrigation].Apply(50)
                1979-07-16  [Irrigation].Apply(50)
                1979-07-23  [Irrigation].Apply(50)
              Operations Dry
                1979-04-10  [Irrigation].Apply(20)
                1979-04-13  [Irrigation].Apply(20)
                1979-04-16  [Irrigation].Apply(20)
                1979-04-23  [Irrigation].Apply(50)
              Operations WetDry
                1979-04-10  [Irrigation].Apply(20)
                1979-04-13  [Irrigation].Apply(20)
                1979-04-16  [Irrigation].Apply(20)
                1979-04-23  [Irrigation].Apply(50)
                1979-04-30  [Irrigation].Apply(50)
                1979-05-07  [Irrigation].Apply(50)
          Simulation Kununurra1979Base
            Clock: Start=1979-04-01; End=1979-07-31
            Summary summaryfile
            Weather: FileName=Kununurra.met; Latitude=-15.78; Tav=26.83; Amp=8.28
            SoilArbitrator Soil Arbitrator
            Zone paddock: Area=1; Slope=0; AspectAngle=0; Altitude=50
              MicroClimate: a_interception=0; b_interception=1; c_interception=0; d_interception=0; SoilHeatFluxFraction=0.4; MinimumHeightDiffForNewLayer=0; NightInterceptionFraction=0.5; ReferenceHeight=2
              Irrigation
              Fertiliser
              SurfaceOrganicMatter: InitialResidueName=maize; InitialResidueType=maize; InitialResidueMass=4500; InitialStandingFraction=0; InitialCPR=0; InitialCNR=55
              Report DailyReport: same as Validation.USA.FACTS.Ames2015.Ames2015Base.paddock.DailyReport
              Manager SowingRule
                RowSpacing = 500
                SowingDepth = 50
                SowingRate = 25
                CultivarName = Buchanan
                SowingDate = 1979-04-10
                script: same as in Validation.USA.FACTS.Ames2015.Ames2015Base.paddock.SowingRule
              Operations Harvesting
                1979-07-07  [Soybean].Harvest();
                1979-07-07  [Soybean].EndCrop();
              Report HarvestReport: EventNames=[Soybean].Harvesting
                VariableNames:
                  [Clock].Today
                  [Soybean].Structure.MainStemPrimordiaNo
                  [Soybean].Phenology.NFF
                  [Soybean].Script.FinalTag
              Plant Soybean
              Soil: Latitude=0; Longitude=0
                Physical
                  Thickness  BD    AirDry  LL15  DUL   SAT
                  150        1.56  0.05    0.19  0.3   0.31
                  150        1.52  0.08    0.21  0.31  0.33
                  150        1.46  0.21    0.21  0.31  0.34
                  150        1.46  0.22    0.23  0.32  0.34
                  150        1.42  0.22    0.23  0.33  0.34
                  SoilCrop SoybeanSoil: LL=[0.19, 0.21, 0.21, 0.23, 0.23]; KL=[0.08, 0.08, 0.08, 0.08, 0.08]; XF=[1, 1, 1, 1, 1]
                WaterBalance SoilWater: SummerDate=1-Nov; SummerU=5; SummerCona=5; WinterDate=1-Apr; WinterU=5; WinterCona=5; DiffusConst=88; DiffusSlope=35.4; Salb=0.2; CN2Bare=70; CNRed=20; CNCov=0.8; DischargeWidth=0; CatchmentArea=0; PSIDul=-100; Thickness=[150, 150, 150, 150, 150, 150, 300, 300, 300]; SWCON=[0.7, 0.7, 0.7, 0.7, 0.7, 0.7, 0.7, 0.7, 0.7]
                Organic: same as Validation.Australia.Katherine.Katherine1988.Katherine1988Base.paddock.Soil.Organic
                Chemical: Thickness=[150, 150, 150, 150, 150, 150, 300, 300, 300]; PH=[6.5, 6.2, 6.3, 6.4, 6.5, 6.6, 6.6, 6.5, 6.5]; PHUnits=Water
                CERESSoilTemperature Temperature
                Nutrient
                Water: Thickness=[150, 150, 150, 150, 150]; InitialValues=[0.3, 0.270604, 0.21, 0.23, 0.23]; InitialPAWmm=25.5906; RelativeTo=LL15; FilledFromTop=true
                Solute NO3: same as Validation.Australia.Katherine.Katherine1988.Katherine1988Base.paddock.Soil.NO3
                Solute NH4: same as Validation.Australia.Katherine.Katherine1988.Katherine1988Base.paddock.Soil.NH4
                Solute Urea: same as Validation.Australia.Katherine.Katherine1988.Katherine1988Base.paddock.Soil.Urea
              Operations IrrigationSchedule
      Folder Leeton
        Memo
          This dataset [Gaynor2011] is derived from a small-plot serial sowing date study were conducted over the summers of 2006–07 and 2007–08, at the NSW Department of Primary Industries’ Leeton Field Station, New South Wales, Australia (348280S, 1468250E). The soil was a grey self-mulching clay, described as a Vertosol under the Australian Soil Classification.  Ten diverse soybean genotypes ranging from very early to very late maturity were grown with 10 sowing dates in the first season and 9 in the second.
        Experiment Leeton2006
          Factors
            Permutation
              Factor Sow
                CompositeFactor Nov27
                  Specifications:
                    [SowingRule].Script.SowingDate=2006-11-27
                    [SowingRule].Script.SowingDepth=50
                CompositeFactor Dec04
                  Specifications:
                    [SowingRule].Script.SowingDate=2006-12-04
                    [SowingRule].Script.SowingDepth=50
                CompositeFactor Dec11
                  Specifications:
                    [SowingRule].Script.SowingDate=2006-12-11
                    [SowingRule].Script.SowingDepth=50
                CompositeFactor Dec18
                  Specifications:
                    [SowingRule].Script.SowingDate=2006-12-18
                    [SowingRule].Script.SowingDepth=50
                CompositeFactor Dec24
                  Specifications:
                    [SowingRule].Script.SowingDate=2006-12-24
                    [SowingRule].Script.SowingDepth=50
                CompositeFactor Jan02
                  Specifications:
                    [SowingRule].Script.SowingDate=2007-01-02
                    [SowingRule].Script.SowingDepth=50
                CompositeFactor Jan09
                  Specifications:
                    [SowingRule].Script.SowingDate=2007-01-09
                    [SowingRule].Script.SowingDepth=50
                CompositeFactor Jan16
                  Specifications:
                    [SowingRule].Script.SowingDate=2007-01-16
                    [SowingRule].Script.SowingDepth=50
                CompositeFactor Jan22
                  Specifications:
                    [SowingRule].Script.SowingDate=2007-01-22
                    [SowingRule].Script.SowingDepth=50
                CompositeFactor Jan29
                  Specifications:
                    [SowingRule].Script.SowingDate=2007-01-29
                    [SowingRule].Script.SowingDepth=50
              Factor Cv
                Specification=[SowingRule].Script.CultivarName=FiskebyV,F148_7,Djakal,Bowyer,Bunya
          Simulation LeetonBase
            Clock: Start=2006-11-27; End=2007-05-31
            Summary summaryfile
            Weather: FileName=Yanco.met; Latitude=-34.62; Tav=17.94; Amp=18.51
            SoilArbitrator Soil Arbitrator
            Zone paddock: Area=1; Slope=0; AspectAngle=0; Altitude=50
              MicroClimate: a_interception=0; b_interception=1; c_interception=0; d_interception=0; SoilHeatFluxFraction=0.4; MinimumHeightDiffForNewLayer=0; NightInterceptionFraction=0.5; ReferenceHeight=2
              Irrigation
              Manager Automatic irrigation based on water deficit: same as Validation.USA.Indiana.Indiana2006.Indiana2006Base.paddock.Automatic irrigation based on water deficit
              Fertiliser
              SurfaceOrganicMatter: InitialResidueName=maize; InitialResidueType=maize; InitialResidueMass=4500; InitialStandingFraction=0; InitialCPR=0; InitialCNR=55
              Report DailyReport: same as Validation.USA.FACTS.Ames2015.Ames2015Base.paddock.DailyReport
              Manager SowingRule
                RowSpacing = 760
                SowingDepth = 50
                SowingRate = 30
                CultivarName = Ames_P932T16R_32MG
                SowingDate = 2001-06-10
                script: same as in Validation.USA.FACTS.Ames2015.Ames2015Base.paddock.SowingRule
              Report HarvestReport: EventNames=[Soybean].Harvesting
                VariableNames:
                  [Clock].Today
                  [Soybean].Structure.MainStemPrimordiaNo
                  [Soybean].Phenology.NFF
                  [Soybean].Script.FinalTag
              Plant Soybean
              Soil: same as Validation.USA.Mississippi.Mississippi2002.Mississippi2002Base.paddock.Soil
              Manager HarvestRule: same as Validation.USA.FACTS.Sutherland2017.Sutherland2017Base.paddock.HarvestRule
        Experiment Leeton2007
          Factors
            Permutation
              Factor Sow
                CompositeFactor Nov22
                  Specifications:
                    [SowingRule].Script.SowingDate=2007-11-22
                    [SowingRule].Script.SowingDepth=50
                CompositeFactor Dec03
                  Specifications:
                    [SowingRule].Script.SowingDate=2007-12-03
                    [SowingRule].Script.SowingDepth=50
                CompositeFactor Dec11
                  Specifications:
                    [SowingRule].Script.SowingDate=2007-12-11
                    [SowingRule].Script.SowingDepth=50
                CompositeFactor Dec21
                  Specifications:
                    [SowingRule].Script.SowingDate=2007-12-21
                    [SowingRule].Script.SowingDepth=50
                CompositeFactor Dec31
                  Specifications:
                    [SowingRule].Script.SowingDate=2007-12-31
                    [SowingRule].Script.SowingDepth=50
                CompositeFactor Jan10
                  Specifications:
                    [SowingRule].Script.SowingDate=2008-01-10
                    [SowingRule].Script.SowingDepth=50
                CompositeFactor Jan22
                  Specifications:
                    [SowingRule].Script.SowingDate=2008-01-22
                    [SowingRule].Script.SowingDepth=50
                CompositeFactor Jan31
                  Specifications:
                    [SowingRule].Script.SowingDate=2008-01-31
                    [SowingRule].Script.SowingDepth=50
                CompositeFactor Feb13
                  Specifications:
                    [SowingRule].Script.SowingDate=2008-02-13
                    [SowingRule].Script.SowingDepth=50
              Factor Cv
                Specification=[SowingRule].Script.CultivarName=FiskebyV,F148_7,Djakal,Bowyer,Bunya
          Simulation Leeton2007Base
            Clock: Start=2007-11-22; End=2008-05-31
            Summary summaryfile
            Weather: FileName=Yanco.met; Latitude=-34.62; Tav=17.94; Amp=18.51
            SoilArbitrator Soil Arbitrator
            Zone paddock: Area=1; Slope=0; AspectAngle=0; Altitude=50
              MicroClimate: a_interception=0; b_interception=1; c_interception=0; d_interception=0; SoilHeatFluxFraction=0.4; MinimumHeightDiffForNewLayer=0; NightInterceptionFraction=0.5; ReferenceHeight=2
              Irrigation
              Manager Automatic irrigation based on water deficit: same as Validation.USA.Indiana.Indiana2006.Indiana2006Base.paddock.Automatic irrigation based on water deficit
              Fertiliser
              SurfaceOrganicMatter: InitialResidueName=maize; InitialResidueType=maize; InitialResidueMass=4500; InitialStandingFraction=0; InitialCPR=0; InitialCNR=55
              Report DailyReport: same as Validation.USA.FACTS.Ames2015.Ames2015Base.paddock.DailyReport
              Manager SowingRule: same as Validation.Australia.Griffith.Griffith.GriffithBase.paddock.SowingRule
              Report HarvestReport: EventNames=[Soybean].Harvesting
                VariableNames:
                  [Clock].Today
                  [Soybean].Structure.MainStemPrimordiaNo
                  [Soybean].Phenology.NFF
                  [Soybean].Script.FinalTag
              Plant Soybean
              Soil: same as Validation.USA.Mississippi.Mississippi2002.Mississippi2002Base.paddock.Soil
              Manager HarvestRule: same as Validation.USA.FACTS.Sutherland2017.Sutherland2017Base.paddock.HarvestRule
    Folder Combined Results
      Memo Combined Results
        Simulation results for the combined datasets from the various countries are shown in the following graphs.  The model is able to adequately capture the influence of growing conditions (soil, climate) and management (population, Nitrogen, irrigation, sowing date).
    Folder China
      Folder Yaan
        Memo
          These data [Wu2019] were obtained from a field experiment conducted in 2014–2016 on a a Purple clay loam(XI-Luvic Xerosols, FAO classification) at Sichuan Agricultural University, Yaan, China.  Three soybean cultivars (Jiuyuehuang,Nandou12, and Texuan13 belonging to maturity group [MG] 5-7 ) were sown on 15 Jun 2014, 18 Jun 2015, and 18 Jun 2016.
        Experiment Yaan2014
          Factors
            Factor Cv
              Specification=[SowingRule].Script.CultivarName=Nandou12,Texuan13,Jiuyuehuang
          Simulation Yaan2014Base
            Clock: Start=2014-01-01; End=2014-12-31
            Summary summaryfile
            Weather: FileName=Yaan.met; Latitude=29.9833; Tav=17.64; Amp=19.89
            SoilArbitrator Soil Arbitrator
            Zone paddock: Area=1; Slope=0; AspectAngle=0; Altitude=50
              MicroClimate: a_interception=0; b_interception=1; c_interception=0; d_interception=0; SoilHeatFluxFraction=0.4; MinimumHeightDiffForNewLayer=0; NightInterceptionFraction=0.5; ReferenceHeight=2
              Irrigation
              Manager Automatic irrigation based on water deficit
                FASW = 0
                WaterDeficit = 0
                AutoIrrigationOn = True
                FASWThreshold = 0.9
                FASWDepth = 600
                script: same as in Validation.USA.Indiana.Indiana2006.Indiana2006Base.paddock.Automatic irrigation based on water deficit
              Fertiliser
              SurfaceOrganicMatter: InitialResidueName=wheat; InitialResidueType=wheat; InitialResidueMass=4500; InitialStandingFraction=0; InitialCPR=0; InitialCNR=80
              Report DailyReport: EventNames=[Clock].DoReport
                VariableNames:
                  [Clock].Today
                  [DiagnosticsVariables].Script.AccumPlantN
                  [DiagnosticsVariables].Script.AccumMineralisation
                  [DiagnosticsVariables].Script.AccumDenit
                  [DiagnosticsVariables].Script.AccumFert
                  [DiagnosticsVariables].Script.AccumLeach
                  [DiagnosticsVariables].Script.AccumDetach
                  [DiagnosticsVariables].Script.DeltaSoilOMN
                  [DiagnosticsVariables].Script.DeltaSurfaceOMN
                  [DiagnosticsVariables].Script.DeltaSoilMineralN
                  [Soybean].Root.NSupply
                  [Soil].SoilWater.Eo
                  [Soil].SoilWater.Es
                  [DiagnosticsVariables].Script.SWC
                  [DiagnosticsVariables].Script.DUL
                  [Soil].SoilWater.Drainage
                  [Soil].SoilWater.Runoff
                  [DiagnosticsVariables].Script.OutFlowLat
                  [Soil].SoilWater.pond
                  [DiagnosticsVariables].Script.AccumEO
                  [DiagnosticsVariables].Script.AccumEP
                  [DiagnosticsVariables].Script.AccumES
                  [DiagnosticsVariables].Script.AccumDrainage
                  [DiagnosticsVariables].Script.AccumRunoff
                  [DiagnosticsVariables].Script.AccumRainfall
                  [DiagnosticsVariables].Script.AccumIrrigation
                  [DiagnosticsVariables].Script.AccumOutflowLat
                  [DiagnosticsVariables].Script.SoilWaterDeficit
                  [Soybean].Grain.Live.Wt
                  [Soybean].Shell.Live.Wt
                  [Soybean].Stem.Live.Wt
                  [Soybean].Stem.Live.Wt
                  [Soybean].Grain.Live.N
                  [Soybean].Shell.Live.N
                  [Soybean].Leaf.Live.Wt
                  [Soybean].Root.Live.Wt
                  [Soybean].Leaf.Live.N
                  [Soybean].Root.Live.N
                  [Soybean].Leaf.Live.NConc
                  [Soybean].Root.Live.NConc
                  [Soybean].Root.WaterSupply
                  [Soybean].Root.WaterUptake
                  [Soybean].Leaf.Transpiration
                  [Soybean].Leaf.WaterDemand
                  [Soybean].Root.Depth
                  [Soybean].Leaf.CoverTotal
                  [Soybean].Leaf.CoverDead
                  [Soybean].Leaf.LAI
                  [Soybean].Leaf.Height
                  [Soybean].Leaf.PotentialBiomass
                  [Soil].Water.MM
                  [Soil].NO3.kgha
                  [DiagnosticsVariables].Script.SoilNitrogenContent
                  [Soybean].Arbitrator.N.TotalPlantDemand
                  [MicroClimate].net_radn
                  [MicroClimate].peta
                  [MicroClimate].petr
                  [DiagnosticsVariables].Script.FomN
                  [DiagnosticsVariables].Script.HumN
                  [DiagnosticsVariables].Script.BiomN
                  [DiagnosticsVariables].Script.DltNMinRes
                  [DiagnosticsVariables].Script.DltNMinTot
                  [Soybean].Leaf.Fw
                  [Soybean].Leaf.Fn
                  [Soybean].Phenology.CurrentPhase.Name
                  [Soybean].Phenology.Stage
                  [Soybean].Pod.Wt
                  [Soybean].Pod.N
                  [Soybean].Structure.LeafTipsAppeared
                  [Soybean].Structure.MainStemPrimordiaNo
                  [Soybean].Leaf.CohortArea[1]
                  [Soybean].Leaf.CohortArea[2]
                  [Soybean].Leaf.CohortArea[3]
                  [Soybean].Leaf.CohortArea[4]
                  [Soybean].Leaf.CohortArea[5]
                  [Soybean].Leaf.CohortArea[6]
                  [Soybean].Leaf.CohortArea[7]
                  [Soybean].Leaf.CohortArea[8]
                  [Soybean].Leaf.CohortArea[9]
                  [Soybean].Leaf.CohortArea[10]
                  [Soybean].Leaf.CohortArea[11]
                  [Soybean].Leaf.CohortArea[12]
                  [Soybean].Leaf.CohortArea[13]
                  [Soybean].Leaf.CohortArea[14]
                  [Soybean].Leaf.CohortArea[15]
                  [Soybean].Leaf.AppearedCohortNo
                  [Soybean].Leaf.DeadCohortNo
                  [Soybean].AboveGround.Wt
                  [Soybean].Phenology.Stage
                  [Soybean].Structure.MainStemPrimordiaNo
                  [Soybean].Phenology.NFF
                  [SoybeanHarvestRule].Script.FinalTag
                  [Soybean].Grain.NumberFunction
                  [Soybean].Shell.PodNumber
                  [Soybean].Phenology.FN
                  [Soybean].Phenology.FN.TotalNodes
                  [Soybean].Phenology.FN.VegetativeNodes
                  [Soybean].Phenology.EmergenceDAS
                  [Soybean].Phenology.FloweringDAS
              Manager SowingRule
                RowSpacing = 500
                SowingDepth = 50
                SowingRate = 10
                CultivarName = Nandou12
                SowingDate = 06/15/2014 00:00:00
                script: same as in Validation.USA.FACTS.Ames2015.Ames2015Base.paddock.SowingRule
              Manager HarvestRule
                HarvestDate = 10/30/2014 00:00:00
                script: same as in Validation.Australia.Griffith.Griffith.GriffithBase.paddock.HarvestRule
              Report HarvestReport: EventNames=[Soybean].Harvesting
                VariableNames:
                  [Clock].Today
                  [Soybean].Structure.MainStemPrimordiaNo
                  [Soybean].Phenology.NFF
                  [Soybean].Script.FinalTag
                  [Soybean].Phenology.CurrentStageName
                  [Soybean].Phenology.EmergenceDAS
                  [Soybean].Phenology.FloweringDAS
                  [Soybean].Phenology.MaturityDAS
                  [Soybean].AboveGround.Wt
                  [Soybean].Grain.Wt
              Plant Soybean
              Soil: LocalName=Clarion (near Newell); NearestTown=Ames; State=Iowa; Country=US; ApsoilNumber=34; Latitude=0; Longitude=0; Comments=all data only from WSS
                DataSource=for Mahli al-Kaisi paper (Marsden Research farm), tes file , long term soybean
                Physical
                  Thickness  BD     AirDry  LL15   DUL    SAT
                  180        1.425  0.144   0.16   0.297  0.412
                  120        1.425  0.132   0.147  0.289  0.412
                  160        1.425  0.147   0.147  0.289  0.412
                  200        1.6    0.165   0.165  0.293  0.346
                  250        1.6    0.165   0.165  0.293  0.346
                  410        1.6    0.105   0.105  0.25   0.346
                  200        1.6    0.105   0.105  0.25   0.346
                  SoilCrop SoybeanSoil: LL=[0.15, 0.16, 0.17, 0.19, 0.2, 0.2, 0.2]; KL=[0.08, 0.08, 0.08, 0.06, 0.04, 0.03, 0.03]; XF=[1, 1, 1, 1, 1, 1, 1]
                WaterBalance SoilWater: SummerDate=1-jun; SummerU=6; SummerCona=2.5; WinterDate=1-dec; WinterU=6; WinterCona=2.5; DiffusConst=88; DiffusSlope=35.4; Salb=0.13; CN2Bare=75; CNRed=20; CNCov=0.8; PSIDul=-100; Thickness=[180, 120, 160, 200, 250, 410, 200]; SWCON=[0.5, 0.5, 0.5, 0.5, 0.5, 0.5, 0.5]
                Organic: FOMCNRatio=45; CarbonUnits=Total
                  Thickness  Carbon  SoilCNRatio  FBiom  FInert  FOM
                  180        1.5     14           0.02   0.6     315.909
                  120        1.453   14           0.01   0.7     249.288
                  160        0.83    14           0.01   0.75    181.784
                  200        0.58    14           0.01   0.768   122.497
                  250        0.54    14           0.01   0.85    74.7884
                  410        0.48    14           0.01   0.93    33.2965
                  200        0.5     14           0.01   0.05    22.4371
                Chemical: Thickness=[180, 120, 160, 200, 250, 410, 200]; PH=[6.317, 6.317, 6.317, 6.582, 6.582, 7.96, 7.96]; PHUnits=Water
                Water: Thickness=[180, 120, 160, 200, 250, 410, 200]; InitialValues=[0.297, 0.289, 0.289, 0.293, 0.293, 0.25, 0.25]; InitialPAWmm=210.47; RelativeTo=LL15; FilledFromTop=true
                CERESSoilTemperature Temperature
                Nutrient
                Solute NO3: Thickness=[180, 120, 160, 200, 250, 410, 200]; InitialValues=[370.37, 14.815, 7.407, 0.554, 0.395, 0.395, 0.237]; InitialValuesUnits=ppm; WaterTableConcentration=0; D0=0; DepthConstant=0; MaxDepthSoluteAccessible=0; RunoffEffectivenessAtMovingSolute=0; MaxEffectiveRunoff=0
                Solute NH4: Thickness=[180, 120, 160, 200, 250, 410, 200]; InitialValues=[37.037, 14.815, 7.407, 0.29, 0.29, 0.29, 0.29]; InitialValuesUnits=ppm; WaterTableConcentration=0; D0=0; DepthConstant=0; MaxDepthSoluteAccessible=0; RunoffEffectivenessAtMovingSolute=0; MaxEffectiveRunoff=0
                Solute Urea: same as Validation.USA.Indiana.Indiana2006.Indiana2006Base.paddock.Soil.Urea
        Experiment Yaan2015
          Factors
            Factor Cv
              Specification=[SowingRule].Script.CultivarName=Nandou12,Texuan13,Jiuyuehuang
          Simulation Yaan2015Base
            Clock: Start=2015-01-01; End=2015-12-31
            Summary summaryfile
            Weather: FileName=Yaan.met; Latitude=29.9833; Tav=17.64; Amp=19.89
            SoilArbitrator Soil Arbitrator
            Zone paddock: Area=1; Slope=0; AspectAngle=0; Altitude=50
              MicroClimate: a_interception=0; b_interception=1; c_interception=0; d_interception=0; SoilHeatFluxFraction=0.4; MinimumHeightDiffForNewLayer=0; NightInterceptionFraction=0.5; ReferenceHeight=2
              Irrigation
              Manager Automatic irrigation based on water deficit: same as Validation.China.Yaan.Yaan2014.Yaan2014Base.paddock.Automatic irrigation based on water deficit
              Fertiliser
              SurfaceOrganicMatter: InitialResidueName=wheat; InitialResidueType=wheat; InitialResidueMass=4500; InitialStandingFraction=0; InitialCPR=0; InitialCNR=80
              Report DailyReport: same as Validation.China.Yaan.Yaan2014.Yaan2014Base.paddock.DailyReport
              Manager SowingRule
                RowSpacing = 500
                SowingDepth = 50
                SowingRate = 10
                CultivarName = Nandou12
                SowingDate = 06/18/2015 00:00:00
                script: same as in Validation.USA.FACTS.Ames2015.Ames2015Base.paddock.SowingRule
              Manager HarvestRule
                HarvestDate = 11/01/2015 00:00:00
                script: same as in Validation.Australia.Griffith.Griffith.GriffithBase.paddock.HarvestRule
              Report HarvestReport: same as Validation.China.Yaan.Yaan2014.Yaan2014Base.paddock.HarvestReport
              Plant Soybean
              Soil: same as Validation.China.Yaan.Yaan2014.Yaan2014Base.paddock.Soil
        Experiment Yaan2016
          Factors
            Factor Cv
              Specification=[SowingRule].Script.CultivarName=Nandou12,Texuan13,Jiuyuehuang
          Simulation Yaan2016Base
            Clock: Start=2016-01-01; End=2016-12-31
            Summary summaryfile
            Weather: FileName=Yaan.met; Latitude=29.9833; Tav=17.64; Amp=19.89
            SoilArbitrator Soil Arbitrator
            Zone paddock: Area=1; Slope=0; AspectAngle=0; Altitude=50
              MicroClimate: a_interception=0; b_interception=1; c_interception=0; d_interception=0; SoilHeatFluxFraction=0.4; MinimumHeightDiffForNewLayer=0; NightInterceptionFraction=0.5; ReferenceHeight=2
              Irrigation
              Manager Automatic irrigation based on water deficit: same as Validation.China.Yaan.Yaan2014.Yaan2014Base.paddock.Automatic irrigation based on water deficit
              Fertiliser
              SurfaceOrganicMatter: InitialResidueName=wheat; InitialResidueType=wheat; InitialResidueMass=4500; InitialStandingFraction=0; InitialCPR=0; InitialCNR=80
              Report DailyReport: same as Validation.China.Yaan.Yaan2014.Yaan2014Base.paddock.DailyReport
              Manager SowingRule
                RowSpacing = 500
                SowingDepth = 50
                SowingRate = 10
                CultivarName = Nandou12
                SowingDate = 06/18/2016 00:00:00
                script: same as in Validation.USA.FACTS.Ames2015.Ames2015Base.paddock.SowingRule
              Manager HarvestRule
                HarvestDate = 11/01/2016 00:00:00
                script: same as in Validation.Australia.Griffith.Griffith.GriffithBase.paddock.HarvestRule
              Report HarvestReport: same as Validation.China.Yaan.Yaan2014.Yaan2014Base.paddock.HarvestReport
              Plant Soybean
              Soil: same as Validation.China.Yaan.Yaan2014.Yaan2014Base.paddock.Soil
      Folder Heze
        Memo
          These data [Wu2019] were obtained from a field experiment conducted in 2013–2015 on sandy
          loam (J-Fluvisols, FAO classification) in the surface 0.5 m, changing to loam at depth with a deep soil profile (> 2 m) in Heze city, China. One soybean cultivar (Hedou19 belonging to maturity group [MG]3) were sown on 15 Jun 2014, 18 Jun 2015, and 18 Jun 2016.
        Experiment Hedou19
          Factors
            Factor Sow
              CompositeFactor 2013
                Specifications:
                  [SowingRule].Script.SowingDate=2013-06-13
                  [SowingRule].Script.SowingDepth=50
                  [HarvestRule].Script.HarvestDate=2013-09-27
              CompositeFactor 2014
                Specifications:
                  [SowingRule].Script.SowingDate=2014-06-10
                  [SowingRule].Script.SowingDepth=50
                  [HarvestRule].Script.HarvestDate=2014-09-29
              CompositeFactor 2015
                Specifications:
                  [SowingRule].Script.SowingDate=2015-06-18
                  [SowingRule].Script.SowingDepth=50
                  [HarvestRule].Script.HarvestDate=2015-09-27
          Simulation Hedou19Base
            Clock: Start=2013-01-01; End=2015-12-31
            Summary summaryfile
            Weather: FileName=Heze.met; Latitude=34.05; Tav=15.01; Amp=26.22
            SoilArbitrator Soil Arbitrator
            Zone paddock: Area=1; Slope=0; AspectAngle=0; Altitude=50
              MicroClimate: a_interception=0; b_interception=1; c_interception=0; d_interception=0; SoilHeatFluxFraction=0.4; MinimumHeightDiffForNewLayer=0; NightInterceptionFraction=0.5; ReferenceHeight=2
              Irrigation
              Manager Automatic irrigation based on water deficit: same as Validation.China.Yaan.Yaan2014.Yaan2014Base.paddock.Automatic irrigation based on water deficit
              Fertiliser
              SurfaceOrganicMatter: InitialResidueName=wheat; InitialResidueType=wheat; InitialResidueMass=4500; InitialStandingFraction=0; InitialCPR=0; InitialCNR=80
              Report DailyReport: same as Validation.USA.FACTS.Ames2015.Ames2015Base.paddock.DailyReport
              Manager SowingRule
                RowSpacing = 500
                SowingDepth = 50
                SowingRate = 10
                CultivarName = Hedou19
                SowingDate = 06/13/2013 00:00:00
                script: same as in Validation.USA.FACTS.Ames2015.Ames2015Base.paddock.SowingRule
              Manager HarvestRule
                HarvestDate = 09/28/2013 00:00:00
                script: same as in Validation.Australia.Griffith.Griffith.GriffithBase.paddock.HarvestRule
              Report HarvestReport: EventNames=[Soybean].Harvesting
                VariableNames:
                  [Clock].Today
                  [Soybean].Structure.MainStemPrimordiaNo
                  [Soybean].Phenology.NFF
                  [Soybean].Script.FinalTag
              Plant Soybean
              Soil: LocalName=Clarion (near Newell); NearestTown=Ames; State=Iowa; Country=US; ApsoilNumber=34; Latitude=0; Longitude=0; Comments=all data only from WSS
                DataSource=for Mahli al-Kaisi paper (Marsden Research farm), tes file , long term soybean
                Physical
                  Thickness  BD     AirDry  LL15   DUL    SAT
                  180        1.425  0.144   0.16   0.297  0.412
                  120        1.425  0.132   0.147  0.289  0.412
                  160        1.425  0.147   0.147  0.289  0.412
                  200        1.6    0.165   0.165  0.293  0.346
                  250        1.6    0.165   0.165  0.293  0.346
                  410        1.6    0.105   0.105  0.25   0.346
                  200        1.6    0.105   0.105  0.25   0.346
                  SoilCrop SoybeanSoil: LL=[0.147, 0.147, 0.17, 0.19, 0.2, 0.2, 0.2]; KL=[0.08, 0.08, 0.08, 0.08, 0.08, 0.06, 0.03]; XF=[1, 1, 1, 1, 1, 0.09, 0.05]
                WaterBalance SoilWater: same as Validation.China.Yaan.Yaan2014.Yaan2014Base.paddock.Soil.SoilWater
                Organic: same as Validation.USA.Indiana.Indiana2006.Indiana2006Base.paddock.Soil.Organic
                Chemical: Thickness=[180, 120, 160, 200, 250, 410, 200]; PH=[6.317, 6.317, 6.317, 6.582, 6.582, 7.96, 7.96]; PHUnits=Water
                Water: Thickness=[180, 120, 160, 200, 250, 410, 200]; InitialValues=[0.297, 0.289, 0.289, 0.293, 0.293, 0.25, 0.25]; InitialPAWmm=210.47; RelativeTo=LL15; FilledFromTop=true
                CERESSoilTemperature Temperature
                Nutrient
                Solute NO3: Thickness=[180, 120, 160, 200, 250, 410, 200]; InitialValues=[370, 14, 7, 0, 0, 0, 0]; InitialValuesUnits=ppm; WaterTableConcentration=0; D0=0; DepthConstant=0; MaxDepthSoluteAccessible=0; RunoffEffectivenessAtMovingSolute=0; MaxEffectiveRunoff=0
                Solute NH4: Thickness=[180, 120, 160, 200, 250, 410, 200]; InitialValues=[37, 14, 7, 0, 0, 0, 0]; InitialValuesUnits=ppm; WaterTableConcentration=0; D0=0; DepthConstant=0; MaxDepthSoluteAccessible=0; RunoffEffectivenessAtMovingSolute=0; MaxEffectiveRunoff=0
                Solute Urea: same as Validation.USA.Indiana.Indiana2006.Indiana2006Base.paddock.Soil.Urea
  Folder Sensibility
    Folder FertiliserResponse
      Memo
        This sensibility test checks that Soybean yield response to N fertiliser is modest under normal field conditions.  A simulation experiment has been constructed to simulate yield in Nebraska for different rates of N applied at sowing.  Yield variation in response to this should be low.
      Experiment FertiliserResponse
        Factors
          Factor N: Specification=[Operations]
            Operations 0
              2007-04-30  [Soybean].Sow(population: 29, cultivar: "PioneerP93M11_MG31", depth: 50, rowSpacing: 762);
              2007-09-20  [Soybean].Harvest
            Operations 50
              2007-04-30  [Soybean].Sow(population: 29, cultivar: "PioneerP93M11_MG31", depth: 50, rowSpacing: 762);
              2007-04-30  [Fertiliser].Apply(Amount: 50, Type: Fertiliser.Types.UreaN, Depth: 210)
              2007-09-20  [Soybean].Harvest
            Operations 100
              2007-04-30  [Soybean].Sow(population: 29, cultivar: "PioneerP93M11_MG31", depth: 50, rowSpacing: 762);
              2007-04-30  [Fertiliser].Apply(Amount: 100, Type: Fertiliser.Types.UreaN, Depth: 210)
              2007-09-20  [Soybean].Harvest
            Operations 150
              2007-04-30  [Soybean].Sow(population: 29, cultivar: "PioneerP93M11_MG31", depth: 50, rowSpacing: 762);
              2007-04-30  [Fertiliser].Apply(Amount: 150, Type: Fertiliser.Types.UreaN, Depth: 210)
              2007-09-20  [Soybean].Harvest
            Operations 200
              2007-04-30  [Soybean].Sow(population: 29, cultivar: "PioneerP93M11_MG31", depth: 50, rowSpacing: 762);
              2007-04-30  [Fertiliser].Apply(Amount: 200, Type: Fertiliser.Types.UreaN, Depth: 210)
              2007-09-20  [Soybean].Harvest
        Simulation FertiliserResponseBase
          Clock: Start=2007-01-01; End=2007-12-25
          Weather: FileName=Nebraska_Salvagiotti.met; Latitude=40.83; Tav=11.51039; Amp=28.57175
          Summary summaryfile
          SoilArbitrator
          Zone Field: Area=1; Slope=0; AspectAngle=0; Altitude=50
            Operations
              2016-05-06  [Soybean].Sow(population: 34, cultivar: "Ames_P92Y75_27MG", depth: 60, rowSpacing: 760);
            SurfaceOrganicMatter: InitialResidueName=maize; InitialResidueType=maize; InitialResidueMass=4000; InitialStandingFraction=0; InitialCPR=0; InitialCNR=65
            Plant Soybean
            MicroClimate: a_interception=0; b_interception=1; c_interception=0; d_interception=0; SoilHeatFluxFraction=0.4; MinimumHeightDiffForNewLayer=0; NightInterceptionFraction=0.5; ReferenceHeight=2
            Fertiliser
            Irrigation
            Soil SoilSalvagiotti1: SoilType=Clarion; NearestTown=Ames; Region=Boone; State=Iowa; Country=US; ApsoilNumber=34; Latitude=42.02204; Longitude=-93.769115; DataSource=web soil sruvey; Comments=hydrological parameters and BD from Saxton and Rawls, 2006
              Physical: same as Validation.USA.Nebraska.Nebraska2006.Sal2006Base.Field.SoilSalvagiotti1.Physical
              Organic: same as Validation.USA.Nebraska.Nebraska2006.Sal2006Base.Field.SoilSalvagiotti1.Organic
              Chemical: Thickness=[50, 50, 100, 200, 300, 340, 330, 200, 200, 240]; PHUnits=Water
                PH=[6.37, 6.37, 6.37, 6.37, 6.37, 6.37, 6.37, 6.37, 6.37, 6.37]
              CERESSoilTemperature Temperature
              WaterBalance SoilWater: same as Validation.USA.Nebraska.Nebraska2007.Sal2007Base.Field.SoilSalvagiotti1.SoilWater
              Nutrient
              Water: Thickness=[50, 50, 100, 200, 300, 340, 330, 200, 200, 240]; InitialPAWmm=392.64; RelativeTo=LL15; FilledFromTop=false
                InitialValues=[0.39, 0.363, 0.363, 0.371, 0.38, 0.377, 0.369, 0.351, 0.35, 0.302]
              Solute NO3: same as Validation.USA.Nebraska.Nebraska2006.Sal2006Base.Field.SoilSalvagiotti1.NO3
              Solute NH4: same as Validation.USA.Nebraska.Nebraska2006.Sal2006Base.Field.SoilSalvagiotti1.NH4
              Solute Urea: same as Validation.USA.Nebraska.Nebraska2006.Sal2006Base.Field.SoilSalvagiotti1.Urea
            Report DailyReport: EventNames=[Clock].DoReport
              VariableNames:
                [Clock].Today
                sum([Soil].NO3.kgha) as TotalNO3
            Report HarvestReport: EventNames=[Soybean].Harvesting
              VariableNames:
                [Clock].Today
                sum of [Fertiliser].NitrogenApplied from [Soybean].Sowing to [Soybean].Harvesting as NApplied
                [Soybean].Phenology.CurrentStageName
                [Soybean].Phenology.EmergenceDAS
                [Soybean].Phenology.FloweringDAS
                [Soybean].Phenology.MaturityDAS
                [Soybean].AboveGround.Wt
                [Soybean].Grain.Wt
            Manager Automatic irrigation based on water deficit: same as Validation.USA.Indiana.Indiana2006.Indiana2006Base.paddock.Automatic irrigation based on water deficit
    Folder MaturityGroups
      Memo
        The optimum maturity class for soybean in Iowa should be approximately 2 to 3.  Simulations are provided for the entire range of generic cultivars for several years at Ames, Iowa.
      Experiment MaturityGroupsIowa
        Factors
          Factor Cv
            Specification=[SowingRule].Script.CultivarName=Generic_MG000,Generic_MG00,Generic_MG0,Generic_MG1,Generic_MG2,Generic_MG3,Generic_MG4,Generic_MG5,Generic_MG6,Generic_MG7,Generic_MG8,Generic_MG9,Generic_MG10
        Simulation MaturityGroupsIowaBase
          Clock: Start=2000-01-01; End=2017-12-31
          Summary summaryfile
          Weather: FileName=Ames.met; Latitude=42.03; Tav=9.402837; Amp=29.60712
          SoilArbitrator Soil Arbitrator
          Zone paddock: Area=1; Slope=0; AspectAngle=0; Altitude=50
            MicroClimate: a_interception=0; b_interception=1; c_interception=0.1; d_interception=0; SoilHeatFluxFraction=0.4; MinimumHeightDiffForNewLayer=0; NightInterceptionFraction=0.5; ReferenceHeight=2
            Irrigation
            Fertiliser
            SurfaceOrganicMatter: InitialResidueName=maize; InitialResidueType=maize; InitialResidueMass=2000; InitialStandingFraction=0; InitialCPR=0; InitialCNR=80
            Manager SowingRule
              RowSpacing = 760
              SowingDepth = 50
              SowingRate = 32
              CultivarName = PioneerP932T16R_MG32
              SowingDayOfYear = 136
```csharp
using Models.Soils;
using System;
using Models.Core;
using Models.PMF;
using APSIM.Shared.Utilities;
        
        namespace Models
        {
           [Serializable] 
           [System.Xml.Serialization.XmlInclude(typeof(Model))]
            public class Script : Model
            {      
               [Link] Plant Soybean;
               [Link] Clock Clock;

               [Description("Spacing (mm) between rows")]
               public double RowSpacing { get; set; }
               [Description("Depth (mm) Grains are planted")]
               public double SowingDepth { get; set; }
               [Description("Seeds sown (/m2)")]
               public double SowingRate { get; set; }
               [Description("Cultivar")]
               [Display(Type=DisplayType.CultivarName)]
               public string CultivarName { get; set; }
               [Description("Sowing Day of Year")]
               public int SowingDayOfYear { get; set; }

               [EventSubscribe("DoManagement")]
               private void OnDoManagement(object sender, EventArgs e)
               {
                if (Clock.Today.DayOfYear == SowingDayOfYear)
                    Soybean.Sow(population:SowingRate, cultivar:CultivarName, depth:SowingDepth, rowSpacing:RowSpacing, budNumber:1);
               }
            }
        }
```
            Report SensibilityReport: EventNames=[Soybean].Harvesting
              VariableNames:
                [Clock].Today
                [Soybean].Grain.Wt
                [Soybean].Phenology.FloweringDAS
                [Soybean].Phenology.MaturityDAS
            Operations
            Plant Soybean
            Soil: same as Validation.USA.FACTS.Ames2017.Ames2017Base.paddock.Soil
            Manager WaterTableManager: same as Validation.USA.FACTS.Ames2017.Ames2017Base.paddock.WaterTableManager
            Manager HarvestRule: same as Validation.USA.FACTS.Sutherland2017.Sutherland2017Base.paddock.HarvestRule
    Folder TimeOfSowing
      Memo
        The data of [Gaynor2011] show that Soybean yield should be approximately 4t/ha for early sown soybean (Mid November) in the Australian Riverina region and decrease across the growing season to lower values (1.5-2t/ha) by late January.
      Experiment TimeOfSowingGriffith
        Factors
          Factor TOS: Specification=[TimeOfSowingRule]
            Manager MidNov
              RowSpacing = 760
              SowingDepth = 50
              SowingRate = 32
              CultivarName = Bowyer
              SowingDayOfYear = 315
              script: same as in Sensibility.MaturityGroups.MaturityGroupsIowa.MaturityGroupsIowaBase.paddock.SowingRule
            Manager MidDec
              RowSpacing = 760
              SowingDepth = 50
              SowingRate = 32
              CultivarName = Bowyer
              SowingDayOfYear = 345
              script: same as in Sensibility.MaturityGroups.MaturityGroupsIowa.MaturityGroupsIowaBase.paddock.SowingRule
            Manager EarlyJan
              RowSpacing = 760
              SowingDepth = 50
              SowingRate = 32
              CultivarName = Bowyer
              SowingDayOfYear = 5
              script: same as in Sensibility.MaturityGroups.MaturityGroupsIowa.MaturityGroupsIowaBase.paddock.SowingRule
            Manager LateJan
              RowSpacing = 760
              SowingDepth = 50
              SowingRate = 32
              CultivarName = Bowyer
              SowingDayOfYear = 25
              script: same as in Sensibility.MaturityGroups.MaturityGroupsIowa.MaturityGroupsIowaBase.paddock.SowingRule
        Simulation TimeofSowingGriffithBase
          Clock: Start=2000-01-01; End=2017-12-31
          Summary summaryfile
          Weather: FileName=Griffith.met; Latitude=-34.32; Tav=17.09; Amp=17.06
          SoilArbitrator Soil Arbitrator
          Zone paddock: Area=1; Slope=0; AspectAngle=0; Altitude=50
            MicroClimate: a_interception=0; b_interception=1; c_interception=0.1; d_interception=0; SoilHeatFluxFraction=0.4; MinimumHeightDiffForNewLayer=0; NightInterceptionFraction=0.5; ReferenceHeight=2
            Irrigation
            Fertiliser
            SurfaceOrganicMatter: InitialResidueName=maize; InitialResidueType=maize; InitialResidueMass=2000; InitialStandingFraction=0; InitialCPR=0; InitialCNR=80
            Report SensibilityReport: EventNames=[Soybean].Harvesting
              VariableNames:
                [Clock].Today
                [Soybean].Grain.Wt
                [Soybean].Phenology.FloweringDAS
                [Soybean].Phenology.MaturityDAS
            Manager TimeOfSowingRule
              RowSpacing = 760
              SowingDepth = 50
              SowingRate = 32
              CultivarName = PioneerP932T16R_MG32
              SowingDayOfYear = 315
              script: same as in Sensibility.MaturityGroups.MaturityGroupsIowa.MaturityGroupsIowaBase.paddock.SowingRule
            Operations
            Plant Soybean
            Manager HarvestRule
```csharp
using Models.PMF.Phen;
using APSIM.Shared.Utilities;
using System.Xml.Serialization;
using Models;
using Models.PMF;
using Models.Soils;
using System.Text;
using System.Collections.Generic;
using Models.Core;
using System;
using Models.Soils.Nutrients;

namespace Models
{
    [Serializable] 
    public class Script : Model
    {      
        [Link] private Plant Soybean;
        [Link] private Zone zone;
        [Link(Type = LinkType.Path, Path = "[Soybean].Phenology")]
        private Phenology phenology;
                    
        
        [EventSubscribe("StartOfSimulation")]
        private void OnSimulationCommencing(object sender, EventArgs e)
        {
        }       
        
        [EventSubscribe("DoManagement")]
        private void OnDoManagement(object sender, EventArgs e)
        {
        if (phenology.CurrentPhase.Name=="ReadyForHarvesting"||(Soybean.IsEmerged&&!Soybean.IsAlive))
           {
           Soybean.Harvest();
           Soybean.EndCrop();
           }
        }
        
        [EventSubscribe("DoManagementCalculations")]
        private void OnDoManagementCalculations(object sender, EventArgs e)
        {
            
        }
    }
}
```
            Soil: same as Validation.USA.Mississippi.Mississippi2002.Mississippi2002Base.paddock.Soil
            Manager Automatic irrigation based on water deficit: same as Validation.USA.Indiana.Indiana2006.Indiana2006Base.paddock.Automatic irrigation based on water deficit
    Folder DetailedDynamics
      Experiment DetailedDynamics
        Factors
          Factor Sow
            CompositeFactor Jan9: Specifications=[SowingRule].Script.SowingDate=1990-01-09
        Simulation DetailedDynamicsBase
          Clock: Start=1990-01-01; End=1990-05-31
          Summary summaryfile
          Weather: FileName=Gatton.met; Latitude=-27.55; Tav=19.83; Amp=12.77
          SoilArbitrator Soil Arbitrator
          Zone paddock: Area=1; Slope=0; AspectAngle=0; Altitude=50
            MicroClimate: a_interception=0; b_interception=1; c_interception=0; d_interception=0; SoilHeatFluxFraction=0.4; MinimumHeightDiffForNewLayer=0; NightInterceptionFraction=0.5; ReferenceHeight=2
            Irrigation
            Fertiliser
            SurfaceOrganicMatter: InitialResidueName=maize; InitialResidueType=maize; InitialResidueMass=100; InitialStandingFraction=0; InitialCPR=0; InitialCNR=55
            Report DetailedReport: EventNames=[Clock].DoReport
              VariableNames:
                [Clock].Today
                [Soybean].Phenology.CurrentStageName
                [Soybean].Leaf.Wt
                [Soybean].Leaf.N
                [Soybean].Leaf.Total.StructuralWt
                [Soybean].Leaf.Total.StructuralN
                [Soybean].Leaf.Live.StructuralWt
                [Soybean].Leaf.Live.StructuralN
                [Soybean].Leaf.Live.Wt
                [Soybean].Leaf.Live.StructuralWt
                [Soybean].Leaf.Live.N
                [Soybean].Leaf.Live.NConc
                [Soybean].Leaf.NConc
                [Soybean].Leaf.MinimumNConc
                [Soybean].Leaf.CriticalNConc
                [Soybean].Leaf.MaximumNConc
                [Soybean].Leaf.Senesced.Wt
                [Soybean].Stem.Wt
                [Soybean].Stem.Live.Wt
                [Soybean].Stem.Live.N
                [Soybean].Stem.Total.StructuralWt
                [Soybean].Stem.Total.StructuralN
                [Soybean].Stem.Live.StructuralWt
                [Soybean].Stem.Live.StructuralN
                [Soybean].Stem.N
                [Soybean].Stem.Nconc
                [Soybean].Stem.MinimumNConc
                [Soybean].Stem.CriticalNConc
                [Soybean].Stem.MaximumNConc
                [Soybean].Shell.Wt
                [Soybean].Shell.N
                [Soybean].Shell.Total.StructuralWt
                [Soybean].Shell.Total.StructuralN
                [Soybean].Shell.Live.Wt
                [Soybean].Shell.Live.N
                [Soybean].Shell.Live.StructuralWt
                [Soybean].Shell.Live.StructuralN
                [Soybean].Shell.Nconc
                [Soybean].Shell.MinimumNConc
                [Soybean].Shell.CriticalNConc
                [Soybean].Shell.MaximumNConc
                [Soybean].Grain.Wt
                [Soybean].Grain.N
                [Soybean].Grain.Nconc
                [Soybean].Shell.Wt
                [Soybean].Pod.Wt
                [Soybean].Pod.N
                [Soybean].Pod.NConc
                [Soybean].Arbitrator.DM.TotalFixationSupply
                sum([Soybean].Arbitrator.N.Fixation) as NFixed
                [Soybean].Arbitrator.DM.TotalPlantDemand
                [Soybean].Leaf.DMDemand.Total
                [Soybean].Stem.DMDemand.Total
                [Soybean].Shell.DMDemand.Total
                [Soybean].Grain.DMDemand.Total
                [Soybean].Root.DMDemand.Total
            Manager SowingRule
              SowingDate = 06/10/2001 00:00:00
              RowSpacing = 200
              SowingDepth = 50
              SowingRate = 38
              CultivarName = Davis
              script: same as in Validation.USA.FACTS.Ames2015.Ames2015Base.paddock.SowingRule
            Report HarvestReport: EventNames=[Soybean].Harvesting
              VariableNames:
                [Clock].Today
                [Soybean].Structure.MainStemPrimordiaNo
                [Soybean].Phenology.NFF
                [Soybean].Script.FinalTag
            Plant Soybean
            Soil: same as Validation.Australia.Coleambally.Coleambally.ColeaballyBase.paddock.Soil
            Operations Harvesting
              1990-05-08  [Soybean].Harvest();
              1990-05-08  [Soybean].EndCrop();
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