Simulations: Version=213
  Memo Title Page
    # The APSIM STOCK Model for Beef
  Memo Introduction
    # Introduction

    The Stock model is an implementation of the CSIRO’s Australian Feeding Standards as expressed in the Grazplan (https://grazplan.csiro.au/) model. The technical document for Grazplan is available at available at https://grazplan.csiro.au/wp-content/uploads/2007/08/TechPaperMay12.pdf. The model has been ported into APSIM NextGeneration to allow full interaction with other models within the APSIM environment. Animals in Stock show the full range of growth, reproduction and death processes (see Grazplan) and the basic management actions (mating, weaning, moving, feeding supplements, selling and buying) have been implemented. All crop/plant models in APSIM NextGeneration have a ‘damage’ interface implemented and so allow grazing as soon as the Stock are moved to the same location (zone or paddock) as the crop.

    Different animal species, genotypes and ages can be modelled together and various management systems implemented, including, but not limited to, forage crop grazing, rotational grazing, moving stock from paddock to feedlot and back again. Management can be simulated via Operations managers as in the simulations here or scripts. The collection of simulations in the Stock example shows examples of simulating three different management regimes (forage grazing, rotational grazing and a wheat/feedlot system) using scripts.

    Management of animal groups is done by user-assigned tag values that take integer values. Tag values have two purposes:

    * They can be used to manage distinct groups of animals in a common fashion. For example, all lactating ewes might be assigned the same tag value, and then all animals with this tag value might undergo the same supplementary feeding regime.
    * If tag values are assigned sequentially (starting at 1), they can be used to generate summary variables. For example, WeightTag[#1] gives the average live weight of all animals in groups with a tag value of 1.

    Note that animal groups with different tag values are never merged, even if they are otherwise similar.

    * To set the tag value of an animal group, use the Tag method.

    * To determine the tag value of an animal group, use the TagNo variable.

    Animal groups that become sufficiently similar are automatically merged into a single group.Animals are similar if all these criteria are the same:

    * Occupy the same paddock
    * Reproduction status (Castrated, Male, Empty, Early Preg,  Late Preg)
    * Number of foetuses
    * Mating cycle (day in the mating cycle)
    * Days to mating (Days left in joining period)
    * Pregnancy (Days since conception)
    * Lactation status (Days since parturition (if lactating)) – within 7 days
    * Has (not) young
    * If young exist, their reproductive status must be the same
    * Implants (hormone implants)
    * Mean age (if the animals are less than one year old )

    These two simulations in this file are validations of the Stock model in APSIM Next Gen. A description of the validation dataset can found in the "Description" memo of the "Validation" node. Descriptions of the two validation simulations ("LUDF" and "StockSlurp")  can be found in the memos of the respective simulations.

    The parameters and variables that can be specified in the Stock model are in the auto-generated APSIM Next Gen documentation which can be found at https://apsimnextgeneration.netlify.app/ under the "Model documentation" link; the "Stock" model is near the bottom of the first table.
  Memo Changing Stock Parameters
    # Changing Stock Parameters

    ## Overview

    The Stock model is an implementation of the CSIRO’s Australian Feeding Standards as expressed in the Grazplan (https://grazplan.csiro.au/) model.

    The technical paper describing Grazplan can be found at https://grazplan.csiro.au/wp-content/uploads/2007/08/TechPaperMay12.pdf

    The structure of the stock parameter strings (which can be found after adding a "Genotype" model to the "Stock" node) is not user friendly but they are needed so the code stays aligned with Grazplan.

    A useful resource to decipher the stock parameter strings are the Sheep and Cattle Explorer Excel spreadsheets. The Explorers are also useful to explore the effect of changing parameter values and they can be found at:

    * https://grazplan.csiro.au/wp-content/uploads/2007/08/SheepExplorer.xlsx for sheep and
    * https://grazplan.csiro.au/wp-content/uploads/2007/08/CattleExplorer.xlsx for cattle

    ## Example

    An example on how to change a parameter value is shown below. In the example, the Growth rate constant (CN1), which controls growth (and hence potential intake) will be changed from its default of 0.0115 to 0.015

    1. in the Cattle Explorer Excel sheet, go to the "Pot.Intake" worksheet and confirm that the default Growth rate constant (CN1) is 0.0115 (cell B6). Note also any other numbers listed above or below the desired parameter - this is to double check you have the right value in the Stock GUI

    2. in the genotype node (in the validation example "Friesian" under the main Stock node; this is where the animal's default parameters are defined) look for the appropriate name in the left hand column i.e. Growth
    3. this name is followed by notation ("Growth C c-n-") in which the last two characters match that in the Explorer (CN)
    4. ensure that the default value (0.0115) in the Cattle Explorer is found in the array in the right hand column along with the other numbers next to the default value of interest. This is just to ensure that you are dealing with the right parameter value
    5. double click the array and change the default value to the new, desired value (0.015)
    6. click away to save the changed value
  DataStore
    ExcelInput Observed: FileNames=[FeedLotObserved.xlsx]; SheetNames=[ValidationData]
    PredictedObserved: PredictedTableName=ValidationReport; ObservedTableName=ValidationData; FieldNameUsedForMatch=SimulationName; FieldName2UsedForMatch=Date; AllColumns=false
  Folder Validation
    Folder FeedlotTests
      Experiment Hersom1
        Factors
          CompositeFactor HGW
            Specifications:
              [SetUpStock].Script.Age = 13
              [SetUpStock].Script.Weight = 404
          CompositeFactor LGW
            Specifications:
              [SetUpStock].Script.Age = 13
              [SetUpStock].Script.Weight = 311
          CompositeFactor NR
            Specifications:
              [SetUpStock].Script.Age = 13
              [SetUpStock].Script.Weight = 255
        Simulation Hersom1Base
          Memo Feedlot memo
            # Feedlot simulation

            The Feedlot simulation is a simple illustration of the Stock model by using animals entering a feedlot, being fed and milked and leaving the feedlot. In addition to the Stock model itself and the Supplement specification GUI, at its core is the ChangeLactatingCowNumber GUI, the Stock operations and the Supplement operations. Both the operation files are based on stock and pasture/supplement data from the LUDF dataset (see the Validation memo for details). In the Stock operations, data on actual LUDF weekly changes in cow number have been collated from 1/08/2004 to 30/06/2017. Positive numbers denote lactating cows have been bought and moved to the feedlot while negative numbers are when cows are dried off and removed from the feedlot. It was assumed that cows were bought at weekly intervals. For the Supplement operations, six types of supplements labelled "silage_11me", "pasture_11.5me", "pasture_12me", "pasture_12.5me", "pasture_13me", and "pasture_13.5me" are bought. An excess amount of each supplement is bought (enough to last longer than the simulation) and their characteristics must be specified in the Supplement node. The LUDF dataseet is based on weekly reports - the daily pasture and supplements supplied (and their characteristics such as ME content) listed in the Supplement operations was extrapolated from the weekly data to the intervening days.
          Clock: Start=2000-05-01; End=2000-12-21
          Weather: FileName=StillWater.met
          MicroClimate: a_interception=0; b_interception=1; c_interception=0; d_interception=0; SoilHeatFluxFraction=0.4; MinimumHeightDiffForNewLayer=0; NightInterceptionFraction=0.5; ReferenceHeight=2
          Supplement: SpoilageTime=0
            Stores:
              Name        Stored  IsRoughage  DMContent  DMD   MEContent  CPConc  ProtDg  PConc   SConc   EEConc  ADIP2CP  AshAlk  MaxPassage
              fodder      0       true        0.85       0     0          0       0       0       0       0       0        0       0
              hersom1mix  100000  false       1          0.76  13.05      0.134   0.4     0.0032  0.0024  0.068   0.114    0.6     0
          Stock: RandSeed=9999
          Manager SetUpStock
            Genotype = Angus
            Sex = Male
            Age = 13
            Weight = 404
            Pregnant = 0
            Lactating = 0
            NumYoung = 0
            NumStock = 1
```csharp
using Models.Soils;
using System;
using Models.Core;
using Models.Utilities;
using Models.GrazPlan;
using APSIM.Shared.Utilities;
using System.Diagnostics;

namespace Models
{

    [Serializable]
    public class Script : Model
    {
        [Link] Clock clock;
        [Link] Stock stock;
        [Link] Supplement supplement;
        [Link] ISummary summary;
        [Link] Simulation farm;

        public enum Genotypes
        {
            Friesian,
            Jersey,
            Angus,
            Hereford,
            Brahman,
            Chianina,
            EternalKiwiCross
        }

        [Separator("Stock type info, the same type of stock are brought onto the paddock at each grazing")]

        [Description("Stock: genotype (e.g. Friesian, Jersey):")] 
        public Genotypes Genotype { get; set; }

        [Description("Stock: sex (Female, Male, Castrate):")] 
        public ReproductiveType Sex { get; set; }

        [Description("Stock: age (months):")] 
        public double Age { get; set; }

        [Description("Stock: weight (kg liveweight /head):")] 
        public double Weight { get; set; }

        [Description("Stock: fertility status (0 if non-pregnant or days since conception):")] 
        public int Pregnant { get; set; }

        [Description("Stock: lactation status (0 if non-lactating or days since parturition):")]
        public int Lactating { get; set; }

        [Description("Stock: Number of young (foetuses or calves):")]
        public int NumYoung { get; set; }

        [Description("Stock: Number of animals:")]
        public int NumStock { get; set; }
        
        
        

        [EventSubscribe("StartOfSimulation")]
        private void OnStartOfSimulation(object sender, EventArgs e)
        {

                int preg = Pregnant;
                int lact = Lactating;
                int numyoung = NumYoung;

                if (stock.AnimalGroups.Count == 2)
                {
                    preg = stock.AnimalGroups[1].Pregnancy;
                    lact = stock.AnimalGroups[1].Lactation;
                    numyoung = stock.AnimalGroups[1].NoFoetuses;
                }

                StockBuy purchase = new StockBuy();
                purchase.Genotype = ReflectionUtilities.EnumToString(Genotype);
                purchase.Number = NumStock;
                purchase.Sex = Sex;
                purchase.Age = Age;       // age in months
                purchase.Weight = Weight;  // liveweight in kg
                purchase.UseTag = 1;
                purchase.MatedTo = purchase.Genotype;
                purchase.Pregnant = preg;   // days pregnant
                purchase.Lactating = lact;  // days lactating
                purchase.NumYoung = numyoung;    // cows can be bought lactating with no young

                stock.Buy(purchase);

                stock.Move("Feedlot");

            

        }
    
    }
}
```
          Manager FeedStock
```csharp
using Models.Soils;
using System;
using Models.Core;
using Models.Utilities;
using Models.GrazPlan;
using APSIM.Shared.Utilities;
using System.Diagnostics;

namespace Models
{

    [Serializable]
    public class Script : Model
    {
        [Link] Clock clock;
        [Link] Stock stock;
        [Link] Supplement supplement;
        [Link] ISummary summary;
        [Link] Simulation farm;



        [EventSubscribe("DoManagement")]
        private void OnDoManagement(object sender, EventArgs e)
        {

           supplement.Feed("Hersom1Mix",10,"Feedlot");
        }
        
    }
}
```
          Forages
            Parameters:
              {Name=SurfaceOrganicMatter.Residue, LiveDigestibility=0.7, DeadDigestibility=0.3, LiveFractionConsumable=1, DeadFractionConsumable=1, LiveMinimumBiomass=100, DeadMinimumBiomass=0}
          Summary SummaryFile
          Zone Feedlot: Area=10; Slope=0; AspectAngle=0; Altitude=50
            Soil: ASCOrder=Vertosol; ASCSubOrder=Black; SoilType=Clay; Site=Norwin; NearestTown=Norwin; Region=Darling Downs and Granite Belt; State=Queensland; Country=Australia; NaturalVegetation=Qld. Bluegrass, possible Qld. Blue gum; ApsoilNumber=900; Latitude=-27.581836; Longitude=151.320206; LocationAccuracy=+/- 20m
              DataSource=CSIRO Sustainable Ecosystems, Toowoomba; Characteriesd as part of the GRDC funded project"Doing it better, doing it smarter, managing soil water in Australian agriculture' 2011
              Comments=OC, CLL for all crops estimated-based on Bongeen Mywybilla Soil No1
              Physical
                Thickness  BD       AirDry    LL15      DUL       SAT       KS
                150        1.01056  0.13025   0.2605    0.521     0.588655  20
                150        1.07146  0.198689  0.248362  0.496723  0.565677  20
                300        1.09394  0.28      0.28      0.488438  0.557193  20
                300        1.15861  0.28      0.28      0.480297  0.532787  20
                300        1.17301  0.28      0.28      0.471584  0.527354  20
                300        1.16287  0.28      0.28      0.457071  0.53118   20
                300        1.1875   0.28      0.28      0.452332  0.521888  20
                SoilCrop WheatSoil: LL=[0.261, 0.248, 0.28, 0.306, 0.36, 0.392, 0.446]; KL=[0.06, 0.06, 0.06, 0.04, 0.04, 0.02, 0.01]; XF=[1, 1, 1, 1, 1, 1, 1]
              WaterBalance SoilWater: SummerDate=1-Nov; SummerU=5; SummerCona=5; WinterDate=1-Apr; WinterU=5; WinterCona=5; DiffusConst=40; DiffusSlope=16; Salb=0.12; CN2Bare=73; CNRed=20; CNCov=0.8; PSIDul=-100; Thickness=[150, 150, 300, 300, 300, 300, 300]; SWCON=[0.3, 0.3, 0.3, 0.3, 0.3, 0.3, 0.3]
              Organic: FOMCNRatio=40; CarbonUnits=Total
                Thickness  Carbon  SoilCNRatio  FBiom  FInert  FOM
                150        1.2     12           0.04   0.4     347.129
                150        0.96    12           0.02   0.6     270.344
                300        0.6     12           0.02   0.8     163.972
                300        0.3     12           0.02   1       99.4541
                300        0.18    12           0.01   1       60.322
                300        0.12    12           0.01   1       36.5871
                300        0.12    12           0.01   1       22.1912
              Chemical: Thickness=[150, 150, 300, 300, 300, 300, 300]; PH=[8, 8, 8, 8, 8, 8, 8]; PHUnits=Water
              Water: Thickness=[150, 150, 300, 300, 300, 300, 300]; FilledFromTop=false
                InitialValues=[0.521, 0.496723, 0.488438, 0.480297, 0.471584, 0.457071, 0.452332]
              Nutrient
              Solute NO3: Thickness=[150, 150, 300, 300, 300, 300, 300]; InitialValues=[1, 1, 1, 1, 1, 1, 1]; InitialValuesUnits=ppm; WaterTableConcentration=0; D0=0; DepthConstant=0; MaxDepthSoluteAccessible=0; RunoffEffectivenessAtMovingSolute=0; MaxEffectiveRunoff=0
              Solute NH4: Thickness=[150, 150, 300, 300, 300, 300, 300]; InitialValues=[0.1, 0.1, 0.1, 0.1, 0.1, 0.1, 0.1]; InitialValuesUnits=ppm; WaterTableConcentration=0; D0=0; DepthConstant=0; MaxDepthSoluteAccessible=0; RunoffEffectivenessAtMovingSolute=0; MaxEffectiveRunoff=0
              Solute Urea: Thickness=[150, 150, 300, 300, 300, 300, 300]; InitialValues=[0, 0, 0, 0, 0, 0, 0]; InitialValuesUnits=kg/ha; WaterTableConcentration=0; D0=0; DepthConstant=0; MaxDepthSoluteAccessible=0; RunoffEffectivenessAtMovingSolute=0; MaxEffectiveRunoff=0
              SoilTemperature Temperature: InteractionsPerDay=8
            SurfaceOrganicMatter: InitialResidueName=wheat_stubble; InitialResidueType=wheat; InitialResidueMass=0; InitialStandingFraction=0; InitialCPR=0; InitialCNR=100
            MicroClimate: a_interception=0; b_interception=1; c_interception=0; d_interception=0; SoilHeatFluxFraction=0.4; MinimumHeightDiffForNewLayer=0; NightInterceptionFraction=0.5; ReferenceHeight=2
          Report ValidationReport: EventNames=[Clock].DoReport
            VariableNames:
              [Clock].Today as Date
              [Clock].Today
              [Stock].NumberAll
              [Stock].WeightAll
              [Stock].IntakeAll.Weight
              sum of [Stock].IntakeAll.Weight from 1-may to 31-dec as TotalIntake
              diff of [Stock].WeightAll from 1-may to 31-dec as LiveWtGain
              [Weather].MaxT
              [Weather].MinT
      Experiment Hersom2
        Factors
          CompositeFactor HGW
            Specifications:
              [SetUpStock].Script.Age = 13
              [SetUpStock].Script.Weight = 395
          CompositeFactor LGW
            Specifications:
              [SetUpStock].Script.Age = 13
              [SetUpStock].Script.Weight = 333
          CompositeFactor NR
            Specifications:
              [SetUpStock].Script.Age = 13
              [SetUpStock].Script.Weight = 257
        Simulation Hersom2Base
          Memo Feedlot memo: same as Validation.FeedlotTests.Hersom1.Hersom1Base.Feedlot memo
          Clock: Start=2000-05-01; End=2000-12-21
          Weather: FileName=StillWater.met
          MicroClimate: a_interception=0; b_interception=1; c_interception=0; d_interception=0; SoilHeatFluxFraction=0.4; MinimumHeightDiffForNewLayer=0; NightInterceptionFraction=0.5; ReferenceHeight=2
          Supplement: SpoilageTime=0
            Stores:
              Name        Stored  IsRoughage  DMContent  DMD     MEContent  CPConc  ProtDg  PConc   SConc   EEConc  ADIP2CP  AshAlk  MaxPassage
              fodder      0       true        0.85       0       0          0       0       0       0       0       0        0       0
              hersom2mix  100000  false       1          0.7744  12.88      0.1348  0.4     0.0032  0.0024  0.032   0.114    0.6     0
          Stock: RandSeed=9999
          Manager SetUpStock: same as Validation.FeedlotTests.Hersom1.Hersom1Base.SetUpStock
          Manager FeedStock
```csharp
using Models.Soils;
using System;
using Models.Core;
using Models.Utilities;
using Models.GrazPlan;
using APSIM.Shared.Utilities;
using System.Diagnostics;

namespace Models
{

    [Serializable]
    public class Script : Model
    {
        [Link] Clock clock;
        [Link] Stock stock;
        [Link] Supplement supplement;
        [Link] ISummary summary;
        [Link] Simulation farm;



        [EventSubscribe("DoManagement")]
        private void OnDoManagement(object sender, EventArgs e)
        {

           supplement.Feed("Hersom2Mix",10,"Feedlot");
        }
        
    }
}
```
          Forages
            Parameters:
              {Name=SurfaceOrganicMatter.Residue, LiveDigestibility=0.7, DeadDigestibility=0.3, LiveFractionConsumable=1, DeadFractionConsumable=1, LiveMinimumBiomass=100, DeadMinimumBiomass=0}
          Summary SummaryFile
          Zone Feedlot: same as Validation.FeedlotTests.Hersom1.Hersom1Base.Feedlot
          Report ValidationReport: EventNames=[Clock].DoReport
            VariableNames:
              [Clock].Today as Date
              [Clock].Today
              [Stock].NumberAll
              [Stock].WeightAll
              [Stock].IntakeAll.Weight
              sum of [Stock].IntakeAll.Weight from 1-may to 31-dec as TotalIntake
              diff of [Stock].WeightAll from 1-may to 31-dec as LiveWtGain
      Experiment Sharman1
        Factors
          CompositeFactor CON
            Specifications:
              [SetUpStock].Script.Age = 13
              [SetUpStock].Script.Weight = 360
          CompositeFactor CORN
            Specifications:
              [SetUpStock].Script.Age = 13
              [SetUpStock].Script.Weight = 403
          CompositeFactor LGWP
            Specifications:
              [SetUpStock].Script.Age = 13
              [SetUpStock].Script.Weight = 354
          CompositeFactor HGWP
            Specifications:
              [SetUpStock].Script.Age = 13
              [SetUpStock].Script.Weight = 401
        Simulation Sharman1Base
          Memo Feedlot memo: same as Validation.FeedlotTests.Hersom1.Hersom1Base.Feedlot memo
          Clock: Start=2000-05-01; End=2000-12-21
          Weather: FileName=StillWater.met
          MicroClimate: a_interception=0; b_interception=1; c_interception=0; d_interception=0; SoilHeatFluxFraction=0.4; MinimumHeightDiffForNewLayer=0; NightInterceptionFraction=0.5; ReferenceHeight=2
          Supplement: SpoilageTime=0
            Stores:
              Name         Stored  IsRoughage  DMContent  DMD    MEContent  CPConc  ProtDg  PConc   SConc   EEConc  ADIP2CP  AshAlk  MaxPassage
              fodder       0       true        0.85       0      0          0       0       0       0       0       0        0       0
              sharman1mix  100000  false       1          0.744  12.01      0.156   0.4     0.0032  0.0024  0.0345  0.114    0.6     0
          Stock: RandSeed=9999
          Manager SetUpStock: same as Validation.FeedlotTests.Hersom1.Hersom1Base.SetUpStock
          Manager FeedStock
```csharp
using Models.Soils;
using System;
using Models.Core;
using Models.Utilities;
using Models.GrazPlan;
using APSIM.Shared.Utilities;
using System.Diagnostics;

namespace Models
{

    [Serializable]
    public class Script : Model
    {
        [Link] Clock clock;
        [Link] Stock stock;
        [Link] Supplement supplement;
        [Link] ISummary summary;
        [Link] Simulation farm;



        [EventSubscribe("DoManagement")]
        private void OnDoManagement(object sender, EventArgs e)
        {

           supplement.Feed("Sharman1Mix",10,"Feedlot");
        }
        
    }
}
```
          Forages
            Parameters:
              {Name=SurfaceOrganicMatter.Residue, LiveDigestibility=0.7, DeadDigestibility=0.3, LiveFractionConsumable=1, DeadFractionConsumable=1, LiveMinimumBiomass=100, DeadMinimumBiomass=0}
          Summary SummaryFile
          Zone Feedlot: same as Validation.FeedlotTests.Hersom1.Hersom1Base.Feedlot
          Report ValidationReport: same as Validation.FeedlotTests.Hersom1.Hersom1Base.ValidationReport
      Experiment Sharman2
        Factors
          CompositeFactor CON
            Specifications:
              [SetUpStock].Script.Age = 13
              [SetUpStock].Script.Weight = 386
          CompositeFactor CORN
            Specifications:
              [SetUpStock].Script.Age = 13
              [SetUpStock].Script.Weight = 367
          CompositeFactor LGWP
            Specifications:
              [SetUpStock].Script.Age = 13
              [SetUpStock].Script.Weight = 381
          CompositeFactor HGWP
            Specifications:
              [SetUpStock].Script.Age = 13
              [SetUpStock].Script.Weight = 371
        Simulation Sharman2Base
          Memo Feedlot memo: same as Validation.FeedlotTests.Hersom1.Hersom1Base.Feedlot memo
          Clock: Start=2000-05-01; End=2000-12-21
          Weather: FileName=StillWater.met
          MicroClimate: a_interception=0; b_interception=1; c_interception=0; d_interception=0; SoilHeatFluxFraction=0.4; MinimumHeightDiffForNewLayer=0; NightInterceptionFraction=0.5; ReferenceHeight=2
          Supplement: SpoilageTime=0
            Stores:
              Name         Stored  IsRoughage  DMContent  DMD    MEContent  CPConc  ProtDg  PConc   SConc   EEConc  ADIP2CP  AshAlk  MaxPassage
              fodder       0       true        0.85       0      0          0       0       0       0       0       0        0       0
              sharman2mix  100000  false       1          0.692  11.53      0.137   0.4     0.0032  0.0024  0.0439  0.114    0.6     0
          Stock: RandSeed=9999
          Manager SetUpStock: same as Validation.FeedlotTests.Hersom1.Hersom1Base.SetUpStock
          Manager FeedStock
```csharp
using Models.Soils;
using System;
using Models.Core;
using Models.Utilities;
using Models.GrazPlan;
using APSIM.Shared.Utilities;
using System.Diagnostics;

namespace Models
{

    [Serializable]
    public class Script : Model
    {
        [Link] Clock clock;
        [Link] Stock stock;
        [Link] Supplement supplement;
        [Link] ISummary summary;
        [Link] Simulation farm;



        [EventSubscribe("DoManagement")]
        private void OnDoManagement(object sender, EventArgs e)
        {

           supplement.Feed("Sharman2Mix",10,"Feedlot");
        }
        
    }
}
```
          Forages
            Parameters:
              {Name=SurfaceOrganicMatter.Residue, LiveDigestibility=0.7, DeadDigestibility=0.3, LiveFractionConsumable=1, DeadFractionConsumable=1, LiveMinimumBiomass=100, DeadMinimumBiomass=0}
          Summary SummaryFile
          Zone Feedlot: same as Validation.FeedlotTests.Hersom1.Hersom1Base.Feedlot
          Report ValidationReport: same as Validation.FeedlotTests.Hersom1.Hersom1Base.ValidationReport
      Experiment Coleman
        Factors
          CompositeFactor Silage
            Specifications:
              [SetUpStock].Script.Age = 13
              [SetUpStock].Script.Weight = 342.8
              [FeedStock].Script.Amount = 12
              [FeedStock].Script.FeedType = Grain
          CompositeFactor Grain
            Specifications:
              [SetUpStock].Script.Age = 13
              [SetUpStock].Script.Weight = 369
              [FeedStock].Script.Amount = 12
              [FeedStock].Script.FeedType = Grain
        Simulation ColemanBase
          Memo Feedlot memo: same as Validation.FeedlotTests.Hersom1.Hersom1Base.Feedlot memo
          Clock: Start=2000-05-01; End=2000-12-21
          Weather: FileName=StillWater.met
          MicroClimate: a_interception=0; b_interception=1; c_interception=0; d_interception=0; SoilHeatFluxFraction=0.4; MinimumHeightDiffForNewLayer=0; NightInterceptionFraction=0.5; ReferenceHeight=2
          Supplement: SpoilageTime=0
            Stores:
              Name    Stored  IsRoughage  DMContent  DMD     MEContent  CPConc  ProtDg  PConc   SConc   EEConc  ADIP2CP  AshAlk  MaxPassage
              fodder  0       true        0.85       0       0          0       0       0       0       0       0        0       0
              silage  100000  false       1          0.76    13.05      0.134   0.4     0.0032  0.0024  0.068   0.114    0.6     0
              grain   100000  false       1          0.6945  11.36      0.13    0.4     0.0032  0.0024  0.035   0.114    0.6     0
          Stock: RandSeed=9999
          Manager SetUpStock: same as Validation.FeedlotTests.Hersom1.Hersom1Base.SetUpStock
          Manager FeedStock
            Amount = 10
            FeedType = Grain
```csharp
using Models.Soils;
using System;
using Models.Core;
using Models.Utilities;
using Models.GrazPlan;
using APSIM.Shared.Utilities;
using System.Diagnostics;

namespace Models
{

    [Serializable]
    public class Script : Model
    {
        [Link] Clock clock;
        [Link] Stock stock;
        [Link] Supplement supplement;
        [Link] ISummary summary;
        [Link] Simulation farm;

        [Description("Daily Feed Amount (kg):")] 
        public double Amount { get; set; }

        [Description("Feed Type:")] 
        public string FeedType { get; set; }

        [EventSubscribe("DoManagement")]
        private void OnDoManagement(object sender, EventArgs e)
        {

           supplement.Feed(FeedType, Amount,"Feedlot");
        }
        
    }
}
```
          Forages
            Parameters:
              {Name=SurfaceOrganicMatter.Residue, LiveDigestibility=0.7, DeadDigestibility=0.3, LiveFractionConsumable=1, DeadFractionConsumable=1, LiveMinimumBiomass=100, DeadMinimumBiomass=0}
          Summary SummaryFile
          Zone Feedlot: same as Validation.FeedlotTests.Hersom1.Hersom1Base.Feedlot
          Report ValidationReport: EventNames=[Clock].DoReport
            VariableNames:
              [Clock].Today as Date
              [Clock].Today
              [Stock].NumberAll
              [Stock].WeightAll
              [Stock].IntakeAll.Weight
              sum of [Stock].IntakeAll.Weight from 1-may to 31-dec as TotalIntake
              diff of [Stock].WeightAll from 1-may to 31-dec as LiveWtGain
              [Weather].MaxT
              [Weather].MinT
              [FeedStock].Script.FeedType
      Experiment Paco
        Factors
          CompositeFactor CA2
            Specifications:
              [SetUpStock].Script.Age = 13
              [SetUpStock].Script.Weight = 350
              [FeedStock].Script.Amount = 12
          CompositeFactor CA4
            Specifications:
              [SetUpStock].Script.Age = 13
              [SetUpStock].Script.Weight = 324
              [FeedStock].Script.Amount = 12
          CompositeFactor CLIM5
            Specifications:
              [SetUpStock].Script.Age = 13
              [SetUpStock].Script.Weight = 322
              [FeedStock].Script.Amount = 8.02
          CompositeFactor RFA7
            Specifications:
              [SetUpStock].Script.Age = 13
              [SetUpStock].Script.Weight = 324
              [FeedStock].Script.Amount = 11.73
          CompositeFactor RFA8
            Specifications:
              [SetUpStock].Script.Age = 13
              [SetUpStock].Script.Weight = 326
              [FeedStock].Script.Amount = 7.68
        Simulation PacoBase
          Memo Feedlot memo: same as Validation.FeedlotTests.Hersom1.Hersom1Base.Feedlot memo
          Clock: Start=2000-05-01; End=2000-12-21
          Weather: FileName=StillWater.met
          MicroClimate: a_interception=0; b_interception=1; c_interception=0; d_interception=0; SoilHeatFluxFraction=0.4; MinimumHeightDiffForNewLayer=0; NightInterceptionFraction=0.5; ReferenceHeight=2
          Supplement: SpoilageTime=0
            Stores:
              Name    Stored  IsRoughage  DMContent  DMD     MEContent  CPConc  ProtDg  PConc   SConc   EEConc  ADIP2CP  AshAlk  MaxPassage
              fodder  0       true        0.85       0       0          0       0       0       0       0       0        0       0
              high    100000  false       1          0.7744  12.78      0.146   0.67    0.0032  0.0024  0.05    0.063    0.6     0
          Stock: RandSeed=9999
          Manager SetUpStock: same as Validation.FeedlotTests.Hersom1.Hersom1Base.SetUpStock
          Manager FeedStock
            Amount = 10
```csharp
using Models.Soils;
using System;
using Models.Core;
using Models.Utilities;
using Models.GrazPlan;
using APSIM.Shared.Utilities;
using System.Diagnostics;

namespace Models
{

    [Serializable]
    public class Script : Model
    {
        [Link] Clock clock;
        [Link] Stock stock;
        [Link] Supplement supplement;
        [Link] ISummary summary;
        [Link] Simulation farm;

        [Description("Daily Feed Amount (kg):")] 
        public double Amount { get; set; }

        [EventSubscribe("DoManagement")]
        private void OnDoManagement(object sender, EventArgs e)
        {
           supplement.Feed("High",Amount,"Feedlot");
        }
        
    }
}
```
          Forages
            Parameters:
              {Name=SurfaceOrganicMatter.Residue, LiveDigestibility=0.7, DeadDigestibility=0.3, LiveFractionConsumable=1, DeadFractionConsumable=1, LiveMinimumBiomass=100, DeadMinimumBiomass=0}
          Summary SummaryFile
          Zone Feedlot: same as Validation.FeedlotTests.Hersom1.Hersom1Base.Feedlot
          Report ValidationReport: same as Validation.FeedlotTests.Hersom1.Hersom1Base.ValidationReport
  Folder Sensibility
    Folder TemperatureResponse
      Experiment BeefCattleTemperatureResponse
        Factors
          CompositeFactor T-10-0
            Specifications:
              [Weather].MaxT = 0
              [Weather].MinT = -10
          CompositeFactor T0-10
            Specifications:
              [Weather].MaxT = 10
              [Weather].MinT = 0
          CompositeFactor T10-20
            Specifications:
              [Weather].MaxT = 20
              [Weather].MinT = 10
          CompositeFactor T20-30
            Specifications:
              [Weather].MaxT = 30
              [Weather].MinT = 20
          CompositeFactor T30-40
            Specifications:
              [Weather].MaxT = 40
              [Weather].MinT = 30
        Simulation BeefCattleTemperatureResponseBase
          Memo Feedlot memo: same as Validation.FeedlotTests.Hersom1.Hersom1Base.Feedlot memo
          Clock: Start=2000-05-01; End=2000-12-21
          ControlledEnvironment Weather: MaxT=25; MinT=15; Rain=0; Radn=20; PanEvap=6; VP=22; Wind=3; CO2=350; AirPressure=1010; DiffuseFraction=0; Latitude=-27; Longitude=0; DayLength=10; SunRise=7; TempLag=0
          MicroClimate: a_interception=0; b_interception=1; c_interception=0; d_interception=0; SoilHeatFluxFraction=0.4; MinimumHeightDiffForNewLayer=0; NightInterceptionFraction=0.5; ReferenceHeight=2
          Supplement: same as Validation.FeedlotTests.Hersom1.Hersom1Base.Supplement
          Stock: RandSeed=9999
          Manager SetUpStock: same as Validation.FeedlotTests.Hersom1.Hersom1Base.SetUpStock
          Manager FeedStock: same as Validation.FeedlotTests.Hersom1.Hersom1Base.FeedStock
          Forages
            Parameters:
              {Name=SurfaceOrganicMatter.Residue, LiveDigestibility=0.7, DeadDigestibility=0.3, LiveFractionConsumable=1, DeadFractionConsumable=1, LiveMinimumBiomass=100, DeadMinimumBiomass=0}
          Summary SummaryFile
          Zone Feedlot: same as Validation.FeedlotTests.Hersom1.Hersom1Base.Feedlot
          Report ValidationReport: same as Validation.FeedlotTests.Hersom2.Hersom2Base.ValidationReport
  Folder MassBalanceCheck
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