Simulations: Version=213
  Memo Title Page
    # The APSIM STOCK Model

    Neville Herrmann (CSIRO)

    Andrew Moore (CSIRO)

    Eric Zurcher (CSIRO)

    Dean Holzworth (AgResearch/CSIRO)

    Mark Lieffering (AgResearch)

    Val Snow (AgResearch)

    # Acknowledgements

    CSIRO, AgResearch and the APSIM Initiative (https://www.apsim.info/) for funding the implemetation of the Stock model into APSIMX
  Memo Introduction
    # Introduction

    The Stock model is an implementation of the CSIRO’s Australian Feeding Standards as expressed in the Grazplan (https://grazplan.csiro.au/) model. The technical document for Grazplan is available at available at https://grazplan.csiro.au/wp-content/uploads/2007/08/TechPaperMay12.pdf. The model has been ported into APSIM NextGeneration to allow full interaction with other models within the APSIM environment. Animals in Stock show the full range of growth, reproduction and death processes (see Grazplan) and the basic management actions (mating, weaning, moving, feeding supplements, selling and buying) have been implemented. All crop/plant models in APSIM NextGeneration have a ‘damage’ interface implemented and so allow grazing as soon as the Stock are moved to the same location (zone or paddock) as the crop.

    Different animal species, genotypes and ages can be modelled together and various management systems implemented, including, but not limited to, forage crop grazing, rotational grazing, moving stock from paddock to feedlot and back again. Management can be simulated via Operations managers as in the simulations here or scripts. The collection of simulations in the Stock example shows examples of simulating three different management regimes (forage grazing, rotational grazing and a wheat/feedlot system) using scripts.

    Management of animal groups is done by user-assigned tag values that take integer values. Tag values have two purposes:

    * They can be used to manage distinct groups of animals in a common fashion. For example, all lactating ewes might be assigned the same tag value, and then all animals with this tag value might undergo the same supplementary feeding regime.
    * If tag values are assigned sequentially (starting at 1), they can be used to generate summary variables. For example, WeightTag[#1] gives the average live weight of all animals in groups with a tag value of 1.

    Note that animal groups with different tag values are never merged, even if they are otherwise similar.

    * To set the tag value of an animal group, use the Tag method.

    * To determine the tag value of an animal group, use the TagNo variable.

    Animal groups that become sufficiently similar are automatically merged into a single group.Animals are similar if all these criteria are the same:

    * Occupy the same paddock
    * Reproduction status (Castrated, Male, Empty, Early Preg,  Late Preg)
    * Number of foetuses
    * Mating cycle (day in the mating cycle)
    * Days to mating (Days left in joining period)
    * Pregnancy (Days since conception)
    * Lactation status (Days since parturition (if lactating)) – within 7 days
    * Has (not) young
    * If young exist, their reproductive status must be the same
    * Implants (hormone implants)
    * Mean age (if the animals are less than one year old )

    These two simulations in this file are validations of the Stock model in APSIM Next Gen. A description of the validation dataset can found in the "Description" memo of the "Validation" node. Descriptions of the two validation simulations ("LUDF" and "StockSlurp")  can be found in the memos of the respective simulations.

    The parameters and variables that can be specified in the Stock model are in the auto-generated APSIM Next Gen documentation which can be found at https://apsimnextgeneration.netlify.app/ under the "Model documentation" link; the "Stock" model is near the bottom of the first table.
  Memo Changing Stock Parameters
    # Changing Stock Parameters

    ## Overview

    The Stock model is an implementation of the CSIRO’s Australian Feeding Standards as expressed in the Grazplan (https://grazplan.csiro.au/) model.

    The technical paper describing Grazplan can be found at https://grazplan.csiro.au/wp-content/uploads/2007/08/TechPaperMay12.pdf

    The structure of the stock parameter strings (which can be found after adding a "Genotype" model to the "Stock" node) is not user friendly but they are needed so the code stays aligned with Grazplan.

    A useful resource to decipher the stock parameter strings are the Sheep and Cattle Explorer Excel spreadsheets. The Explorers are also useful to explore the effect of changing parameter values and they can be found at:

    * https://grazplan.csiro.au/wp-content/uploads/2007/08/SheepExplorer.xlsx for sheep and
    * https://grazplan.csiro.au/wp-content/uploads/2007/08/CattleExplorer.xlsx for cattle

    ## Example

    An example on how to change a parameter value is shown below. In the example, the Growth rate constant (CN1), which controls growth (and hence potential intake) will be changed from its default of 0.0115 to 0.015

    1. in the Cattle Explorer Excel sheet, go to the "Pot.Intake" worksheet and confirm that the default Growth rate constant (CN1) is 0.0115 (cell B6). Note also any other numbers listed above or below the desired parameter - this is to double check you have the right value in the Stock GUI

    2. in the genotype node (in the validation example "Friesian" under the main Stock node; this is where the animal's default parameters are defined) look for the appropriate name in the left hand column i.e. Growth
    3. this name is followed by notation ("Growth C c-n-") in which the last two characters match that in the Explorer (CN)
    4. ensure that the default value (0.0115) in the Cattle Explorer is found in the array in the right hand column along with the other numbers next to the default value of interest. This is just to ensure that you are dealing with the right parameter value
    5. double click the array and change the default value to the new, desired value (0.015)
    6. click away to save the changed value
  DataStore
    ExcelInput Observed: FileNames=[Thomas2007Observed.xlsx]; SheetNames=[ValidationData]
    PredictedObserved: PredictedTableName=ValidationReport; ObservedTableName=ValidationData; FieldNameUsedForMatch=SimulationName; FieldName2UsedForMatch=Date; AllColumns=false
  Folder Validation
    Experiment Thomas2007
      Factors
        CompositeFactor OMD55
          Specifications:
            [SetUpStock].Script.Age = 18
            [SetUpStock].Script.Weight = 53.6
            [FeedingOperations]
          Operations FeedingOperations
            2005-10-21  [Supplement].Feed("OMD55", 10,"Feedlot");
            2005-10-22  [Supplement].Feed("OMD55", 10,"Feedlot");
            2005-10-23  [Supplement].Feed("OMD55", 10,"Feedlot");
            2005-10-24  [Supplement].Feed("OMD55", 10,"Feedlot");
            2005-10-25  [Supplement].Feed("OMD55", 10,"Feedlot");
            2005-10-26  [Supplement].Feed("OMD55", 10,"Feedlot");
            2005-10-27  [Supplement].Feed("OMD55", 10,"Feedlot");
            2005-10-28  [Supplement].Feed("OMD55", 10,"Feedlot");
            2005-10-29  [Supplement].Feed("OMD55", 10,"Feedlot");
            2005-10-30  [Supplement].Feed("OMD55", 10,"Feedlot");
            2005-10-31  [Supplement].Feed("OMD55", 10,"Feedlot");
            2005-11-01  [Supplement].Feed("OMD55", 10,"Feedlot");
            2005-11-02  [Supplement].Feed("OMD55", 10,"Feedlot");
            2005-11-03  [Supplement].Feed("OMD55", 10,"Feedlot");
            2005-11-04  [Supplement].Feed("OMD55", 10,"Feedlot");
            2005-11-05  [Supplement].Feed("OMD55", 10,"Feedlot");
            2005-11-06  [Supplement].Feed("OMD55", 10,"Feedlot");
            2005-11-07  [Supplement].Feed("OMD55", 10,"Feedlot");
            2005-11-08  [Supplement].Feed("OMD55", 10,"Feedlot");
            2005-11-09  [Supplement].Feed("OMD55", 10,"Feedlot");
            2005-11-10  [Supplement].Feed("OMD55", 10,"Feedlot");
            2005-11-11  [Supplement].Feed("OMD55", 10,"Feedlot");
            2005-11-12  [Supplement].Feed("OMD55", 10,"Feedlot");
            2005-11-13  [Supplement].Feed("OMD55", 10,"Feedlot");
            2005-11-14  [Supplement].Feed("OMD55", 10,"Feedlot");
            2005-11-15  [Supplement].Feed("OMD55", 10,"Feedlot");
            2005-11-16  [Supplement].Feed("OMD55", 10,"Feedlot");
            2005-11-17  [Supplement].Feed("OMD55", 10,"Feedlot");
            2005-11-18  [Supplement].Feed("OMD55", 10,"Feedlot");
            2005-11-19  [Supplement].Feed("OMD55", 10,"Feedlot");
            2005-11-20  [Supplement].Feed("OMD55", 10,"Feedlot");
            2005-11-21  [Supplement].Feed("OMD55", 10,"Feedlot");
            2005-11-22  [Supplement].Feed("OMD55", 10,"Feedlot");
            2005-11-23  [Supplement].Feed("OMD55", 10,"Feedlot");
            2005-11-24  [Supplement].Feed("OMD55", 10,"Feedlot");
            2005-11-25  [Supplement].Feed("OMD55", 10,"Feedlot");
            2005-11-26  [Supplement].Feed("OMD55", 1.27,"Feedlot");
            2005-11-27  [Supplement].Feed("OMD55", 1.27,"Feedlot");
            2005-11-28  [Supplement].Feed("OMD55", 1.27,"Feedlot");
            2005-11-29  [Supplement].Feed("OMD55", 1.27,"Feedlot");
            2005-11-30  [Supplement].Feed("OMD55", 1.27,"Feedlot");
            2005-12-01  [Supplement].Feed("OMD55", 1.27,"Feedlot");
            2005-12-02  [Supplement].Feed("OMD55", 1.27,"Feedlot");
        CompositeFactor OMD62
          Specifications:
            [SetUpStock].Script.Age = 18
            [SetUpStock].Script.Weight = 53.3
            [FeedingOperations]
          Operations FeedingOperations
            2005-10-21  [Supplement].Feed("OMD62", 10,"Feedlot");
            2005-10-22  [Supplement].Feed("OMD62", 10,"Feedlot");
            2005-10-23  [Supplement].Feed("OMD62", 10,"Feedlot");
            2005-10-24  [Supplement].Feed("OMD62", 10,"Feedlot");
            2005-10-25  [Supplement].Feed("OMD62", 10,"Feedlot");
            2005-10-26  [Supplement].Feed("OMD62", 10,"Feedlot");
            2005-10-27  [Supplement].Feed("OMD62", 10,"Feedlot");
            2005-10-28  [Supplement].Feed("OMD62", 10,"Feedlot");
            2005-10-29  [Supplement].Feed("OMD62", 10,"Feedlot");
            2005-10-30  [Supplement].Feed("OMD62", 10,"Feedlot");
            2005-10-31  [Supplement].Feed("OMD62", 10,"Feedlot");
            2005-11-01  [Supplement].Feed("OMD62", 10,"Feedlot");
            2005-11-02  [Supplement].Feed("OMD62", 10,"Feedlot");
            2005-11-03  [Supplement].Feed("OMD62", 10,"Feedlot");
            2005-11-04  [Supplement].Feed("OMD62", 10,"Feedlot");
            2005-11-05  [Supplement].Feed("OMD62", 10,"Feedlot");
            2005-11-06  [Supplement].Feed("OMD62", 10,"Feedlot");
            2005-11-07  [Supplement].Feed("OMD62", 10,"Feedlot");
            2005-11-08  [Supplement].Feed("OMD62", 10,"Feedlot");
            2005-11-09  [Supplement].Feed("OMD62", 10,"Feedlot");
            2005-11-10  [Supplement].Feed("OMD62", 10,"Feedlot");
            2005-11-11  [Supplement].Feed("OMD62", 10,"Feedlot");
            2005-11-12  [Supplement].Feed("OMD62", 10,"Feedlot");
            2005-11-13  [Supplement].Feed("OMD62", 10,"Feedlot");
            2005-11-14  [Supplement].Feed("OMD62", 10,"Feedlot");
            2005-11-15  [Supplement].Feed("OMD62", 10,"Feedlot");
            2005-11-16  [Supplement].Feed("OMD62", 10,"Feedlot");
            2005-11-17  [Supplement].Feed("OMD62", 10,"Feedlot");
            2005-11-18  [Supplement].Feed("OMD62", 10,"Feedlot");
            2005-11-19  [Supplement].Feed("OMD62", 10,"Feedlot");
            2005-11-20  [Supplement].Feed("OMD62", 10,"Feedlot");
            2005-11-21  [Supplement].Feed("OMD62", 10,"Feedlot");
            2005-11-22  [Supplement].Feed("OMD62", 10,"Feedlot");
            2005-11-23  [Supplement].Feed("OMD62", 10,"Feedlot");
            2005-11-24  [Supplement].Feed("OMD62", 10,"Feedlot");
            2005-11-25  [Supplement].Feed("OMD62", 10,"Feedlot");
            2005-11-26  [Supplement].Feed("OMD62", 1.27,"Feedlot");
            2005-11-27  [Supplement].Feed("OMD62", 1.27,"Feedlot");
            2005-11-28  [Supplement].Feed("OMD62", 1.27,"Feedlot");
            2005-11-29  [Supplement].Feed("OMD62", 1.27,"Feedlot");
            2005-11-30  [Supplement].Feed("OMD62", 1.27,"Feedlot");
            2005-12-01  [Supplement].Feed("OMD62", 1.27,"Feedlot");
            2005-12-02  [Supplement].Feed("OMD62", 1.27,"Feedlot");
        CompositeFactor OMD69
          Specifications:
            [SetUpStock].Script.Age = 18
            [SetUpStock].Script.Weight = 55.6
            [FeedingOperations]
          Operations FeedingOperations
            2005-10-21  [Supplement].Feed("OMD69", 10,"Feedlot");
            2005-10-22  [Supplement].Feed("OMD69", 10,"Feedlot");
            2005-10-23  [Supplement].Feed("OMD69", 10,"Feedlot");
            2005-10-24  [Supplement].Feed("OMD69", 10,"Feedlot");
            2005-10-25  [Supplement].Feed("OMD69", 10,"Feedlot");
            2005-10-26  [Supplement].Feed("OMD69", 10,"Feedlot");
            2005-10-27  [Supplement].Feed("OMD69", 10,"Feedlot");
            2005-10-28  [Supplement].Feed("OMD69", 10,"Feedlot");
            2005-10-29  [Supplement].Feed("OMD69", 10,"Feedlot");
            2005-10-30  [Supplement].Feed("OMD69", 10,"Feedlot");
            2005-10-31  [Supplement].Feed("OMD69", 10,"Feedlot");
            2005-11-01  [Supplement].Feed("OMD69", 10,"Feedlot");
            2005-11-02  [Supplement].Feed("OMD69", 10,"Feedlot");
            2005-11-03  [Supplement].Feed("OMD69", 10,"Feedlot");
            2005-11-04  [Supplement].Feed("OMD69", 10,"Feedlot");
            2005-11-05  [Supplement].Feed("OMD69", 10,"Feedlot");
            2005-11-06  [Supplement].Feed("OMD69", 10,"Feedlot");
            2005-11-07  [Supplement].Feed("OMD69", 10,"Feedlot");
            2005-11-08  [Supplement].Feed("OMD69", 10,"Feedlot");
            2005-11-09  [Supplement].Feed("OMD69", 10,"Feedlot");
            2005-11-10  [Supplement].Feed("OMD69", 10,"Feedlot");
            2005-11-11  [Supplement].Feed("OMD69", 10,"Feedlot");
            2005-11-12  [Supplement].Feed("OMD69", 10,"Feedlot");
            2005-11-13  [Supplement].Feed("OMD69", 10,"Feedlot");
            2005-11-14  [Supplement].Feed("OMD69", 10,"Feedlot");
            2005-11-15  [Supplement].Feed("OMD69", 10,"Feedlot");
            2005-11-16  [Supplement].Feed("OMD69", 10,"Feedlot");
            2005-11-17  [Supplement].Feed("OMD69", 10,"Feedlot");
            2005-11-18  [Supplement].Feed("OMD69", 10,"Feedlot");
            2005-11-19  [Supplement].Feed("OMD69", 10,"Feedlot");
            2005-11-20  [Supplement].Feed("OMD69", 10,"Feedlot");
            2005-11-21  [Supplement].Feed("OMD69", 10,"Feedlot");
            2005-11-22  [Supplement].Feed("OMD69", 10,"Feedlot");
            2005-11-23  [Supplement].Feed("OMD69", 10,"Feedlot");
            2005-11-24  [Supplement].Feed("OMD69", 10,"Feedlot");
            2005-11-25  [Supplement].Feed("OMD69", 10,"Feedlot");
            2005-11-26  [Supplement].Feed("OMD69", 1.27,"Feedlot");
            2005-11-27  [Supplement].Feed("OMD69", 1.27,"Feedlot");
            2005-11-28  [Supplement].Feed("OMD69", 1.27,"Feedlot");
            2005-11-29  [Supplement].Feed("OMD69", 1.27,"Feedlot");
            2005-11-30  [Supplement].Feed("OMD69", 1.27,"Feedlot");
            2005-12-01  [Supplement].Feed("OMD69", 1.27,"Feedlot");
            2005-12-02  [Supplement].Feed("OMD69", 1.27,"Feedlot");
        CompositeFactor OMD76
          Specifications:
            [SetUpStock].Script.Age = 18
            [SetUpStock].Script.Weight = 54
            [FeedingOperations]
          Operations FeedingOperations
            2005-10-21  [Supplement].Feed("OMD76", 10,"Feedlot");
            2005-10-22  [Supplement].Feed("OMD76", 10,"Feedlot");
            2005-10-23  [Supplement].Feed("OMD76", 10,"Feedlot");
            2005-10-24  [Supplement].Feed("OMD76", 10,"Feedlot");
            2005-10-25  [Supplement].Feed("OMD76", 10,"Feedlot");
            2005-10-26  [Supplement].Feed("OMD76", 10,"Feedlot");
            2005-10-27  [Supplement].Feed("OMD76", 10,"Feedlot");
            2005-10-28  [Supplement].Feed("OMD76", 10,"Feedlot");
            2005-10-29  [Supplement].Feed("OMD76", 10,"Feedlot");
            2005-10-30  [Supplement].Feed("OMD76", 10,"Feedlot");
            2005-10-31  [Supplement].Feed("OMD76", 10,"Feedlot");
            2005-11-01  [Supplement].Feed("OMD76", 10,"Feedlot");
            2005-11-02  [Supplement].Feed("OMD76", 10,"Feedlot");
            2005-11-03  [Supplement].Feed("OMD76", 10,"Feedlot");
            2005-11-04  [Supplement].Feed("OMD76", 10,"Feedlot");
            2005-11-05  [Supplement].Feed("OMD76", 10,"Feedlot");
            2005-11-06  [Supplement].Feed("OMD76", 10,"Feedlot");
            2005-11-07  [Supplement].Feed("OMD76", 10,"Feedlot");
            2005-11-08  [Supplement].Feed("OMD76", 10,"Feedlot");
            2005-11-09  [Supplement].Feed("OMD76", 10,"Feedlot");
            2005-11-10  [Supplement].Feed("OMD76", 10,"Feedlot");
            2005-11-11  [Supplement].Feed("OMD76", 10,"Feedlot");
            2005-11-12  [Supplement].Feed("OMD76", 10,"Feedlot");
            2005-11-13  [Supplement].Feed("OMD76", 10,"Feedlot");
            2005-11-14  [Supplement].Feed("OMD76", 10,"Feedlot");
            2005-11-15  [Supplement].Feed("OMD76", 10,"Feedlot");
            2005-11-16  [Supplement].Feed("OMD76", 10,"Feedlot");
            2005-11-17  [Supplement].Feed("OMD76", 10,"Feedlot");
            2005-11-18  [Supplement].Feed("OMD76", 10,"Feedlot");
            2005-11-19  [Supplement].Feed("OMD76", 10,"Feedlot");
            2005-11-20  [Supplement].Feed("OMD76", 10,"Feedlot");
            2005-11-21  [Supplement].Feed("OMD76", 10,"Feedlot");
            2005-11-22  [Supplement].Feed("OMD76", 10,"Feedlot");
            2005-11-23  [Supplement].Feed("OMD76", 10,"Feedlot");
            2005-11-24  [Supplement].Feed("OMD76", 10,"Feedlot");
            2005-11-25  [Supplement].Feed("OMD76", 10,"Feedlot");
            2005-11-26  [Supplement].Feed("OMD76", 1.27,"Feedlot");
            2005-11-27  [Supplement].Feed("OMD76", 1.27,"Feedlot");
            2005-11-28  [Supplement].Feed("OMD76", 1.27,"Feedlot");
            2005-11-29  [Supplement].Feed("OMD76", 1.27,"Feedlot");
            2005-11-30  [Supplement].Feed("OMD76", 1.27,"Feedlot");
            2005-12-01  [Supplement].Feed("OMD76", 1.27,"Feedlot");
            2005-12-02  [Supplement].Feed("OMD76", 1.27,"Feedlot");
      Simulation Thomas2007Base
        Memo Feedlot memo
          # Feedlot simulation

          The Feedlot simulation is a simple illustration of the Stock model by using animals entering a feedlot, being fed and milked and leaving the feedlot. In addition to the Stock model itself and the Supplement specification GUI, at its core is the ChangeLactatingCowNumber GUI, the Stock operations and the Supplement operations. Both the operation files are based on stock and pasture/supplement data from the LUDF dataset (see the Validation memo for details). In the Stock operations, data on actual LUDF weekly changes in cow number have been collated from 1/08/2004 to 30/06/2017. Positive numbers denote lactating cows have been bought and moved to the feedlot while negative numbers are when cows are dried off and removed from the feedlot. It was assumed that cows were bought at weekly intervals. For the Supplement operations, six types of supplements labelled "silage_11me", "pasture_11.5me", "pasture_12me", "pasture_12.5me", "pasture_13me", and "pasture_13.5me" are bought. An excess amount of each supplement is bought (enough to last longer than the simulation) and their characteristics must be specified in the Supplement node. The LUDF dataseet is based on weekly reports - the daily pasture and supplements supplied (and their characteristics such as ME content) listed in the Supplement operations was extrapolated from the weekly data to the intervening days.
        Clock: Start=2005-10-21; End=2005-12-02
        Weather: FileName=Perth.met
        MicroClimate: a_interception=0; b_interception=1; c_interception=0; d_interception=0; SoilHeatFluxFraction=0.4; MinimumHeightDiffForNewLayer=0; NightInterceptionFraction=0.5; ReferenceHeight=2
        Operations FeedingOperations
        Supplement: SpoilageTime=0
          Stores:
            Name    Stored  IsRoughage  DMContent  DMD    MEContent  CPConc  ProtDg  PConc   SConc   EEConc  ADIP2CP  AshAlk  MaxPassage
            fodder  0       true        0.85       0      0          0       0       0       0       0       0        0       0
            omd55   100000  false       1          0.588  8.4        0.105   0.8     0.0032  0.0024  0.02    0.114    0.6     0
            omd62   100000  false       1          0.636  9.2        0.125   0.8     0.0032  0.0024  0.02    0.114    0.6     0
            omd69   100000  false       1          0.696  10.3       0.144   0.8     0.0032  0.0024  0.02    0.114    0.6     0
            omd76   100000  false       1          0.702  10.4       0.133   0.8     0.0032  0.0024  0.02    0.114    0.6     0
        Stock: RandSeed=9999
        Manager SetUpStock
          Genotype = Large Merino
          Sex = Castrate
          Age = 18
          Weight = 51.2
          Pregnant = 0
          Lactating = 0
          NumYoung = 0
          NumStock = 1
```csharp
using System.Linq;
using System;
using System.Collections.Generic;
using Models.Core;

using Models.Functions;
using Models.Soils;
using Models.Utilities;
using Models.GrazPlan;
using APSIM.Shared.Utilities;
using System.Diagnostics;


namespace Models
{

    [Serializable]
    public class Script : Model
    {
        [Link] Clock clock;
        [Link] Stock stock;
        [Link] Supplement supplement;
        [Link] ISummary summary;
        [Link] Simulation farm;

       

        [Separator("Stock type info, the same type of stock are brought onto the paddock at each grazing")]
        [Description("Stock: genotype (e.g. Small Merino, Angus, Friesian):")] 
        [Display(Values = "GetGenotypes")]
        public string Genotype { get; set; }

        [Description("Stock: sex (Female, Male, Castrate):")] 
        public ReproductiveType Sex { get; set; }

        [Description("Stock: age (months):")] 
        public double Age { get; set; }

        [Description("Stock: weight (kg liveweight /head):")] 
        public double Weight { get; set; }

        [Description("Stock: fertility status (0 if non-pregnant or days since conception):")] 
        public int Pregnant { get; set; }

        [Description("Stock: lactation status (0 if non-lactating or days since parturition):")]
        public int Lactating { get; set; }

        [Description("Stock: Number of young (foetuses or calves):")]
        public int NumYoung { get; set; }

        [Description("Stock: Number of animals:")]
        public int NumStock { get; set; }
        
        
        // <summary>Return a list of genotypes to the properties tab.</summary>
        public string[] GetGenotypes()
        {
            if (stock != null)
                return stock.Genotypes.Names.ToArray();
            return null;
        }

        [EventSubscribe("StartOfSimulation")]
        private void OnStartOfSimulation(object sender, EventArgs e)
        {

                int preg = Pregnant;
                int lact = Lactating;
                int numyoung = NumYoung;

                if (stock.AnimalGroups.Count == 2)
                {
                    preg = stock.AnimalGroups[1].Pregnancy;
                    lact = stock.AnimalGroups[1].Lactation;
                    numyoung = stock.AnimalGroups[1].NoFoetuses;
                }

                StockBuy purchase = new StockBuy();
                purchase.Genotype = Genotype; 
                purchase.Number = NumStock;
                purchase.Sex = Sex;
                purchase.Age = Age;       // age in months
                purchase.Weight = Weight;  // liveweight in kg
                purchase.UseTag = 1;
                purchase.MatedTo = purchase.Genotype;
                purchase.Pregnant = preg;   // days pregnant
                purchase.Lactating = lact;  // days lactating
                purchase.NumYoung = numyoung;    // cows can be bought lactating with no young

                stock.Buy(purchase);

                stock.Move("Feedlot");

            

        }
    
    }
}
```
        Forages
          Parameters:
            {Name=SurfaceOrganicMatter.Residue, LiveDigestibility=0.7, DeadDigestibility=0.3, LiveFractionConsumable=1, DeadFractionConsumable=1, LiveMinimumBiomass=100, DeadMinimumBiomass=0}
        Summary SummaryFile
        Zone Feedlot: Area=10; Slope=0; AspectAngle=0; Altitude=50
          Soil: ASCOrder=Vertosol; ASCSubOrder=Black; SoilType=Clay; Site=Norwin; NearestTown=Norwin; Region=Darling Downs and Granite Belt; State=Queensland; Country=Australia; NaturalVegetation=Qld. Bluegrass, possible Qld. Blue gum; ApsoilNumber=900; Latitude=-27.581836; Longitude=151.320206; LocationAccuracy=+/- 20m
            DataSource=CSIRO Sustainable Ecosystems, Toowoomba; Characteriesd as part of the GRDC funded project"Doing it better, doing it smarter, managing soil water in Australian agriculture' 2011
            Comments=OC, CLL for all crops estimated-based on Bongeen Mywybilla Soil No1
            Physical
              Thickness  BD       AirDry    LL15      DUL       SAT       KS
              150        1.01056  0.13025   0.2605    0.521     0.588655  20
              150        1.07146  0.198689  0.248362  0.496723  0.565677  20
              300        1.09394  0.28      0.28      0.488438  0.557193  20
              300        1.15861  0.28      0.28      0.480297  0.532787  20
              300        1.17301  0.28      0.28      0.471584  0.527354  20
              300        1.16287  0.28      0.28      0.457071  0.53118   20
              300        1.1875   0.28      0.28      0.452332  0.521888  20
              SoilCrop WheatSoil: LL=[0.261, 0.248, 0.28, 0.306, 0.36, 0.392, 0.446]; KL=[0.06, 0.06, 0.06, 0.04, 0.04, 0.02, 0.01]; XF=[1, 1, 1, 1, 1, 1, 1]
            WaterBalance SoilWater: SummerDate=1-Nov; SummerU=5; SummerCona=5; WinterDate=1-Apr; WinterU=5; WinterCona=5; DiffusConst=40; DiffusSlope=16; Salb=0.12; CN2Bare=73; CNRed=20; CNCov=0.8; PSIDul=-100; Thickness=[150, 150, 300, 300, 300, 300, 300]; SWCON=[0.3, 0.3, 0.3, 0.3, 0.3, 0.3, 0.3]
            Organic: FOMCNRatio=40; CarbonUnits=Total
              Thickness  Carbon  SoilCNRatio  FBiom  FInert  FOM
              150        1.2     12           0.04   0.4     347.129
              150        0.96    12           0.02   0.6     270.344
              300        0.6     12           0.02   0.8     163.972
              300        0.3     12           0.02   1       99.4541
              300        0.18    12           0.01   1       60.322
              300        0.12    12           0.01   1       36.5871
              300        0.12    12           0.01   1       22.1912
            Chemical: Thickness=[150, 150, 300, 300, 300, 300, 300]; PH=[8, 8, 8, 8, 8, 8, 8]; PHUnits=Water
            Water: Thickness=[150, 150, 300, 300, 300, 300, 300]; FilledFromTop=false
              InitialValues=[0.521, 0.496723, 0.488438, 0.480297, 0.471584, 0.457071, 0.452332]
            Nutrient
            Solute NO3: Thickness=[150, 150, 300, 300, 300, 300, 300]; InitialValues=[1, 1, 1, 1, 1, 1, 1]; InitialValuesUnits=ppm; WaterTableConcentration=0; D0=0; DepthConstant=0; MaxDepthSoluteAccessible=0; RunoffEffectivenessAtMovingSolute=0; MaxEffectiveRunoff=0
            Solute NH4: Thickness=[150, 150, 300, 300, 300, 300, 300]; InitialValues=[0.1, 0.1, 0.1, 0.1, 0.1, 0.1, 0.1]; InitialValuesUnits=ppm; WaterTableConcentration=0; D0=0; DepthConstant=0; MaxDepthSoluteAccessible=0; RunoffEffectivenessAtMovingSolute=0; MaxEffectiveRunoff=0
            Solute Urea: Thickness=[150, 150, 300, 300, 300, 300, 300]; InitialValues=[0, 0, 0, 0, 0, 0, 0]; InitialValuesUnits=kg/ha; WaterTableConcentration=0; D0=0; DepthConstant=0; MaxDepthSoluteAccessible=0; RunoffEffectivenessAtMovingSolute=0; MaxEffectiveRunoff=0
            SoilTemperature Temperature: InteractionsPerDay=8
          SurfaceOrganicMatter: InitialResidueName=wheat_stubble; InitialResidueType=wheat; InitialResidueMass=0; InitialStandingFraction=0; InitialCPR=0; InitialCNR=100
          MicroClimate: a_interception=0; b_interception=1; c_interception=0; d_interception=0; SoilHeatFluxFraction=0.4; MinimumHeightDiffForNewLayer=0; NightInterceptionFraction=0.5; ReferenceHeight=2
        Report ValidationReport: EventNames=[Clock].DoReport
          VariableNames:
            [Clock].Today as Date
            [Clock].Today
            [Stock].NumberAll
            [Stock].WeightAll
            [Stock].IntakeAll.Weight
            sum of [Stock].IntakeAll.Weight from 21-oct to 2-dec as TotalIntake
            diff of [Stock].WeightAll from 21-oct to 2-dec as LiveWtGain
            [Weather].MaxT
            [Weather].MinT
  Folder Sensibility
    Folder TemperatureResponse
      Experiment SheepTemperatureResponse
        Factors
          CompositeFactor T-10-0
            Specifications:
              [Weather].MaxT = 0
              [Weather].MinT = -10
          CompositeFactor T0-10
            Specifications:
              [Weather].MaxT = 10
              [Weather].MinT = 0
          CompositeFactor T10-20
            Specifications:
              [Weather].MaxT = 20
              [Weather].MinT = 10
          CompositeFactor T20-30
            Specifications:
              [Weather].MaxT = 30
              [Weather].MinT = 20
          CompositeFactor T30-40
            Specifications:
              [Weather].MaxT = 40
              [Weather].MinT = 30
        Simulation SheepTemperatureResponseBase
          Memo Feedlot memo: same as Validation.Thomas2007.Thomas2007Base.Feedlot memo
          Clock: Start=2000-05-01; End=2000-12-21
          ControlledEnvironment Weather: MaxT=25; MinT=15; Rain=0; Radn=20; PanEvap=6; VP=22; Wind=3; CO2=350; AirPressure=1010; DiffuseFraction=0; Latitude=-27; Longitude=0; DayLength=10; SunRise=7; TempLag=0
          MicroClimate: a_interception=0; b_interception=1; c_interception=0; d_interception=0; SoilHeatFluxFraction=0.4; MinimumHeightDiffForNewLayer=0; NightInterceptionFraction=0.5; ReferenceHeight=2
          Supplement: SpoilageTime=0
            Stores:
              Name        Stored  IsRoughage  DMContent  DMD   MEContent  CPConc  ProtDg  PConc   SConc   EEConc  ADIP2CP  AshAlk  MaxPassage
              fodder      0       true        0.85       0     0          0       0       0       0       0       0        0       0
              hersom1mix  100000  false       1          0.76  13.05      0.134   0.4     0.0032  0.0024  0.068   0.114    0.6     0
          Stock: RandSeed=9999
          Manager SetUpStock
            Genotype = Ryeland
            Sex = Female
            Age = 13
            Weight = 30
            Pregnant = 0
            Lactating = 0
            NumYoung = 0
            NumStock = 1
```csharp
using Models.Soils;
using System;
using Models.Core;
using Models.Utilities;
using Models.GrazPlan;
using APSIM.Shared.Utilities;
using System.Diagnostics;

namespace Models
{

    [Serializable]
    public class Script : Model
    {
        [Link] Clock clock;
        [Link] Stock stock;
        [Link] Supplement supplement;
        [Link] ISummary summary;
        [Link] Simulation farm;

        public enum Genotypes
        {
            Friesian,
            Jersey,
            Angus,
            Hereford,
            Brahman,
            Chianina,
            Ryeland
            
        }

        [Separator("Stock type info, the same type of stock are brought onto the paddock at each grazing")]

        [Description("Stock: genotype (e.g. Friesian, Jersey):")] 
        public Genotypes Genotype { get; set; }

        [Description("Stock: sex (Female, Male, Castrate):")] 
        public ReproductiveType Sex { get; set; }

        [Description("Stock: age (months):")] 
        public double Age { get; set; }

        [Description("Stock: weight (kg liveweight /head):")] 
        public double Weight { get; set; }

        [Description("Stock: fertility status (0 if non-pregnant or days since conception):")] 
        public int Pregnant { get; set; }

        [Description("Stock: lactation status (0 if non-lactating or days since parturition):")]
        public int Lactating { get; set; }

        [Description("Stock: Number of young (foetuses or calves):")]
        public int NumYoung { get; set; }

        [Description("Stock: Number of animals:")]
        public int NumStock { get; set; }
        
        
        

        [EventSubscribe("StartOfSimulation")]
        private void OnStartOfSimulation(object sender, EventArgs e)
        {

                int preg = Pregnant;
                int lact = Lactating;
                int numyoung = NumYoung;

                if (stock.AnimalGroups.Count == 2)
                {
                    preg = stock.AnimalGroups[1].Pregnancy;
                    lact = stock.AnimalGroups[1].Lactation;
                    numyoung = stock.AnimalGroups[1].NoFoetuses;
                }

                StockBuy purchase = new StockBuy();
                purchase.Genotype = ReflectionUtilities.EnumToString(Genotype);
                purchase.Number = NumStock;
                purchase.Sex = Sex;
                purchase.Age = Age;       // age in months
                purchase.Weight = Weight;  // liveweight in kg
                purchase.UseTag = 1;
                purchase.MatedTo = purchase.Genotype;
                purchase.Pregnant = preg;   // days pregnant
                purchase.Lactating = lact;  // days lactating
                purchase.NumYoung = numyoung;    // cows can be bought lactating with no young

                stock.Buy(purchase);

                stock.Move("Feedlot");

            

        }
    
    }
}
```
          Manager FeedStock
```csharp
using Models.Soils;
using System;
using Models.Core;
using Models.Utilities;
using Models.GrazPlan;
using APSIM.Shared.Utilities;
using System.Diagnostics;

namespace Models
{

    [Serializable]
    public class Script : Model
    {
        [Link] Clock clock;
        [Link] Stock stock;
        [Link] Supplement supplement;
        [Link] ISummary summary;
        [Link] Simulation farm;



        [EventSubscribe("DoManagement")]
        private void OnDoManagement(object sender, EventArgs e)
        {

           supplement.Feed("Hersom1Mix",10,"Feedlot");
        }
        
    }
}
```
          Forages
            Parameters:
              {Name=SurfaceOrganicMatter.Residue, LiveDigestibility=0.7, DeadDigestibility=0.3, LiveFractionConsumable=1, DeadFractionConsumable=1, LiveMinimumBiomass=100, DeadMinimumBiomass=0}
          Summary SummaryFile
          Zone Feedlot: same as Validation.Thomas2007.Thomas2007Base.Feedlot
          Report ValidationReport: EventNames=[Clock].DoReport
            VariableNames:
              [Clock].Today as Date
              [Clock].Today
              [Stock].NumberAll
              [Stock].WeightAll
              [Stock].IntakeAll.Weight
              sum of [Stock].IntakeAll.Weight from 1-may to 31-dec as TotalIntake
              diff of [Stock].WeightAll from 1-may to 31-dec as LiveWtGain
    Folder WheatSheepFeedlot1
      Memo
        This sensibility test explores dual-purpose wheat in a high rainfall livestock system in south-eastern Australia.

        It is based on [#Sprague2015]

        _Sheep grazing wheat and fed in feedlot_

        In this example simulation sheep are bought and sold on specified date.
        They are fed supplement in a feedlot at a set rate, but graze a wheat crop when crop biomass >= 2.4 t/ha.
        Sheep are moved from the wheat crop and back to feedlot when crop biomass reaches 0.5 t/ha or crop zadok = 31.

        _Activities in this manager:_

        1. Buy animals at start of year & put in feedlot
        2. Move animals from feedlot to crop when ready to graze
        3. Move animals from crop to feedlot
        4. Shear all animals on specified date
        5. Sell all animals at end of year

        _NOTES_

        1. When the animals are in the feedlot and an animal dies during the day, the supplement has already been fed into the feedlot
           based on the number of animals in the feedlot at the start of the day. This means the remaining animals have access to slightly
           more supplement and causes a spike in supp intake graph.
        2. When sheep are culled for age + purchased to maintain stocking rate, several groups of sheep are created.
           This causes irregular amounts of supplement to be fed.
      Simulation WheatSheepFeedlot
        Clock: Start=2000-01-01; End=2012-06-30
        Summary SummaryFile
        Weather: FileName=%root%/Tests/WeatherFiles/Ginninderra.met
        SoilArbitrator
        Stock: RandSeed=9999
        Forages
          Parameters:
            Name                          LiveDigestibility  DeadDigestibility  LiveFractionConsumable  DeadFractionConsumable  LiveMinimumBiomass  DeadMinimumBiomass
            SurfaceOrganicMatter.Residue  0.7                0.3                1                       1                       100                 0
            Wheat.Grain                   0.7                0.3                1                       1                       100                 0
            Wheat.Root                    0.7                0.3                1                       1                       100                 0
            Wheat.Leaf                    0.7                0.3                1                       1                       100                 0
            Wheat.Spike                   0.7                0.3                1                       1                       100                 0
            Wheat.Stem                    0.7                0.3                1                       1                       100                 0
        Supplement: SpoilageTime=0
          Stores:
            Name            Stored  IsRoughage  DMContent  DMD  MEContent  CPConc  ProtDg  PConc   SConc   EEConc  ADIP2CP  AshAlk  MaxPassage
            fodder          0       true        0.85       0    0          0       0       0       0       0       0        0       0
            wheat, crushed  500     false       1          0.9  13.8       0.14    0.92    0.0038  0.0014  0.02    0.02     0.18    0
        Manager ManageStock
          Buying = True
          Genotype = Small Merino
          Sex = Female
          BuyDate = 1-Jan
          BuyAge = 12
          BuyWeight = 30
          BuyLactating = 0
          NumAntoBuy = 50
          Selling = True
          SaleFirstDate = 20-Dec
          SaleLastDate = 20-Dec
          SellPolicy = CulledForAge
          SaleAge = 36
          SaleWeight = -
          SalePercentAnimals = 100
          PaddockToMoveAnimalsTo = [WheatSheep]
          GrazingWindowStartDate = 1-Jan
          GrazingWindowEndDate = 31-Dec
          ExpressionToMoveAnimalsToField = Wheat.Phenology.Zadok > 0 && Wheat.Phenology.Zadok < 31 && Wheat.AboveGround.Wt >= 240
          ExpressionToMoveAnimalsToFeedlot = Wheat.Phenology.Zadok >= 31 || Wheat.AboveGround.Wt <= 50
          ShearDate = 15-dec
          Dummy =
```csharp
/*-------------------------------------------------------------------------------------
Sheep grazing wheat when conditions are suitable, and in feedlot the rest of the time.
---------------------------------------------------------------------------------------

In this script animals are bought and sold within a specified date window.
They are fed supplement in a feedlot at a set rate, but graze a wheat crop when a criteria is met.
Animals are moved from the wheat crop and back to feedlot when a second criteria is met.

Based on Sprague SJ, Kirkegaard JA, Dove H, Graham JM, McDonald SE, Kelman WM (2015) Integrating dual-purpose wheat and canola into high-rainfall livestock systems in south-eastern Australia. 1. Crop forage and grain yield. Crop and Pasture Science 66(4), 365-376. 

Activities in this manager:
1. Buy animals at start of year & put in feedlot
2. Move animals from feedlot to crop when ready to graze
3. Move animals from crop to feedlot 
4. Shear all animals on specified date
5. Sell all animals at end of year

NOTES
1. When the animals are in the feedlot and an animal dies during the day, the supplement has already been fed into the feedlot
   based on the number of animals in the feedlot at the start of the day. This means the remaining animals have access to slightly
   more supplement and causes a spike in supp intake graph
2. When sheep are culled for age + purchased to maintain stocking rate, several groups of sheep are created.
   This causes irregular amounts of supplement to be fed.
--------------------------------------------------------------------------------------*/


using System.Linq;
using System;
using System.Collections.Generic;
using Models.Core;
using Models.PMF;
using Models.Functions;
using Models.Soils;
using Models.Utilities;
using Models.GrazPlan;
using APSIM.Shared.Utilities;
using System.Diagnostics;

namespace Models
{
    [Serializable]
    [Description(
        "<p><b>Animals grazing a crop when conditions are suitable, and in feedlot the rest of the time.</b></p>" +
        "In this script animals are bought and sold within a specified date window. " +
        "They are fed supplement in a feedlot at a set rate, but graze a wheat crop when a criteria is met. " +
        "Animals are moved from the wheat crop and back to feedlot when a second criteria is met.")]    
    public class Script : Model
    {
        [Link] Clock clock;
        [Link] Stock Animals;
        [Link] Supplement Feed;
        [Link] Summary Summary;
        [Link] IPlant plant;
        [Link] Soil Soil;
        [Link] Zone Paddock;

        private IBooleanFunction expressionMoveAnimalsToField;
        private IBooleanFunction expressionMoveAnimalsToFeedlot;

        public enum SellPolicyType
        {
            Date,
            PercentageHerdWhenAverageWeightGreaterThan,
            PercentageHerdWhenAverageAgeGreaterThan,
            CulledForAge,
            CulledForWeight,
            SellYoung
        }

        ////////////////////////////////////////////////////////
        [Separator("Buying of animals")]

        [Description("Buy animals?")] 
        public bool Buying { get; set; }

        [Description("Stock: genotype (e.g. Small Merino, Angus, Friesian):")] 
        [Display(Values = "GetGenotypes")]
        public string Genotype { get; set; }

        [Description("Stock: sex (Female, Male, Castrate):")] 
        public ReproductiveType Sex { get; set; }

        [Description("Date to buy animals (dd-mmm)")] 
        [Display(EnabledCallback = "BuyingEnabled")]
        public string BuyDate { get; set; }

        [Description("Age of bought animals (months): ")] 
        [Display(EnabledCallback = "BuyingEnabled")]
        public double BuyAge { get; set; }

        [Description("Weight of bought animals (kg): ")] 
        [Display(EnabledCallback = "BuyingEnabled")]
        public double BuyWeight { get; set; }

        [Description("Zero denotes not lactating; 1 or more denotes the time (days) since parturition:")] 
        [Display(EnabledCallback = "BuyingEnabled")]
        public int BuyLactating { get; set; }

        [Description("Number of animals to buy: ")] 
        [Display(EnabledCallback = "BuyingEnabled")]
        public int NumAntoBuy { get; set; }

        ////////////////////////////////////////////////////////
        [Separator("Selling of animals")]

        [Description("Selling animals?")] 
        public bool Selling { get; set; }

        [Description("First date to consider selling animals (dd-mmm)")] 
        public string SaleFirstDate { get; set; }

        [Description("Last date to consider selling animals (dd-mmm)")] 
        public string SaleLastDate { get; set; }

        [Description("Selling policy ")] 
        [Display(EnabledCallback = "SellingEnabled")]
        public SellPolicyType SellPolicy { get; set; }

        [Description("Age at which to sell (months): ")] 
        [Display(EnabledCallback = "SellingAgeEnabled")]
        public int SaleAge { get; set; }

        [Description("Weight at which to sell (kg): ")] 
        [Display(EnabledCallback = "SellingWeightEnabled")]
        public double SaleWeight { get; set; }

        [Description("Percentage of animals to sell (%)")] 
        [Display(EnabledCallback = "SellingEnabled")]
        public double SalePercentAnimals { get; set; }

        ////////////////////////////////////////////////////////
        [Separator("Rule for moving animals into and out of paddock")]

        [Description("Name of paddock to move animals in to:")] 
        [Display(Type = DisplayType.Model, ModelType = typeof(Zone))]
        public IModel PaddockToMoveAnimalsTo { get; set; }

        [Description("First date to consider moving animals:")] 
        public string GrazingWindowStartDate { get; set; }

        [Description("Last date to consider moving animals:")] 
        public string GrazingWindowEndDate { get; set; }

        [Description("Criteria to move animals to field")]
        public string ExpressionToMoveAnimalsToField { get; set; }

        [Description("Criteria to move animals to feedlot")]
        public string ExpressionToMoveAnimalsToFeedlot { get; set; }


        ////////////////////////////////////////////////////////
        [Separator("Shearing")]
        [Description("Date to shear animals (dd-mmm)")] 
        public string ShearDate { get; set; }

        [Description(" ")] 
        public string Dummy { get; set; }

        ////////////////////////////////////////////////////////////////////////////
        // Callback properties to control disabling of properties.
        ////////////////////////////////////////////////////////////////////////////
        public bool BuyingEnabled { get { return Buying; } }

        public bool SellingEnabled { get { return Selling; } }

        public bool SellingAgeEnabled
        { 
            get
            { 
                return Selling &&
                (SellPolicy == SellPolicyType.PercentageHerdWhenAverageAgeGreaterThan || SellPolicy == SellPolicyType.CulledForAge);
            } 
        }

        public bool SellingWeightEnabled
        { 
            get
            { 
                return Selling &&
                (SellPolicy == SellPolicyType.PercentageHerdWhenAverageWeightGreaterThan || SellPolicy == SellPolicyType.CulledForWeight);
            } 
        }

        ////////////////////////////////////////////////////////////////////////////
        // Outputs
        ////////////////////////////////////////////////////////////////////////////
        // <summary>Number of animals sold.</summary>
        public int NumberSold { get; set; }

        // <summary>Description of something that has happened.</summary>
        public string EventName { get; set; }

        // <summary>Return a list of genotypes to the properties tab.</summary>
        public string[] GetGenotypes()
        {
            if (Animals != null)
                return Animals.Genotypes.Names.ToArray();
            return null;
        }

        public string CurrentLocation { get; set; }  // location of the sheep



        // ============================================================
        // Called once at beginning of simulation run
        // ============================================================
        [EventSubscribe("StartOfSimulation")]
        private void OnStartOfSimulation(object sender, EventArgs e)
        {
            if (string.IsNullOrEmpty(ExpressionToMoveAnimalsToField))
                throw new Exception("You must specify a criteria for moving animals to the field");
                
            if (CSharpExpressionFunction.Compile(ExpressionToMoveAnimalsToField, Node, out IBooleanFunction function, out string errorMessages))
                expressionMoveAnimalsToField = function;
            else
                throw new Exception(errorMessages);
                        
            if (string.IsNullOrEmpty(ExpressionToMoveAnimalsToFeedlot))
                throw new Exception("You must specify a criteria for moving animals to the feedlot");
            if (CSharpExpressionFunction.Compile(ExpressionToMoveAnimalsToFeedlot, Node, out IBooleanFunction function2, out string errorMessages2))
                expressionMoveAnimalsToFeedlot = function2;
            else
                throw new Exception(errorMessages2);

            CurrentLocation = "";
        }



        // ============================================================
        // Management that happens every day.
        // ============================================================
        [EventSubscribe("DoManagement")]
        private void OnDoManagement(object sender, EventArgs e)
        {
            EventName = string.Empty;

            // Buy animals
            if (Buying && DateUtilities.DatesAreEqual(BuyDate, clock.Today))
            {
                var purchase = new StockBuy();
                purchase.Genotype = Genotype;   // "small merino"
                purchase.Number = NumAntoBuy;
                purchase.Sex = Sex;               // "wethers"
                purchase.Age = BuyAge;
                purchase.Weight = BuyWeight;
                purchase.Lactating = BuyLactating;
                Animals.Buy(purchase);
                Animals.Move("Feedlot");
                EventName = NumAntoBuy + " animals bought";

                CurrentLocation = "Feedlot";
            }

            // Sell animals
            if (SellingEnabled && DateUtilities.WithinDates(SaleFirstDate, clock.Today, SaleLastDate))
            { 
                if (SellPolicy == SellPolicyType.PercentageHerdWhenAverageWeightGreaterThan || 
                    SellPolicy == SellPolicyType.PercentageHerdWhenAverageAgeGreaterThan)
                {
                    bool doSell = false;
                    if (SellPolicy == SellPolicyType.Date)
                        doSell = true;
                    else if (SellPolicy == SellPolicyType.PercentageHerdWhenAverageWeightGreaterThan && Animals.WeightAll >= SaleWeight)
                        doSell = true;
                    else if (SellPolicy == SellPolicyType.PercentageHerdWhenAverageAgeGreaterThan && Animals.AgeMonthsAll >= SaleAge)
                        doSell = true;

                    if (doSell)
                    {
                        NumberSold = Convert.ToInt32(Animals.NumberAll * SalePercentAnimals / 100.0);
                        Animals.Sell(NumberSold);
                        EventName = NumberSold + " animals sold";
                    }
                }
                else
                {
                    IEnumerable<AnimalGroup> animalsToSell = null;
                    if (SellPolicy == SellPolicyType.CulledForAge)
                    {
                        // split older animals into a new group
                        animalsToSell = Animals.SplitByAge(Convert.ToInt32(SaleAge * 30)); // months to days
                    }
                    else if (SellPolicy == SellPolicyType.CulledForWeight)
                    {
                        // split heavier animals into a new group
                        animalsToSell = Animals.SplitByWeight(SaleWeight);
                    }
                    else if (SellPolicy == SellPolicyType.SellYoung)
                    {
                        // split young (offspring) into new groups
                        animalsToSell = Animals.SplitByYoung();
                    }
                    if (animalsToSell != null)
                    {
                        var numberSellableAnimals = animalsToSell.Sum(g => g.NoAnimals);
                        var numberAnimalsToSell = Convert.ToInt32(numberSellableAnimals * SalePercentAnimals / 100.0);
                        if (numberAnimalsToSell > 0)
                            Animals.Sell(numberAnimalsToSell, animalsToSell);
                    }
                }
            }


            // Determine whether the animals are in the feedlot.
            bool animalsAreInFeedlot = Animals.AnimalGroups.FirstOrDefault(group => group.PaddOccupied.Name == "Feedlot") != null;
            bool inGrazingWindow = DateUtilities.WithinDates(GrazingWindowStartDate, clock.Today, GrazingWindowEndDate);

            if (animalsAreInFeedlot)
            {
                   // Animals are in feedlot. Determine if they can be moved to paddock.
                if (inGrazingWindow && expressionMoveAnimalsToField.Value())
                {
                    Animals.Move(PaddockToMoveAnimalsTo.Name);
                    EventName = "Animals moved to paddock";
                    CurrentLocation = "Paddock";
                }
            }
            else
            {
                // Animals are in paddock. Determine if they need to be moved to feedlot.
                if (!inGrazingWindow || expressionMoveAnimalsToFeedlot.Value())
                {
                    Animals.Move("Feedlot");
                    CurrentLocation = "Feedlot";
                    EventName = "Animals moved to feedlot";
                }
            }

            // Shear all animals on specified date
            if (DateUtilities.DatesEqual(ShearDate, clock.Today))
            {
                Animals.Shear(shearAdults: true, shearYoung: true);
                EventName = "Animals shorn";
            }
        }
    }
}
```
        Manager ManageSupplement
          FeedlotZone = [Feedlot]
          SupplementAmount = 0.5
          SupplementType = wheat, crushed
```csharp
using APSIM.Shared.Utilities;
using Models.GrazPlan;
using Models.Utilities;
using Models.Soils;
using Models.Soils.Nutrients;
using Models.PMF;
using Models.Core;
using System;
using System.Linq;

namespace Models
{
    [Description(
    "<b>Supplement store management.</b>" +
    "<li>When animals are in feedlot, they are fed a set amount each day.</li>" +
    "<li>Will restock the supplement store when the store reaches a minimum level.</li>"
    )]
    [Serializable]
    public class ManageSupplement : Model
    {
        [Link] Clock clock;
        [Link] Stock animals;
        [Link] Supplement supplement;

        [Description("Name of zone representing the feedlot")]
        [Display(Type=DisplayType.Model, ModelType=typeof(Zone))]
        public IModel FeedlotZone { get; set; }

        [Description("The amount of suppliment to feed each animal each day (kg)")]
        public double SupplementAmount { get; set; }

        [Description("The type of suppliment to feed the animals")]
        public string SupplementType { get; set; }

        // ============================================================
        // Called every day to perform management actions
        // ============================================================
        [EventSubscribe("DoManagement")]
        private void OnDoManagement(object sender, EventArgs e)
        {
            // Determine how many animals are in feedlot.
            var animalGroupsInFeedlot = animals.AnimalGroups.Where(group => group.PaddOccupied.Name == FeedlotZone.Name);
            var totalNumAnimalsInFeedlot = animalGroupsInFeedlot.Sum(group => group.NoAnimals);

            // If there are animals in feedlot then feed them.
            if (totalNumAnimalsInFeedlot > 0)
                supplement.Feed(SupplementType, SupplementAmount * totalNumAnimalsInFeedlot, FeedlotZone.Name);     

            // Restock the supplement store if amount falls below 500 kg/ha
            if (supplement.Stores[1].Stored <= 500)       
                supplement.Buy(5000, SupplementType);
        }
    }
}
```
        Report ReportSupplement: EventNames=[Clock].EndOfDay
          VariableNames:
            [Clock].Today
            [Stock].Paddock as StockLocation
            [Stock].NumberAll
            [stock].IntakeAll.Weight as Intake //(kg)
            [Supplement].Name
            [Supplement].stores[2].Stored as SupplementStored // (kg)
            [Stock].SuppIntakeAll.Weight as SupplementIntake //(kg)
            [stock].SuppEaten as TotalSuppIntake //(kg)
            [stock].SuppIntake
        Report ReportStock: EventNames=[Clock].EndOfDay
          VariableNames:
            [Clock].Today
            [Stock].Paddock
            [Stock].Number as No_sheep
            [Stock].NumberAll
            [Stock].NumberAll / [WheatSheep].Area as Stockrate //(sheep/ha)
            [Stock].Weight as SheepWeight // (kg)
            [Stock].Age/30.4 as SheepAge //(month)
            [Stock].NoGroups
        Report ReportBiomass: EventNames=[Clock].EndOfDay
          VariableNames:
            [Clock].Today
            [WheatSheep].Wheat.AboveGround.Wt*10 as TotalBiomass
            [WheatSheep].Wheat.Grain.Wt*10 as TotalYield
            [WheatNotGrazed].Wheat.AboveGround.Wt*10 as TotalBiomassUngrazed
            [WheatNotGrazed].Wheat.Grain.Wt*10 as TotalYieldUngrazed
            [WheatSheep].Wheat.Phenology.Zadok.Stage as Zadok
        Zone WheatSheep: Area=1; Slope=0; AspectAngle=0; Altitude=50
          Fertiliser
          Soil: ASCOrder=Podzolic; SoilType=?; Site=Canberra; NearestTown=Canberra; Region=Gungahlin District; State=Australian Capital Territory; Country=Australia; ApsoilNumber=580-YP; Latitude=-35.201; Longitude=149.082
            DataSource=YP. Ginnenderra Experiment Station (GES). Data provided by James Hunt, based on measurements by John Kirkegaard, characterisation done by Julianne Lilley. Ginnenderra Experiment Station
            Physical
              Thickness  BD    AirDry  LL15   DUL   SAT
              100        1.42  0.04    0.059  0.21  0.408
              100        1.42  0.04    0.064  0.21  0.408
              200        1.48  0.05    0.085  0.21  0.427
              100        1.48  0.06    0.114  0.21  0.427
              200        1.48  0.08    0.13   0.21  0.427
              100        1.48  0.08    0.137  0.21  0.427
              200        1.48  0.09    0.141  0.21  0.427
              300        1.48  0.11    0.15   0.21  0.427
              300        1.48  0.11    0.161  0.21  0.427
              200        1.48  0.11    0.174  0.21  0.427
              200        1.48  0.11    0.174  0.21  0.427
              SoilCrop WheatSoil
                LL=[0.059, 0.064, 0.085, 0.114, 0.13, 0.137, 0.141, 0.15, 0.161, 0.174, 0.174]
                KL=[0.08, 0.08, 0.06, 0.05, 0.04, 0.03, 0.03, 0.02, 0.02, 0.01, 0.01]
                XF=[1, 1, 1, 1, 1, 1, 1, 1, 0.7, 0.4, 0]
            WaterBalance SoilWater: SummerDate=1-Nov; SummerU=6; SummerCona=2; WinterDate=1-Apr; WinterU=2; WinterCona=2; DiffusConst=88; DiffusSlope=35.4; Salb=0.13; CN2Bare=72; CNRed=20; CNCov=0.8; PSIDul=-100; Thickness=[100, 100, 200, 100, 200, 100, 200, 300, 300, 200, 200]; SWCON=[0.8, 0.8, 0.8, 0.8, 0.8, 0.8, 0.8, 0.8, 0.6, 0.6, 0.6]
            Organic: FOMCNRatio=80; CarbonUnits=Total
              Thickness  Carbon  SoilCNRatio  FBiom  FInert  FOM
              100        2.2     10           0.06   0       671.213
              100        0.5     10           0.05   0       577.718
              200        0.3     10           0.03   0.3     427.984
              100        0.2     10           0.02   0.4     368.37
              200        0.2     10           0.02   0.5     272.895
              100        0.15    10           0.01   0.6     234.883
              200        0.15    10           0.01   0.8     174.005
              300        0.1     10           0.01   0.9     110.951
              300        0.08    10           0.01   1       70.7453
              200        0.06    10           0.01   1       52.4094
              200        0.04    10           0.01   1       38.8259
            Chemical: Thickness=[100, 100, 200, 100, 200, 100, 200, 300, 300, 200, 200]; PH=[5.1, 5.1, 5.3, 5.3, 5.9, 5.9, 6.4, 6.4, 6.8, 6.8, 6.8]; PHUnits=Water
            Water: Thickness=[100, 100, 200, 100, 200, 100, 200, 300, 300, 200, 200]; FilledFromTop=true
              InitialValues=[0.21, 0.21, 0.21, 0.21, 0.21, 0.21, 0.21, 0.21, 0.21, 0.21, 0.21]
            Nutrient
            Solute NO3: Thickness=[100, 100, 200, 100, 200, 100, 200, 300, 300, 200, 200]; InitialValuesUnits=ppm; WaterTableConcentration=0; D0=0; DepthConstant=0; MaxDepthSoluteAccessible=0; RunoffEffectivenessAtMovingSolute=0; MaxEffectiveRunoff=0
              InitialValues=[0.377074, 0.377074, 0.377074, 0.377074, 0.377074, 0.377074, 0.377074, 0.377074, 0.377074, 0.377074, 1]
            Solute NH4: Thickness=[100, 100, 200, 100, 200, 100, 200, 300, 300, 200, 200]; InitialValuesUnits=ppm; WaterTableConcentration=0; D0=0; DepthConstant=0; MaxDepthSoluteAccessible=0; RunoffEffectivenessAtMovingSolute=0; MaxEffectiveRunoff=0
              InitialValues=[0.0377074, 0.0377074, 0.0377074, 0.0377074, 0.0377074, 0.0377074, 0.0377074, 0.0377074, 0.0377074, 0.0377074, 0.2]
            Solute Urea: Thickness=[100, 100, 200, 100, 200, 100, 200, 300, 300, 200, 200]; InitialValues=[0, 0, 0, 0, 0, 0, 0, 0, 0, 0, 0]; InitialValuesUnits=kg/ha; WaterTableConcentration=0; D0=0; DepthConstant=0; MaxDepthSoluteAccessible=0; RunoffEffectivenessAtMovingSolute=0; MaxEffectiveRunoff=0
            SoilTemperature Temperature: InteractionsPerDay=8
          SurfaceOrganicMatter: InitialResidueName=wheat_stubble; InitialResidueType=wheat; InitialResidueMass=500; InitialStandingFraction=0; InitialCPR=0; InitialCNR=100
          Plant Wheat
          MicroClimate: a_interception=0; b_interception=1; c_interception=0; d_interception=0; SoilHeatFluxFraction=0.4; MinimumHeightDiffForNewLayer=0; NightInterceptionFraction=0.5; ReferenceHeight=2
          Manager SowingRule
            StartDate = 1-mar
            EndDate = 30-mar
            MinESW = 0
            MinRain = 0
            RainDays = 0
            CultivarName = MacKellar
            SowingDepth = 30
            RowSpacing = 180
            Population = 200
```csharp
using APSIM.Numerics;
using Models.Climate;
using System;
using Models.Core;
using Models.PMF;
using Models.Soils.Nutrients;
using Models.Soils;
using Models.Utilities;
using APSIM.Shared.Utilities;
using Models.Interfaces;

namespace Models
{
    [Serializable]
    public class Script : Model
    {
        [Link] private Clock Clock;
        [Link] private Fertiliser Fertiliser;
        [Link] private Summary Summary;
        [Link] private Plant Wheat;
        [Link] private Soil Soil;
        private Accumulator accumulatedRain;
        [Link]
        private ISoilWater waterBalance;
        
        [Description("Start of sowing window (d-mmm)")]
        public string StartDate { get; set;}
        [Description("End of sowing window (d-mmm)")]
        public string EndDate { get; set;}
        [Description("Minimum extractable soil water for sowing (mm)")]
        public double MinESW { get; set;}
        [Description("Accumulated rainfall required for sowing (mm)")]
        public double MinRain { get; set;}
        [Description("Duration of rainfall accumulation (d)")]
        public int RainDays { get; set;}
        [Description("Cultivar to be sown")]
        [Display(Type=DisplayType.CultivarName)]
        public string CultivarName { get; set;}
        [Description("Sowing depth (mm)")]
        public double SowingDepth { get; set;}        
        [Description("Row spacing (mm)")]
        public double RowSpacing { get; set;}    
        [Description("Plant population (/m2)")]
        public double Population { get; set;}    
        
        
        [EventSubscribe("StartOfSimulation")]
        private void OnSimulationCommencing(object sender, EventArgs e)
        {
            accumulatedRain = new Accumulator(this, "[Weather].Rain", RainDays);
        }
        

        [EventSubscribe("DoManagement")]
        private void OnDoManagement(object sender, EventArgs e)
        {
            accumulatedRain.Update();
            
            if (DateUtilities.WithinDates(StartDate,Clock.Today,EndDate) &&
                !Wheat.IsAlive &&
                MathUtilities.Sum(waterBalance.ESW) > MinESW &&
                accumulatedRain.Sum > MinRain)
            {
               Wheat.Sow(population:Population, cultivar:CultivarName, depth:SowingDepth, rowSpacing:RowSpacing);    
            }
        
        }
        
    }
}
```
          Manager SowingFertiliser
            Amount = 130
            CropName = wheat
```csharp
using Models.Soils;
using System;
using Models.Core;
using Models.PMF;
namespace Models
{
    [Serializable]
    public class Script : Model
    {
        [Link] Clock Clock;
        [Link] Fertiliser Fertiliser;
        [Link] Summary Summary;
        
        
        [Description("Amount of fertiliser to be applied (kg/ha)")]
        public double Amount { get; set;}
        
        [Description("Crop to be fertilised")]
        public string CropName { get; set;}
        
        
        

        [EventSubscribe("Sowing")]
        private void OnSowing(object sender, EventArgs e)
        {
            Model crop = sender as Model;
            if (crop.Name.ToLower()==CropName.ToLower())
                Fertiliser.Apply(amount: Amount, type: "NO3N");
        }
        
    }
}
```
          Manager Harvest
```csharp
using APSIM.Shared.Utilities;
using Models.Utilities;
using Models.Soils;
using Models.Soils.Nutrients;
using Models.PMF;
using Models.Core;
using System;

namespace Models
{
    [Serializable]
    public class Script : Model
    {
        [Link] Plant Wheat;

        [EventSubscribe("DoManagement")]
        private void OnDoManagement(object sender, EventArgs e)
        {
            if (Wheat.IsReadyForHarvesting)
            {
               Wheat.Harvest();
               Wheat.EndCrop();    
            }
        
        }
        
    }
}
```
        Zone Feedlot: Area=10; Slope=0; AspectAngle=0; Altitude=50
          Soil: same as Sensibility.WheatSheepFeedlot1.WheatSheepFeedlot.WheatSheep.Soil
          SurfaceOrganicMatter: InitialResidueName=wheat_stubble; InitialResidueType=wheat; InitialResidueMass=0; InitialStandingFraction=0; InitialCPR=0; InitialCNR=100
          MicroClimate: a_interception=0; b_interception=1; c_interception=0; d_interception=0; SoilHeatFluxFraction=0.4; MinimumHeightDiffForNewLayer=0; NightInterceptionFraction=0.5; ReferenceHeight=2
          Report: VariableNames=[Clock].Today
        Zone WheatNotGrazed: same as Sensibility.WheatSheepFeedlot1.WheatSheepFeedlot.WheatSheep
  Folder MassBalanceCheck
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