Simulations: Version=80
  Memo
    ### Datasets

    Simulations numbered as per

    Table 2. "Datasets used for model development" (Page 260)

    in:

    Modelling sugarcane production systems I. Development and performance of the sugarcane module.

    Field Crops Research, 61: 253-271.  (1999).

    Keating, B.A., Robertson, M.J., Muchow, R.C. and Huth, N.I.

    nb.

    Datasets 4 and 17 were not included in simulations as they were not in original files

    Dataset 18 was not included as irrigation records were missing.

    nb.

    I had to increase the harvest dates in every simulation by one day.

    This is because the model does management at the start of everyday (ie. the crop is harvested at the start of every day)

    But the "daily" reporting is the very last thing that happens each day.

    Therefore if we set our harvest date to be the same as that in the observed data, then our predicted data at harvest will all be zeroed (because after the model harvests it zeros the values).

    This is not a problem when we only report at "harvesting" instead of "daily" because the reporting occurs before the values are zeroed.

    However we have to report daily because we have observation data during the crop growth not just at harvesting.
  Folder Dataset 1 Harwood NSW Australia
    Simulation 1 Harwood 1993_94 Q117 P
      Weather: FileName=Harwood.met
      Clock: Start=1993-09-21; End=1995-09-29
      Summary summaryfile
      MicroClimate: a_interception=0; b_interception=1; c_interception=0; d_interception=0; soil_albedo=0.23; SoilHeatFluxFraction=0.4; MinimumHeightDiffForNewLayer=0; NightInterceptionFraction=0.5; ReferenceHeight=2
      Zone paddock: Area=1; Slope=0; AspectAngle=0; Altitude=50
        SurfaceOrganicMatter Surface Organic Matter: InitialResidueName=sugar_trash; InitialResidueType=Sugarcane; InitialResidueMass=100; InitialStandingFraction=1; InitialCPR=0; InitialCNR=80; FractionFaecesAdded=1
        Soil Harwood: Site=Harwood Sugar Mill; State=NSW; Latitude=0; Longitude=0
          InitialWater Initial water: PercentMethod=0; FractionFull=1
          Physical
            Thickness  BD    AirDry  LL15  DUL   SAT
            200        1.15  0.05    0.16  0.28  0.45
            200        1.35  0.05    0.18  0.3   0.45
            200        1.4   0.05    0.2   0.32  0.45
            300        1.45  0.05    0.21  0.33  0.45
            300        1.45  0.05    0.24  0.36  0.45
            300        1.5   0.05    0.29  0.41  0.43
            SoilCrop SugarcaneSoil: LL=[0.16, 0.18, 0.2, 0.21, 0.24, 0.29]; KL=[0.1, 0.1, 0.1, 0.08, 0.08, 0.04]; XF=[1, 1, 1, 1, 1, 1]
          SoilWater: SummerDate=1-Nov; SummerU=4; SummerCona=3; WinterDate=1-Apr; WinterU=4; WinterCona=3; DiffusConst=40; DiffusSlope=16; Salb=0.1; CN2Bare=65; CNRed=20; CNCov=0.8; max_pond=0; Thickness=[200, 200, 200, 300, 300, 300]; SWCON=[0.4, 0.4, 0.4, 0.4, 0.4, 0.4]; PrecipitationInterception=0
          Organic: FOMCNRatio=70
            Thickness  Carbon  SoilCNRatio  FBiom  FInert  FOM
            200        0.8     11           0.06   0.5     19.411
            200        0.75    11           0.045  0.55    13.0116
            200        0.54    11           0.035  0.85    8.72194
            300        0.4     11           0.015  0.95    4.7867
            300        0.4     11           0.005  0.95    2.627
            300        0.4     11           0.005  0.99    1.44173
          Chemical
            Thickness  NO3N  NH4N  PH
            200        2     1     6
            200        2     1     6
            200        1     1     6
            300        1     0.5   6
            300        1     0.5   6
            300        1     0.5   6
          Sample Initial nitrogen: Thickness=[200, 200, 200, 300, 300, 300]; SWUnits=Volumetric; OCUnits=Total; PHUnits=Water
          CERESSoilTemperature
          Nutrient
            DirectedGraphInfo={Nodes=[{Name=Inert, OutlineColour=Black}, {Name=SurfaceResidue, OutlineColour=Black}, {Name=FOMLignin, OutlineColour=Black}, {Name=FOMCellulose, OutlineColour=Black}, {Name=FOMCarbohydrate, OutlineColour=Black}, {Name=Microbial, OutlineColour=Black}, {Name=Humic, OutlineColour=Black}, {Name=Urea, OutlineColour=Black}, {Name=NO3, OutlineColour=Black}, {Name=NH4, OutlineColour=Black}, {Name=Atmosphere, OutlineColour=White}], Arcs=[{SourceName=SurfaceResidue, DestinationName=Microbial}, {SourceName=SurfaceResidue, DestinationName=Humic}, {SourceName=FOMLignin, DestinationName=Microbial}, {SourceName=FOMLignin, DestinationName=Humic}, {SourceName=FOMCellulose, DestinationName=Microbial}, {SourceName=FOMCellulose, DestinationName=Humic}, {SourceName=FOMCarbohydrate, DestinationName=Microbial}, {SourceName=FOMCarbohydrate, DestinationName=Humic}, {SourceName=Microbial, DestinationName=Microbial}, {SourceName=Microbial, DestinationName=Humic}, {SourceName=Humic, DestinationName=Microbial}, {SourceName=Urea, DestinationName=NH4}, {SourceName=NO3, DestinationName=Atmosphere}, {SourceName=NH4, DestinationName=NO3}]}
        Fertiliser
        Irrigation
        Sugarcane: crop_type=Sugarcane; tt_emerg_to_begcane_ub=2000; tt_begcane_to_flowering_ub=10000; tt_flowering_to_crop_end_ub=5000; n_uptake_option=1; NO3_diffn_const=2; n_supply_preference=active; kno3=0.05; knh4=0.05; total_n_uptake_max=0.6; ll_ub=1000; kl_ub=1; minsw=1e-05; latitude_ub=90; latitude_lb=-90; maxt_ub=55; mint_ub=40; mint_lb=-10; radn_ub=50; radn_lb=1; dlayer_ub=1000; dul_dep_ub=1000; sw_dep_ub=1000; NO3_ub=10000; NO3_min_ub=10000; NH4_ub=10000; NH4_min_ub=10000; eo_crop_factor=100; uptake_source=calc; rlv_init=[0.04, 0.02, 0.01, 0.005, 0, 0, 0]
          zero: maxt_lb, LAI, WaterDemand, no3ppm_min, nh4ppm_min, dlayer_lb, dul_dep_lb, sw_dep_lb, NO3_lb, NO3_min_lb, NH4_lb, NH4_min_lb
          plant={stage_names=[sowing, sprouting, emergence, begin_cane, flowering, end_crop], stage_code_list=[1, 2, 3, 4, 5, 6], rue=[0, 0, 1.8, 1.8, 1.8, 0], root_depth_rate=[0, 0, 10, 15, 15, 15], ratio_root_shoot=[0, 0, 0.2, 0.15, 0.1, 0], transp_eff_cf=[0.008, 0.008, 0.008, 0.008, 0.008, 0.008], n_fix_rate=[0, 0, 0, 0, 0, 0], extinction_coef=0.38, extinction_coef_dead=0.01, leaf_no_crit=99, tt_emerg_limit=800, days_germ_limit=40, swdf_pheno_limit=500, swdf_photo_limit=500, swdf_photo_rate=0, initial_root_depth=150, specific_root_length=18000, x_plant_rld=[0, 0.1], y_rel_root_rate=[1, 1], root_die_back_fr=0.17, initial_tpla=1000, sla_lfno=[6, 25], sla_max=[11500, 11500], sla_min=[9000, 8500], x_stem_wt=[0, 200], y_height=[0, 6000], svp_fract=0.75, eo_crop_factor_default=100, pesw_germ=0.05, fasw_emerg=[0, 0.7], rel_emerg_rate=[0.3, 1], leaf_no_at_emerg=1, shoot_lag=250, shoot_rate=0.8, x_node_no_app=[1, 20, 30, 40], y_node_app_rate=[80, 105, 125, 150], x_node_no_leaf=[1, 20, 30, 40], y_leaves_per_node=[1, 1, 1, 1], dm_root_init=0.2, dm_sstem_init=0.01, dm_leaf_init=0.2, dm_cabbage_init=0.143, dm_sucrose_init=0, leaf_cabbage_ratio=1.7, cabbage_sheath_fr=0.2, dm_root_sen_frac=0.002, dead_detach_frac=[0.1, 0.1, 0.05, 0.1, 0], sen_detach_frac=[1, 0.01, 0, 0.01, 0], leaf_no_correction=1.6, lai_sen_light=4.99, sen_light_slope=0.001, frost_temp=[-5, 0, 2], frost_fraction=[1, 0.1, 0], sen_rate_water=0.01, twilight=-6, x_stage_code=[1, 2, 3, 4, 5], y_n_conc_crit_leaf=[0.025, 0.025, 0.015, 0.015, 0.005], y_n_conc_min_leaf=[0.015, 0.015, 0.005, 0.005, 0.004], y_n_conc_crit_cane=[0.009, 0.009, 0.009, 0.006, 0.0035], y_n_conc_min_cane=[0.002, 0.002, 0.0005, 0.0005, 0.0005], y_n_conc_crit_cabbage=[0.019, 0.019, 0.006, 0.006, 0.001], y_n_conc_min_cabbage=[0.01, 0.01, 0.003, 0.003, 0.0008], n_conc_crit_root=0.01, n_conc_min_root=0.005, n_root_init_conc=0.01, n_sstem_init_conc=0.007, n_leaf_init_conc=0.03, n_cabbage_init_conc=0.02, n_root_sen_conc=0.005, n_leaf_sen_conc=0.004, n_cabbage_sen_conc=0.0008, x_ave_temp=[0, 5, 15, 35, 50], y_stress_photo=[0, 0, 1, 1, 0], x_ave_temp_stalk=[0, 50], y_stress_stalk=[1, 1], x_temp=[9, 32, 45], y_tt=[0, 23, 0], x_sw_demand_ratio=[0.1, 0.6], y_swdef_leaf=[0, 1], x_demand_ratio_stalk=[0.3, 1.5], y_swdef_stalk=[0, 1], x_sw_avail_ratio=[0, 0.16], y_swdef_pheno=[1, 1], x_sw_ratio=[0, 0.25], y_sw_fac_root=[0, 1], k_nfact_photo=1.5, k_nfact_expansion=1.25, k_nfact_stalk=1, k_nfact_pheno=100, oxdef_photo_rtfr=[0.5, 0.8], oxdef_photo=[1, 1], x_afps=[0.03, 0.05], y_afps_fac=[1, 1], cane_dmf_max=[0.11, 0.17, 0.23], cane_dmf_min=[0.09, 0.13, 0.2], cane_dmf_tt=[0, 500, 4500], cane_dmf_rate=0, stress_lodge=[0, 1], death_fr_lodge=[0.002, 0.001], lodge_redn_photo=0.92, lodge_redn_sucrose=0.77, lodge_redn_green_leaf=0.85}
          ratoon={stage_names=[sowing, sprouting, emergence, begin_cane, flowering, end_crop], stage_code_list=[1, 2, 3, 4, 5, 6], rue=[0, 0, 1.65, 1.65, 1.65, 0], root_depth_rate=[0, 0, 10, 15, 15, 15], ratio_root_shoot=[0, 0, 0.2, 0.15, 0.1, 0], transp_eff_cf=[0.008, 0.008, 0.008, 0.008, 0.008, 0.008], n_fix_rate=[0, 0, 0, 0, 0, 0], extinction_coef=0.38, extinction_coef_dead=0.01, leaf_no_crit=99, tt_emerg_limit=800, days_germ_limit=40, swdf_pheno_limit=500, swdf_photo_limit=500, swdf_photo_rate=0, initial_root_depth=150, specific_root_length=18000, x_plant_rld=[0, 0.1], y_rel_root_rate=[1, 1], root_die_back_fr=0.17, initial_tpla=1000, sla_lfno=[6, 25], sla_max=[11500, 11500], sla_min=[9000, 8500], x_stem_wt=[0, 200], y_height=[0, 6000], svp_fract=0.75, eo_crop_factor_default=100, pesw_germ=0.03, fasw_emerg=[0, 0.7], rel_emerg_rate=[0.3, 1], leaf_no_at_emerg=1, shoot_lag=100, shoot_rate=0.8, x_node_no_app=[1, 20, 30, 40], y_node_app_rate=[80, 105, 125, 150], x_node_no_leaf=[1, 20, 30, 40], y_leaves_per_node=[1, 1, 1, 1], dm_root_init=0.2, dm_sstem_init=0.01, dm_leaf_init=0.2, dm_cabbage_init=0.143, dm_sucrose_init=0, leaf_cabbage_ratio=1.7, cabbage_sheath_fr=0.2, dm_root_sen_frac=0.002, dead_detach_frac=[0.1, 0.1, 0.05, 0.1, 0], sen_detach_frac=[1, 0.01, 0, 0.01, 0], leaf_no_correction=1.6, lai_sen_light=4.99, sen_light_slope=0.001, frost_temp=[-5, 0, 2], frost_fraction=[1, 0.1, 0], sen_rate_water=0.01, twilight=-6, x_stage_code=[1, 2, 3, 4, 5], y_n_conc_crit_leaf=[0.025, 0.025, 0.015, 0.015, 0.005], y_n_conc_min_leaf=[0.015, 0.015, 0.005, 0.005, 0.004], y_n_conc_crit_cane=[0.009, 0.009, 0.009, 0.006, 0.0035], y_n_conc_min_cane=[0.002, 0.002, 0.0005, 0.0005, 0.0005], y_n_conc_crit_cabbage=[0.019, 0.019, 0.006, 0.006, 0.001], y_n_conc_min_cabbage=[0.01, 0.01, 0.003, 0.003, 0.0008], n_conc_crit_root=0.01, n_conc_min_root=0.005, n_root_init_conc=0.01, n_sstem_init_conc=0.007, n_leaf_init_conc=0.03, n_cabbage_init_conc=0.02, n_root_sen_conc=0.005, n_leaf_sen_conc=0.004, n_cabbage_sen_conc=0.0008, x_ave_temp=[0, 5, 15, 35, 50], y_stress_photo=[0, 0, 1, 1, 0], x_ave_temp_stalk=[0, 50], y_stress_stalk=[1, 1], x_temp=[9, 32, 45], y_tt=[0, 23, 0], x_sw_demand_ratio=[0.1, 0.6], y_swdef_leaf=[0, 1], x_demand_ratio_stalk=[0.3, 1.5], y_swdef_stalk=[0, 1], x_sw_avail_ratio=[0, 0.16], y_swdef_pheno=[1, 1], x_sw_ratio=[0, 0.25], y_sw_fac_root=[0, 1], k_nfact_photo=1.5, k_nfact_expansion=1.25, k_nfact_stalk=1, k_nfact_pheno=100, oxdef_photo_rtfr=[0.5, 0.8], oxdef_photo=[1, 1], x_afps=[0.03, 0.05], y_afps_fac=[1, 1], cane_dmf_max=[0.11, 0.17, 0.23], cane_dmf_min=[0.09, 0.13, 0.2], cane_dmf_tt=[0, 500, 4500], cane_dmf_rate=0, stress_lodge=[0, 1], death_fr_lodge=[0.002, 0.001], lodge_redn_photo=0.92, lodge_redn_sucrose=0.77, lodge_redn_green_leaf=0.85}
          cultivars:
            {cultivar_name=q117, leaf_size=[1500, 55000, 55000], leaf_size_no=[1, 14, 20], cane_fraction=0.7, sucrose_fraction_stalk=[1, 0.55], stress_factor_stalk=[0.2, 1], sucrose_delay=0, min_sstem_sucrose=800, min_sstem_sucrose_redn=10, tt_emerg_to_begcane=1900, tt_begcane_to_flowering=6000, tt_flowering_to_crop_end=2000, green_leaf_no=13, tillerf_leaf_size=[1, 1.5, 1.5, 1, 1], tillerf_leaf_size_no=[1, 6, 10, 12, 26]}
            {cultivar_name=q117_ratoon, leaf_size=[1500, 55000, 55000], leaf_size_no=[1, 14, 20], cane_fraction=0.7, sucrose_fraction_stalk=[1, 0.55], stress_factor_stalk=[0.2, 1], sucrose_delay=0, min_sstem_sucrose=800, min_sstem_sucrose_redn=10, tt_emerg_to_begcane=1900, tt_begcane_to_flowering=6000, tt_flowering_to_crop_end=2000, green_leaf_no=13, tillerf_leaf_size=[1.5, 1.5, 1.5, 1, 1], tillerf_leaf_size_no=[1, 4, 10, 12, 26]}
            {cultivar_name=q117_fum, leaf_size=[1500, 55000, 55000], leaf_size_no=[1, 14, 20], cane_fraction=0.7, sucrose_fraction_stalk=[1, 0.55], stress_factor_stalk=[0.2, 1], sucrose_delay=0, min_sstem_sucrose=800, min_sstem_sucrose_redn=10, tt_emerg_to_begcane=1900, tt_begcane_to_flowering=6000, tt_flowering_to_crop_end=2000, green_leaf_no=13, tillerf_leaf_size=[1.5, 3, 2.5, 1, 1], tillerf_leaf_size_no=[1, 4, 10, 12, 26]}
            {cultivar_name=q117_fum_ratoon, leaf_size=[1500, 55000, 55000], leaf_size_no=[1, 14, 20], cane_fraction=0.7, sucrose_fraction_stalk=[1, 0.55], stress_factor_stalk=[0.2, 1], sucrose_delay=0, min_sstem_sucrose=800, min_sstem_sucrose_redn=10, tt_emerg_to_begcane=1900, tt_begcane_to_flowering=6000, tt_flowering_to_crop_end=2000, green_leaf_no=13, tillerf_leaf_size=[2, 3, 2, 1, 1], tillerf_leaf_size_no=[1, 4, 10, 12, 26]}
            {cultivar_name=q96, leaf_size=[1500, 55000, 55000], leaf_size_no=[1, 14, 20], cane_fraction=0.7, sucrose_fraction_stalk=[1, 0.55], stress_factor_stalk=[0.2, 1], sucrose_delay=0, min_sstem_sucrose=900, min_sstem_sucrose_redn=10, tt_emerg_to_begcane=1900, tt_begcane_to_flowering=6000, tt_flowering_to_crop_end=2000, green_leaf_no=13, tillerf_leaf_size=[1, 1, 1.5, 1, 1], tillerf_leaf_size_no=[1, 4, 10, 16, 26]}
            {cultivar_name=q96_ratoon, leaf_size=[1500, 55000, 55000], leaf_size_no=[1, 14, 20], cane_fraction=0.7, sucrose_fraction_stalk=[1, 0.55], stress_factor_stalk=[0.2, 1], sucrose_delay=0, min_sstem_sucrose=900, min_sstem_sucrose_redn=10, tt_emerg_to_begcane=1900, tt_begcane_to_flowering=6000, tt_flowering_to_crop_end=2000, green_leaf_no=13, tillerf_leaf_size=[1.5, 1.5, 1.5, 1, 1], tillerf_leaf_size_no=[1, 4, 10, 16, 26]}
            {cultivar_name=q96_fum, leaf_size=[1500, 55000, 55000], leaf_size_no=[1, 14, 20], cane_fraction=0.7, sucrose_fraction_stalk=[1, 0.55], stress_factor_stalk=[0.2, 1], sucrose_delay=0, min_sstem_sucrose=900, min_sstem_sucrose_redn=10, tt_emerg_to_begcane=1900, tt_begcane_to_flowering=6000, tt_flowering_to_crop_end=2000, green_leaf_no=13, tillerf_leaf_size=[1, 1, 1.5, 1, 1], tillerf_leaf_size_no=[1, 4, 10, 16, 26]}
            {cultivar_name=q96_fum_ratoon, leaf_size=[1500, 55000, 55000], leaf_size_no=[1, 14, 20], cane_fraction=0.7, sucrose_fraction_stalk=[1, 0.55], stress_factor_stalk=[0.2, 1], sucrose_delay=0, min_sstem_sucrose=900, min_sstem_sucrose_redn=10, tt_emerg_to_begcane=1900, tt_begcane_to_flowering=6000, tt_flowering_to_crop_end=2000, green_leaf_no=13, tillerf_leaf_size=[1.5, 1.5, 1.5, 1, 1], tillerf_leaf_size_no=[1, 4, 10, 16, 26]}
            {cultivar_name=q138, leaf_size=[1500, 55000, 55000], leaf_size_no=[1, 14, 20], cane_fraction=0.7, sucrose_fraction_stalk=[1, 0.61], stress_factor_stalk=[0.2, 1], sucrose_delay=600, min_sstem_sucrose=1500, min_sstem_sucrose_redn=10, tt_emerg_to_begcane=1900, tt_begcane_to_flowering=6000, tt_flowering_to_crop_end=2000, green_leaf_no=13, tillerf_leaf_size=[1, 1, 1.5, 1, 1], tillerf_leaf_size_no=[1, 4, 10, 16, 26]}
            {cultivar_name=q138_ratoon, leaf_size=[1500, 55000, 55000], leaf_size_no=[1, 14, 20], cane_fraction=0.7, sucrose_fraction_stalk=[1, 0.61], stress_factor_stalk=[0.2, 1], sucrose_delay=0, min_sstem_sucrose=1500, min_sstem_sucrose_redn=10, tt_emerg_to_begcane=1900, tt_begcane_to_flowering=6000, tt_flowering_to_crop_end=2000, green_leaf_no=13, tillerf_leaf_size=[1.5, 1.5, 1.5, 1, 1], tillerf_leaf_size_no=[1, 4, 10, 16, 26]}
            {cultivar_name=q138_fum, leaf_size=[1500, 55000, 55000], leaf_size_no=[1, 14, 20], cane_fraction=0.7, sucrose_fraction_stalk=[1, 0.61], stress_factor_stalk=[0.2, 1], sucrose_delay=600, min_sstem_sucrose=1500, min_sstem_sucrose_redn=10, tt_emerg_to_begcane=1900, tt_begcane_to_flowering=6000, tt_flowering_to_crop_end=2000, green_leaf_no=13, tillerf_leaf_size=[1, 1, 1.5, 1, 1], tillerf_leaf_size_no=[1, 4, 10, 16, 26]}
            {cultivar_name=q138_fum_ratoon, leaf_size=[1500, 55000, 55000], leaf_size_no=[1, 14, 20], cane_fraction=0.7, sucrose_fraction_stalk=[1, 0.61], stress_factor_stalk=[0.2, 1], sucrose_delay=0, min_sstem_sucrose=1500, min_sstem_sucrose_redn=10, tt_emerg_to_begcane=1900, tt_begcane_to_flowering=6000, tt_flowering_to_crop_end=2000, green_leaf_no=13, tillerf_leaf_size=[1.5, 1.5, 1.5, 1, 1], tillerf_leaf_size_no=[1, 4, 10, 16, 26]}
            {cultivar_name=ts65-28, leaf_size=[1500, 55000, 55000], leaf_size_no=[1, 14, 20], cane_fraction=0.7, sucrose_fraction_stalk=[1, 0.55], stress_factor_stalk=[0.2, 1], sucrose_delay=0, min_sstem_sucrose=800, min_sstem_sucrose_redn=10, tt_emerg_to_begcane=1900, tt_begcane_to_flowering=6000, tt_flowering_to_crop_end=2000, green_leaf_no=13, tillerf_leaf_size=[1, 1, 1.5, 1, 1], tillerf_leaf_size_no=[1, 4, 10, 16, 26]}
            {cultivar_name=ts65-28_ratoon, leaf_size=[1500, 55000, 55000], leaf_size_no=[1, 14, 20], cane_fraction=0.7, sucrose_fraction_stalk=[1, 0.55], stress_factor_stalk=[0.2, 1], sucrose_delay=0, min_sstem_sucrose=800, min_sstem_sucrose_redn=10, tt_emerg_to_begcane=1900, tt_begcane_to_flowering=6000, tt_flowering_to_crop_end=2000, green_leaf_no=13, tillerf_leaf_size=[1.5, 1.5, 1.5, 1, 1], tillerf_leaf_size_no=[1, 4, 10, 16, 26]}
            {cultivar_name=ts65-28_fum, leaf_size=[1500, 55000, 55000], leaf_size_no=[1, 14, 20], cane_fraction=0.7, sucrose_fraction_stalk=[1, 0.55], stress_factor_stalk=[0.2, 1], sucrose_delay=0, min_sstem_sucrose=800, min_sstem_sucrose_redn=10, tt_emerg_to_begcane=1900, tt_begcane_to_flowering=6000, tt_flowering_to_crop_end=2000, green_leaf_no=13, tillerf_leaf_size=[1, 1, 1.5, 1, 1], tillerf_leaf_size_no=[1, 4, 10, 16, 26]}
            {cultivar_name=ts65-28_fum_ratoon, leaf_size=[1500, 55000, 55000], leaf_size_no=[1, 14, 20], cane_fraction=0.7, sucrose_fraction_stalk=[1, 0.55], stress_factor_stalk=[0.2, 1], sucrose_delay=0, min_sstem_sucrose=800, min_sstem_sucrose_redn=10, tt_emerg_to_begcane=1900, tt_begcane_to_flowering=6000, tt_flowering_to_crop_end=2000, green_leaf_no=13, tillerf_leaf_size=[1.5, 1.5, 1.5, 1, 1], tillerf_leaf_size_no=[1, 4, 10, 16, 26]}
            {cultivar_name=h73, leaf_size=[1500, 55000, 55000], leaf_size_no=[1, 14, 20], cane_fraction=0.7, sucrose_fraction_stalk=[1, 0.55], stress_factor_stalk=[0.2, 1], sucrose_delay=0, min_sstem_sucrose=800, min_sstem_sucrose_redn=10, tt_emerg_to_begcane=1900, tt_begcane_to_flowering=6000, tt_flowering_to_crop_end=2000, green_leaf_no=13, tillerf_leaf_size=[1, 1, 1.5, 1, 1], tillerf_leaf_size_no=[1, 4, 10, 16, 26]}
            {cultivar_name=h73_ratoon, leaf_size=[1500, 55000, 55000], leaf_size_no=[1, 14, 20], cane_fraction=0.7, sucrose_fraction_stalk=[1, 0.5], stress_factor_stalk=[0.2, 1], sucrose_delay=0, min_sstem_sucrose=800, min_sstem_sucrose_redn=10, tt_emerg_to_begcane=1900, tt_begcane_to_flowering=6000, tt_flowering_to_crop_end=2000, green_leaf_no=13, tillerf_leaf_size=[1.5, 1.5, 1.5, 1, 1], tillerf_leaf_size_no=[1, 4, 10, 16, 26]}
            {cultivar_name=q141, leaf_size=[1500, 55000, 55000], leaf_size_no=[1, 14, 20], cane_fraction=0.7, sucrose_fraction_stalk=[1, 0.64], stress_factor_stalk=[0.2, 1], sucrose_delay=0, min_sstem_sucrose=1200, min_sstem_sucrose_redn=10, tt_emerg_to_begcane=1900, tt_begcane_to_flowering=6000, tt_flowering_to_crop_end=2000, green_leaf_no=13, tillerf_leaf_size=[1, 1, 1.5, 1, 1], tillerf_leaf_size_no=[1, 4, 10, 16, 26]}
            {cultivar_name=q141_ratoon, leaf_size=[1500, 55000, 55000], leaf_size_no=[1, 14, 20], cane_fraction=0.7, sucrose_fraction_stalk=[1, 0.64], stress_factor_stalk=[0.2, 1], sucrose_delay=0, min_sstem_sucrose=1200, min_sstem_sucrose_redn=10, tt_emerg_to_begcane=1900, tt_begcane_to_flowering=6000, tt_flowering_to_crop_end=2000, green_leaf_no=13, tillerf_leaf_size=[1.5, 1.5, 1.5, 1, 1], tillerf_leaf_size_no=[1, 4, 10, 16, 26]}
            {cultivar_name=nco376, leaf_size=[3000, 7000, 12000, 28000, 28000], leaf_size_no=[1, 4, 6, 14, 20], cane_fraction=0.65, sucrose_fraction_stalk=[1, 0.55], stress_factor_stalk=[0.2, 1], sucrose_delay=0, min_sstem_sucrose=450, min_sstem_sucrose_redn=10, tt_emerg_to_begcane=1800, tt_begcane_to_flowering=6000, tt_flowering_to_crop_end=2000, green_leaf_no=10, tillerf_leaf_size=[1, 1, 1.5, 1, 1], tillerf_leaf_size_no=[1, 4, 10, 16, 26]}
            {cultivar_name=nco376_ratoon, leaf_size=[3000, 7000, 12000, 28000, 28000], leaf_size_no=[1, 4, 6, 14, 20], cane_fraction=0.65, sucrose_fraction_stalk=[1, 0.55], stress_factor_stalk=[0.2, 1], sucrose_delay=0, min_sstem_sucrose=450, min_sstem_sucrose_redn=10, tt_emerg_to_begcane=1800, tt_begcane_to_flowering=6000, tt_flowering_to_crop_end=2000, green_leaf_no=10, tillerf_leaf_size=[1.5, 1.5, 1.5, 1, 1], tillerf_leaf_size_no=[1, 4, 10, 16, 26]}
            {cultivar_name=n12, leaf_size=[3000, 7000, 12000, 30000, 30000], leaf_size_no=[1, 4, 6, 14, 20], cane_fraction=0.7, sucrose_fraction_stalk=[1, 0.55], stress_factor_stalk=[0.2, 1], sucrose_delay=0, min_sstem_sucrose=450, min_sstem_sucrose_redn=10, tt_emerg_to_begcane=1900, tt_begcane_to_flowering=6000, tt_flowering_to_crop_end=2000, green_leaf_no=13, tillerf_leaf_size=[1, 1, 1.5, 1, 1], tillerf_leaf_size_no=[1, 4, 10, 16, 26]}
            {cultivar_name=n12_ratoon, leaf_size=[3000, 7000, 12000, 30000, 30000], leaf_size_no=[1, 4, 6, 14, 20], cane_fraction=0.7, sucrose_fraction_stalk=[1, 0.55], stress_factor_stalk=[0.2, 1], sucrose_delay=0, min_sstem_sucrose=450, min_sstem_sucrose_redn=10, tt_emerg_to_begcane=1900, tt_begcane_to_flowering=6000, tt_flowering_to_crop_end=2000, green_leaf_no=13, tillerf_leaf_size=[1.5, 1.5, 1.5, 1, 1], tillerf_leaf_size_no=[1, 4, 10, 16, 26]}
            {cultivar_name=n14, leaf_size=[3000, 8000, 13000, 45000, 45000], leaf_size_no=[1, 4, 6, 14, 20], cane_fraction=0.7, sucrose_fraction_stalk=[1, 0.55], stress_factor_stalk=[0.2, 1], sucrose_delay=0, min_sstem_sucrose=450, min_sstem_sucrose_redn=10, tt_emerg_to_begcane=1900, tt_begcane_to_flowering=6000, tt_flowering_to_crop_end=2000, green_leaf_no=13, tillerf_leaf_size=[1, 1.5, 1.5, 1, 1], tillerf_leaf_size_no=[1, 4, 10, 16, 26]}
            {cultivar_name=n14_ratoon, leaf_size=[3000, 8000, 13000, 45000, 45000], leaf_size_no=[1, 4, 6, 14, 20], cane_fraction=0.7, sucrose_fraction_stalk=[1, 0.55], stress_factor_stalk=[0.2, 1], sucrose_delay=0, min_sstem_sucrose=450, min_sstem_sucrose_redn=10, tt_emerg_to_begcane=1900, tt_begcane_to_flowering=6000, tt_flowering_to_crop_end=2000, green_leaf_no=13, tillerf_leaf_size=[1.5, 1.5, 1.5, 1, 1], tillerf_leaf_size_no=[1, 4, 10, 16, 26]}
            {cultivar_name=CP51, leaf_size=[3000, 7000, 15000, 35000, 35000], leaf_size_no=[1, 4, 7, 15, 20], cane_fraction=0.7, sucrose_fraction_stalk=[1, 0.55], stress_factor_stalk=[0.2, 1], sucrose_delay=0, min_sstem_sucrose=450, min_sstem_sucrose_redn=10, tt_emerg_to_begcane=1350, tt_begcane_to_flowering=6000, tt_flowering_to_crop_end=2000, green_leaf_no=13, tillerf_leaf_size=[1, 1, 1, 1, 1], tillerf_leaf_size_no=[1, 4, 10, 16, 26]}
            {cultivar_name=CP51_ratoon, leaf_size=[3000, 7000, 15000, 35000, 35000], leaf_size_no=[1, 4, 7, 15, 20], cane_fraction=0.7, sucrose_fraction_stalk=[1, 0.55], stress_factor_stalk=[0.2, 1], sucrose_delay=0, min_sstem_sucrose=450, min_sstem_sucrose_redn=10, tt_emerg_to_begcane=1350, tt_begcane_to_flowering=6000, tt_flowering_to_crop_end=2000, green_leaf_no=13, tillerf_leaf_size=[1.5, 1.5, 1, 1, 1], tillerf_leaf_size_no=[1, 4, 10, 16, 26]}
            {cultivar_name=R570, leaf_size=[3000, 7000, 10000, 45000, 60000, 60000], leaf_size_no=[1, 4, 6, 10, 14, 20], cane_fraction=0.68, sucrose_fraction_stalk=[1, 0.58], stress_factor_stalk=[0.2, 1], sucrose_delay=0, min_sstem_sucrose=693, min_sstem_sucrose_redn=10, tt_emerg_to_begcane=1500, tt_begcane_to_flowering=6000, tt_flowering_to_crop_end=2000, green_leaf_no=13, tillerf_leaf_size=[6, 1], tillerf_leaf_size_no=[1, 12]}
            {cultivar_name=R570_ratoon, leaf_size=[3000, 7000, 10000, 45000, 60000, 60000], leaf_size_no=[1, 4, 6, 10, 14, 20], cane_fraction=0.68, sucrose_fraction_stalk=[1, 0.58], stress_factor_stalk=[0.2, 1], sucrose_delay=0, min_sstem_sucrose=693, min_sstem_sucrose_redn=10, tt_emerg_to_begcane=1500, tt_begcane_to_flowering=6000, tt_flowering_to_crop_end=2000, green_leaf_no=13, tillerf_leaf_size=[10, 1], tillerf_leaf_size_no=[1, 12]}
            {cultivar_name=M1356, leaf_size=[3000, 7000, 10000, 25000, 40000, 40000], leaf_size_no=[1, 4, 6, 10, 14, 20], cane_fraction=0.78, sucrose_fraction_stalk=[1, 0.57], stress_factor_stalk=[0.2, 1], sucrose_delay=0, min_sstem_sucrose=521, min_sstem_sucrose_redn=10, tt_emerg_to_begcane=1200, tt_begcane_to_flowering=6000, tt_flowering_to_crop_end=2000, green_leaf_no=13, tillerf_leaf_size=[6, 1], tillerf_leaf_size_no=[1, 12]}
            {cultivar_name=M1356_ratoon, leaf_size=[3000, 7000, 10000, 25000, 40000, 40000], leaf_size_no=[1, 4, 6, 10, 14, 20], cane_fraction=0.78, sucrose_fraction_stalk=[1, 0.57], stress_factor_stalk=[0.2, 1], sucrose_delay=0, min_sstem_sucrose=521, min_sstem_sucrose_redn=10, tt_emerg_to_begcane=1200, tt_begcane_to_flowering=6000, tt_flowering_to_crop_end=2000, green_leaf_no=13, tillerf_leaf_size=[10, 1], tillerf_leaf_size_no=[1, 12]}
            {cultivar_name=M55560, leaf_size=[3000, 7000, 10000, 35000, 50000, 50000], leaf_size_no=[1, 4, 6, 10, 14, 20], cane_fraction=0.7, sucrose_fraction_stalk=[1, 0.62], stress_factor_stalk=[0.2, 1], sucrose_delay=0, min_sstem_sucrose=775, min_sstem_sucrose_redn=10, tt_emerg_to_begcane=1300, tt_begcane_to_flowering=6000, tt_flowering_to_crop_end=2000, green_leaf_no=13, tillerf_leaf_size=[6, 1], tillerf_leaf_size_no=[1, 12]}
            {cultivar_name=M55560_ratoon, leaf_size=[3000, 7000, 10000, 35000, 50000, 50000], leaf_size_no=[1, 4, 6, 10, 14, 20], cane_fraction=0.7, sucrose_fraction_stalk=[1, 0.62], stress_factor_stalk=[0.2, 1], sucrose_delay=0, min_sstem_sucrose=775, min_sstem_sucrose_redn=10, tt_emerg_to_begcane=1300, tt_begcane_to_flowering=6000, tt_flowering_to_crop_end=2000, green_leaf_no=13, tillerf_leaf_size=[10, 1], tillerf_leaf_size_no=[1, 12]}
            {cultivar_name=q124, leaf_size=[1500, 55000, 55000], leaf_size_no=[1, 14, 20], cane_fraction=0.7, sucrose_fraction_stalk=[1, 0.55], stress_factor_stalk=[0.2, 1], sucrose_delay=0, min_sstem_sucrose=800, min_sstem_sucrose_redn=10, tt_emerg_to_begcane=1900, tt_begcane_to_flowering=6000, tt_flowering_to_crop_end=2000, green_leaf_no=13, tillerf_leaf_size=[1, 1, 1.5, 1, 1], tillerf_leaf_size_no=[1, 4, 10, 16, 26]}
            {cultivar_name=q124_ratoon, leaf_size=[1500, 55000, 55000], leaf_size_no=[1, 14, 20], cane_fraction=0.7, sucrose_fraction_stalk=[1, 0.55], stress_factor_stalk=[0.2, 1], sucrose_delay=0, min_sstem_sucrose=800, min_sstem_sucrose_redn=10, tt_emerg_to_begcane=1900, tt_begcane_to_flowering=6000, tt_flowering_to_crop_end=2000, green_leaf_no=13, tillerf_leaf_size=[1.5, 1.5, 1.5, 1, 1], tillerf_leaf_size_no=[1, 4, 10, 16, 26]}
        Memo
          ### Operations

          All irrigations are subsurface trickle irrigation, except for,

          1993-09-21 Irrigation.Apply(amount:50);    //NOT trickle

          nb. irrigation amounts and depths are in (mm)

          All fertiliser applications are subsurface fertigations, except for,

          1993-09-21 [Fertiliser].Apply(Amount:300, Type:Fertiliser.Types.UreaN, Depth:50);   //NOT fertigation

          nb. fertiliser amounts are in (kg/ha) and depths in (mm)
        Operations
          1993-09-21  [Sugarcane].SowNewPlant(PlantingDensity:10, Depth:150, CultivarName:"Q117_fum");
          1993-09-21  [Fertiliser].Apply(Amount:300, Type:Fertiliser.Types.UreaN, Depth:50);
          1993-09-21  [Irrigation].Apply(amount:50);
          1993-11-11  [Fertiliser].Apply(Amount:30, Type:Fertiliser.Types.NO3N, Depth:300);
          1993-12-11  [Fertiliser].Apply(Amount:30, Type:Fertiliser.Types.NO3N, Depth:300);
          1993-12-22  [Irrigation].Apply(amount:5.49, depth:300);
          1993-12-23  [Irrigation].Apply(amount:5.14, depth:300);
          1993-12-24  [Irrigation].Apply(amount:3.04, depth:300);
          1993-12-25  [Irrigation].Apply(amount:3.04, depth:300);
          1993-12-26  [Irrigation].Apply(amount:3.04, depth:300);
          1993-12-27  [Irrigation].Apply(amount:3.04, depth:300);
          1993-12-28  [Irrigation].Apply(amount:3.04, depth:300);
          1993-12-29  [Irrigation].Apply(amount:3.04, depth:300);
          1993-12-30  [Irrigation].Apply(amount:3.04, depth:300);
          1993-12-31  [Irrigation].Apply(amount:3.04, depth:300);
          1994-01-01  [Irrigation].Apply(amount:3.04, depth:300);
          1994-01-02  [Irrigation].Apply(amount:3.04, depth:300);
          1994-01-03  [Irrigation].Apply(amount:3.04, depth:300);
          1994-01-04  [Irrigation].Apply(amount:3.04, depth:300);
          1994-01-06  [Irrigation].Apply(amount:3.04, depth:300);
          1994-01-07  [Irrigation].Apply(amount:7.1, depth:300);
          1994-01-08  [Irrigation].Apply(amount:6.84, depth:300);
          1994-01-09  [Irrigation].Apply(amount:3.87, depth:300);
          1994-01-10  [Fertiliser].Apply(Amount:30, Type:Fertiliser.Types.NO3N, Depth:300);
          1994-01-10  [Irrigation].Apply(amount:3.87, depth:300);
          1994-01-11  [Irrigation].Apply(amount:3.34, depth:300);
          1994-01-12  [Irrigation].Apply(amount:11.27, depth:300);
          1994-01-13  [Irrigation].Apply(amount:10.01, depth:300);
          1994-01-14  [Irrigation].Apply(amount:10.01, depth:300);
          1994-01-15  [Irrigation].Apply(amount:10.43, depth:300);
          1994-01-16  [Irrigation].Apply(amount:10.43, depth:300);
          1994-01-17  [Irrigation].Apply(amount:10.43, depth:300);
          1994-01-18  [Irrigation].Apply(amount:11.08, depth:300);
          1994-01-19  [Irrigation].Apply(amount:8.02, depth:300);
          1994-01-20  [Irrigation].Apply(amount:8.02, depth:300);
          1994-01-26  [Irrigation].Apply(amount:8.1, depth:300);
          1994-01-27  [Irrigation].Apply(amount:8.1, depth:300);
          1994-01-28  [Irrigation].Apply(amount:8.1, depth:300);
          1994-01-29  [Irrigation].Apply(amount:6.77, depth:300);
          1994-01-30  [Irrigation].Apply(amount:6.77, depth:300);
          1994-01-31  [Irrigation].Apply(amount:6.77, depth:300);
          1994-02-01  [Irrigation].Apply(amount:6.77, depth:300);
          1994-02-02  [Irrigation].Apply(amount:3.17, depth:300);
          1994-02-03  [Irrigation].Apply(amount:3.17, depth:300);
          1994-02-04  [Irrigation].Apply(amount:3.17, depth:300);
          1994-02-05  [Irrigation].Apply(amount:3.17, depth:300);
          1994-02-06  [Irrigation].Apply(amount:3.17, depth:300);
          1994-02-07  [Irrigation].Apply(amount:3.37, depth:300);
          1994-02-08  [Irrigation].Apply(amount:3.37, depth:300);
          1994-02-09  [Fertiliser].Apply(Amount:30, Type:Fertiliser.Types.NO3N, Depth:300);
          1994-02-09  [Irrigation].Apply(amount:3.37, depth:300);
          1994-02-10  [Irrigation].Apply(amount:4.81, depth:300);
          1994-02-11  [Irrigation].Apply(amount:4.81, depth:300);
          1994-02-12  [Irrigation].Apply(amount:4.81, depth:300);
          1994-02-13  [Irrigation].Apply(amount:4.47, depth:300);
          1994-02-14  [Irrigation].Apply(amount:4.47, depth:300);
          1994-02-15  [Irrigation].Apply(amount:4.47, depth:300);
          1994-02-17  [Irrigation].Apply(amount:12.33, depth:300);
          1994-02-19  [Irrigation].Apply(amount:10.62, depth:300);
          1994-02-23  [Irrigation].Apply(amount:10.68, depth:300);
          1994-02-25  [Irrigation].Apply(amount:11.82, depth:300);
          1994-02-27  [Irrigation].Apply(amount:11.82, depth:300);
          1994-03-01  [Irrigation].Apply(amount:11.82, depth:300);
          1994-03-06  [Irrigation].Apply(amount:6.95, depth:300);
          1994-03-11  [Fertiliser].Apply(Amount:30, Type:Fertiliser.Types.NO3N, Depth:300);
          1994-03-11  [Irrigation].Apply(amount:16.31, depth:300);
          1994-04-05  [Irrigation].Apply(amount:0.35, depth:300);
          1994-04-10  [Fertiliser].Apply(Amount:30, Type:Fertiliser.Types.NO3N, Depth:300);
          1994-04-14  [Irrigation].Apply(amount:1.06, depth:300);
          1994-04-27  [Irrigation].Apply(amount:1.56, depth:300);
          1994-05-10  [Fertiliser].Apply(Amount:30, Type:Fertiliser.Types.NO3N, Depth:300);
          1994-05-10  [Irrigation].Apply(amount:0.91, depth:300);
          1994-05-11  [Irrigation].Apply(amount:0.17, depth:300);
          1994-05-12  [Irrigation].Apply(amount:0.17, depth:300);
          1994-05-13  [Irrigation].Apply(amount:0.17, depth:300);
          1994-05-14  [Irrigation].Apply(amount:0.17, depth:300);
          1994-05-15  [Irrigation].Apply(amount:0.17, depth:300);
          1994-05-16  [Irrigation].Apply(amount:0.17, depth:300);
          1994-05-17  [Irrigation].Apply(amount:0.17, depth:300);
          1994-05-18  [Irrigation].Apply(amount:0.17, depth:300);
          1994-05-19  [Irrigation].Apply(amount:1.03, depth:300);
          1994-05-20  [Irrigation].Apply(amount:1.03, depth:300);
          1994-05-22  [Irrigation].Apply(amount:3.76, depth:300);
          1994-05-24  [Irrigation].Apply(amount:3.76, depth:300);
          1994-05-26  [Irrigation].Apply(amount:1.32, depth:300);
          1994-05-28  [Irrigation].Apply(amount:1.32, depth:300);
          1994-05-30  [Irrigation].Apply(amount:1.32, depth:300);
          1994-06-01  [Irrigation].Apply(amount:4.29, depth:300);
          1994-06-03  [Irrigation].Apply(amount:4.29, depth:300);
          1994-06-05  [Irrigation].Apply(amount:4.29, depth:300);
          1994-06-07  [Irrigation].Apply(amount:3.96, depth:300);
          1994-06-09  [Fertiliser].Apply(Amount:30, Type:Fertiliser.Types.NO3N, Depth:300);
          1994-06-09  [Irrigation].Apply(amount:3.96, depth:300);
          1994-06-11  [Irrigation].Apply(amount:3.96, depth:300);
          1994-06-13  [Irrigation].Apply(amount:3.96, depth:300);
          1994-06-15  [Irrigation].Apply(amount:3.96, depth:300);
          1994-06-17  [Irrigation].Apply(amount:3.96, depth:300);
          1994-06-19  [Irrigation].Apply(amount:3.96, depth:300);
          1994-06-21  [Irrigation].Apply(amount:3.76, depth:300);
          1994-06-23  [Irrigation].Apply(amount:3.76, depth:300);
          1994-06-25  [Irrigation].Apply(amount:3.76, depth:300);
          1994-06-27  [Irrigation].Apply(amount:3.76, depth:300);
          1994-06-29  [Irrigation].Apply(amount:3.76, depth:300);
          1994-07-01  [Irrigation].Apply(amount:3.76, depth:300);
          1994-07-03  [Irrigation].Apply(amount:3.76, depth:300);
          1994-07-05  [Irrigation].Apply(amount:3.84, depth:300);
          1994-07-07  [Irrigation].Apply(amount:3.84, depth:300);
          1994-07-09  [Fertiliser].Apply(Amount:30, Type:Fertiliser.Types.NO3N, Depth:300);
          1994-07-09  [Irrigation].Apply(amount:3.84, depth:300);
          1994-07-11  [Irrigation].Apply(amount:3.84, depth:300);
          1994-07-13  [Irrigation].Apply(amount:3.84, depth:300);
          1994-07-15  [Irrigation].Apply(amount:3.84, depth:300);
          1994-07-17  [Irrigation].Apply(amount:3.84, depth:300);
          1994-07-19  [Irrigation].Apply(amount:3.84, depth:300);
          1994-07-21  [Irrigation].Apply(amount:2.07, depth:300);
          1994-07-25  [Irrigation].Apply(amount:12.13, depth:300);
          1994-07-26  [Irrigation].Apply(amount:4.35, depth:300);
          1994-07-28  [Irrigation].Apply(amount:5.38, depth:300);
          1994-07-30  [Irrigation].Apply(amount:5.38, depth:300);
          1994-08-01  [Irrigation].Apply(amount:5.38, depth:300);
          1994-08-04  [Irrigation].Apply(amount:1.02, depth:300);
          1994-09-14  [Irrigation].Apply(amount:9.01, depth:300);
          1994-09-15  [Irrigation].Apply(amount:13, depth:300);
          1994-09-22  [Irrigation].Apply(amount:13, depth:300);
          1994-09-27  [Irrigation].Apply(amount:14.22, depth:300);
          1994-09-29  [Irrigation].Apply(amount:12.87, depth:300);
          1994-10-01  [Irrigation].Apply(amount:14.22, depth:300);
          1994-10-03  [Irrigation].Apply(amount:12.87, depth:300);
          1994-10-05  [Irrigation].Apply(amount:10.98, depth:300);
          1994-10-07  [Irrigation].Apply(amount:13.4, depth:300);
          1994-10-08  [Irrigation].Apply(amount:12.06, depth:300);
          1994-10-09  [Irrigation].Apply(amount:10.34, depth:300);
          1994-10-15  [Irrigation].Apply(amount:13.4, depth:300);
          1994-10-16  [Irrigation].Apply(amount:12.12, depth:300);
          1994-10-17  [Irrigation].Apply(amount:10.83, depth:300);
          1994-10-21  [Irrigation].Apply(amount:8.59, depth:300);
          1994-10-22  [Irrigation].Apply(amount:8.07, depth:300);
          1994-10-23  [Irrigation].Apply(amount:7.76, depth:300);
          1994-10-28  [Irrigation].Apply(amount:9.42, depth:300);
          1994-10-29  [Irrigation].Apply(amount:8.1, depth:300);
          1994-10-30  [Irrigation].Apply(amount:6.8, depth:300);
          1994-11-04  [Irrigation].Apply(amount:6.09, depth:300);
          1994-11-05  [Irrigation].Apply(amount:5.82, depth:300);
          1994-11-06  [Irrigation].Apply(amount:5.36, depth:300);
          1994-11-11  [Irrigation].Apply(amount:5.5, depth:300);
          1994-11-12  [Irrigation].Apply(amount:9.92, depth:300);
          1994-11-13  [Irrigation].Apply(amount:4.39, depth:300);
          1994-11-18  [Irrigation].Apply(amount:7.59, depth:300);
          1994-11-19  [Irrigation].Apply(amount:7.54, depth:300);
          1994-11-20  [Irrigation].Apply(amount:7.46, depth:300);
          1994-11-25  [Irrigation].Apply(amount:7.35, depth:300);
          1994-11-26  [Irrigation].Apply(amount:7.27, depth:300);
          1994-11-27  [Irrigation].Apply(amount:7.19, depth:300);
          1994-12-01  [Irrigation].Apply(amount:9.82, depth:300);
          1994-12-02  [Irrigation].Apply(amount:7.99, depth:300);
          1994-12-03  [Irrigation].Apply(amount:5.48, depth:300);
          1994-12-08  [Irrigation].Apply(amount:9.56, depth:300);
          1994-12-09  [Irrigation].Apply(amount:9.29, depth:300);
          1994-12-10  [Irrigation].Apply(amount:7, depth:300);
          1994-12-22  [Irrigation].Apply(amount:11.85, depth:300);
          1994-12-23  [Irrigation].Apply(amount:11.27, depth:300);
          1994-12-24  [Irrigation].Apply(amount:9.83, depth:300);
          1995-01-03  [Irrigation].Apply(amount:11.85, depth:300);
          1995-01-04  [Irrigation].Apply(amount:11.88, depth:300);
          1995-01-05  [Irrigation].Apply(amount:11.1, depth:300);
          1995-01-09  [Irrigation].Apply(amount:11.57, depth:300);
          1995-01-10  [Irrigation].Apply(amount:11.16, depth:300);
          1995-01-11  [Irrigation].Apply(amount:11.07, depth:300);
          1995-01-15  [Sugarcane].LodgeTheCane();
          1995-01-24  [Irrigation].Apply(amount:10.99, depth:300);
          1995-01-25  [Irrigation].Apply(amount:9.39, depth:300);
          1995-01-27  [Irrigation].Apply(amount:9.03, depth:300);
          1995-01-29  [Irrigation].Apply(amount:8.63, depth:300);
          1995-01-31  [Irrigation].Apply(amount:8.36, depth:300);
          1995-02-01  [Irrigation].Apply(amount:6.18, depth:300);
          1995-02-02  [Irrigation].Apply(amount:0.9, depth:300);
          1995-02-03  [Irrigation].Apply(amount:5.14, depth:300);
          1995-02-05  [Irrigation].Apply(amount:4.81, depth:300);
          1995-02-06  [Irrigation].Apply(amount:5.86, depth:300);
          1995-02-07  [Irrigation].Apply(amount:4.76, depth:300);
          1995-02-08  [Irrigation].Apply(amount:5.06, depth:300);
          1995-02-09  [Irrigation].Apply(amount:5.16, depth:300);
          1995-02-12  [Irrigation].Apply(amount:4.96, depth:300);
          1995-03-03  [Irrigation].Apply(amount:0.52, depth:300);
          1995-03-14  [Irrigation].Apply(amount:9.5, depth:300);
          1995-03-17  [Irrigation].Apply(amount:5.03, depth:300);
          1995-03-21  [Irrigation].Apply(amount:3.26, depth:300);
          1995-03-22  [Irrigation].Apply(amount:3.23, depth:300);
          1995-03-23  [Irrigation].Apply(amount:3.22, depth:300);
          1995-03-24  [Irrigation].Apply(amount:3.34, depth:300);
          1995-03-25  [Irrigation].Apply(amount:3.23, depth:300);
          1995-03-26  [Irrigation].Apply(amount:3.16, depth:300);
          1995-03-27  [Irrigation].Apply(amount:3.34, depth:300);
          1995-03-28  [Irrigation].Apply(amount:4.67, depth:300);
          1995-04-01  [Irrigation].Apply(amount:5.27, depth:300);
          1995-04-03  [Irrigation].Apply(amount:5.27, depth:300);
          1995-04-04  [Irrigation].Apply(amount:5.31, depth:300);
          1995-04-05  [Irrigation].Apply(amount:5.22, depth:300);
          1995-04-06  [Irrigation].Apply(amount:4.36, depth:300);
          1995-04-07  [Irrigation].Apply(amount:4.36, depth:300);
          1995-04-08  [Irrigation].Apply(amount:4.36, depth:300);
          1995-04-09  [Irrigation].Apply(amount:4.36, depth:300);
          1995-04-10  [Irrigation].Apply(amount:4.36, depth:300);
          1995-04-11  [Irrigation].Apply(amount:5.39, depth:300);
          1995-04-13  [Irrigation].Apply(amount:5.39, depth:300);
          1995-04-15  [Irrigation].Apply(amount:5.39, depth:300);
          1995-07-25  [Irrigation].Apply(amount:3.1, depth:300);
          1995-07-27  [Irrigation].Apply(amount:3, depth:300);
          1995-07-29  [Irrigation].Apply(amount:3, depth:300);
          1995-07-31  [Irrigation].Apply(amount:3, depth:300);
          1995-08-02  [Irrigation].Apply(amount:3, depth:300);
          1995-08-04  [Irrigation].Apply(amount:3, depth:300);
          1995-08-06  [Irrigation].Apply(amount:3.1, depth:300);
          1995-08-08  [Irrigation].Apply(amount:3, depth:300);
          1995-08-10  [Irrigation].Apply(amount:3, depth:300);
          1995-08-12  [Irrigation].Apply(amount:3, depth:300);
          1995-08-14  [Irrigation].Apply(amount:3.1, depth:300);
          1995-08-16  [Irrigation].Apply(amount:3.1, depth:300);
          1995-08-18  [Irrigation].Apply(amount:3, depth:300);
          1995-08-20  [Irrigation].Apply(amount:3, depth:300);
          1995-08-22  [Irrigation].Apply(amount:3, depth:300);
          1995-08-24  [Irrigation].Apply(amount:3, depth:300);
          1995-08-26  [Irrigation].Apply(amount:3, depth:300);
          1995-08-28  [Irrigation].Apply(amount:3.1, depth:300);
          1995-08-30  [Irrigation].Apply(amount:3, depth:300);
          1995-09-01  [Irrigation].Apply(amount:3, depth:300);
          1995-09-03  [Irrigation].Apply(amount:3, depth:300);
          1995-09-05  [Irrigation].Apply(amount:3, depth:300);
          1995-09-30  [Sugarcane].HarvestCrop();
          1995-09-30  [Sugarcane].EndCrop();
        Report: EventNames=[Clock].DoReport
          VariableNames:
            [Clock].Today
            [Clock].Today.Year as year
            [Clock].Today.DayOfYear as day
            [Sugarcane].daysaftersowing as das
            [Sugarcane].crop_status as crop_status
            [Sugarcane].ratoon_no as ratoon_no
            [Fertiliser].NitrogenApplied as fertiliser
            [Irrigation].IrrigationApplied as irrigation
            [Weather].rain as rain
            [Sugarcane].canefw as canefw
            [Sugarcane].cane_wt as cane_wt
            [Sugarcane].sucrose_wt as sucrose_wt
            [Sugarcane].scmstf as scmstf
            [Sugarcane].ccs as ccs
            [Sugarcane].scmst as scmst
            [Sugarcane].biomass as biomass
            [Sugarcane].green_biomass as green_biomass
            [Sugarcane].leafgreenwt as leaf_wt
            [Sugarcane].cabbage_wt as cabbage_wt
            [Sugarcane].senescedwt as trash_wt
            [Sugarcane].lai as lai
            [Sugarcane].swdef_photo as swdef_photo
            [Sugarcane].nfact_photo as nfact_photo
            [Sugarcane].biomass_n as biomass_n
            [Sugarcane].green_biomass_n as green_biomass_n
            [Sugarcane].n_green[3] as cane_N
            [Sugarcane].n_green[2] as leaf_N
            [Sugarcane].n_green[4] as cab_N
            [Sugarcane].senescedn as trash_N
            [Sugarcane].n_conc_cane as n_conc_cane
            [Sugarcane].n_conc_leaf as n_conc_leaf
            [Sugarcane].n_conc_cab as n_conc_cab
            [Sugarcane].cane_dmf as cane_dmc
            [Nutrient].NO3.kgha as no3
            [Nutrient].NH4.kgha as nh4
  Folder Dataset 2 Ingham Qld Australia
    Simulation 2 Ingham 1992_93 Q117 P
      Weather: FileName=Ingham.met
      Clock: Start=1992-07-23; End=1993-10-21
      Summary summaryfile
      MicroClimate: a_interception=0; b_interception=1; c_interception=0; d_interception=0; soil_albedo=0.23; SoilHeatFluxFraction=0.4; MinimumHeightDiffForNewLayer=0; NightInterceptionFraction=0.5; ReferenceHeight=2
      Zone paddock: Area=1; Slope=0; AspectAngle=0; Altitude=50
        SurfaceOrganicMatter Surface Organic Matter: InitialResidueName=sugar_trash; InitialResidueType=Sugarcane; InitialResidueMass=100; InitialStandingFraction=1; InitialCPR=0; InitialCNR=80; FractionFaecesAdded=1
        Soil Macknade 923 P: Latitude=0; Longitude=0
          InitialWater Initial water: PercentMethod=0; FractionFull=1
          Physical
            Thickness  BD    AirDry  LL15  DUL   SAT
            200        1.15  0.05    0.16  0.28  0.45
            200        1.35  0.05    0.18  0.3   0.45
            200        1.4   0.05    0.2   0.32  0.45
            300        1.45  0.05    0.21  0.33  0.45
            300        1.45  0.05    0.24  0.36  0.45
            300        1.5   0.05    0.29  0.41  0.43
            300        1.5   0.05    0.29  0.41  0.43
            SoilCrop SugarcaneSoil: LL=[0.16, 0.18, 0.2, 0.21, 0.24, 0.29, 0.29]; KL=[0.1, 0.1, 0.1, 0.08, 0.08, 0.04, 0.04]; XF=[1, 1, 1, 1, 1, 1, 1]
          SoilWater: SummerDate=1-Nov; SummerU=4; SummerCona=3; WinterDate=1-Apr; WinterU=4; WinterCona=3; DiffusConst=40; DiffusSlope=16; Salb=0.1; CN2Bare=65; CNRed=20; CNCov=0.8; max_pond=0; Thickness=[200, 200, 200, 300, 300, 300, 300]; SWCON=[0.4, 0.4, 0.4, 0.4, 0.4, 0.4, 0.4]; PrecipitationInterception=0
          Organic: FOMCNRatio=70
            Thickness  Carbon  SoilCNRatio  FBiom  FInert  FOM
            200        1.3     11           0.06   0.3     17.157
            200        0.9     11           0.045  0.45    12.2935
            200        0.54    11           0.035  0.85    8.80868
            300        0.4     11           0.015  0.95    5.34273
            300        0.4     11           0.005  0.95    3.24053
            300        0.4     11           0.005  0.99    1.96548
            300        0.4     11           0.005  0.99    1.19212
          Chemical
            Thickness  NO3N  NH4N  PH
            200        2     1     6
            200        2     1     6
            200        1     1     6
            300        1     0.5   6
            300        1     0.5   6
            300        1     0.5   6
            300        1     0.5   6
          Sample Initial nitrogen: Thickness=[200, 200, 200, 300, 300, 300, 300]; SWUnits=Volumetric; OCUnits=Total; PHUnits=Water
          CERESSoilTemperature
          Nutrient: same as Dataset 1 Harwood NSW Australia.1 Harwood 1993_94 Q117 P.paddock.Harwood.Nutrient
        Fertiliser
        Irrigation
        Sugarcane: same as Dataset 1 Harwood NSW Australia.1 Harwood 1993_94 Q117 P.paddock.Sugarcane
        Memo
          ### Operations

          All operation irrigations are subsurface trickle irrigation except for the following two which were overhead portable lines.

          1992-09-09 Irrigation.Apply(amount:25);  // overhead portable lines

          1992-10-05 Irrigation.Apply(amount:25);  // overhead portable lines

          nb. irrigation amounts and depths are in (mm)
        Operations
          1992-07-23  [Sugarcane].SowNewPlant(PlantingDensity:10, Depth:100, CultivarName:"Q117_fum");
          1992-07-23  [Fertiliser].Apply(Amount:57.6, Type:Fertiliser.Types.NH4N, Depth:100);
          1992-09-09  [Irrigation].Apply(amount:25);
          1992-09-23  [Fertiliser].Apply(Amount:161, Type:Fertiliser.Types.NH4N, Depth:100);
          1992-10-05  [Irrigation].Apply(amount:25);
          1992-10-13  [Fertiliser].Apply(Amount:51.3, Type:Fertiliser.Types.NH4N, Depth:100);
          1992-10-27  [Irrigation].Apply(amount:36, depth:300);
          1992-11-06  [Irrigation].Apply(amount:36, depth:300);
          1992-11-13  [Irrigation].Apply(amount:36, depth:300);
          1992-11-20  [Irrigation].Apply(amount:36, depth:300);
          1992-11-27  [Irrigation].Apply(amount:36, depth:300);
          1992-12-04  [Irrigation].Apply(amount:36, depth:300);
          1992-12-11  [Fertiliser].Apply(Amount:75, Type:Fertiliser.Types.NH4N, Depth:100);
          1992-12-11  [Irrigation].Apply(amount:36, depth:300);
          1993-03-04  [Irrigation].Apply(amount:36, depth:300);
          1993-03-19  [Irrigation].Apply(amount:36, depth:300);
          1993-03-22  [Sugarcane].LodgeTheCane();
          1993-03-26  [Irrigation].Apply(amount:36, depth:300);
          1993-04-03  [Irrigation].Apply(amount:36, depth:300);
          1993-04-08  [Irrigation].Apply(amount:36, depth:300);
          1993-04-22  [Irrigation].Apply(amount:36, depth:300);
          1993-05-06  [Irrigation].Apply(amount:36, depth:300);
          1993-05-12  [Irrigation].Apply(amount:36, depth:300);
          1993-05-26  [Irrigation].Apply(amount:36, depth:300);
          1993-06-16  [Irrigation].Apply(amount:36, depth:300);
          1993-06-23  [Irrigation].Apply(amount:36, depth:300);
          1993-10-22  [Sugarcane].HarvestCrop();
          1993-10-22  [Sugarcane].EndCrop();
        Report: same as Dataset 1 Harwood NSW Australia.1 Harwood 1993_94 Q117 P.paddock.Report
  Folder Dataset 3 Ingham Qld Australia
    Simulation 3 Ingham 1992_93 Q117 1R
      Weather: FileName=Ingham.met
      Clock: Start=1992-08-26; End=1993-10-21
      Summary summaryfile
      MicroClimate: a_interception=0; b_interception=1; c_interception=0; d_interception=0; soil_albedo=0.23; SoilHeatFluxFraction=0.4; MinimumHeightDiffForNewLayer=0; NightInterceptionFraction=0.5; ReferenceHeight=2
      Zone paddock: Area=1; Slope=0; AspectAngle=0; Altitude=50
        SurfaceOrganicMatter Surface Organic Matter: InitialResidueName=sugar_trash; InitialResidueType=Sugarcane; InitialResidueMass=1000; InitialStandingFraction=1; InitialCPR=0; InitialCNR=80; FractionFaecesAdded=1
        Soil Macknade 923 1R: Latitude=0; Longitude=0
          InitialWater Initial water: PercentMethod=0; FractionFull=1
          Physical: same as Dataset 2 Ingham Qld Australia.2 Ingham 1992_93 Q117 P.paddock.Macknade 923 P.Physical
          SoilWater: same as Dataset 2 Ingham Qld Australia.2 Ingham 1992_93 Q117 P.paddock.Macknade 923 P.SoilWater
          Organic: FOMCNRatio=70
            Thickness  Carbon  SoilCNRatio  FBiom  FInert  FOM
            200        1.3     11           0.06   0.3     343.139
            200        0.9     11           0.045  0.45    245.87
            200        0.54    11           0.035  0.85    176.174
            300        0.4     11           0.015  0.95    106.855
            300        0.4     11           0.005  0.95    64.8106
            300        0.4     11           0.005  0.99    39.3096
            300        0.4     11           0.005  0.99    23.8425
          Chemical
            Thickness  NO3N  NH4N  PH
            200        2     1     6
            200        2     1     6
            200        1     1     6
            300        1     0.5   6
            300        1     0.5   6
            300        1     0.5   6
            300        1     0.5   6
          Sample Initial nitrogen: Thickness=[200, 200, 200, 300, 300, 300, 300]; SWUnits=Volumetric; OCUnits=Total; PHUnits=Water
          CERESSoilTemperature
          Nutrient: same as Dataset 1 Harwood NSW Australia.1 Harwood 1993_94 Q117 P.paddock.Harwood.Nutrient
        Fertiliser
        Irrigation
        Sugarcane: same as Dataset 1 Harwood NSW Australia.1 Harwood 1993_94 Q117 P.paddock.Sugarcane
        Memo
          ### Operations

          All operation irrigations are subsurface trickle irrigation except for the following two.

          1992-09-08 Irrigation.Apply(amount:25);  // overhead portable lines

          1992-10-02 Irrigation.Apply(amount:25);  // overhead portable lines
        Memo Memo2
          ### Operations Typo

          In the original validation dataset I noticed there was a typo with the three Surface Organic Matter Tillage commands,

          They are missing the word "tillage". This means these tillage events won't occur.

          1992-09-04  // 'Surface Organic Matter' type=chisel

          1992-09-04  // 'Surface Organic Matter' type=rip

          1992-09-04  // 'Surface Organic Matter' type=hoe
        Operations
          1992-08-26  [Sugarcane].SowRatoon(PlantingDensity:10, Depth:100, CultivarName:"Q117_fum", StartingRatoonNo:1);
          1992-09-04  [Fertiliser].Apply(Amount:56.2, Type:Fertiliser.Types.NH4N, Depth:100);
          1992-09-08  [Irrigation].Apply(amount:25);
          1992-09-23  [Fertiliser].Apply(Amount:161, Type:Fertiliser.Types.NH4N, Depth:100);
          1992-10-02  [Irrigation].Apply(amount:25);
          1992-10-13  [Fertiliser].Apply(Amount:51.3, Type:Fertiliser.Types.NH4N, Depth:100);
          1992-10-29  [Irrigation].Apply(amount:36, depth:300);
          1992-11-05  [Irrigation].Apply(amount:36, depth:300);
          1992-11-12  [Irrigation].Apply(amount:36, depth:300);
          1992-11-19  [Irrigation].Apply(amount:36, depth:300);
          1992-11-26  [Irrigation].Apply(amount:36, depth:300);
          1992-12-03  [Irrigation].Apply(amount:36, depth:300);
          1992-12-10  [Fertiliser].Apply(Amount:75, Type:Fertiliser.Types.NH4N, Depth:100);
          1992-12-10  [Irrigation].Apply(amount:36, depth:300);
          1993-03-18  [Irrigation].Apply(amount:36, depth:300);
          1993-03-25  [Irrigation].Apply(amount:36, depth:300);
          1993-04-02  [Irrigation].Apply(amount:36, depth:300);
          1993-04-07  [Irrigation].Apply(amount:36, depth:300);
          1993-04-21  [Irrigation].Apply(amount:36, depth:300);
          1993-05-04  [Sugarcane].LodgeTheCane();
          1993-05-07  [Irrigation].Apply(amount:36, depth:300);
          1993-05-13  [Irrigation].Apply(amount:36, depth:300);
          1993-05-27  [Irrigation].Apply(amount:36, depth:300);
          1993-06-17  [Irrigation].Apply(amount:36, depth:300);
          1993-06-24  [Irrigation].Apply(amount:36, depth:300);
          1993-10-22  [Sugarcane].HarvestCrop();
          1993-10-22  [Sugarcane].EndCrop();
        Report: same as Dataset 1 Harwood NSW Australia.1 Harwood 1993_94 Q117 P.paddock.Report
  Folder Dataset 5 Ayr Qld Australia
    Simulation 5 Ayr 1991_92 Q96 P
      Weather: FileName=Ayr.met
      Clock: Start=1991-04-19; End=1992-07-07
      Summary summaryfile
      MicroClimate: a_interception=0; b_interception=1; c_interception=0; d_interception=0; soil_albedo=0.23; SoilHeatFluxFraction=0.4; MinimumHeightDiffForNewLayer=0; NightInterceptionFraction=0.5; ReferenceHeight=2
      Zone paddock: Area=1; Slope=0; AspectAngle=0; Altitude=50
        SurfaceOrganicMatter Surface Organic Matter: InitialResidueName=sugar_trash; InitialResidueType=Sugarcane; InitialResidueMass=100; InitialStandingFraction=1; InitialCPR=0; InitialCNR=80; FractionFaecesAdded=1
        Soil Zanetti 912: Latitude=0; Longitude=0
          InitialWater Initial water: PercentMethod=0; FractionFull=1
          Physical
            Thickness  BD    AirDry  LL15  DUL   SAT
            200        1.2   0.05    0.18  0.33  0.45
            200        1.25  0.05    0.2   0.35  0.45
            200        1.3   0.05    0.21  0.37  0.45
            300        1.35  0.05    0.24  0.37  0.45
            300        1.4   0.05    0.24  0.36  0.45
            300        1.45  0.05    0.22  0.32  0.45
            SoilCrop SugarcaneSoil: LL=[0.18, 0.2, 0.21, 0.24, 0.24, 0.22]; KL=[0.1, 0.1, 0.1, 0.08, 0.08, 0.04]; XF=[1, 1, 1, 1, 1, 1]
          SoilWater: same as Dataset 1 Harwood NSW Australia.1 Harwood 1993_94 Q117 P.paddock.Harwood.SoilWater
          Organic: FOMCNRatio=70
            Thickness  Carbon  SoilCNRatio  FBiom  FInert  FOM
            200        0.8     11           0.04   0.5     19.411
            200        0.6     11           0.03   0.66    13.0116
            200        0.4     11           0.02   0.95    8.72194
            300        0.4     11           0.015  0.95    4.7867
            300        0.4     11           0.005  0.95    2.627
            300        0.4     11           0.005  0.99    1.44173
          Chemical
            Thickness  NO3N  NH4N  PH
            200        2     1     6
            200        2     1     6
            200        1     1     6
            300        1     0.5   6
            300        1     0.5   6
            300        1     0.5   6
          Sample Initial nitrogen: Thickness=[200, 200, 200, 300, 300, 300]; SWUnits=Volumetric; OCUnits=Total; PHUnits=Water
          CERESSoilTemperature
          Nutrient: same as Dataset 1 Harwood NSW Australia.1 Harwood 1993_94 Q117 P.paddock.Harwood.Nutrient
        Fertiliser
        Irrigation
        Sugarcane: same as Dataset 1 Harwood NSW Australia.1 Harwood 1993_94 Q117 P.paddock.Sugarcane
        Memo
          ### Operations

          All operation irrigations are furrow with 3.46ppm NO3 (10 kg/ha) in irrig water added in irrigation

          Unfortunately solute in irrigations is not possible in ApsimX yet.
        Operations
          1991-04-19  [Sugarcane].SowNewPlant(PlantingDensity:10, Depth:150, CultivarName:"Q96");
          1991-04-19  [Fertiliser].Apply(Amount:33, Type:Fertiliser.Types.NH4N, Depth:100);
          1991-04-24  [Irrigation].Apply(amount:200);
          1991-07-15  [Irrigation].Apply(amount:200);
          1991-07-29  [Fertiliser].Apply(Amount:64, Type:Fertiliser.Types.NH4N, Depth:100);
          1991-08-19  [Fertiliser].Apply(Amount:155, Type:Fertiliser.Types.NH4N, Depth:100);
          1991-10-01  [Sugarcane].HillUpTheSoil(CaneFr:1.0, TopsFr:0.50);
          1991-10-06  [Irrigation].Apply(amount:200);
          1991-10-24  [Irrigation].Apply(amount:200);
          1991-11-03  [Irrigation].Apply(amount:200);
          1991-11-14  [Irrigation].Apply(amount:200);
          1991-12-08  [Irrigation].Apply(amount:200);
          1992-01-01  [Irrigation].Apply(amount:200);
          1992-01-11  [Irrigation].Apply(amount:200);
          1992-01-18  [Irrigation].Apply(amount:200);
          1992-01-30  [Irrigation].Apply(amount:200);
          1992-02-19  [Irrigation].Apply(amount:200);
          1992-03-04  [Sugarcane].LodgeTheCane();
          1992-03-12  [Irrigation].Apply(amount:200);
          1992-03-24  [Irrigation].Apply(amount:200);
          1992-04-04  [Irrigation].Apply(amount:200);
          1992-04-26  [Irrigation].Apply(amount:200);
          1992-05-09  [Irrigation].Apply(amount:200);
          1992-07-08  [Sugarcane].HarvestCrop();
          1992-07-08  [Sugarcane].EndCrop();
        Report: same as Dataset 1 Harwood NSW Australia.1 Harwood 1993_94 Q117 P.paddock.Report
  Folder Dataset 6 Ayr Qld Australia
    Simulation 6 Ayr 1993_94 Q117 1R
      Weather: FileName=Ayr.met
      Clock: Start=1993-07-31; End=1994-08-09
      Summary summaryfile
      MicroClimate: a_interception=0; b_interception=1; c_interception=0; d_interception=0; soil_albedo=0.23; SoilHeatFluxFraction=0.4; MinimumHeightDiffForNewLayer=0; NightInterceptionFraction=0.5; ReferenceHeight=2
      Zone paddock: Area=1; Slope=0; AspectAngle=0; Altitude=50
        SurfaceOrganicMatter Surface Organic Matter: InitialResidueName=sugar_trash; InitialResidueType=Sugarcane; InitialResidueMass=100; InitialStandingFraction=1; InitialCPR=0; InitialCNR=80; FractionFaecesAdded=1
        Soil Zanetti 934: Latitude=0; Longitude=0
          InitialWater Initial water: PercentMethod=1; FractionFull=0.2
          Physical: same as Dataset 5 Ayr Qld Australia.5 Ayr 1991_92 Q96 P.paddock.Zanetti 912.Physical
          SoilWater: same as Dataset 1 Harwood NSW Australia.1 Harwood 1993_94 Q117 P.paddock.Harwood.SoilWater
          Organic: FOMCNRatio=70
            Thickness  Carbon  SoilCNRatio  FBiom  FInert  FOM
            200        1.3     11           0.04   0.4     388.221
            200        1       11           0.03   0.5     260.232
            200        0.8     11           0.02   0.75    174.439
            300        0.8     11           0.015  0.85    95.734
            300        0.7     11           0.005  0.9     52.5399
            300        0.6     11           0.005  0.95    28.8345
          Chemical
            Thickness  NO3N  NH4N  PH
            200        2     1     6
            200        2     1     6
            200        1     1     6
            300        1     0.5   6
            300        1     0.5   6
            300        1     0.5   6
          Sample Initial nitrogen: Thickness=[200, 200, 200, 300, 300, 300]; SWUnits=Volumetric; OCUnits=Total; PHUnits=Water
          CERESSoilTemperature
          Nutrient: same as Dataset 1 Harwood NSW Australia.1 Harwood 1993_94 Q117 P.paddock.Harwood.Nutrient
        Fertiliser
        Irrigation
        Sugarcane: same as Dataset 1 Harwood NSW Australia.1 Harwood 1993_94 Q117 P.paddock.Sugarcane
        Memo
          ### Operations

          All operation irrigations are furrow with 3.46ppm NO3 (10 kg/ha) in irrig water added in irrigation

          Unfortunately solute in irrigations is not possible in ApsimX yet.
        Operations
          1993-07-31  [SurfaceOrganicMatter].Incorporate(fraction: 1.0, depth:200);
          1993-08-01  [Sugarcane].SowRatoon(PlantingDensity:10, Depth:150, CultivarName:"Q117", StartingRatoonNo:1);
          1993-09-07  [Fertiliser].Apply(Amount:284, Type:Fertiliser.Types.UreaN, Depth:100);
          1993-09-07  [SurfaceOrganicMatter].Incorporate(fraction: 0.3, depth:80);
          1993-10-04  [Irrigation].Apply(amount:289);
          1993-10-29  [Irrigation].Apply(amount:289);
          1993-11-13  [Irrigation].Apply(amount:289);
          1993-11-23  [Irrigation].Apply(amount:289);
          1993-12-05  [Irrigation].Apply(amount:289);
          1993-12-24  [Irrigation].Apply(amount:289);
          1994-01-03  [Irrigation].Apply(amount:289);
          1994-01-15  [Irrigation].Apply(amount:289);
          1994-01-23  [Irrigation].Apply(amount:289);
          1994-02-23  [Irrigation].Apply(amount:289);
          1994-03-20  [Irrigation].Apply(amount:289);
          1994-04-03  [Irrigation].Apply(amount:289);
          1994-04-13  [Irrigation].Apply(amount:289);
          1994-04-19  [Sugarcane].LodgeTheCane();
          1994-05-02  [Irrigation].Apply(amount:289);
          1994-05-13  [Irrigation].Apply(amount:289);
          1994-05-31  [Irrigation].Apply(amount:289);
          1994-07-03  [Irrigation].Apply(amount:289);
          1994-08-10  [Sugarcane].HarvestCrop();
          1994-08-10  [Sugarcane].EndCrop();
        Report: same as Dataset 1 Harwood NSW Australia.1 Harwood 1993_94 Q117 P.paddock.Report
  Folder Dataset 7 Pongola Natal South Africa
    Simulation 7 Pongola 1986_87 N14 P
      Weather: FileName=Pongola.met
      Clock: Start=1986-11-12; End=1987-10-11
      Summary summaryfile
      MicroClimate: a_interception=0; b_interception=1; c_interception=0; d_interception=0; soil_albedo=0.23; SoilHeatFluxFraction=0.4; MinimumHeightDiffForNewLayer=0; NightInterceptionFraction=0.5; ReferenceHeight=2
      Zone paddock: Area=1; Slope=0; AspectAngle=0; Altitude=50
        SurfaceOrganicMatter Surface Organic Matter: InitialResidueName=sugar_trash; InitialResidueType=Sugarcane; InitialResidueMass=100; InitialStandingFraction=1; InitialCPR=0; InitialCNR=80; FractionFaecesAdded=1
        Soil Pongola 867 P: Latitude=0; Longitude=0
          InitialWater Initial water: PercentMethod=0; FractionFull=1
          Physical
            Thickness  BD    AirDry  LL15   DUL    SAT
            50         1.39  0.05    0.101  0.261  0.368
            120        1.39  0.05    0.101  0.261  0.368
            150        1.39  0.05    0.101  0.261  0.368
            150        1.43  0.05    0.16   0.282  0.371
            150        1.43  0.05    0.16   0.282  0.371
            300        1.34  0.05    0.15   0.304  0.399
            300        1.34  0.05    0.15   0.304  0.399
            300        1.34  0.05    0.15   0.304  0.399
            300        1.34  0.05    0.15   0.304  0.399
            300        1.34  0.05    0.15   0.304  0.399
            SoilCrop SugarcaneSoil
              LL=[0.101, 0.101, 0.101, 0.16, 0.16, 0.15, 0.15, 0.15, 0.15, 0.15]
              KL=[0.1, 0.1, 0.1, 0.1, 0.1, 0.08, 0.08, 0.04, 0.04, 0.04]
              XF=[1, 1, 1, 1, 1, 1, 1, 1, 1, 1]
          SoilWater: SummerDate=1-Nov; SummerU=9; SummerCona=3; WinterDate=1-Apr; WinterU=9; WinterCona=3; DiffusConst=40; DiffusSlope=16; Salb=0.13; CN2Bare=46; CNRed=20; CNCov=0.8; max_pond=0; Thickness=[50, 120, 150, 150, 150, 300, 300, 300, 300, 300]; SWCON=[0.8, 0.8, 0.8, 0.8, 0.8, 0.8, 0.8, 0.8, 0.8, 0.8]; PrecipitationInterception=0
          Organic: FOMCNRatio=70
            Thickness  Carbon  SoilCNRatio  FBiom  FInert  FOM
            50         1.3     13           0.04   0.4     11.7164
            120        1       13           0.02   0.5     9.88655
            150        0.8     13           0.01   0.75    7.99576
            150        0.8     13           0.01   0.85    6.46658
            150        0.7     13           0.005  0.9     5.22985
            300        0.6     13           0.005  0.95    3.42073
            300        0.2     13           0.001  0.99    2.23743
            300        0.2     13           0.001  0.99    1.46345
            300        0.2     13           0.001  0.99    0.957212
            300        0.2     13           0.001  0.99    0.626091
          Chemical
            Thickness  NO3N      NH4N      PH
            50         1.99982   0.999876  6
            120        2.00006   1.00002   6
            150        1.00006   1.00006   6
            150        1         0.499995  6
            150        0.999961  0.499996  6
            300        0.999998  0.499996  6
            300        0.999999  0.499997  5
            300        0.999999  0.499998  5
            300        0.999999  0.499999  5
            300        1         0.499999  5
          Sample Initial nitrogen: Thickness=[50, 120, 150, 150, 150, 300, 300, 300, 300, 300]; SWUnits=Volumetric; OCUnits=Total; PHUnits=Water
          CERESSoilTemperature
          Nutrient: same as Dataset 1 Harwood NSW Australia.1 Harwood 1993_94 Q117 P.paddock.Harwood.Nutrient
        Fertiliser
        Irrigation
        Sugarcane: same as Dataset 1 Harwood NSW Australia.1 Harwood 1993_94 Q117 P.paddock.Sugarcane
        Memo
          ### Operations

          This simulation should have automatic irrigation turned on,

          with a depth to calculate Available Soil Water set to 1000mm
          and Available Soil Water below which irrigation is applied set to 0.8
          Efficiency of irrigation set to 1
          and no allocation limit.

          However Automatic Irrigations are not possible in ApsimX yet.
        Operations
          1986-11-12  [Sugarcane].SowNewPlant(PlantingDensity:10, Depth:150, CultivarName:"N14");
          1986-11-12  [Fertiliser].Apply(Amount:53, Type:Fertiliser.Types.NO3N, Depth:50);
          1986-12-19  [Fertiliser].Apply(Amount:32, Type:Fertiliser.Types.NO3N, Depth:50);
          1987-10-12  [Sugarcane].HarvestCrop();
          1987-10-12  [Sugarcane].EndCrop();
        Report: same as Dataset 1 Harwood NSW Australia.1 Harwood 1993_94 Q117 P.paddock.Report
  Folder Dataset 8 Bundaberg Qld Australia
    Simulation 8a Bundaberg 1992_94 CP51_21 1R_0N and 2R_0N
      Weather: FileName=Bundaberg.met
      Clock: Start=1992-08-26; End=1994-05-30
      Summary summaryfile
      MicroClimate: a_interception=0; b_interception=1; c_interception=0; d_interception=0; soil_albedo=0.23; SoilHeatFluxFraction=0.4; MinimumHeightDiffForNewLayer=0; NightInterceptionFraction=0.5; ReferenceHeight=2
      Zone paddock: Area=1; Slope=0; AspectAngle=0; Altitude=50
        SurfaceOrganicMatter Surface Organic Matter: InitialResidueName=sugar_trash; InitialResidueType=Sugarcane; InitialResidueMass=1000; InitialStandingFraction=1; InitialCPR=0; InitialCNR=80; FractionFaecesAdded=1
        Soil Schulte: Latitude=0; Longitude=0
          Physical
            Thickness  BD     AirDry  LL15   DUL   SAT
            200        1.574  0.05    0.111  0.23  0.35
            200        1.649  0.1     0.111  0.23  0.35
            200        1.771  0.1     0.111  0.23  0.33
            300        1.698  0.1     0.17   0.3   0.35
            300        1.58   0.1     0.25   0.37  0.4
            150        1.601  0.1     0.25   0.37  0.396
            150        1.601  0.1     0.25   0.37  0.396
            SoilCrop SugarcaneSoil: LL=[0.111, 0.111, 0.111, 0.117, 0.3, 0.33, 0.33]; KL=[0.1, 0.1, 0.1, 0.08, 0.08, 0.04, 0.04]; XF=[1, 1, 1, 1, 1, 1, 1]
          SoilWater: SummerDate=1-Nov; SummerU=4; SummerCona=2; WinterDate=1-Apr; WinterU=4; WinterCona=2; DiffusConst=88; DiffusSlope=35; Salb=0.2; CN2Bare=85; CNRed=20; CNCov=0.8; max_pond=0; Thickness=[200, 200, 200, 300, 300, 150, 150]; SWCON=[0.2, 0.2, 0.2, 0.3, 0.3, 0.3, 0.3]; PrecipitationInterception=0
          Organic: FOMCNRatio=70
            Thickness  Carbon  SoilCNRatio  FBiom  FInert  FOM
            200        0.8     17           0.03   0.5     373.676
            200        0.5     17           0.015  0.6     250.483
            200        0.34    17           0.015  0.7     167.904
            300        0.34    17           0.01   0.8     92.1474
            300        0.26    17           0.01   0.95    50.5716
            150        0.26    17           0.01   0.95    37.4643
            150        0.26    17           0.01   0.95    27.7543
          Chemical
            Thickness  NO3N      NH4N     PH
            200        0.479935  3.28998  7
            200        1.34988   2.95     7
            200        0.479986  2.75003  7
            300        1.01996   2.48004  7
            300        8.40994   2.61002  7
            150        14.12     2.48004  7
            150        14.12     2.48002  7
          Sample Initial nitrogen: Thickness=[200, 200, 200, 300, 300, 150, 150]; SWUnits=Volumetric; OCUnits=Total; PHUnits=Water
          Sample Initial water: Thickness=[200, 200, 200, 300, 300, 150, 150]; SW=[0.123, 0.136, 0.159, 0.188, 0.299, 0.337, 0.337]; SWUnits=Volumetric; OCUnits=Total; PHUnits=Water
          CERESSoilTemperature
          Nutrient: same as Dataset 1 Harwood NSW Australia.1 Harwood 1993_94 Q117 P.paddock.Harwood.Nutrient
        Fertiliser
        Irrigation
        Sugarcane: same as Dataset 1 Harwood NSW Australia.1 Harwood 1993_94 Q117 P.paddock.Sugarcane
        Memo
          ### Operations

          All operation irrigations are Overhead, high pressure gun
        Operations
          1992-08-26  [Sugarcane].SowRatoon(PlantingDensity:10, Depth:100, CultivarName:"CP51", StartingRatoonNo:1);
          1992-11-16  [Irrigation].Apply(amount:57.2);
          1993-01-28  [Irrigation].Apply(amount:70.4);
          1993-02-20  [Irrigation].Apply(amount:52.4);
          1993-03-03  [Irrigation].Apply(amount:52.4);
          1993-03-26  [Irrigation].Apply(amount:53.6);
          1993-04-05  [Irrigation].Apply(amount:69.0);
          1993-04-29  [Irrigation].Apply(amount:69.0);
          1993-05-15  [Irrigation].Apply(amount:55.0);
          1993-07-06  [Sugarcane].HarvestCrop();
          1994-02-04  [Irrigation].Apply(amount:46.9);
          1994-02-17  [Irrigation].Apply(amount:26.1);
          1994-03-01  [Irrigation].Apply(amount:26.1);
          1994-03-20  [Irrigation].Apply(amount:28.6);
          1994-04-12  [Irrigation].Apply(amount:36.6);
          1994-05-11  [Irrigation].Apply(amount:36.6);
          1994-05-31  [Sugarcane].HarvestCrop();
          1994-05-31  [Sugarcane].EndCrop();
        Report: same as Dataset 1 Harwood NSW Australia.1 Harwood 1993_94 Q117 P.paddock.Report
    Simulation 8b Bundaberg 1992_94 CP51_21 1R_340N and 2R_0N
      Weather: FileName=Bundaberg.met
      Clock: Start=1992-08-26; End=1994-05-30
      Summary summaryfile
      MicroClimate: a_interception=0; b_interception=1; c_interception=0; d_interception=0; soil_albedo=0.23; SoilHeatFluxFraction=0.4; MinimumHeightDiffForNewLayer=0; NightInterceptionFraction=0.5; ReferenceHeight=2
      Zone paddock: Area=1; Slope=0; AspectAngle=0; Altitude=50
        SurfaceOrganicMatter Surface Organic Matter: InitialResidueName=sugar_trash; InitialResidueType=Sugarcane; InitialResidueMass=1000; InitialStandingFraction=1; InitialCPR=0; InitialCNR=80; FractionFaecesAdded=1
        Soil Schulte: Latitude=0; Longitude=0
          Physical: same as Dataset 8 Bundaberg Qld Australia.8a Bundaberg 1992_94 CP51_21 1R_0N and 2R_0N.paddock.Schulte.Physical
          SoilWater: same as Dataset 8 Bundaberg Qld Australia.8a Bundaberg 1992_94 CP51_21 1R_0N and 2R_0N.paddock.Schulte.SoilWater
          Organic: same as Dataset 8 Bundaberg Qld Australia.8a Bundaberg 1992_94 CP51_21 1R_0N and 2R_0N.paddock.Schulte.Organic
          Chemical
            Thickness  NO3N      NH4N     PH
            200        0.479935  3.28998  7
            200        1.34988   2.95     7
            200        0.479986  2.75003  7
            300        1.01996   2.48004  7
            300        8.40994   2.61002  7
            150        14.12     2.48004  7
            150        14.12     2.48002  7
          Sample Initial nitrogen: Thickness=[200, 200, 200, 300, 300, 150, 150]; SWUnits=Volumetric; OCUnits=Total; PHUnits=Water
          Sample Initial water: Thickness=[200, 200, 200, 300, 300, 150, 150]; SW=[0.123, 0.136, 0.159, 0.188, 0.299, 0.337, 0.337]; SWUnits=Volumetric; OCUnits=Total; PHUnits=Water
          CERESSoilTemperature
          Nutrient: same as Dataset 1 Harwood NSW Australia.1 Harwood 1993_94 Q117 P.paddock.Harwood.Nutrient
        Fertiliser
        Irrigation
        Sugarcane: same as Dataset 1 Harwood NSW Australia.1 Harwood 1993_94 Q117 P.paddock.Sugarcane
        Memo
          ### Operations

          All operation irrigations are Overhead, high pressure gun
        Operations
          1992-08-26  [Sugarcane].SowRatoon(PlantingDensity:10, Depth:100, CultivarName:"CP51", StartingRatoonNo:1);
          1992-10-27  [Fertiliser].Apply(Amount:340, Type:Fertiliser.Types.UreaN, Depth:50);
          1992-11-16  [Irrigation].Apply(amount:57.2);
          1993-01-28  [Irrigation].Apply(amount:70.4);
          1993-02-20  [Irrigation].Apply(amount:52.4);
          1993-03-03  [Irrigation].Apply(amount:52.4);
          1993-03-26  [Irrigation].Apply(amount:53.6);
          1993-04-05  [Irrigation].Apply(amount:69.0);
          1993-04-29  [Irrigation].Apply(amount:69.0);
          1993-05-15  [Irrigation].Apply(amount:55.0);
          1993-07-06  [Sugarcane].HarvestCrop();
          1994-02-04  [Irrigation].Apply(amount:46.9);
          1994-02-17  [Irrigation].Apply(amount:26.1);
          1994-03-01  [Irrigation].Apply(amount:26.1);
          1994-03-20  [Irrigation].Apply(amount:28.6);
          1994-04-12  [Irrigation].Apply(amount:36.6);
          1994-05-11  [Irrigation].Apply(amount:36.6);
          1994-05-31  [Sugarcane].HarvestCrop();
          1994-05-31  [Sugarcane].EndCrop();
        Report: same as Dataset 1 Harwood NSW Australia.1 Harwood 1993_94 Q117 P.paddock.Report
    Simulation 8c Bundaberg 1992_94 CP51_21 1R_340N and 2R_170N
      Weather: FileName=Bundaberg.met
      Clock: Start=1992-08-26; End=1994-05-30
      Summary summaryfile
      MicroClimate: a_interception=0; b_interception=1; c_interception=0; d_interception=0; soil_albedo=0.23; SoilHeatFluxFraction=0.4; MinimumHeightDiffForNewLayer=0; NightInterceptionFraction=0.5; ReferenceHeight=2
      Zone paddock: Area=1; Slope=0; AspectAngle=0; Altitude=50
        SurfaceOrganicMatter Surface Organic Matter: InitialResidueName=sugar_trash; InitialResidueType=Sugarcane; InitialResidueMass=1000; InitialStandingFraction=1; InitialCPR=0; InitialCNR=80; FractionFaecesAdded=1
        Soil Schulte: same as Dataset 8 Bundaberg Qld Australia.8b Bundaberg 1992_94 CP51_21 1R_340N and 2R_0N.paddock.Schulte
        Fertiliser
        Irrigation
        Sugarcane: same as Dataset 1 Harwood NSW Australia.1 Harwood 1993_94 Q117 P.paddock.Sugarcane
        Memo
          ### Operations

          All operation irrigations are Overhead, high pressure gun
        Operations
          1992-08-26  [Sugarcane].SowRatoon(PlantingDensity:10, Depth:100, CultivarName:"CP51", StartingRatoonNo:1);
          1992-10-27  [Fertiliser].Apply(Amount:340, Type:Fertiliser.Types.UreaN, Depth:50);
          1992-11-16  [Irrigation].Apply(amount:57.2);
          1993-01-28  [Irrigation].Apply(amount:70.4);
          1993-02-20  [Irrigation].Apply(amount:52.4);
          1993-03-03  [Irrigation].Apply(amount:52.4);
          1993-03-26  [Irrigation].Apply(amount:53.6);
          1993-04-05  [Irrigation].Apply(amount:69.0);
          1993-04-29  [Irrigation].Apply(amount:69.0);
          1993-05-15  [Irrigation].Apply(amount:55.0);
          1993-07-06  [Sugarcane].HarvestCrop();
          1993-10-12  [Fertiliser].Apply(Amount:170, Type:Fertiliser.Types.UreaN, Depth:50);
          1994-02-04  [Irrigation].Apply(amount:46.9);
          1994-02-17  [Irrigation].Apply(amount:26.1);
          1994-03-01  [Irrigation].Apply(amount:26.1);
          1994-03-20  [Irrigation].Apply(amount:28.6);
          1994-04-12  [Irrigation].Apply(amount:36.6);
          1994-05-11  [Irrigation].Apply(amount:36.6);
          1994-05-31  [Sugarcane].HarvestCrop();
          1994-05-31  [Sugarcane].EndCrop();
        Report: same as Dataset 1 Harwood NSW Australia.1 Harwood 1993_94 Q117 P.paddock.Report
  Folder Dataset 9 Bambaroo Qld Australia
    Simulation 9a Bambaroo 1995_96 Q124 P Fully Irrigated
      Weather: FileName=Bambaroo.met
      Clock: Start=1995-07-06; End=1996-08-26
      Summary summaryfile
      MicroClimate: a_interception=0; b_interception=1; c_interception=0; d_interception=0; soil_albedo=0.23; SoilHeatFluxFraction=0.4; MinimumHeightDiffForNewLayer=0; NightInterceptionFraction=0.5; ReferenceHeight=2
      Zone paddock: Area=1; Slope=0; AspectAngle=0; Altitude=50
        SurfaceOrganicMatter Surface Organic Matter: InitialResidueName=sugar_trash; InitialResidueType=Sugarcane; InitialResidueMass=100; InitialStandingFraction=1; InitialCPR=0; InitialCNR=80; FractionFaecesAdded=1
        Soil Pace: Latitude=0; Longitude=0
          Physical
            Thickness  BD   AirDry  LL15  DUL   SAT
            100        1.3  0.05    0.26  0.42  0.46
            200        1.3  0.1     0.26  0.42  0.46
            300        1.3  0.1     0.26  0.42  0.46
            300        1.3  0.1     0.26  0.42  0.46
            300        1.3  0.1     0.26  0.42  0.46
            600        1.3  0.1     0.26  0.42  0.46
            SoilCrop SugarcaneSoil: LL=[0.26, 0.26, 0.26, 0.26, 0.26, 0.26]; KL=[0.1, 0.1, 0.1, 0.08, 0.08, 0.04]; XF=[1, 1, 1, 1, 1, 1]
          SoilWater: SummerDate=1-Nov; SummerU=6; SummerCona=3; WinterDate=1-Apr; WinterU=6; WinterCona=3; DiffusConst=40; DiffusSlope=16; Salb=0.1; CN2Bare=78; CNRed=20; CNCov=0.8; max_pond=0; Thickness=[100, 200, 300, 300, 300, 600]; SWCON=[0.3, 0.3, 0.3, 0.3, 0.3, 0.3]; PrecipitationInterception=0
          Organic: FOMCNRatio=70
            Thickness  Carbon  SoilCNRatio  FBiom  FInert  FOM
            100        1.3     13           0.03   0.4     18.9867
            200        1       13           0.015  0.5     13.6046
            300        0.8     13           0.01   0.75    8.25158
            300        0.8     13           0.01   0.85    5.00484
            300        0.7     13           0.005  0.9     3.03559
            600        0.6     13           0.005  0.95    1.11673
          Chemical
            Thickness  NO3N  NH4N  PH
            100        2     1     6
            200        2     1     6
            300        1     1     6
            300        1     0.5   6
            300        1     0.5   6
            600        1     0.5   6
          Sample Initial nitrogen: Thickness=[100, 200, 300, 300, 300, 600]; SWUnits=Volumetric; OCUnits=Total; PHUnits=Water
          Sample Initial water: Thickness=[100, 200, 300, 300, 300, 600]; SW=[0.24, 0.34, 0.4, 0.4, 0.4, 0.4]; SWUnits=Volumetric; OCUnits=Total; PHUnits=Water
          CERESSoilTemperature
          Nutrient: same as Dataset 1 Harwood NSW Australia.1 Harwood 1993_94 Q117 P.paddock.Harwood.Nutrient
        Fertiliser
        Irrigation
        Sugarcane: same as Dataset 1 Harwood NSW Australia.1 Harwood 1993_94 Q117 P.paddock.Sugarcane
        Memo
          ### Operations

          All operation irrigations are subsurface trickle irrigation unless stated otherwise in the comments of an operation item.
        Operations
          1995-07-06  [Sugarcane].SowNewPlant(PlantingDensity:10, Depth:100, CultivarName:"Q124");
          1995-07-06  [Fertiliser].Apply(Amount:45, Type:Fertiliser.Types.NH4N, Depth:100);
          1995-10-15  [Fertiliser].Apply(Amount:25, Type:Fertiliser.Types.NH4N, Depth:100);
          1995-10-29  [Sugarcane].HillUpTheSoil(CaneFr:1.0, TopsFr:0.50);
          1995-11-17  [Irrigation].Apply(amount:7.72, depth:300);
          1995-11-26  [Irrigation].Apply(amount:16.52, depth:300);
          1995-11-30  [Irrigation].Apply(amount:16.52, depth:300);
          1995-12-04  [Irrigation].Apply(amount:16.99, depth:300);
          1995-12-08  [Irrigation].Apply(amount:15.3, depth:300);
          1995-12-10  [Irrigation].Apply(amount:15.3, depth:300);
          1995-12-11  [Irrigation].Apply(amount:15.3, depth:300);
          1995-12-14  [Irrigation].Apply(amount:18.3, depth:300);
          1995-12-15  [Irrigation].Apply(amount:18.3, depth:300);
          1996-02-24  [Irrigation].Apply(amount:4.29, depth:300);
          1996-02-26  [Irrigation].Apply(amount:18.43, depth:300);
          1996-02-29  [Irrigation].Apply(amount:33.15, depth:300);
          1996-04-02  [Irrigation].Apply(amount:22.7, depth:300);
          1996-04-05  [Irrigation].Apply(amount:22.7, depth:300);
          1996-04-08  [Irrigation].Apply(amount:22.7, depth:300);
          1996-04-11  [Irrigation].Apply(amount:22.7, depth:300);
          1996-04-24  [Irrigation].Apply(amount:3.39, depth:300);
          1996-05-02  [Irrigation].Apply(amount:17.23, depth:300);
          1996-05-15  [Irrigation].Apply(amount:17.23, depth:300);
          1996-05-20  [Irrigation].Apply(amount:18.87, depth:300);
          1996-05-26  [Irrigation].Apply(amount:18.87, depth:300);
          1996-05-29  [Irrigation].Apply(amount:18.87, depth:300);
          1996-05-31  [Irrigation].Apply(amount:18.87, depth:300);
          1996-06-06  [Irrigation].Apply(amount:18.87, depth:300);
          1996-07-21  [Irrigation].Apply(amount:24.23, depth:300);
          1996-07-28  [Irrigation].Apply(amount:15.69, depth:300);
          1996-08-05  [Irrigation].Apply(amount:15.69, depth:300);
          1996-08-13  [Irrigation].Apply(amount:5.82, depth:300);
          1996-08-27  [Sugarcane].HarvestCrop();
          1996-08-27  [Sugarcane].EndCrop();
        Report: same as Dataset 1 Harwood NSW Australia.1 Harwood 1993_94 Q117 P.paddock.Report
    Simulation 9b Bambaroo 1995_96 Q124 P Supplementary Irrigated
      Weather: FileName=Bambaroo.met
      Clock: Start=1995-07-06; End=1996-08-26
      Summary summaryfile
      MicroClimate: a_interception=0; b_interception=1; c_interception=0; d_interception=0; soil_albedo=0.23; SoilHeatFluxFraction=0.4; MinimumHeightDiffForNewLayer=0; NightInterceptionFraction=0.5; ReferenceHeight=2
      Zone paddock: Area=1; Slope=0; AspectAngle=0; Altitude=50
        SurfaceOrganicMatter Surface Organic Matter: InitialResidueName=sugar_trash; InitialResidueType=Sugarcane; InitialResidueMass=100; InitialStandingFraction=1; InitialCPR=0; InitialCNR=80; FractionFaecesAdded=1
        Soil Pace: same as Dataset 9 Bambaroo Qld Australia.9a Bambaroo 1995_96 Q124 P Fully Irrigated.paddock.Pace
        Fertiliser
        Irrigation
        Sugarcane: same as Dataset 1 Harwood NSW Australia.1 Harwood 1993_94 Q117 P.paddock.Sugarcane
        Memo
          ### Operations

          All operation irrigations are subsurface trickle irrigation unless stated otherwise in the comments of an operation item.
        Operations
          1995-07-06  [Sugarcane].SowNewPlant(PlantingDensity:10, Depth:100, CultivarName:"Q124");
          1995-07-06  [Fertiliser].Apply(Amount:44.5, Type:Fertiliser.Types.NH4N, Depth:100);
          1995-10-15  [Fertiliser].Apply(Amount:24.7, Type:Fertiliser.Types.NH4N, Depth:100);
          1995-10-29  [Sugarcane].HillUpTheSoil(CaneFr:1.0, TopsFr:0.50);
          1995-11-17  [Irrigation].Apply(amount:5.02, depth:300);
          1996-02-24  [Irrigation].Apply(amount:4.82, depth:300);
          1996-02-24  [Irrigation].Apply(amount:20.26, depth:300);
          1996-02-29  [Irrigation].Apply(amount:29, depth:300);
          1996-04-02  [Irrigation].Apply(amount:21.84, depth:300);
          1996-04-05  [Irrigation].Apply(amount:21.84, depth:300);
          1996-04-08  [Irrigation].Apply(amount:21.84, depth:300);
          1996-04-11  [Irrigation].Apply(amount:21.84, depth:300);
          1996-04-24  [Irrigation].Apply(amount:3.58, depth:300);
          1996-05-02  [Irrigation].Apply(amount:17.71, depth:300);
          1996-05-15  [Irrigation].Apply(amount:17.71, depth:300);
          1996-05-20  [Irrigation].Apply(amount:18.61, depth:300);
          1996-05-26  [Irrigation].Apply(amount:18.61, depth:300);
          1996-05-29  [Irrigation].Apply(amount:18.61, depth:300);
          1996-05-31  [Irrigation].Apply(amount:18.61, depth:300);
          1996-06-06  [Irrigation].Apply(amount:18.61, depth:300);
          1996-07-21  [Irrigation].Apply(amount:23.54, depth:300);
          1996-07-28  [Irrigation].Apply(amount:21.12, depth:300);
          1996-08-05  [Irrigation].Apply(amount:21.12, depth:300);
          1996-08-13  [Irrigation].Apply(amount:4.48, depth:300);
          1996-08-27  [Sugarcane].HarvestCrop();
          1996-08-27  [Sugarcane].EndCrop();
        Report: same as Dataset 1 Harwood NSW Australia.1 Harwood 1993_94 Q117 P.paddock.Report
    Simulation 9c Bambaroo 1995_96 Q124 P Rainfed
      Weather: FileName=Bambaroo.met
      Clock: Start=1995-07-06; End=1996-08-26
      Summary summaryfile
      MicroClimate: a_interception=0; b_interception=1; c_interception=0; d_interception=0; soil_albedo=0.23; SoilHeatFluxFraction=0.4; MinimumHeightDiffForNewLayer=0; NightInterceptionFraction=0.5; ReferenceHeight=2
      Zone paddock: Area=1; Slope=0; AspectAngle=0; Altitude=50
        SurfaceOrganicMatter Surface Organic Matter: InitialResidueName=sugar_trash; InitialResidueType=Sugarcane; InitialResidueMass=100; InitialStandingFraction=1; InitialCPR=0; InitialCNR=80; FractionFaecesAdded=1
        Soil Pace: same as Dataset 9 Bambaroo Qld Australia.9a Bambaroo 1995_96 Q124 P Fully Irrigated.paddock.Pace
        Fertiliser
        Irrigation
        Sugarcane: same as Dataset 1 Harwood NSW Australia.1 Harwood 1993_94 Q117 P.paddock.Sugarcane
        Operations
          1995-07-06  [Sugarcane].SowNewPlant(PlantingDensity:10, Depth:100, CultivarName:"Q124");
          1995-07-06  [Fertiliser].Apply(Amount:44.5, Type:Fertiliser.Types.NH4N, Depth:100);
          1995-10-15  [Fertiliser].Apply(Amount:24.7, Type:Fertiliser.Types.NH4N, Depth:100);
          1995-10-29  [Sugarcane].HillUpTheSoil(CaneFr:1.0, TopsFr:0.50);
          1996-08-27  [Sugarcane].HarvestCrop();
          1996-08-27  [Sugarcane].EndCrop();
        Report: same as Dataset 1 Harwood NSW Australia.1 Harwood 1993_94 Q117 P.paddock.Report
  Folder Dataset 10 La Mercy South Africa
    Simulation 10a La Mercy 1994_95 NCo376 1R Rainfed
      Weather: FileName=LaMercy.met
      Clock: Start=1994-10-13; End=1995-11-07
      Summary summaryfile
      MicroClimate: a_interception=0; b_interception=1; c_interception=0; d_interception=0; soil_albedo=0.23; SoilHeatFluxFraction=0.4; MinimumHeightDiffForNewLayer=0; NightInterceptionFraction=0.5; ReferenceHeight=2
      Zone paddock: Area=1; Slope=0; AspectAngle=0; Altitude=50
        SurfaceOrganicMatter Surface Organic Matter: InitialResidueName=sugar_trash; InitialResidueType=Sugarcane; InitialResidueMass=1000; InitialStandingFraction=1; InitialCPR=0; InitialCNR=80; FractionFaecesAdded=1
        Soil La Mercy: Latitude=0; Longitude=0
          Physical
            Thickness  BD    AirDry  LL15   DUL    SAT
            50         1.2   0.05    0.19   0.321  0.49
            100        1.31  0.05    0.19   0.321  0.45
            150        1.33  0.05    0.233  0.344  0.44
            150        1.45  0.05    0.289  0.35   0.4
            150        1.5   0.05    0.289  0.35   0.39
            150        1.47  0.05    0.286  0.35   0.39
            50         1.47  0.05    0.286  0.35   0.39
            150        1.47  0.05    0.286  0.35   0.39
            150        1.47  0.05    0.286  0.35   0.39
            400        1.47  0.05    0.196  0.321  0.39
            SoilCrop SugarcaneSoil: LL=[0.22, 0.22, 0.25, 0.3, 0.3, 0.3, 0.3, 0.3, 0.3, 0.2]; KL=[0.1, 0.1, 0.1, 0.1, 0.1, 0.08, 0.08, 0.08, 0.08, 0.04]; XF=[1, 1, 1, 1, 1, 1, 1, 1, 1, 1]
          SoilWater: SummerDate=1-Nov; SummerU=9; SummerCona=3; WinterDate=1-Apr; WinterU=9; WinterCona=3; DiffusConst=40; DiffusSlope=16; Salb=0.17; CN2Bare=82; CNRed=20; CNCov=0.8; max_pond=0; Thickness=[50, 100, 150, 150, 150, 150, 50, 150, 150, 400]; SWCON=[0.6, 0.6, 0.6, 0.6, 0.6, 0.6, 0.6, 0.6, 0.6, 0.6]; PrecipitationInterception=0
          Organic: FOMCNRatio=70
            Thickness  Carbon  SoilCNRatio  FBiom  FInert  FOM
            50         1.3     13           0.03   0.4     248.758
            100        1       13           0.015  0.5     203.666
            150        0.8     13           0.01   0.75    150.88
            150        0.8     13           0.01   0.85    111.774
            150        0.7     13           0.005  0.9     82.8044
            150        0.6     13           0.005  0.95    61.343
            50         0.2     13           0.001  0.99    55.5055
            150        0.2     13           0.001  0.99    41.1195
            150        0.2     13           0.001  0.99    30.462
            400        0.2     13           0.001  0.99    13.6875
          Chemical
            Thickness  NO3N      NH4N      PH
            50         2.00002   1.00011   6
            100        2.00002   1.00011   6
            150        1.00001   1.00011   6
            150        0.999945  0.500009  6
            150        0.999996  0.500008  6
            150        0.999995  0.500006  6
            50         1.00003   0.500005  5
            150        0.999997  0.500005  5
            150        1.00003   0.500003  5
            400        1         0.500002  5
          Sample Initial nitrogen: Thickness=[50, 100, 150, 150, 150, 150, 50, 150, 150, 400]; SWUnits=Volumetric; OCUnits=Total; PHUnits=Water
          Sample Initial water: Thickness=[50, 100, 150, 150, 150, 150, 50, 150, 150, 400]; SWUnits=Volumetric; OCUnits=Total; PHUnits=Water
            SW=[0.259, 0.259, 0.289, 0.331, 0.331, 0.328, 0.328, 0.33, 0.328, 0.259]
          CERESSoilTemperature
          Nutrient: same as Dataset 1 Harwood NSW Australia.1 Harwood 1993_94 Q117 P.paddock.Harwood.Nutrient
        Fertiliser
        Irrigation
        Sugarcane: same as Dataset 1 Harwood NSW Australia.1 Harwood 1993_94 Q117 P.paddock.Sugarcane
        Operations
          1994-10-13  [Sugarcane].SowRatoon(PlantingDensity:16, Depth:150, CultivarName:"NCo376", StartingRatoonNo:1);
          1994-10-13  [Fertiliser].Apply(Amount:140, Type:Fertiliser.Types.UreaN, Depth:50);
          1995-11-08  [Sugarcane].HarvestCrop();
          1995-11-08  [Sugarcane].EndCrop();
        Report: same as Dataset 1 Harwood NSW Australia.1 Harwood 1993_94 Q117 P.paddock.Report
    Simulation 10b La Mercy 1994_95 NCo376 1R Irrigation Treatment 1
      Weather: FileName=LaMercy.met
      Clock: Start=1994-10-13; End=1995-11-07
      Summary summaryfile
      MicroClimate: a_interception=0; b_interception=1; c_interception=0; d_interception=0; soil_albedo=0.23; SoilHeatFluxFraction=0.4; MinimumHeightDiffForNewLayer=0; NightInterceptionFraction=0.5; ReferenceHeight=2
      Zone paddock: Area=1; Slope=0; AspectAngle=0; Altitude=50
        SurfaceOrganicMatter Surface Organic Matter: InitialResidueName=sugar_trash; InitialResidueType=Sugarcane; InitialResidueMass=1000; InitialStandingFraction=1; InitialCPR=0; InitialCNR=80; FractionFaecesAdded=1
        Soil La Mercy: Latitude=0; Longitude=0
          Physical: same as Dataset 10 La Mercy South Africa.10a La Mercy 1994_95 NCo376 1R Rainfed.paddock.La Mercy.Physical
          SoilWater: same as Dataset 10 La Mercy South Africa.10a La Mercy 1994_95 NCo376 1R Rainfed.paddock.La Mercy.SoilWater
          Organic: same as Dataset 10 La Mercy South Africa.10a La Mercy 1994_95 NCo376 1R Rainfed.paddock.La Mercy.Organic
          Chemical
            Thickness  NO3N      NH4N      PH
            50         2.00002   1.00011   6
            100        2.00002   1.00011   6
            150        1.00001   1.00011   6
            150        0.999945  0.500009  6
            150        0.999996  0.500008  6
            150        0.999995  0.500006  6
            50         1.00003   0.500005  5
            150        0.999997  0.500005  5
            150        1.00003   0.500003  5
            400        1         0.500002  5
          Sample Initial nitrogen: Thickness=[50, 100, 150, 150, 150, 150, 50, 150, 150, 400]; SWUnits=Volumetric; OCUnits=Total; PHUnits=Water
          Sample Initial water: same as Dataset 10 La Mercy South Africa.10a La Mercy 1994_95 NCo376 1R Rainfed.paddock.La Mercy.Initial water
          CERESSoilTemperature
          Nutrient: same as Dataset 1 Harwood NSW Australia.1 Harwood 1993_94 Q117 P.paddock.Harwood.Nutrient
        Fertiliser
        Irrigation
        Sugarcane: same as Dataset 1 Harwood NSW Australia.1 Harwood 1993_94 Q117 P.paddock.Sugarcane
        Operations
          1994-10-13  [Sugarcane].SowRatoon(PlantingDensity:16, Depth:150, CultivarName:"NCo376", StartingRatoonNo:1);
          1994-10-13  [Fertiliser].Apply(Amount:140, Type:Fertiliser.Types.UreaN, Depth:50);
          1994-12-07  [Irrigation].Apply(amount:5.0);
          1994-12-09  [Irrigation].Apply(amount:11.5);
          1994-12-14  [Irrigation].Apply(amount:27.7);
          1994-12-20  [Irrigation].Apply(amount:28.2);
          1995-01-07  [Irrigation].Apply(amount:33.4);
          1995-01-13  [Irrigation].Apply(amount:39.3);
          1995-01-21  [Irrigation].Apply(amount:70.0);
          1995-01-22  [Irrigation].Apply(amount:70.0);
          1995-02-09  [Irrigation].Apply(amount:49.9);
          1995-02-16  [Irrigation].Apply(amount:50.0);
          1995-02-27  [Irrigation].Apply(amount:52.0);
          1995-03-14  [Irrigation].Apply(amount:49.3);
          1995-05-22  [Irrigation].Apply(amount:57.8);
          1995-06-13  [Irrigation].Apply(amount:39.6);
          1995-07-07  [Irrigation].Apply(amount:54.5);
          1995-07-19  [Irrigation].Apply(amount:23.0);
          1995-08-02  [Irrigation].Apply(amount:75.6);
          1995-08-16  [Irrigation].Apply(amount:26.3);
          1995-08-28  [Irrigation].Apply(amount:22.2);
          1995-09-06  [Irrigation].Apply(amount:29.4);
          1995-09-14  [Irrigation].Apply(amount:23.8);
          1995-09-22  [Irrigation].Apply(amount:23.8);
          1995-09-28  [Irrigation].Apply(amount:23.5);
          1995-10-05  [Irrigation].Apply(amount:23.3);
          1995-11-08  [Sugarcane].HarvestCrop();
          1995-11-08  [Sugarcane].EndCrop();
        Report: same as Dataset 1 Harwood NSW Australia.1 Harwood 1993_94 Q117 P.paddock.Report
    Simulation 10c La Mercy 1994_95 NCo376 1R Irrigation Treatment 2
      Weather: FileName=LaMercy.met
      Clock: Start=1994-10-13; End=1995-11-07
      Summary summaryfile
      MicroClimate: a_interception=0; b_interception=1; c_interception=0; d_interception=0; soil_albedo=0.23; SoilHeatFluxFraction=0.4; MinimumHeightDiffForNewLayer=0; NightInterceptionFraction=0.5; ReferenceHeight=2
      Zone paddock: Area=1; Slope=0; AspectAngle=0; Altitude=50
        SurfaceOrganicMatter Surface Organic Matter: InitialResidueName=sugar_trash; InitialResidueType=Sugarcane; InitialResidueMass=1000; InitialStandingFraction=1; InitialCPR=0; InitialCNR=80; FractionFaecesAdded=1
        Soil La Mercy: same as Dataset 10 La Mercy South Africa.10b La Mercy 1994_95 NCo376 1R Irrigation Treatment 1.paddock.La Mercy
        Fertiliser
        Irrigation
        Sugarcane: same as Dataset 1 Harwood NSW Australia.1 Harwood 1993_94 Q117 P.paddock.Sugarcane
        Operations
          1994-10-13  [Sugarcane].SowRatoon(PlantingDensity:16, Depth:150, CultivarName:"NCo376", StartingRatoonNo:1);
          1994-10-13  [Fertiliser].Apply(Amount:140, Type:Fertiliser.Types.UreaN, Depth:50);
          1994-12-11  [Irrigation].Apply(amount:37.5);
          1994-12-19  [Irrigation].Apply(amount:34.1);
          1995-01-07  [Irrigation].Apply(amount:33.4);
          1995-01-21  [Irrigation].Apply(amount:70.0);
          1995-01-22  [Irrigation].Apply(amount:70.0);
          1995-02-09  [Irrigation].Apply(amount:49.9);
          1995-02-17  [Irrigation].Apply(amount:49.3);
          1995-03-01  [Irrigation].Apply(amount:46.5);
          1995-03-16  [Irrigation].Apply(amount:47.0);
          1995-05-29  [Irrigation].Apply(amount:60.5);
          1995-07-14  [Irrigation].Apply(amount:22.6);
          1995-08-01  [Irrigation].Apply(amount:26.4);
          1995-08-16  [Irrigation].Apply(amount:26.3);
          1995-08-25  [Irrigation].Apply(amount:25.7);
          1995-09-05  [Irrigation].Apply(amount:34.5);
          1995-09-12  [Irrigation].Apply(amount:38.0);
          1995-09-20  [Irrigation].Apply(amount:39.5);
          1995-09-27  [Irrigation].Apply(amount:25.0);
          1995-10-03  [Irrigation].Apply(amount:25.1);
          1995-10-10  [Irrigation].Apply(amount:20.6);
          1995-11-08  [Sugarcane].HarvestCrop();
          1995-11-08  [Sugarcane].EndCrop();
        Report: same as Dataset 1 Harwood NSW Australia.1 Harwood 1993_94 Q117 P.paddock.Report
    Simulation 10d La Mercy 1994_95 NCo376 1R Irrigation Treatment 3
      Weather: FileName=LaMercy.met
      Clock: Start=1994-10-13; End=1995-11-07
      Summary summaryfile
      MicroClimate: a_interception=0; b_interception=1; c_interception=0; d_interception=0; soil_albedo=0.23; SoilHeatFluxFraction=0.4; MinimumHeightDiffForNewLayer=0; NightInterceptionFraction=0.5; ReferenceHeight=2
      Zone paddock: Area=1; Slope=0; AspectAngle=0; Altitude=50
        SurfaceOrganicMatter Surface Organic Matter: InitialResidueName=sugar_trash; InitialResidueType=Sugarcane; InitialResidueMass=1000; InitialStandingFraction=1; InitialCPR=0; InitialCNR=80; FractionFaecesAdded=1
        Soil La Mercy: same as Dataset 10 La Mercy South Africa.10b La Mercy 1994_95 NCo376 1R Irrigation Treatment 1.paddock.La Mercy
        Fertiliser
        Irrigation
        Sugarcane: same as Dataset 1 Harwood NSW Australia.1 Harwood 1993_94 Q117 P.paddock.Sugarcane
        Operations
          1994-10-13  [Sugarcane].SowRatoon(PlantingDensity:16, Depth:150, CultivarName:"NCo376", StartingRatoonNo:1);
          1994-10-13  [Fertiliser].Apply(Amount:140, Type:Fertiliser.Types.UreaN, Depth:50);
          1994-12-14  [Irrigation].Apply(amount:27.7);
          1994-12-20  [Irrigation].Apply(amount:28.2);
          1995-01-11  [Irrigation].Apply(amount:26.1);
          1995-01-21  [Irrigation].Apply(amount:70.0);
          1995-01-22  [Irrigation].Apply(amount:70.0);
          1995-02-09  [Irrigation].Apply(amount:49.9);
          1995-02-17  [Irrigation].Apply(amount:49.3);
          1995-03-01  [Irrigation].Apply(amount:46.5);
          1995-03-23  [Irrigation].Apply(amount:78.5);
          1995-06-03  [Irrigation].Apply(amount:18.5);
          1995-06-13  [Irrigation].Apply(amount:39.6);
          1995-07-14  [Irrigation].Apply(amount:22.6);
          1995-07-25  [Irrigation].Apply(amount:24.6);
          1995-08-11  [Irrigation].Apply(amount:26.4);
          1995-08-17  [Irrigation].Apply(amount:24.9);
          1995-08-24  [Irrigation].Apply(amount:24.0);
          1995-09-05  [Irrigation].Apply(amount:34.5);
          1995-09-12  [Irrigation].Apply(amount:38.0);
          1995-09-22  [Irrigation].Apply(amount:23.8);
          1995-09-27  [Irrigation].Apply(amount:25.0);
          1995-10-03  [Irrigation].Apply(amount:25.1);
          1995-10-12  [Irrigation].Apply(amount:27.5);
          1995-11-08  [Sugarcane].HarvestCrop();
          1995-11-08  [Sugarcane].EndCrop();
        Report: same as Dataset 1 Harwood NSW Australia.1 Harwood 1993_94 Q117 P.paddock.Report
    Simulation 10e La Mercy 1994_95 NCo376 1R Irrigation Treatment 4
      Weather: FileName=LaMercy.met
      Clock: Start=1994-10-13; End=1995-11-07
      Summary summaryfile
      MicroClimate: a_interception=0; b_interception=1; c_interception=0; d_interception=0; soil_albedo=0.23; SoilHeatFluxFraction=0.4; MinimumHeightDiffForNewLayer=0; NightInterceptionFraction=0.5; ReferenceHeight=2
      Zone paddock: Area=1; Slope=0; AspectAngle=0; Altitude=50
        SurfaceOrganicMatter Surface Organic Matter: InitialResidueName=sugar_trash; InitialResidueType=Sugarcane; InitialResidueMass=1000; InitialStandingFraction=1; InitialCPR=0; InitialCNR=80; FractionFaecesAdded=1
        Soil La Mercy: same as Dataset 10 La Mercy South Africa.10b La Mercy 1994_95 NCo376 1R Irrigation Treatment 1.paddock.La Mercy
        Fertiliser
        Irrigation
        Sugarcane: same as Dataset 1 Harwood NSW Australia.1 Harwood 1993_94 Q117 P.paddock.Sugarcane
        Operations
          1994-10-13  [Sugarcane].SowRatoon(PlantingDensity:16, Depth:150, CultivarName:"NCo376", StartingRatoonNo:1);
          1994-10-13  [Fertiliser].Apply(Amount:140, Type:Fertiliser.Types.UreaN, Depth:50);
          1994-12-15  [Irrigation].Apply(amount:38.5);
          1995-01-11  [Irrigation].Apply(amount:26.2);
          1995-01-27  [Irrigation].Apply(amount:42.0);
          1995-01-28  [Irrigation].Apply(amount:42.0);
          1995-02-17  [Irrigation].Apply(amount:49.3);
          1995-03-06  [Irrigation].Apply(amount:51.5);
          1995-08-24  [Irrigation].Apply(amount:24.0);
          1995-09-06  [Irrigation].Apply(amount:29.4);
          1995-09-26  [Irrigation].Apply(amount:24.6);
          1995-10-10  [Irrigation].Apply(amount:20.6);
          1995-11-08  [Sugarcane].HarvestCrop();
          1995-11-08  [Sugarcane].EndCrop();
        Report: same as Dataset 1 Harwood NSW Australia.1 Harwood 1993_94 Q117 P.paddock.Report
  Folder Dataset 11 Grafton NSW Australia
    Simulation 11 Grafton 1994_95 Q117 P
      Weather: FileName=Grafton.met
      Clock: Start=1994-09-28; End=1995-09-05
      Summary summaryfile
      MicroClimate: a_interception=0; b_interception=1; c_interception=0; d_interception=0; soil_albedo=0.23; SoilHeatFluxFraction=0.4; MinimumHeightDiffForNewLayer=0; NightInterceptionFraction=0.5; ReferenceHeight=2
      Zone paddock: Area=1; Slope=0; AspectAngle=0; Altitude=50
        SurfaceOrganicMatter Surface Organic Matter: InitialResidueName=sugar_trash; InitialResidueType=Sugarcane; InitialResidueMass=100; InitialStandingFraction=1; InitialCPR=0; InitialCNR=80; FractionFaecesAdded=1
        Soil Grafton: Latitude=0; Longitude=0
          InitialWater Initial water: PercentMethod=0; FractionFull=1
          Physical: same as Dataset 1 Harwood NSW Australia.1 Harwood 1993_94 Q117 P.paddock.Harwood.Physical
          SoilWater: same as Dataset 1 Harwood NSW Australia.1 Harwood 1993_94 Q117 P.paddock.Harwood.SoilWater
          Organic: FOMCNRatio=70
            Thickness  Carbon  SoilCNRatio  FBiom  FInert  FOM
            200        1.3     11           0.06   0.4     19.411
            200        0.9     11           0.045  0.55    13.0116
            200        0.54    11           0.035  0.85    8.72194
            300        0.4     11           0.015  0.95    4.7867
            300        0.4     11           0.005  0.95    2.627
            300        0.4     11           0.005  0.99    1.44173
          Chemical
            Thickness  NO3N  NH4N  PH
            200        2     1     6
            200        2     1     6
            200        1     1     6
            300        1     0.5   6
            300        1     0.5   6
            300        1     0.5   6
          Sample Initial nitrogen: Thickness=[200, 200, 200, 300, 300, 300]; SWUnits=Volumetric; OCUnits=Total; PHUnits=Water
          CERESSoilTemperature
          Nutrient: same as Dataset 1 Harwood NSW Australia.1 Harwood 1993_94 Q117 P.paddock.Harwood.Nutrient
        Fertiliser
        Irrigation
        Sugarcane: same as Dataset 1 Harwood NSW Australia.1 Harwood 1993_94 Q117 P.paddock.Sugarcane
        Memo
          ### Operations

          All operation irrigations are subsurface trickle irrigation unless stated otherwise in the comments of an operation item.

          Likewise fertiliser applications are subsurface fertigations except for the following,

          1994-11-24 [Fertiliser].Apply(Amount:200, Type:Fertiliser.Types.UreaN, Depth:50); // NOT fertigation
        Operations
          1994-09-28  [Sugarcane].SowNewPlant(PlantingDensity:10, Depth:150, CultivarName:"Q117_fum");
          1994-11-24  [Fertiliser].Apply(Amount:200, Type:Fertiliser.Types.UreaN, Depth:50);
          1994-12-11  [Fertiliser].Apply(Amount:30, Type:Fertiliser.Types.NO3N, Depth:300);
          1994-12-20  [Irrigation].Apply(amount:7.5, depth:300);
          1994-12-21  [Irrigation].Apply(amount:9.4, depth:300);
          1994-12-22  [Irrigation].Apply(amount:9.8, depth:300);
          1995-01-04  [Irrigation].Apply(amount:0.8, depth:300);
          1995-01-07  [Irrigation].Apply(amount:0.9, depth:300);
          1995-01-08  [Irrigation].Apply(amount:12.1, depth:300);
          1995-01-09  [Irrigation].Apply(amount:12.2, depth:300);
          1995-01-10  [Fertiliser].Apply(Amount:30, Type:Fertiliser.Types.NO3N, Depth:300);
          1995-01-10  [Irrigation].Apply(amount:0.6, depth:300);
          1995-01-11  [Irrigation].Apply(amount:7.7, depth:300);
          1995-01-16  [Irrigation].Apply(amount:9.7, depth:300);
          1995-01-17  [Irrigation].Apply(amount:9.7, depth:300);
          1995-01-22  [Irrigation].Apply(amount:8.3, depth:300);
          1995-01-25  [Irrigation].Apply(amount:7.7, depth:300);
          1995-01-31  [Irrigation].Apply(amount:10.7, depth:300);
          1995-02-02  [Irrigation].Apply(amount:8.9, depth:300);
          1995-02-04  [Irrigation].Apply(amount:8.9, depth:300);
          1995-02-07  [Irrigation].Apply(amount:9.8, depth:300);
          1995-02-09  [Fertiliser].Apply(Amount:30, Type:Fertiliser.Types.NO3N, Depth:300);
          1995-02-09  [Irrigation].Apply(amount:6.5, depth:300);
          1995-02-22  [Irrigation].Apply(amount:2.8, depth:300);
          1995-02-27  [Irrigation].Apply(amount:9.5, depth:300);
          1995-03-05  [Irrigation].Apply(amount:10.9, depth:300);
          1995-03-11  [Fertiliser].Apply(Amount:30, Type:Fertiliser.Types.NO3N, Depth:300);
          1995-03-12  [Irrigation].Apply(amount:5.4, depth:300);
          1995-03-13  [Irrigation].Apply(amount:1.8, depth:300);
          1995-03-14  [Irrigation].Apply(amount:3.6, depth:300);
          1995-03-16  [Irrigation].Apply(amount:3.8, depth:300);
          1995-03-20  [Irrigation].Apply(amount:0.6, depth:300);
          1995-03-21  [Irrigation].Apply(amount:2.5, depth:300);
          1995-03-22  [Irrigation].Apply(amount:1.8, depth:300);
          1995-03-23  [Irrigation].Apply(amount:1.8, depth:300);
          1995-03-26  [Irrigation].Apply(amount:4.1, depth:300);
          1995-03-28  [Irrigation].Apply(amount:0.1, depth:300);
          1995-03-29  [Irrigation].Apply(amount:2.1, depth:300);
          1995-03-30  [Irrigation].Apply(amount:1.9, depth:300);
          1995-04-04  [Irrigation].Apply(amount:2.7, depth:300);
          1995-04-05  [Irrigation].Apply(amount:3.4, depth:300);
          1995-04-09  [Irrigation].Apply(amount:4.9, depth:300);
          1995-04-10  [Fertiliser].Apply(Amount:30, Type:Fertiliser.Types.NO3N, Depth:300);
          1995-04-11  [Irrigation].Apply(amount:3.5, depth:300);
          1995-04-12  [Irrigation].Apply(amount:3.4, depth:300);
          1995-04-13  [Irrigation].Apply(amount:0.9, depth:300);
          1995-04-16  [Irrigation].Apply(amount:3.2, depth:300);
          1995-04-17  [Irrigation].Apply(amount:3.2, depth:300);
          1995-04-18  [Irrigation].Apply(amount:3.2, depth:300);
          1995-04-19  [Irrigation].Apply(amount:3.2, depth:300);
          1995-04-20  [Irrigation].Apply(amount:3.2, depth:300);
          1995-04-21  [Irrigation].Apply(amount:3.2, depth:300);
          1995-04-22  [Irrigation].Apply(amount:3.2, depth:300);
          1995-04-23  [Irrigation].Apply(amount:3.2, depth:300);
          1995-04-24  [Irrigation].Apply(amount:3.2, depth:300);
          1995-04-25  [Irrigation].Apply(amount:3.2, depth:300);
          1995-04-26  [Irrigation].Apply(amount:3.2, depth:300);
          1995-04-27  [Irrigation].Apply(amount:3.3, depth:300);
          1995-04-28  [Irrigation].Apply(amount:2.3, depth:300);
          1995-04-29  [Irrigation].Apply(amount:2.3, depth:300);
          1995-04-30  [Irrigation].Apply(amount:2.3, depth:300);
          1995-05-01  [Irrigation].Apply(amount:2.1, depth:300);
          1995-05-02  [Irrigation].Apply(amount:1.9, depth:300);
          1995-05-03  [Irrigation].Apply(amount:1.9, depth:300);
          1995-05-05  [Irrigation].Apply(amount:1.9, depth:300);
          1995-05-06  [Irrigation].Apply(amount:1.9, depth:300);
          1995-05-07  [Irrigation].Apply(amount:1.9, depth:300);
          1995-05-10  [Fertiliser].Apply(Amount:30, Type:Fertiliser.Types.NO3N, Depth:300);
          1995-05-11  [Irrigation].Apply(amount:2.6, depth:300);
          1995-06-09  [Fertiliser].Apply(Amount:30, Type:Fertiliser.Types.NO3N, Depth:300);
          1995-06-13  [Irrigation].Apply(amount:2.8, depth:300);
          1995-06-29  [Irrigation].Apply(amount:5.1, depth:300);
          1995-07-09  [Fertiliser].Apply(Amount:30, Type:Fertiliser.Types.NO3N, Depth:300);
          1995-07-16  [Irrigation].Apply(amount:5, depth:300);
          1995-07-20  [Irrigation].Apply(amount:3.1, depth:300);
          1995-07-29  [Irrigation].Apply(amount:2.9, depth:300);
          1995-09-06  [Sugarcane].HarvestCrop();
          1995-09-06  [Sugarcane].EndCrop();
        Report: same as Dataset 1 Harwood NSW Australia.1 Harwood 1993_94 Q117 P.paddock.Report
  Folder Dataset 12 Pongola Natal South Africa
    Simulation 12 Pongola 1986_87 N14 1R
      Weather: FileName=Pongola.met
      Clock: Start=1986-11-12; End=1987-10-12
      Summary summaryfile
      MicroClimate: a_interception=0; b_interception=1; c_interception=0; d_interception=0; soil_albedo=0.23; SoilHeatFluxFraction=0.4; MinimumHeightDiffForNewLayer=0; NightInterceptionFraction=0.5; ReferenceHeight=2
      Zone paddock: Area=1; Slope=0; AspectAngle=0; Altitude=50
        SurfaceOrganicMatter Surface Organic Matter: InitialResidueName=sugar_trash; InitialResidueType=Sugarcane; InitialResidueMass=1000; InitialStandingFraction=1; InitialCPR=0; InitialCNR=80; FractionFaecesAdded=1
        Soil Pongola 867 1R: Latitude=0; Longitude=0
          InitialWater Initial water: PercentMethod=0; FractionFull=1
          Physical
            Thickness  BD    AirDry  LL15   DUL    SAT
            50         1.39  0.05    0.101  0.261  0.368
            120        1.39  0.05    0.101  0.261  0.368
            150        1.39  0.05    0.101  0.261  0.368
            150        1.43  0.05    0.16   0.282  0.371
            150        1.43  0.05    0.16   0.282  0.371
            300        1.34  0.05    0.15   0.304  0.399
            300        1.34  0.05    0.15   0.304  0.399
            300        1.34  0.05    0.15   0.304  0.399
            300        1.34  0.05    0.15   0.304  0.399
            300        1.34  0.05    0.15   0.304  0.399
            SoilCrop SugarcaneSoil
              LL=[0.101, 0.101, 0.101, 0.16, 0.16, 0.15, 0.15, 0.15, 0.15, 0.15]
              KL=[0.1, 0.1, 0.1, 0.1, 0.1, 0.08, 0.08, 0.08, 0.04, 0.04]
              XF=[1, 1, 1, 1, 1, 1, 1, 1, 1, 1]
          SoilWater: same as Dataset 7 Pongola Natal South Africa.7 Pongola 1986_87 N14 P.paddock.Pongola 867 P.SoilWater
          Organic: FOMCNRatio=70
            Thickness  Carbon  SoilCNRatio  FBiom  FInert  FOM
            50         1.3     13           0.04   0.4     234.327
            120        1       13           0.02   0.5     197.731
            150        0.8     13           0.01   0.75    159.915
            150        0.8     13           0.01   0.85    129.332
            150        0.7     13           0.005  0.9     104.597
            300        0.6     13           0.005  0.95    68.4146
            300        0.2     13           0.001  0.99    44.7485
            300        0.2     13           0.001  0.99    29.269
            300        0.2     13           0.001  0.99    19.1442
            300        0.2     13           0.001  0.99    12.5218
          Chemical: same as Dataset 7 Pongola Natal South Africa.7 Pongola 1986_87 N14 P.paddock.Pongola 867 P.Chemical
          Sample Initial nitrogen: Thickness=[50, 120, 150, 150, 150, 300, 300, 300, 300, 300]; SWUnits=Volumetric; OCUnits=Total; PHUnits=Water
          CERESSoilTemperature
          Nutrient: same as Dataset 1 Harwood NSW Australia.1 Harwood 1993_94 Q117 P.paddock.Harwood.Nutrient
        Fertiliser
        Irrigation
        Sugarcane: same as Dataset 1 Harwood NSW Australia.1 Harwood 1993_94 Q117 P.paddock.Sugarcane
        Memo: same as Dataset 7 Pongola Natal South Africa.7 Pongola 1986_87 N14 P.paddock.Memo
        Operations
          1986-11-12  [Sugarcane].SowRatoon(PlantingDensity:10, Depth:150, CultivarName:"N14", StartingRatoonNo:1);
          1986-11-12  [Fertiliser].Apply(Amount:172, Type:Fertiliser.Types.NO3N, Depth:50);
          1986-12-19  [Fertiliser].Apply(Amount:23, Type:Fertiliser.Types.NO3N, Depth:50);
          1987-10-13  [Sugarcane].HarvestCrop();
          1987-10-13  [Sugarcane].EndCrop();
        Report: same as Dataset 1 Harwood NSW Australia.1 Harwood 1993_94 Q117 P.paddock.Report
  Folder Dataset 13 Kunia Hawaii USA
    Simulation 13 Kunia 1991_93 H73_6110 P
      Weather: FileName=Kunia.met
      Clock: Start=1991-01-23; End=1993-01-26
      Summary summaryfile
      MicroClimate: a_interception=0; b_interception=1; c_interception=0; d_interception=0; soil_albedo=0.23; SoilHeatFluxFraction=0.4; MinimumHeightDiffForNewLayer=0; NightInterceptionFraction=0.5; ReferenceHeight=2
      Zone paddock: Area=1; Slope=0; AspectAngle=0; Altitude=50
        SurfaceOrganicMatter Surface Organic Matter: InitialResidueName=sugar_trash; InitialResidueType=Sugarcane; InitialResidueMass=100; InitialStandingFraction=1; InitialCPR=0; InitialCNR=80; FractionFaecesAdded=1
        Soil Kunia: Latitude=0; Longitude=0
          InitialWater Initial water: PercentMethod=0; FractionFull=1
          Physical
            Thickness  BD    AirDry  LL15  DUL   SAT
            200        1.2   0.15    0.18  0.33  0.45
            200        1.25  0.05    0.2   0.35  0.45
            200        1.3   0.05    0.21  0.37  0.45
            300        1.35  0.05    0.24  0.37  0.45
            300        1.4   0.05    0.24  0.36  0.45
            300        1.45  0.05    0.22  0.32  0.45
            SoilCrop SugarcaneSoil: LL=[0.18, 0.2, 0.21, 0.24, 0.24, 0.22]; KL=[0.1, 0.1, 0.1, 0.08, 0.08, 0.04]; XF=[1, 1, 1, 1, 1, 1]
          SoilWater: same as Dataset 1 Harwood NSW Australia.1 Harwood 1993_94 Q117 P.paddock.Harwood.SoilWater
          Organic: FOMCNRatio=70
            Thickness  Carbon  SoilCNRatio  FBiom  FInert  FOM
            200        1.3     13           0.03   0.4     19.411
            200        1       13           0.015  0.5     13.0116
            200        0.8     13           0.01   0.75    8.72194
            300        0.8     13           0.01   0.85    4.7867
            300        0.7     13           0.005  0.9     2.627
            300        0.6     13           0.005  0.95    1.44173
          Chemical
            Thickness  NO3N  NH4N  PH
            200        2     1     6
            200        2     1     6
            200        1     1     6
            300        1     0.5   6
            300        1     0.5   6
            300        1     0.5   6
          Sample Initial nitrogen: Thickness=[200, 200, 200, 300, 300, 300]; SWUnits=Volumetric; OCUnits=Total; PHUnits=Water
          CERESSoilTemperature
          Nutrient: same as Dataset 1 Harwood NSW Australia.1 Harwood 1993_94 Q117 P.paddock.Harwood.Nutrient
        Fertiliser
        Irrigation
        Sugarcane: same as Dataset 1 Harwood NSW Australia.1 Harwood 1993_94 Q117 P.paddock.Sugarcane
        Memo
          ### Operations

          All operation irrigations are subsurface trickle irrigation. (no exceptions)

          Likewise fertiliser applications are subsurface fertigations except the following,

          1991-01-23 [Fertiliser].Apply(Amount:37, Type:Fertiliser.Types.UreaN, Depth:50);
        Operations
          1991-01-23  [Sugarcane].SowNewPlant(PlantingDensity:10, Depth:150, CultivarName:"H73");
          1991-01-23  [Fertiliser].Apply(Amount:37, Type:Fertiliser.Types.UreaN, Depth:50);
          1991-02-15  [Irrigation].Apply(amount:12.2936, depth:300);
          1991-02-25  [Irrigation].Apply(amount:24.765, depth:300);
          1991-03-04  [Irrigation].Apply(amount:18.2118, depth:300);
          1991-03-19  [Irrigation].Apply(amount:24.5618, depth:300);
          1991-04-01  [Irrigation].Apply(amount:4.8514, depth:300);
          1991-04-05  [Irrigation].Apply(amount:24.9428, depth:300);
          1991-04-19  [Irrigation].Apply(amount:38.1, depth:300);
          1991-04-22  [Irrigation].Apply(amount:13.3096, depth:300);
          1991-04-23  [Irrigation].Apply(amount:4.191, depth:300);
          1991-04-30  [Irrigation].Apply(amount:25.8572, depth:300);
          1991-05-03  [Irrigation].Apply(amount:24.6888, depth:300);
          1991-05-07  [Irrigation].Apply(amount:37.8714, depth:300);
          1991-05-13  [Irrigation].Apply(amount:31.5468, depth:300);
          1991-05-17  [Irrigation].Apply(amount:24.1554, depth:300);
          1991-05-23  [Fertiliser].Apply(Amount:45, Type:Fertiliser.Types.UreaN, Depth:50);
          1991-05-24  [Irrigation].Apply(amount:43.1546, depth:300);
          1991-05-29  [Irrigation].Apply(amount:5.2324, depth:300);
          1991-05-31  [Irrigation].Apply(amount:53.3146, depth:300);
          1991-06-07  [Irrigation].Apply(amount:36.322, depth:300);
          1991-06-13  [Irrigation].Apply(amount:38.5064, depth:300);
          1991-06-19  [Irrigation].Apply(amount:42.9006, depth:300);
          1991-06-23  [Fertiliser].Apply(Amount:45, Type:Fertiliser.Types.UreaN, Depth:50);
          1991-06-28  [Irrigation].Apply(amount:45.1358, depth:300);
          1991-07-02  [Irrigation].Apply(amount:43.3578, depth:300);
          1991-07-05  [Irrigation].Apply(amount:38.1762, depth:300);
          1991-07-09  [Irrigation].Apply(amount:14.6812, depth:300);
          1991-07-10  [Irrigation].Apply(amount:5.969, depth:300);
          1991-07-16  [Irrigation].Apply(amount:38.3794, depth:300);
          1991-07-23  [Fertiliser].Apply(Amount:45, Type:Fertiliser.Types.UreaN, Depth:50);
          1991-07-26  [Irrigation].Apply(amount:43.2054, depth:300);
          1991-07-31  [Irrigation].Apply(amount:7.8486, depth:300);
          1991-08-02  [Irrigation].Apply(amount:42.7228, depth:300);
          1991-08-15  [Irrigation].Apply(amount:32.1818, depth:300);
          1991-08-20  [Irrigation].Apply(amount:24.6634, depth:300);
          1991-08-23  [Fertiliser].Apply(Amount:45, Type:Fertiliser.Types.UreaN, Depth:50);
          1991-08-27  [Irrigation].Apply(amount:43.4848, depth:300);
          1991-08-30  [Irrigation].Apply(amount:43.4848, depth:300);
          1991-09-04  [Irrigation].Apply(amount:37.6936, depth:300);
          1991-09-06  [Irrigation].Apply(amount:43.4848, depth:300);
          1991-09-13  [Irrigation].Apply(amount:44.958, depth:300);
          1991-09-17  [Irrigation].Apply(amount:36.8808, depth:300);
          1991-09-19  [Irrigation].Apply(amount:62.8142, depth:300);
          1991-09-23  [Fertiliser].Apply(Amount:45, Type:Fertiliser.Types.UreaN, Depth:50);
          1991-10-04  [Irrigation].Apply(amount:44.5008, depth:300);
          1991-10-08  [Irrigation].Apply(amount:44.1198, depth:300);
          1991-10-10  [Irrigation].Apply(amount:43.7642, depth:300);
          1991-10-23  [Fertiliser].Apply(Amount:45, Type:Fertiliser.Types.UreaN, Depth:50);
          1991-10-30  [Irrigation].Apply(amount:23.0632, depth:300);
          1991-11-06  [Irrigation].Apply(amount:2.3876, depth:300);
          1991-11-15  [Irrigation].Apply(amount:44.7548, depth:300);
          1991-11-20  [Irrigation].Apply(amount:43.7642, depth:300);
          1991-11-23  [Fertiliser].Apply(Amount:45, Type:Fertiliser.Types.UreaN, Depth:50);
          1991-11-27  [Irrigation].Apply(amount:41.0718, depth:300);
          1991-12-05  [Irrigation].Apply(amount:27.2288, depth:300);
          1991-12-23  [Fertiliser].Apply(Amount:45, Type:Fertiliser.Types.UreaN, Depth:50);
          1992-01-03  [Irrigation].Apply(amount:50.419, depth:300);
          1992-01-17  [Irrigation].Apply(amount:51.181, depth:300);
          1992-02-10  [Irrigation].Apply(amount:55.9054, depth:300);
          1992-02-25  [Irrigation].Apply(amount:26.7208, depth:300);
          1992-02-26  [Irrigation].Apply(amount:44.6024, depth:300);
          1992-03-05  [Irrigation].Apply(amount:29.1846, depth:300);
          1992-03-16  [Irrigation].Apply(amount:45.212, depth:300);
          1992-03-20  [Irrigation].Apply(amount:43.0276, depth:300);
          1992-03-27  [Irrigation].Apply(amount:45.7962, depth:300);
          1992-04-03  [Irrigation].Apply(amount:40.4368, depth:300);
          1992-04-07  [Irrigation].Apply(amount:43.8912, depth:300);
          1992-04-16  [Irrigation].Apply(amount:43.4086, depth:300);
          1992-04-28  [Irrigation].Apply(amount:43.0022, depth:300);
          1992-05-01  [Irrigation].Apply(amount:25.0698, depth:300);
          1992-05-14  [Irrigation].Apply(amount:44.704, depth:300);
          1992-05-20  [Irrigation].Apply(amount:45.2882, depth:300);
          1992-05-27  [Irrigation].Apply(amount:45.8216, depth:300);
          1992-06-03  [Irrigation].Apply(amount:45.1612, depth:300);
          1992-06-10  [Irrigation].Apply(amount:46.2026, depth:300);
          1992-06-15  [Irrigation].Apply(amount:44.3738, depth:300);
          1992-06-19  [Irrigation].Apply(amount:44.2214, depth:300);
          1992-06-22  [Irrigation].Apply(amount:43.3832, depth:300);
          1992-06-25  [Irrigation].Apply(amount:41.7068, depth:300);
          1992-06-29  [Irrigation].Apply(amount:43.6118, depth:300);
          1992-07-02  [Irrigation].Apply(amount:45.1104, depth:300);
          1992-07-07  [Irrigation].Apply(amount:45.3644, depth:300);
          1992-07-15  [Irrigation].Apply(amount:31.6738, depth:300);
          1992-07-22  [Irrigation].Apply(amount:63.1698, depth:300);
          1992-07-28  [Irrigation].Apply(amount:44.3484, depth:300);
          1992-08-05  [Irrigation].Apply(amount:11.5316, depth:300);
          1992-08-14  [Irrigation].Apply(amount:31.3944, depth:300);
          1992-08-19  [Irrigation].Apply(amount:45.6946, depth:300);
          1992-08-27  [Irrigation].Apply(amount:56.1086, depth:300);
          1992-09-01  [Irrigation].Apply(amount:46.228, depth:300);
          1992-09-09  [Irrigation].Apply(amount:45.1358, depth:300);
          1992-09-22  [Irrigation].Apply(amount:44.45, depth:300);
          1992-09-25  [Irrigation].Apply(amount:43.942, depth:300);
          1992-10-09  [Irrigation].Apply(amount:43.2308, depth:300);
          1992-10-30  [Irrigation].Apply(amount:42.5704, depth:300);
          1992-11-10  [Irrigation].Apply(amount:43.1292, depth:300);
          1992-12-18  [Irrigation].Apply(amount:44.4246, depth:300);
          1993-01-27  [Sugarcane].HarvestCrop();
          1993-01-27  [Sugarcane].EndCrop();
        Report: same as Dataset 1 Harwood NSW Australia.1 Harwood 1993_94 Q117 P.paddock.Report
  Folder Dataset 14 Ayr Qld Australia
    Simulation 14 Ayr 1992_94 Q117 P_274N and 1R_369N
      Weather: FileName=Ayr.met
      Clock: Start=1992-04-22; End=1994-09-07
      Summary summaryfile
      MicroClimate: a_interception=0; b_interception=1; c_interception=0; d_interception=0; soil_albedo=0.23; SoilHeatFluxFraction=0.4; MinimumHeightDiffForNewLayer=0; NightInterceptionFraction=0.5; ReferenceHeight=2
      Zone paddock: Area=1; Slope=0; AspectAngle=0; Altitude=50
        SurfaceOrganicMatter Surface Organic Matter: InitialResidueName=sugar_trash; InitialResidueType=Sugarcane; InitialResidueMass=100; InitialStandingFraction=1; InitialCPR=0; InitialCNR=80; FractionFaecesAdded=1
        Soil Zanetti 924: Latitude=0; Longitude=0
          InitialWater Initial water: PercentMethod=0; FractionFull=1
          Physical
            Thickness  BD    AirDry  LL15  DUL   SAT
            200        1.2   0.05    0.18  0.33  0.45
            200        1.25  0.05    0.2   0.35  0.45
            200        1.3   0.05    0.21  0.37  0.45
            300        1.35  0.05    0.24  0.37  0.45
            300        1.4   0.05    0.24  0.36  0.45
            300        1.45  0.05    0.22  0.32  0.45
            SoilCrop SugarcaneSoil: LL=[0.18, 0.2, 0.21, 0.24, 0.24, 0.22]; KL=[0.16, 0.16, 0.16, 0.1, 0.06, 0.02]; XF=[1, 1, 1, 1, 1, 1]
          SoilWater: same as Dataset 1 Harwood NSW Australia.1 Harwood 1993_94 Q117 P.paddock.Harwood.SoilWater
          Organic: FOMCNRatio=70
            Thickness  Carbon  SoilCNRatio  FBiom  FInert  FOM
            200        1.3     11           0.04   0.4     19.411
            200        1       11           0.03   0.5     13.0116
            200        0.8     11           0.02   0.75    8.72194
            300        0.8     11           0.015  0.85    4.7867
            300        0.7     11           0.005  0.9     2.627
            300        0.6     11           0.005  0.95    1.44173
          Chemical
            Thickness  NO3N  NH4N  PH
            200        2     1     6
            200        2     1     6
            200        1     1     6
            300        1     0.5   6
            300        1     0.5   6
            300        1     0.5   6
          Sample Initial nitrogen: Thickness=[200, 200, 200, 300, 300, 300]; SWUnits=Volumetric; OCUnits=Total; PHUnits=Water
          CERESSoilTemperature
          Nutrient: same as Dataset 1 Harwood NSW Australia.1 Harwood 1993_94 Q117 P.paddock.Harwood.Nutrient
        Fertiliser
        Irrigation
        Sugarcane: same as Dataset 1 Harwood NSW Australia.1 Harwood 1993_94 Q117 P.paddock.Sugarcane
        Memo
          ### Operations

          All operation irrigations are furrow with 3.46ppm NO3 (10 kg/ha) in irrig water added in irrigation

          Unfortunately solute in irrigations is not possible in ApsimX yet.

          -> nb. the following are included for their comments,

          1993-08-13 [Sugarcane].HarvestCrop() // sugar harvest ! plant crop harvested 13/08/93, then stubble shaved 11/09/93

          1993-09-11 [Sugarcane].SowRatoon(PlantingDensity:10, Depth:150, CultivarName:"Q117_fum", StartingRatoonNo:1); //! plant crop harvested 13/08/93, then stubble shaved 11/09/93

          -> nb. Need to make sure the crop is harvested before it is incorporated.

          1993-08-13 [Sugarcane].HarvestCrop();

          1993-08-13 [SurfaceOrganicMatter].Incorporate(fraction: 0.9, depth:0);

          -> nb. I had to add the following on the last day of the simulation because Apsim Next Generation needs to have an EndCrop done at the end of each simulation.

          1994-09-07 [Sugarcane].HarvestCrop();

          1994-09-07 [Sugarcane].EndCrop();
        Operations
          1992-04-22  [Sugarcane].SowNewPlant(PlantingDensity:10, Depth:150, CultivarName:"Q117_fum");
          1992-04-22  [Fertiliser].Apply(Amount:35, Type:Fertiliser.Types.UreaN, Depth:30);
          1992-04-27  [Irrigation].Apply(amount:229);
          1992-05-09  [SurfaceOrganicMatter].Incorporate(fraction: 0.5, depth:50);
          1992-06-02  [Fertiliser].Apply(Amount:161, Type:Fertiliser.Types.UreaN, Depth:30);
          1992-07-03  [Irrigation].Apply(amount:229);
          1992-08-04  [Irrigation].Apply(amount:229);
          1992-09-07  [Sugarcane].HillUpTheSoil(CaneFr:1.0, TopsFr:0.50);
          1992-09-09  [Irrigation].Apply(amount:229);
          1992-09-19  [Irrigation].Apply(amount:229);
          1992-09-30  [Irrigation].Apply(amount:229);
          1992-10-10  [Irrigation].Apply(amount:229);
          1992-10-12  [Irrigation].Apply(amount:229);
          1992-10-22  [Irrigation].Apply(amount:229);
          1992-10-29  [Irrigation].Apply(amount:229);
          1993-11-01  [Sugarcane].HillUpTheSoil(CaneFr:1.0, TopsFr:0.50);
          1992-11-07  [Irrigation].Apply(amount:229);
          1992-11-13  [Irrigation].Apply(amount:229);
          1992-11-21  [Irrigation].Apply(amount:229);
          1992-12-12  [Fertiliser].Apply(Amount:78, Type:Fertiliser.Types.UreaN, Depth:30);
          1993-01-03  [Irrigation].Apply(amount:229);
          1993-01-10  [Sugarcane].LodgeTheCane();
          1993-01-23  [Irrigation].Apply(amount:229);
          1993-02-12  [Irrigation].Apply(amount:229);
          1993-03-02  [Irrigation].Apply(amount:229);
          1993-03-13  [Irrigation].Apply(amount:229);
          1993-03-27  [Irrigation].Apply(amount:229);
          1993-04-24  [Irrigation].Apply(amount:229);
          1993-05-08  [Irrigation].Apply(amount:229);
          1993-05-28  [Irrigation].Apply(amount:229);
          1993-06-05  [Irrigation].Apply(amount:229);
          1993-06-17  [Irrigation].Apply(amount:229);
          1993-12-25  [Irrigation].Apply(amount:229);
          1993-08-14  [Sugarcane].HarvestCrop();
          1993-08-13  [SurfaceOrganicMatter].Incorporate(fraction: 0.9, depth:0);
          1993-08-23  [Irrigation].Apply(amount:228);
          1993-09-10  [Sugarcane].EndCrop();
          1993-09-11  [Sugarcane].SowRatoon(PlantingDensity:10, Depth:150, CultivarName:"Q117_fum", StartingRatoonNo:1);
          1993-10-27  [Fertiliser].Apply(Amount:227, Type:Fertiliser.Types.UreaN, Depth:30);
          1993-10-31  [Fertiliser].Apply(Amount:142, Type:Fertiliser.Types.UreaN, Depth:30);
          1993-11-02  [Irrigation].Apply(amount:228);
          1993-11-20  [Irrigation].Apply(amount:228);
          1993-12-02  [Irrigation].Apply(amount:228);
          1993-12-13  [Irrigation].Apply(amount:228);
          1993-12-24  [Irrigation].Apply(amount:228);
          1993-12-30  [Irrigation].Apply(amount:228);
          1994-01-08  [Irrigation].Apply(amount:228);
          1994-01-18  [Irrigation].Apply(amount:228);
          1994-02-17  [Irrigation].Apply(amount:228);
          1994-03-17  [Irrigation].Apply(amount:228);
          1994-03-28  [Irrigation].Apply(amount:228);
          1994-04-09  [Irrigation].Apply(amount:228);
          1994-04-27  [Irrigation].Apply(amount:228);
          1994-05-09  [Irrigation].Apply(amount:228);
          1994-05-25  [Irrigation].Apply(amount:228);
          1994-06-01  [Sugarcane].LodgeTheCane();
          1994-06-16  [Irrigation].Apply(amount:228);
          1994-07-14  [Irrigation].Apply(amount:228);
          1994-09-08  [Sugarcane].HarvestCrop();
          1994-09-08  [Sugarcane].EndCrop();
        Report: same as Dataset 1 Harwood NSW Australia.1 Harwood 1993_94 Q117 P.paddock.Report
  Folder Dataset 15 Ingham Qld Australia
    Simulation 15 Ingham 1991_92 Q117 P
      Weather: FileName=Ingham.met
      Clock: Start=1991-07-16; End=1992-07-14
      Summary summaryfile
      MicroClimate: a_interception=0; b_interception=1; c_interception=0; d_interception=0; soil_albedo=0.23; SoilHeatFluxFraction=0.4; MinimumHeightDiffForNewLayer=0; NightInterceptionFraction=0.5; ReferenceHeight=2
      Zone paddock: Area=1; Slope=0; AspectAngle=0; Altitude=50
        SurfaceOrganicMatter Surface Organic Matter: InitialResidueName=sugar_trash; InitialResidueType=Sugarcane; InitialResidueMass=100; InitialStandingFraction=1; InitialCPR=0; InitialCNR=80; FractionFaecesAdded=1
        Soil Macknade 912 P: same as Dataset 2 Ingham Qld Australia.2 Ingham 1992_93 Q117 P.paddock.Macknade 923 P
        Fertiliser
        Irrigation
        Sugarcane: same as Dataset 1 Harwood NSW Australia.1 Harwood 1993_94 Q117 P.paddock.Sugarcane
        Memo
          ### Operations

          All operation irrigations are subsurface trickle irrigation except for the following,

          1991-08-30 [Irrigation].Apply(amount:20);  // overhead portable lines

          1991-09-13 [Irrigation].Apply(amount:25);  // overhead portable lines

          1991-09-25 [Irrigation].Apply(amount:25);  // overhead portable lines

          1991-09-26 [Irrigation].Apply(amount:30);  // overhead portable lines
        Operations
          1991-07-16  [Sugarcane].SowNewPlant(PlantingDensity:10, Depth:100, CultivarName:"Q117");
          1991-07-16  [Fertiliser].Apply(Amount:15.8, Type:Fertiliser.Types.UreaN, Depth:100);
          1991-08-22  [SurfaceOrganicMatter].Incorporate(fraction: 0.5, depth:150);
          1991-08-30  [Irrigation].Apply(amount:20);
          1991-09-10  [Fertiliser].Apply(Amount:89.7, Type:Fertiliser.Types.UreaN, Depth:100);
          1991-09-13  [Irrigation].Apply(amount:25);
          1991-09-25  [Irrigation].Apply(amount:25);
          1991-09-26  [Irrigation].Apply(amount:30);
          1991-10-24  [Fertiliser].Apply(Amount:248.4, Type:Fertiliser.Types.NO3N, Depth:100);
          1991-10-27  [Irrigation].Apply(amount:60, depth:300);
          1991-10-28  [Irrigation].Apply(amount:60, depth:300);
          1991-11-05  [Irrigation].Apply(amount:37.5, depth:300);
          1991-11-12  [Irrigation].Apply(amount:22.5, depth:300);
          1991-11-15  [Irrigation].Apply(amount:22.5, depth:300);
          1991-11-22  [Irrigation].Apply(amount:22.5, depth:300);
          1991-11-26  [Irrigation].Apply(amount:22.5, depth:300);
          1991-11-29  [Irrigation].Apply(amount:22.5, depth:300);
          1991-12-02  [Irrigation].Apply(amount:5.25, depth:300);
          1991-12-06  [Irrigation].Apply(amount:22.5, depth:300);
          1991-12-17  [Irrigation].Apply(amount:22.5, depth:300);
          1991-12-20  [Irrigation].Apply(amount:22.5, depth:300);
          1991-12-23  [Irrigation].Apply(amount:12, depth:300);
          1991-12-24  [Irrigation].Apply(amount:12, depth:300);
          1991-12-30  [Irrigation].Apply(amount:13.5, depth:300);
          1991-12-31  [Irrigation].Apply(amount:9, depth:300);
          1992-01-02  [Irrigation].Apply(amount:10.5, depth:300);
          1992-01-03  [Irrigation].Apply(amount:12, depth:300);
          1992-01-08  [Irrigation].Apply(amount:36, depth:300);
          1992-01-10  [Irrigation].Apply(amount:10.5, depth:300);
          1992-01-14  [Irrigation].Apply(amount:36, depth:300);
          1992-01-16  [Irrigation].Apply(amount:36, depth:300);
          1992-01-22  [Irrigation].Apply(amount:36, depth:300);
          1992-01-24  [Irrigation].Apply(amount:12, depth:300);
          1992-01-29  [Irrigation].Apply(amount:36, depth:300);
          1992-01-31  [Irrigation].Apply(amount:22.5, depth:300);
          1992-02-18  [Irrigation].Apply(amount:36, depth:300);
          1992-02-20  [Irrigation].Apply(amount:15, depth:300);
          1992-03-31  [Sugarcane].LodgeTheCane();
          1992-07-15  [Sugarcane].HarvestCrop();
          1992-07-15  [Sugarcane].EndCrop();
        Report: same as Dataset 1 Harwood NSW Australia.1 Harwood 1993_94 Q117 P.paddock.Report
  Folder Dataset 16 Ingham Qld Australia
    Simulation 16a Ingham 1992_94 Q117 P_56N and 1R_0N
      Weather: FileName=Ingham.met
      Clock: Start=1992-07-23; End=1994-08-23
      Summary summaryfile
      MicroClimate: a_interception=0; b_interception=1; c_interception=0; d_interception=0; soil_albedo=0.23; SoilHeatFluxFraction=0.4; MinimumHeightDiffForNewLayer=0; NightInterceptionFraction=0.5; ReferenceHeight=2
      Zone paddock: Area=1; Slope=0; AspectAngle=0; Altitude=50
        SurfaceOrganicMatter Surface Organic Matter: InitialResidueName=sugar_trash; InitialResidueType=Sugarcane; InitialResidueMass=100; InitialStandingFraction=1; InitialCPR=0; InitialCNR=80; FractionFaecesAdded=1
        Soil Macknade 924 low N: Latitude=0; Longitude=0
          InitialWater Initial water: PercentMethod=0; FractionFull=1
          Physical: same as Dataset 2 Ingham Qld Australia.2 Ingham 1992_93 Q117 P.paddock.Macknade 923 P.Physical
          SoilWater: same as Dataset 2 Ingham Qld Australia.2 Ingham 1992_93 Q117 P.paddock.Macknade 923 P.SoilWater
          Organic: same as Dataset 2 Ingham Qld Australia.2 Ingham 1992_93 Q117 P.paddock.Macknade 923 P.Organic
          Chemical
            Thickness  NO3N  NH4N  PH
            200        3     6.7   6
            200        2.7   3.1   6
            200        2.1   0.6   6
            300        2     0.2   6
            300        2     0.2   6
            300        2     0.2   6
            300        2     0.2   6
          Sample Initial nitrogen: Thickness=[200, 200, 200, 300, 300, 300, 300]; SWUnits=Volumetric; OCUnits=Total; PHUnits=Water
          CERESSoilTemperature
          Nutrient: same as Dataset 1 Harwood NSW Australia.1 Harwood 1993_94 Q117 P.paddock.Harwood.Nutrient
        Fertiliser
        Irrigation
        Sugarcane: same as Dataset 1 Harwood NSW Australia.1 Harwood 1993_94 Q117 P.paddock.Sugarcane
        Memo
          ### Operations

          All operation irrigations are subsurface trickle irrigation except for the following,

          1992-09-07 [Irrigation].Apply(amount:25);  // overhead portable lines

          1992-10-01 [Irrigation].Apply(amount:25);  // overhead portable lines

          1993-10-12 [Irrigation].Apply(amount:30);  // overhead portable lines

          1993-11-08 [Irrigation].Apply(amount:35);  // overhead portable lines
        Operations
          1992-07-23  [Sugarcane].SowNewPlant(PlantingDensity:10, Depth:100, CultivarName:"Q117_fum");
          1992-07-23  [Fertiliser].Apply(Amount:56, Type:Fertiliser.Types.UreaN, Depth:100);
          1992-09-07  [Irrigation].Apply(amount:25);
          1992-10-01  [Irrigation].Apply(amount:25);
          1992-10-03  [Irrigation].Apply(amount:36, depth:300);
          1992-11-04  [Irrigation].Apply(amount:36, depth:300);
          1992-11-11  [Irrigation].Apply(amount:36, depth:300);
          1992-11-18  [Irrigation].Apply(amount:36, depth:300);
          1992-11-25  [Irrigation].Apply(amount:36, depth:300);
          1992-12-02  [Irrigation].Apply(amount:36, depth:300);
          1992-12-09  [Irrigation].Apply(amount:36, depth:300);
          1993-02-05  [Sugarcane].LodgeTheCane();
          1993-03-05  [Irrigation].Apply(amount:36, depth:300);
          1993-03-17  [Irrigation].Apply(amount:36, depth:300);
          1993-03-24  [Irrigation].Apply(amount:36, depth:300);
          1993-04-01  [Irrigation].Apply(amount:36, depth:300);
          1993-04-06  [Irrigation].Apply(amount:36, depth:300);
          1993-04-20  [Irrigation].Apply(amount:36, depth:300);
          1993-05-08  [Irrigation].Apply(amount:36, depth:300);
          1993-05-14  [Irrigation].Apply(amount:36, depth:300);
          1993-05-28  [Irrigation].Apply(amount:36, depth:300);
          1993-06-18  [Irrigation].Apply(amount:36, depth:300);
          1993-06-25  [Irrigation].Apply(amount:36, depth:300);
          1993-08-19  [Sugarcane].HarvestCrop();
          1993-10-12  [Irrigation].Apply(amount:30);
          1993-11-08  [Irrigation].Apply(amount:35);
          1993-11-19  [Irrigation].Apply(amount:5, depth:300);
          1993-11-23  [Irrigation].Apply(amount:40.5, depth:300);
          1993-12-03  [Irrigation].Apply(amount:40.5, depth:300);
          1993-12-09  [Irrigation].Apply(amount:40.5, depth:300);
          1993-12-30  [Irrigation].Apply(amount:40.5, depth:300);
          1994-01-06  [Irrigation].Apply(amount:40.5, depth:300);
          1994-01-22  [Irrigation].Apply(amount:40.5, depth:300);
          1994-01-28  [Irrigation].Apply(amount:20.35, depth:300);
          1994-03-25  [Irrigation].Apply(amount:40.5, depth:300);
          1994-04-08  [Irrigation].Apply(amount:40.5, depth:300);
          1994-04-18  [Irrigation].Apply(amount:40.5, depth:300);
          1994-04-28  [Irrigation].Apply(amount:40.5, depth:300);
          1994-05-12  [Irrigation].Apply(amount:40.5, depth:300);
          1994-05-19  [Irrigation].Apply(amount:40.5, depth:300);
          1994-05-26  [Irrigation].Apply(amount:40.5, depth:300);
          1994-06-11  [Irrigation].Apply(amount:40.5, depth:300);
          1994-06-16  [Irrigation].Apply(amount:40.5, depth:300);
          1994-06-29  [Irrigation].Apply(amount:40.5, depth:300);
          1994-07-14  [Irrigation].Apply(amount:40.5, depth:300);
          1994-08-04  [Irrigation].Apply(amount:40.5, depth:300);
          1994-08-18  [Irrigation].Apply(amount:40.5, depth:300);
          1994-08-24  [Sugarcane].HarvestCrop();
          1994-08-24  [Sugarcane].EndCrop();
        Report: same as Dataset 1 Harwood NSW Australia.1 Harwood 1993_94 Q117 P.paddock.Report
    Simulation 16b Ingham 1992_94 Q117 P_107N and 1R_55N
      Weather: FileName=Ingham.met
      Clock: Start=1992-07-23; End=1994-08-23
      Summary summaryfile
      MicroClimate: a_interception=0; b_interception=1; c_interception=0; d_interception=0; soil_albedo=0.23; SoilHeatFluxFraction=0.4; MinimumHeightDiffForNewLayer=0; NightInterceptionFraction=0.5; ReferenceHeight=2
      Zone paddock: Area=1; Slope=0; AspectAngle=0; Altitude=50
        SurfaceOrganicMatter Surface Organic Matter: InitialResidueName=sugar_trash; InitialResidueType=Sugarcane; InitialResidueMass=100; InitialStandingFraction=1; InitialCPR=0; InitialCNR=80; FractionFaecesAdded=1
        Soil Macknade 924 med N: Latitude=0; Longitude=0
          InitialWater Initial water: PercentMethod=0; FractionFull=1
          Physical: same as Dataset 2 Ingham Qld Australia.2 Ingham 1992_93 Q117 P.paddock.Macknade 923 P.Physical
          SoilWater: same as Dataset 2 Ingham Qld Australia.2 Ingham 1992_93 Q117 P.paddock.Macknade 923 P.SoilWater
          Organic: same as Dataset 2 Ingham Qld Australia.2 Ingham 1992_93 Q117 P.paddock.Macknade 923 P.Organic
          Chemical
            Thickness  NO3N  NH4N  PH
            200        3     6.4   6
            200        2.5   3.8   6
            200        1.9   1     6
            300        1.5   0.3   6
            300        1.5   0.3   6
            300        1.5   0.3   6
            300        1.5   0.3   6
          Sample Initial nitrogen: Thickness=[200, 200, 200, 300, 300, 300, 300]; SWUnits=Volumetric; OCUnits=Total; PHUnits=Water
          CERESSoilTemperature
          Nutrient: same as Dataset 1 Harwood NSW Australia.1 Harwood 1993_94 Q117 P.paddock.Harwood.Nutrient
        Fertiliser
        Irrigation
        Sugarcane: same as Dataset 1 Harwood NSW Australia.1 Harwood 1993_94 Q117 P.paddock.Sugarcane
        Memo: same as Dataset 16 Ingham Qld Australia.16a Ingham 1992_94 Q117 P_56N and 1R_0N.paddock.Memo
        Operations
          1992-07-23  [Sugarcane].SowNewPlant(PlantingDensity:10, Depth:100, CultivarName:"Q117_fum");
          1992-07-23  [Fertiliser].Apply(Amount:56, Type:Fertiliser.Types.UreaN, Depth:100);
          1992-09-07  [Irrigation].Apply(amount:25);
          1992-10-01  [Irrigation].Apply(amount:25);
          1992-10-03  [Irrigation].Apply(amount:36, depth:300);
          1992-10-13  [Fertiliser].Apply(Amount:51, Type:Fertiliser.Types.UreaN, Depth:100);
          1992-11-04  [Irrigation].Apply(amount:36, depth:300);
          1992-11-11  [Irrigation].Apply(amount:36, depth:300);
          1992-11-18  [Irrigation].Apply(amount:36, depth:300);
          1992-11-25  [Irrigation].Apply(amount:36, depth:300);
          1992-12-02  [Irrigation].Apply(amount:36, depth:300);
          1992-12-09  [Irrigation].Apply(amount:36, depth:300);
          1993-02-05  [Sugarcane].LodgeTheCane();
          1993-03-05  [Irrigation].Apply(amount:36, depth:300);
          1993-03-17  [Irrigation].Apply(amount:36, depth:300);
          1993-03-24  [Irrigation].Apply(amount:36, depth:300);
          1993-04-01  [Irrigation].Apply(amount:36, depth:300);
          1993-04-06  [Irrigation].Apply(amount:36, depth:300);
          1993-04-20  [Irrigation].Apply(amount:36, depth:300);
          1993-05-08  [Irrigation].Apply(amount:36, depth:300);
          1993-05-14  [Irrigation].Apply(amount:36, depth:300);
          1993-05-28  [Irrigation].Apply(amount:36, depth:300);
          1993-06-18  [Irrigation].Apply(amount:36, depth:300);
          1993-06-25  [Irrigation].Apply(amount:36, depth:300);
          1993-08-19  [Sugarcane].HarvestCrop();
          1993-09-21  [Fertiliser].Apply(Amount:55, Type:Fertiliser.Types.UreaN, Depth:100);
          1993-10-12  [Irrigation].Apply(amount:30);
          1993-11-08  [Irrigation].Apply(amount:35);
          1993-11-19  [Irrigation].Apply(amount:5, depth:300);
          1993-11-23  [Irrigation].Apply(amount:40.5, depth:300);
          1993-12-03  [Irrigation].Apply(amount:40.5, depth:300);
          1993-12-09  [Irrigation].Apply(amount:40.5, depth:300);
          1993-12-30  [Irrigation].Apply(amount:40.5, depth:300);
          1994-01-06  [Irrigation].Apply(amount:40.5, depth:300);
          1994-01-22  [Irrigation].Apply(amount:40.5, depth:300);
          1994-01-28  [Irrigation].Apply(amount:20.35, depth:300);
          1994-03-25  [Irrigation].Apply(amount:40.5, depth:300);
          1994-04-08  [Irrigation].Apply(amount:40.5, depth:300);
          1994-04-18  [Irrigation].Apply(amount:40.5, depth:300);
          1994-04-28  [Irrigation].Apply(amount:40.5, depth:300);
          1994-05-12  [Irrigation].Apply(amount:40.5, depth:300);
          1994-05-19  [Irrigation].Apply(amount:40.5, depth:300);
          1994-05-26  [Irrigation].Apply(amount:40.5, depth:300);
          1994-06-11  [Irrigation].Apply(amount:40.5, depth:300);
          1994-06-16  [Irrigation].Apply(amount:40.5, depth:300);
          1994-06-29  [Irrigation].Apply(amount:40.5, depth:300);
          1994-07-14  [Irrigation].Apply(amount:40.5, depth:300);
          1994-08-04  [Irrigation].Apply(amount:40.5, depth:300);
          1994-08-18  [Irrigation].Apply(amount:40.5, depth:300);
          1994-08-24  [Sugarcane].HarvestCrop();
          1994-08-24  [Sugarcane].EndCrop();
        Report: same as Dataset 1 Harwood NSW Australia.1 Harwood 1993_94 Q117 P.paddock.Report
    Simulation 16c Ingham 1992_94 Q117 P_268N and 1R_774N
      Weather: FileName=Ingham.met
      Clock: Start=1992-07-23; End=1994-08-23
      Summary summaryfile
      MicroClimate: a_interception=0; b_interception=1; c_interception=0; d_interception=0; soil_albedo=0.23; SoilHeatFluxFraction=0.4; MinimumHeightDiffForNewLayer=0; NightInterceptionFraction=0.5; ReferenceHeight=2
      Zone paddock: Area=1; Slope=0; AspectAngle=0; Altitude=50
        SurfaceOrganicMatter Surface Organic Matter: InitialResidueName=sugar_trash; InitialResidueType=Sugarcane; InitialResidueMass=100; InitialStandingFraction=1; InitialCPR=0; InitialCNR=80; FractionFaecesAdded=1
        Soil Macknade 924 high N: Latitude=0; Longitude=0
          InitialWater Initial water: PercentMethod=0; FractionFull=1
          Physical: same as Dataset 2 Ingham Qld Australia.2 Ingham 1992_93 Q117 P.paddock.Macknade 923 P.Physical
          SoilWater: same as Dataset 2 Ingham Qld Australia.2 Ingham 1992_93 Q117 P.paddock.Macknade 923 P.SoilWater
          Organic: same as Dataset 2 Ingham Qld Australia.2 Ingham 1992_93 Q117 P.paddock.Macknade 923 P.Organic
          Chemical
            Thickness  NO3N  NH4N  PH
            200        2.8   5.9   6
            200        2.7   2.8   6
            200        2.1   0.5   6
            300        1.5   0.1   6
            300        1.5   0.1   6
            300        1.5   0.1   6
            300        1.5   0.1   6
          Sample Initial nitrogen: Thickness=[200, 200, 200, 300, 300, 300, 300]; SWUnits=Volumetric; OCUnits=Total; PHUnits=Water
          CERESSoilTemperature
          Nutrient: same as Dataset 1 Harwood NSW Australia.1 Harwood 1993_94 Q117 P.paddock.Harwood.Nutrient
        Fertiliser
        Irrigation
        Sugarcane: same as Dataset 1 Harwood NSW Australia.1 Harwood 1993_94 Q117 P.paddock.Sugarcane
        Memo
          ### Operations

          All operation irrigations are subsurface trickle irrigation unless stated below,

          1992-07-23 [Fertiliser].Apply(Amount:56, Type:Fertiliser.Types.UreaN, Depth:100);

          1992-09-07 [Irrigation].Apply(amount:25);  // overhead portable lines

          1992-09-23 [Fertiliser].Apply(Amount:161, Type:Fertiliser.Types.UreaN, Depth:100);

          1992-10-01 [Irrigation].Apply(amount:25);  // overhead portable lines

          1993-02-05 [Sugarcane].LodgeTheCane();  // Plant Crop

          1993-09-20 [Fertiliser].Apply(Amount:55, Type:Fertiliser.Types.UreaN, Depth:250);

          1993-10-12 [Irrigation].Apply(amount:30);  // overhead portable lines

          1993-10-21 [Fertiliser].Apply(Amount:166, Type:Fertiliser.Types.UreaN, Depth:250);

          1993-11-08 [Fertiliser].Apply(Amount:136, Type:Fertiliser.Types.UreaN, Depth:0); // hand broadcast

          1993-11-08 [Irrigation].Apply(amount:35);  // overhead portable lines

          1993-12-30 [Fertiliser].Apply(Amount:59.5, Type:Fertiliser.Types.NH4NO3N, Depth:300); // fertigated

          1994-01-28 [Fertiliser].Apply(Amount:59.5, Type:Fertiliser.Types.NH4NO3N, Depth:300); // fertigated

          1994-03-09 [Fertiliser].Apply(Amount:59.5, Type:Fertiliser.Types.NH4NO3N, Depth:300); // fertigated

          1994-04-05 [Fertiliser].Apply(Amount:59.5, Type:Fertiliser.Types.NH4NO3N, Depth:300); // fertigated

          1994-05-10 [Fertiliser].Apply(Amount:59.5, Type:Fertiliser.Types.NH4NO3N, Depth:300); // fertigated

          1994-06-01 [Sugarcane].LodgeTheCane();  // 1st Ratoon

          1994-06-09 [Fertiliser].Apply(Amount:59.5, Type:Fertiliser.Types.NH4NO3N, Depth:300); // fertigated

          1994-07-27 [Fertiliser].Apply(Amount:59.5, Type:Fertiliser.Types.NH4NO3N, Depth:300); // fertigated
        Operations
          1992-07-23  [Sugarcane].SowNewPlant(PlantingDensity:10, Depth:100, CultivarName:"Q117_fum");
          1992-07-23  [Fertiliser].Apply(Amount:56, Type:Fertiliser.Types.UreaN, Depth:100);
          1992-09-07  [Irrigation].Apply(amount:25);
          1992-09-23  [Fertiliser].Apply(Amount:161, Type:Fertiliser.Types.UreaN, Depth:100);
          1992-10-01  [Irrigation].Apply(amount:25);
          1992-10-03  [Irrigation].Apply(amount:36, depth:300);
          1992-11-04  [Irrigation].Apply(amount:36, depth:300);
          1992-11-11  [Irrigation].Apply(amount:36, depth:300);
          1992-11-18  [Irrigation].Apply(amount:36, depth:300);
          1992-11-25  [Irrigation].Apply(amount:36, depth:300);
          1992-12-02  [Irrigation].Apply(amount:36, depth:300);
          1992-12-09  [Irrigation].Apply(amount:36, depth:300);
          1993-02-05  [Sugarcane].LodgeTheCane();
          1993-03-05  [Irrigation].Apply(amount:36, depth:300);
          1993-03-17  [Irrigation].Apply(amount:36, depth:300);
          1993-03-24  [Irrigation].Apply(amount:36, depth:300);
          1993-04-01  [Irrigation].Apply(amount:36, depth:300);
          1993-04-06  [Irrigation].Apply(amount:36, depth:300);
          1993-04-20  [Irrigation].Apply(amount:36, depth:300);
          1993-05-08  [Irrigation].Apply(amount:36, depth:300);
          1993-05-14  [Irrigation].Apply(amount:36, depth:300);
          1993-05-28  [Irrigation].Apply(amount:36, depth:300);
          1993-06-18  [Irrigation].Apply(amount:36, depth:300);
          1993-06-25  [Irrigation].Apply(amount:36, depth:300);
          1993-08-19  [Sugarcane].HarvestCrop();
          1993-09-20  [Fertiliser].Apply(Amount:55, Type:Fertiliser.Types.UreaN, Depth:250);
          1993-10-12  [Irrigation].Apply(amount:30);
          1993-10-21  [Fertiliser].Apply(Amount:166, Type:Fertiliser.Types.UreaN, Depth:250);
          1993-11-08  [Fertiliser].Apply(Amount:136, Type:Fertiliser.Types.UreaN, Depth:0);
          1993-11-08  [Irrigation].Apply(amount:35);
          1993-11-19  [Irrigation].Apply(amount:5, depth:300);
          1993-11-23  [Irrigation].Apply(amount:40.5, depth:300);
          1993-12-03  [Irrigation].Apply(amount:40.5, depth:300);
          1993-12-09  [Irrigation].Apply(amount:40.5, depth:300);
          1993-12-30  [Fertiliser].Apply(Amount:59.5, Type:Fertiliser.Types.NH4NO3N, Depth:300);
          1993-12-30  [Irrigation].Apply(amount:40.5, depth:300);
          1994-01-06  [Irrigation].Apply(amount:40.5, depth:300);
          1994-01-22  [Irrigation].Apply(amount:40.5, depth:300);
          1994-01-28  [Fertiliser].Apply(Amount:59.5, Type:Fertiliser.Types.NH4NO3N, Depth:300);
          1994-01-28  [Irrigation].Apply(amount:20.35, depth:300);
          1994-03-09  [Fertiliser].Apply(Amount:59.5, Type:Fertiliser.Types.NH4NO3N, Depth:300);
          1994-03-25  [Irrigation].Apply(amount:40.5, depth:300);
          1994-04-05  [Fertiliser].Apply(Amount:59.5, Type:Fertiliser.Types.NH4NO3N, Depth:300);
          1994-04-08  [Irrigation].Apply(amount:40.5, depth:300);
          1994-04-18  [Irrigation].Apply(amount:40.5, depth:300);
          1994-04-28  [Irrigation].Apply(amount:40.5, depth:300);
          1994-05-10  [Fertiliser].Apply(Amount:59.5, Type:Fertiliser.Types.NH4NO3N, Depth:300);
          1994-05-12  [Irrigation].Apply(amount:40.5, depth:300);
          1994-05-19  [Irrigation].Apply(amount:40.5, depth:300);
          1994-05-26  [Irrigation].Apply(amount:40.5, depth:300);
          1994-06-01  [Sugarcane].LodgeTheCane();
          1994-06-09  [Fertiliser].Apply(Amount:59.5, Type:Fertiliser.Types.NH4NO3N, Depth:300);
          1994-06-11  [Irrigation].Apply(amount:40.5, depth:300);
          1994-06-16  [Irrigation].Apply(amount:40.5, depth:300);
          1994-06-29  [Irrigation].Apply(amount:40.5, depth:300);
          1994-07-14  [Irrigation].Apply(amount:40.5, depth:300);
          1994-07-27  [Fertiliser].Apply(Amount:59.5, Type:Fertiliser.Types.NH4NO3N, Depth:300);
          1994-08-04  [Irrigation].Apply(amount:40.5, depth:300);
          1994-08-18  [Irrigation].Apply(amount:40.5, depth:300);
          1994-08-24  [Sugarcane].HarvestCrop();
          1994-08-24  [Sugarcane].EndCrop();
        Report: same as Dataset 1 Harwood NSW Australia.1 Harwood 1993_94 Q117 P.paddock.Report
  Folder Dataset 19 Simunye Swaziland
    Simulation 19a Simunye 1994_95 NCo376 1R Irrigation Treatment 1
      Weather: FileName=Simunye.met
      Clock: Start=1994-08-10; End=1995-07-26
      Summary summaryfile
      MicroClimate: a_interception=0; b_interception=1; c_interception=0; d_interception=0; soil_albedo=0.23; SoilHeatFluxFraction=0.4; MinimumHeightDiffForNewLayer=0; NightInterceptionFraction=0.5; ReferenceHeight=2
      Zone paddock: Area=1; Slope=0; AspectAngle=0; Altitude=50
        SurfaceOrganicMatter Surface Organic Matter: InitialResidueName=sugar_trash; InitialResidueType=Sugarcane; InitialResidueMass=1000; InitialStandingFraction=1; InitialCPR=0; InitialCNR=80; FractionFaecesAdded=1
        Soil Simunye: Latitude=0; Longitude=0
          Physical
            Thickness  BD    AirDry  LL15   DUL    SAT
            50         1.24  0.05    0.175  0.32   0.48
            100        1.24  0.05    0.175  0.32   0.48
            150        1.3   0.05    0.193  0.325  0.48
            150        1.26  0.05    0.221  0.341  0.48
            150        1.3   0.05    0.22   0.325  0.48
            200        1.25  0.05    0.245  0.324  0.48
            300        1.25  0.05    0.246  0.309  0.48
            450        1.25  0.05    0.241  0.313  0.48
            600        1.25  0.05    0.241  0.3    0.48
            600        1.25  0.05    0.241  0.3    0.48
            SoilCrop SugarcaneSoil
              LL=[0.175, 0.175, 0.193, 0.221, 0.22, 0.245, 0.246, 0.241, 0.241, 0.241]
              KL=[0.16, 0.14, 0.1, 0.07, 0.06, 0.05, 0.04, 0.03, 0.02, 0.01]
              XF=[1, 1, 1, 1, 1, 1, 1, 1, 1, 1]
          SoilWater: SummerDate=1-Nov; SummerU=9; SummerCona=3; WinterDate=1-Apr; WinterU=9; WinterCona=3; DiffusConst=40; DiffusSlope=16; Salb=0.17; CN2Bare=82; CNRed=20; CNCov=0.8; max_pond=0; Thickness=[50, 100, 150, 150, 150, 200, 300, 450, 600, 600]; SWCON=[0.6, 0.6, 0.6, 0.6, 0.6, 0.6, 0.6, 0.6, 0.6, 0.6]; PrecipitationInterception=0
          Organic: FOMCNRatio=70
            Thickness  Carbon  SoilCNRatio  FBiom  FInert  FOM
            50         1.3     13           0.03   0.4     201.577
            100        1       13           0.015  0.5     180.743
            150        0.8     13           0.01   0.75    153.46
            150        0.8     13           0.01   0.85    130.296
            150        0.7     13           0.005  0.9     110.628
            200        0.6     13           0.005  0.95    88.9422
            300        0.2     13           0.001  0.99    64.1173
            450        0.2     13           0.001  0.99    39.2443
            600        0.2     13           0.001  0.99    20.3944
            600        0.2     13           0.001  0.99    10.5985
          Chemical
            Thickness  NO3N      NH4N      PH
            50         2.00002   1.00005   6
            100        2.00001   1.00005   6
            150        1         1.00004   6
            150        1         0.50002   6
            150        0.999998  0.500018  6
            200        0.999995  0.500017  6
            300        0.999992  0.500014  5
            450        0.999989  0.500012  5
            600        1.00001   0.500008  5
            600        1         0.500004  5
          Sample Initial nitrogen: Thickness=[50, 100, 150, 150, 150, 200, 300, 450, 600, 600]; SWUnits=Volumetric; OCUnits=Total; PHUnits=Water
          InitialWater Initial water: PercentMethod=0; FractionFull=0
          CERESSoilTemperature
          Nutrient: same as Dataset 1 Harwood NSW Australia.1 Harwood 1993_94 Q117 P.paddock.Harwood.Nutrient
        Fertiliser
        Irrigation
        Sugarcane: same as Dataset 1 Harwood NSW Australia.1 Harwood 1993_94 Q117 P.paddock.Sugarcane
        Operations
          1994-08-10  [Sugarcane].SowRatoon(PlantingDensity:16, Depth:150, CultivarName:"NCo376", StartingRatoonNo:1);
          1994-08-11  [Fertiliser].Apply(Amount:140, Type:Fertiliser.Types.UreaN, Depth:50);
          1994-09-07  [Irrigation].Apply(amount:84.5);
          1994-09-17  [Irrigation].Apply(amount:30.5);
          1994-09-30  [Irrigation].Apply(amount:36.0);
          1994-10-11  [Irrigation].Apply(amount:28.5);
          1994-10-25  [Irrigation].Apply(amount:38.0);
          1994-11-06  [Irrigation].Apply(amount:60.5);
          1994-11-13  [Irrigation].Apply(amount:27.0);
          1994-11-29  [Irrigation].Apply(amount:31.3);
          1994-12-19  [Irrigation].Apply(amount:13.8);
          1994-12-21  [Irrigation].Apply(amount:33.8);
          1994-12-27  [Irrigation].Apply(amount:46.7);
          1995-01-03  [Irrigation].Apply(amount:32.0);
          1995-01-06  [Irrigation].Apply(amount:20.1);
          1995-01-11  [Irrigation].Apply(amount:26.7);
          1995-01-23  [Irrigation].Apply(amount:51.0);
          1995-01-27  [Irrigation].Apply(amount:33.3);
          1995-02-04  [Irrigation].Apply(amount:13.6);
          1995-02-06  [Irrigation].Apply(amount:26.0);
          1995-02-08  [Irrigation].Apply(amount:18.5);
          1995-02-09  [Irrigation].Apply(amount:10.0);
          1995-02-13  [Irrigation].Apply(amount:33.5);
          1995-02-16  [Irrigation].Apply(amount:26.0);
          1995-02-22  [Irrigation].Apply(amount:15.0);
          1995-02-28  [Irrigation].Apply(amount:35.5);
          1995-03-03  [Irrigation].Apply(amount:23.5);
          1995-03-10  [Irrigation].Apply(amount:41.0);
          1995-03-13  [Irrigation].Apply(amount:23.0);
          1995-03-15  [Irrigation].Apply(amount:16.0);
          1995-03-19  [Irrigation].Apply(amount:28.9);
          1995-03-22  [Irrigation].Apply(amount:23.6);
          1995-04-04  [Irrigation].Apply(amount:26.2);
          1995-04-06  [Irrigation].Apply(amount:30.7);
          1995-04-08  [Irrigation].Apply(amount:11.0);
          1995-04-12  [Irrigation].Apply(amount:26.0);
          1995-04-21  [Irrigation].Apply(amount:39.5);
          1995-04-27  [Irrigation].Apply(amount:24.2);
          1995-05-03  [Irrigation].Apply(amount:14.3);
          1995-05-08  [Irrigation].Apply(amount:4.2);
          1995-05-16  [Irrigation].Apply(amount:19.0);
          1995-05-22  [Irrigation].Apply(amount:23.0);
          1995-05-26  [Irrigation].Apply(amount:9.0);
          1995-05-31  [Irrigation].Apply(amount:18.7);
          1995-06-05  [Irrigation].Apply(amount:17.9);
          1995-06-07  [Irrigation].Apply(amount:10.5);
          1995-06-13  [Irrigation].Apply(amount:18.5);
          1995-06-19  [Irrigation].Apply(amount:27.5);
          1995-06-26  [Irrigation].Apply(amount:23.5);
          1995-07-03  [Irrigation].Apply(amount:23.0);
          1995-07-06  [Irrigation].Apply(amount:14.5);
          1995-07-11  [Irrigation].Apply(amount:20.0);
          1995-07-17  [Irrigation].Apply(amount:24.0);
          1995-07-27  [Sugarcane].HarvestCrop();
          1995-07-27  [Sugarcane].EndCrop();
        Report: same as Dataset 1 Harwood NSW Australia.1 Harwood 1993_94 Q117 P.paddock.Report
    Simulation 19b Simunye 1994_95 NCo376 1R Irrigation Treatment 2
      Weather: FileName=Simunye.met
      Clock: Start=1994-08-10; End=1995-07-26
      Summary summaryfile
      MicroClimate: a_interception=0; b_interception=1; c_interception=0; d_interception=0; soil_albedo=0.23; SoilHeatFluxFraction=0.4; MinimumHeightDiffForNewLayer=0; NightInterceptionFraction=0.5; ReferenceHeight=2
      Zone paddock: Area=1; Slope=0; AspectAngle=0; Altitude=50
        SurfaceOrganicMatter Surface Organic Matter: InitialResidueName=sugar_trash; InitialResidueType=Sugarcane; InitialResidueMass=1000; InitialStandingFraction=1; InitialCPR=0; InitialCNR=80; FractionFaecesAdded=1
        Soil Simunye: same as Dataset 19 Simunye Swaziland.19a Simunye 1994_95 NCo376 1R Irrigation Treatment 1.paddock.Simunye
        Fertiliser
        Irrigation
        Sugarcane: same as Dataset 1 Harwood NSW Australia.1 Harwood 1993_94 Q117 P.paddock.Sugarcane
        Operations
          1994-08-10  [Sugarcane].SowRatoon(PlantingDensity:16, Depth:150, CultivarName:"NCo376", StartingRatoonNo:1);
          1994-08-11  [Fertiliser].Apply(Amount:140, Type:Fertiliser.Types.UreaN, Depth:50);
          1994-09-07  [Irrigation].Apply(amount:83.6);
          1994-09-27  [Irrigation].Apply(amount:35.5);
          1994-09-29  [Irrigation].Apply(amount:24.5);
          1994-11-02  [Irrigation].Apply(amount:60.0);
          1994-11-18  [Irrigation].Apply(amount:50.2);
          1994-12-22  [Irrigation].Apply(amount:60.0);
          1995-01-04  [Irrigation].Apply(amount:60.0);
          1995-01-13  [Irrigation].Apply(amount:59.3);
          1995-01-26  [Irrigation].Apply(amount:59.5);
          1995-02-07  [Irrigation].Apply(amount:57.5);
          1995-02-13  [Irrigation].Apply(amount:49.0);
          1995-02-27  [Irrigation].Apply(amount:60.0);
          1995-01-13  [Irrigation].Apply(amount:59.3);
          1995-03-09  [Irrigation].Apply(amount:60.0);
          1995-03-15  [Irrigation].Apply(amount:34.0);
          1995-03-20  [Irrigation].Apply(amount:39.5);
          1995-04-05  [Irrigation].Apply(amount:57.4);
          1995-04-15  [Irrigation].Apply(amount:35.5);
          1995-04-26  [Irrigation].Apply(amount:47.2);
          1995-05-18  [Irrigation].Apply(amount:51.6);
          1995-06-01  [Irrigation].Apply(amount:50.4);
          1995-01-13  [Irrigation].Apply(amount:59.3);
          1995-06-15  [Irrigation].Apply(amount:21.0);
          1995-06-22  [Irrigation].Apply(amount:59.0);
          1995-07-05  [Irrigation].Apply(amount:45.5);
          1995-07-18  [Irrigation].Apply(amount:56.0);
          1995-07-27  [Sugarcane].HarvestCrop();
          1995-07-27  [Sugarcane].EndCrop();
        Report: same as Dataset 1 Harwood NSW Australia.1 Harwood 1993_94 Q117 P.paddock.Report
    Simulation 19c Simunye 1994_95 NCo376 1R Irrigation Treatment 3
      Weather: FileName=Simunye.met
      Clock: Start=1994-08-10; End=1995-07-26
      Summary summaryfile
      MicroClimate: a_interception=0; b_interception=1; c_interception=0; d_interception=0; soil_albedo=0.23; SoilHeatFluxFraction=0.4; MinimumHeightDiffForNewLayer=0; NightInterceptionFraction=0.5; ReferenceHeight=2
      Zone paddock: Area=1; Slope=0; AspectAngle=0; Altitude=50
        SurfaceOrganicMatter Surface Organic Matter: InitialResidueName=sugar_trash; InitialResidueType=Sugarcane; InitialResidueMass=1000; InitialStandingFraction=1; InitialCPR=0; InitialCNR=80; FractionFaecesAdded=1
        Soil Simunye: same as Dataset 19 Simunye Swaziland.19a Simunye 1994_95 NCo376 1R Irrigation Treatment 1.paddock.Simunye
        Fertiliser
        Irrigation
        Sugarcane: same as Dataset 1 Harwood NSW Australia.1 Harwood 1993_94 Q117 P.paddock.Sugarcane
        Operations
          1994-08-10  [Sugarcane].SowRatoon(PlantingDensity:16, Depth:150, CultivarName:"NCo376", StartingRatoonNo:1);
          1994-08-11  [Fertiliser].Apply(Amount:140, Type:Fertiliser.Types.UreaN, Depth:50);
          1994-09-07  [Irrigation].Apply(amount:83.1);
          1994-09-22  [Irrigation].Apply(amount:29.6);
          1994-10-12  [Irrigation].Apply(amount:30.1);
          1994-10-28  [Irrigation].Apply(amount:32.1);
          1994-11-10  [Irrigation].Apply(amount:45.3);
          1994-11-30  [Irrigation].Apply(amount:33.8);
          1994-12-21  [Irrigation].Apply(amount:38.4);
          1994-12-27  [Irrigation].Apply(amount:41.1);
          1995-01-03  [Irrigation].Apply(amount:27.1);
          1995-01-07  [Irrigation].Apply(amount:28.3);
          1995-01-12  [Irrigation].Apply(amount:21.5);
          1995-01-24  [Irrigation].Apply(amount:41.2);
          1995-01-28  [Irrigation].Apply(amount:27.1);
          1995-02-04  [Irrigation].Apply(amount:15.7);
          1995-02-07  [Irrigation].Apply(amount:23.7);
          1995-02-09  [Irrigation].Apply(amount:13.1);
          1995-02-13  [Irrigation].Apply(amount:28.3);
          1995-02-17  [Irrigation].Apply(amount:25.6);
          1995-02-22  [Irrigation].Apply(amount:13.6);
          1995-03-02  [Irrigation].Apply(amount:45.8);
          1995-03-09  [Irrigation].Apply(amount:35.7);
          1995-03-13  [Irrigation].Apply(amount:22.0);
          1995-03-15  [Irrigation].Apply(amount:7.0);
          1995-03-16  [Irrigation].Apply(amount:26.7);
          1995-03-22  [Irrigation].Apply(amount:24.6);
          1995-04-03  [Irrigation].Apply(amount:32.6);
          1995-04-07  [Irrigation].Apply(amount:20.5);
          1995-04-10  [Irrigation].Apply(amount:15.3);
          1995-04-13  [Irrigation].Apply(amount:16.2);
          1995-04-23  [Irrigation].Apply(amount:23.5);
          1995-04-28  [Irrigation].Apply(amount:25.1);
          1995-05-05  [Irrigation].Apply(amount:12.6);
          1995-05-18  [Irrigation].Apply(amount:20.7);
          1995-05-25  [Irrigation].Apply(amount:17.3);
          1995-05-30  [Irrigation].Apply(amount:15.4);
          1995-06-06  [Irrigation].Apply(amount:19.0);
          1995-06-13  [Irrigation].Apply(amount:17.6);
          1995-06-22  [Irrigation].Apply(amount:20.4);
          1995-06-27  [Irrigation].Apply(amount:19.8);
          1995-07-04  [Irrigation].Apply(amount:18.0);
          1995-07-10  [Irrigation].Apply(amount:20.1);
          1995-07-14  [Irrigation].Apply(amount:13.5);
          1995-07-19  [Irrigation].Apply(amount:17.7);
          1995-07-27  [Sugarcane].HarvestCrop();
          1995-07-27  [Sugarcane].EndCrop();
        Report: same as Dataset 1 Harwood NSW Australia.1 Harwood 1993_94 Q117 P.paddock.Report
    Simulation 19d Simunye 1994_95 NCo376 1R Irrigation Treatment 4
      Weather: FileName=Simunye.met
      Clock: Start=1994-08-10; End=1995-07-26
      Summary summaryfile
      MicroClimate: a_interception=0; b_interception=1; c_interception=0; d_interception=0; soil_albedo=0.23; SoilHeatFluxFraction=0.4; MinimumHeightDiffForNewLayer=0; NightInterceptionFraction=0.5; ReferenceHeight=2
      Zone paddock: Area=1; Slope=0; AspectAngle=0; Altitude=50
        SurfaceOrganicMatter Surface Organic Matter: InitialResidueName=sugar_trash; InitialResidueType=Sugarcane; InitialResidueMass=1000; InitialStandingFraction=1; InitialCPR=0; InitialCNR=80; FractionFaecesAdded=1
        Soil Simunye: same as Dataset 19 Simunye Swaziland.19a Simunye 1994_95 NCo376 1R Irrigation Treatment 1.paddock.Simunye
        Fertiliser
        Irrigation
        Sugarcane: same as Dataset 1 Harwood NSW Australia.1 Harwood 1993_94 Q117 P.paddock.Sugarcane
        Operations
          1994-08-10  [Sugarcane].SowRatoon(PlantingDensity:16, Depth:150, CultivarName:"NCo376", StartingRatoonNo:1);
          1994-08-11  [Fertiliser].Apply(Amount:140, Type:Fertiliser.Types.UreaN, Depth:50);
          1994-09-07  [Irrigation].Apply(amount:83.0);
          1994-10-15  [Irrigation].Apply(amount:36.0);
          1994-10-27  [Irrigation].Apply(amount:35.3);
          1994-11-09  [Irrigation].Apply(amount:52.8);
          1994-11-22  [Irrigation].Apply(amount:25.7);
          1994-12-01  [Irrigation].Apply(amount:30.5);
          1994-12-22  [Irrigation].Apply(amount:44.2);
          1994-12-28  [Irrigation].Apply(amount:26.1);
          1995-01-04  [Irrigation].Apply(amount:32.0);
          1995-01-07  [Irrigation].Apply(amount:25.3);
          1995-01-12  [Irrigation].Apply(amount:21.5);
          1995-01-25  [Irrigation].Apply(amount:45.6);
          1995-01-30  [Irrigation].Apply(amount:32.1);
          1995-02-06  [Irrigation].Apply(amount:34.0);
          1995-02-08  [Irrigation].Apply(amount:15.0);
          1995-02-14  [Irrigation].Apply(amount:29.3);
          1995-02-17  [Irrigation].Apply(amount:19.5);
          1995-02-23  [Irrigation].Apply(amount:10.0);
          1995-03-01  [Irrigation].Apply(amount:38.3);
          1995-03-04  [Irrigation].Apply(amount:18.9);
          1995-03-11  [Irrigation].Apply(amount:35.2);
          1995-03-14  [Irrigation].Apply(amount:18.7);
          1995-03-17  [Irrigation].Apply(amount:20.9);
          1995-03-20  [Irrigation].Apply(amount:6.5);
          1995-03-21  [Irrigation].Apply(amount:21.1);
          1995-04-04  [Irrigation].Apply(amount:38.1);
          1995-04-07  [Irrigation].Apply(amount:15.0);
          1995-04-11  [Irrigation].Apply(amount:20.0);
          1995-04-18  [Irrigation].Apply(amount:26.5);
          1995-04-25  [Irrigation].Apply(amount:14.1);
          1995-05-02  [Irrigation].Apply(amount:29.4);
          1995-05-17  [Irrigation].Apply(amount:18.8);
          1995-05-24  [Irrigation].Apply(amount:20.1);
          1995-05-29  [Irrigation].Apply(amount:16.3);
          1995-06-05  [Irrigation].Apply(amount:19.8);
          1995-06-09  [Irrigation].Apply(amount:14.1);
          1995-06-14  [Irrigation].Apply(amount:13.6);
          1995-06-21  [Irrigation].Apply(amount:27.9);
          1995-07-27  [Sugarcane].HarvestCrop();
          1995-07-27  [Sugarcane].EndCrop();
        Report: same as Dataset 1 Harwood NSW Australia.1 Harwood 1993_94 Q117 P.paddock.Report
  DataStore
    Input: FileName=Observed\All_Observed.txt
    PredictedObserved: PredictedTableName=Report; ObservedTableName=Input; FieldNameUsedForMatch=Clock.Today
      Tests: POName=PredictedObserved
        AcceptedStats:
          Name             n    Slope      Intercept   SEslope    SEintercept  R2        RMSE      NSE        ME          MAE        RSR
          biomass          189  0.985565   16.896      0.027567   116.739      0.872371  949.817   0.857519   -32.2712    663.44     0.376467
          cab_N            158  0.302943   0.265225    0.0349344  0.0875083    0.325258  1.6207    -0.632956  -1.24051    1.27165    1.27382
          cane_dmc         188  -0.517471  0.450821    0.107334   0.0235483    0.111083  0.286902  -5.61023   0.164181    0.164751   2.56419
          cane_N           168  0.931116   1.28893     0.0477612  0.512061     0.696006  4.49761   0.605933   0.739524    3.18071    0.625877
          cane_wt          196  1.05163    6.31828     0.0309613  98.1091      0.856049  891.5     0.807141   131.938     605.526    0.438035
          canefw           188  0.867052   -5.46627    0.0323567  4.0251       0.794262  38.35     0.719292   -18.9167    28.82      0.528408
          das              198  0.539557   99.7008     0.0394804  12.8781      0.487945  124.719   0.453221   -28.8535    32.8939    0.737575
          green_biomass    182  1.01654    -47.2253    0.0310863  116.37       0.855921  905.48    0.82578    3.22083     649.839    0.416249
          green_biomass_n  166  0.819947   1.58079     0.0454531  0.861327     0.664909  6.2249    0.611303   -1.31916    4.6512     0.621575
          lai              185  0.773126   0.765903    0.0441563  0.207142     0.626195  1.29362   0.582055   -0.196709   0.978542   0.644737
          leaf_N           170  0.839383   0.00939496  0.0545269  0.357218     0.585157  2.17122   0.35041    -0.949765   1.66788    0.803598
          scmst            143  0.946278   -0.0118372  0.0448847  0.016854     0.759167  0.105619  0.689208   -0.0292536  0.0710536  0.555534
          scmstf           143  0.995943   0.0107155   0.0479344  0.00486335   0.753795  0.034144  0.643047   0.0103754   0.0234722  0.595363
          sucrose_wt       152  1.0899     -111.014    0.0487159  78.4791      0.76942   604.009   0.635925   2.45783     394.328    0.601398
        AcceptedStatsName=Name n Slope Intercept SEslope SEintercept R2 RMSE NSE ME MAE RSR
    TimeSeriesStats: TableName=PredictedObserved
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