Simulations: Version=168
  Memo README
    # The APSIM SWIM3 Model

    Neil Huth, Dean Holzworth, Eric Zurcher (CSIRO, Australia)

    Rogerio Cichota (Plant and Food Research, New Zealand)

    Val Snow (AgResearch, New Zealand)

    ## Acknowledgements

    The addition of SWIM3 into APSIM NextGeneration was completed using funding from CSIRO’s internal funding (SIP) and AgResearch’s Strategic Science Investment Fund. We also acknowledge the valuable data and simulations supplied for validation from Laura Buckthought (Auckland Council, New Zealand) and Sotirios Archontoulis (Iowa State University, USA). SWIM3 builds on the work of Peter Ross and Kirsten Verburg (CSIRO).

    ## Introduction

    SWIM3 is a model that stores and moves water and chemicals through the soil. It's function is analogous to the SoilWater model (so the two models would never appear in the same zone in a simulation). However, the underlying methods used to calculate water and solute movement are very different in teh two models and those methods give SWIM3 much more flexibility that SoilWater – particularly when needing complex boundary conditions (e.g., tile drained soils).

    SWIM3’s origins lie in a standalone model from Peter Ross (CSIRO) developed in the 1980s. The underlying functions are based on Richards’ equation for water movement and the convection-dispersion equation with a Freundlich solute isotherm for the movement of chemicals (nutrients and other species). The model, still as a standalone model, was extensively documented in [verburg_methodology_1996] and that reference remains the source of definitive information about the functioning of the model itself. Since that time there have been changes in the user interface, some changes in the scope of the standalone version model to make it compatible with APSIM ([Huth_1996]), and more recently the method for supplying the hydraulic parameters for the model ([Huth2012SWIM3]).

    Because [verburg_methodology_1996], and also [cichota_protocol_2021], document the processes and parameters in detail, this document only covers major differences to those publications and some tricks and tips on using the model.

    ## Special features – why use SWIM3 rather than SoilWater?

    SWIM3 is not as easy to use as SoilWater, is slower and will sometimes and frustratingly crash during a simulation with a numerical convergence error (see more below). Given that, why use SWIM3 at all? Essentially these boil down to needing features that SWIM3 can provide that SoilWater cannot. These include:
    * Needing a seepage boundary condition while modelling a lysimeter experiment. Experimentally, the lower boundary is open to atmospheric pressure and that materially affects water and solute movement.
    * Needing to incorporate the effects of tile drainage or a regional water table into the simulation.
    * SWIM3 has a more realistic treatment of solute mobility and adsorption than SoilWater (in which solute are either mobile or immobile) and this may be important depending on the purpose of the simulation.
    * SoilWater requires as relatively thick (15-20 mm) layer at the soil surface and this can be problematic for questions related to surface processes that change quickly with depth in the soil. Here SWIM3’s thinner layers at the soil surface may be a better solution.
    * SWIM3 actually has fewer parameters because evaporative losses and water redistribution within the soil are calculated from soil hydraulic properties rather than requiring extra parameters as in SoilWater (e.g. U, cona, diffusivity slope and constant).

    ## Major differences compared to the Verburg report

    SWIM3 was developed from a standalone model. Because it was a standalone model, it included some functionality already provided by crop or other models in APSIM and so that were discarded when ported into APSIM. These included:

    * Initial conditions are given by the UI or other models as volumetric water content rather than soil water potential;
    * The constant potential top boundary condition was not enabled
    * Surface sealing functions were not enabled

    *For the top boundary conditions and infiltration:*

    * No infiltration is achieved by setting a curve number of 100
    * No runoff is handled with a curve number of 0 (except if infiltration is restricted by sub-surface hydraulic properites)
    * The power-law function option is set using the Manager script “SWIMSetSurfaceBC” – that script is found in the Soil folder of the Management toolbox
    * The subsurface downslope runoff function was not enabled

    *For the lower boundary conditions the Manager script “SWIMSetLowerBC” (in the Soil toolbox) was written:*

    * The “given matric potential gradient” boundary condition is enabled as the default with unit gradient (“gradient” in the Manager script)
    * The “given potential” is enabled as “potential” in the Manager. For this boundary condition the value sets a potential relative to the lower depth of the soil. If the soil is 1000 mm deep and a potential of +200 mm is set then a water table will be set at 800 mm deep and water continually added or removed to/from the lowest soil layer to maintain that water table. Setting a value of -1000 mm as the constant potential would continually add or remove water to maintain that matric potential.
    * The “zero flux” boundary condition was not enabled
    * The “seepage” was enabled with a threshold suction of zero to mimic lysimeter conditions.

    *Other differences*

    * In SWIM3 in APSIM NextGeneration there is no water or solute uptake as these functions are handled by the combination of the SoilArbitrator and the crop models
    * “Potential subsurface downslope flow” was not enabled
    * The methods for specifying the conductivity and soil water retention were replaced as described in [Huth2012SWIM3] to provide greater accessibility for users unfamiliar with the functional forms used in SWIM2
    * Hysteresis was not enabled
    * Because SWIM3 does not perform the soil water or solute uptake, osmotic effects on these processes are of course not enabled
    * Evapotranspiration is not enabled as this is handled by other APSIM models
    * Rainfall is assumed to arrive evenly during the day
    * Irrigation duration is taken from the irrigation command and the start time is taken as midnight
    * Rainfall/irrigation intensity effects on soil surface roughness are not enabled
    * Cultivation effects on soil physical properties are not enabled

    ## Units

    Note that [verburg_methodology_1996] and the more interior parts of the SWIM3 code work in units of cm and hours but from the user’s perspective (inputs and outputs when used in APSIM) the standard APSIM units of mm and days are used.

    ## Layering for APSIM and nodes for SWIM3

    Numerical solutions for problems such as the Richards’ equation work on the basis of a network (here a one-dimensional array with depth) of nodes. A node is a notional point in space that contain all the mass in the simulation. There are known/set distances between the nodes and calculated resistances to flow of mass between the nodes. This is quite different to the layering approach used in APSIM so a conversion or mapping between the two systems is essential. The conversion in handled in the software so, in most circumstances, the user does not need to understand the mechanism. The exception is when there are numerical convergence issues and then understanding the layering and its effects is important.

    Node-based systems require nodes to be placed at each end of the simulated space (ie top and bottom boundary).  The remainder are currently placed in the middle of each internal layer.   The placement of nodes is diagrammed in Figure 1.
    Users should take care to extend the base of the soil profile well below the depth of interest (usually the rooting depth). In particular the soil depth should be well below any water table or tile drain depth AND there should be several (more than two) layers placed between the water table depth or tile drain depth and the base of the soil profile.

    Understanding the node concept is important when using REPORT, when specifying initial water contents by layer and when trying to align measured soil water to predicted soil water values. For example, when you output SW[1] you get soil water content at node 1 (the surface). Likewise SW[7] will be at the bottom of the profile. The same applies when you specify initial water in the GUI. Internally to SWIM, sw = theta. There are no back calculations to convert from nodes to layers.

    ![](Swim-layers.png)

    Figure 1. Relationship between APSIM layers and SWIM3 nodes

    ## Convergence issues

    The numerical solution methods in SWIM3 give the model considerable flexibility in the boundary conditions but come at a cost of increased execution time and the possibility of some simulations failing when the equations do not numerically converge. See [verburg_methodology_1996] for more information on stability but here are some quick tips or approaches:

    * Put more layers (i.e., make them thinner) near the soil surface, at the base of the profile, around the interfaces of soil horizons with sharp changes in hydraulic parameters, and around features such as tile drains. The use of the LayerStructure model is highly recommended. The top layer should not be greater than 10 mm thick and the deepest layer should not be greater than 200 mm thick.
    * Default values of the maximum timestep and maximum water increment are 1440 min and 10 mm. Reducing these, to say 30 min and 2 mm, will fix many convergence problems.
    * There are space weighting factors available on the user interface that can assist with stability but these require careful usage as they can generate a simulation that runs but that gives unreliable results. See [verburg_methodology_1996] for details.
    * If the error message on non-convergence is related to solutes, consider reducing the nonlinearity (i.e., move the value of fip closer to 1.0) of the solute adsorption isotherm.

    ## Issues and further development needs

    Much of the inner code of SWIM3 is very old. The original code was in an early version of Fortran (maybe Fortran 66, possibly even some legacy Fortran IV). Because of the complexities of:
    * short variable names (a feature of early Fortran) as well as;
    * complex code to manage memory usage (these days not an issue) and execution time and the known;
    * near impossibility find and fix any introduced errors;
    each of the four major modifications of the code was done with the lightest touch possible. Thus, while the code is now all in C#, there are substantial important parts of the model that still look Fortran-like. Finding the source of errors is challenging even with a modern debugger because of the code structure. At some point in the future the code will become unsupportable. Addressing this issue would be advisable but would require substantial funding.

    In the current state of SWIM3, simulations are quite unstable when the exponent on the Freundlich solute isotherm is much less then about 0.75 (lower values make the isotherm more nonlinear). This is something that should be addressed in the future along with alternative isotherm formulations.
  Folder Replacements
  DataStore
  Folder Sensibility
    Folder ResidueBreakdown
      Memo
        This sensibility test demonstrates the effect of residue type on decomposition rate and residue cover.  Equal amounts of wheat and chickpea residues are set at initialisation.
        Chickpea residues decompose more quickly because of its lower C:N ratio.  Cover provided by residue is initially lower for chickpea because if its lower specific area, and overall because of the higher decomposition rate.
      Experiment ResidueBreakdown
        Memo
          # Overview

          The surface organic matter model allows residues of different types to be applied to the soil surface.  Residue quality (e.g. C:N) affects soil cover and rate of decomposition.  Multiple residue types can be present at the same time, with interactions between residues of different quality.
        Factors
          Factor Type: Specification=[SurfaceOrganicMatter]
            SurfaceOrganicMatter Wheat: InitialResidueName=Wheat; InitialResidueType=wheat; InitialResidueMass=2000; InitialStandingFraction=0; InitialCPR=0; InitialCNR=100
            SurfaceOrganicMatter Chickpea: InitialResidueName=Wheat; InitialResidueType=chickpea; InitialResidueMass=2000; InitialStandingFraction=0; InitialCPR=0; InitialCNR=36
        Simulation ResidueBreakdownBase
          Clock: Start=1990-01-01; End=1990-12-31
          Summary SummaryFile
          Weather: FileName=%root%\Examples\WeatherFiles\Dalby.met
          MicroClimate: a_interception=0; b_interception=1; c_interception=0; d_interception=0; SoilHeatFluxFraction=0.4; MinimumHeightDiffForNewLayer=0; NightInterceptionFraction=0.5; ReferenceHeight=2
          SoilArbitrator
          Zone Field: Area=1; Slope=0; AspectAngle=0; Altitude=50
            Report: EventNames=[Clock].DoReport
              VariableNames:
                [Clock].Today
                [SurfaceOrganicMatter].Wt
                [SurfaceOrganicMatter].N
                [SurfaceOrganicMatter].Cover
            Fertiliser
            Soil: ASCOrder=Vertosol; ASCSubOrder=Black; SoilType=Clay; Site=Norwin; NearestTown=Norwin; Region=Darling Downs and Granite Belt; State=Queensland; Country=Australia; NaturalVegetation=Qld. Bluegrass, possible Qld. Blue gum; ApsoilNumber=900; Latitude=-27.581836; Longitude=151.320206; LocationAccuracy=+/- 20m
              DataSource=CSIRO Sustainable Ecosystems, Toowoomba; Characteriesd as part of the GRDC funded project"Doing it better, doing it smarter, managing soil water in Australian agriculture' 2011
              Comments=OC, CLL for all crops estimated-based on Bongeen Mywybilla Soil No1
              Physical
                Thickness  BD       AirDry    LL15      DUL       SAT       KS
                150        1.01056  0.13025   0.2605    0.521     0.588655  20
                150        1.07146  0.198689  0.248362  0.496723  0.565677  20
                300        1.09394  0.28      0.28      0.488438  0.557193  20
                300        1.15861  0.28      0.28      0.480297  0.532787  20
                300        1.17301  0.28      0.28      0.471584  0.527354  20
                300        1.16287  0.28      0.28      0.457071  0.53118   20
                300        1.1875   0.28      0.28      0.452332  0.521888  20
                SoilCrop WheatSoil: LL=[0.261, 0.248, 0.28, 0.306, 0.36, 0.392, 0.446]; KL=[0.06, 0.06, 0.06, 0.04, 0.04, 0.02, 0.01]; XF=[1, 1, 1, 1, 1, 1, 1]
              WaterBalance SoilWater: SummerDate=1-Nov; SummerU=5; SummerCona=5; WinterDate=1-Apr; WinterU=5; WinterCona=5; DiffusConst=40; DiffusSlope=16; Salb=0.12; CN2Bare=73; CNRed=20; CNCov=0.8; PSIDul=-100; Thickness=[150, 150, 300, 300, 300, 300, 300]; SWCON=[0.3, 0.3, 0.3, 0.3, 0.3, 0.3, 0.3]
              Organic: FOMCNRatio=40; CarbonUnits=Total
                Thickness  Carbon  SoilCNRatio  FBiom  FInert  FOM
                150        1.2     12           0.04   0.4     347.129
                150        0.96    12           0.02   0.6     270.344
                300        0.6     12           0.02   0.8     163.972
                300        0.3     12           0.02   1       99.4541
                300        0.18    12           0.01   1       60.322
                300        0.12    12           0.01   1       36.5871
                300        0.12    12           0.01   1       22.1912
              Chemical: Thickness=[150, 150, 300, 300, 300, 300, 300]; PH=[8, 8, 8, 8, 8, 8, 8]; PHUnits=Water
              Water: Thickness=[150, 150, 300, 300, 300, 300, 300]; InitialPAWmm=361.245; RelativeTo=LL15; FilledFromTop=false
                InitialValues=[0.521, 0.496723, 0.488438, 0.480297, 0.471584, 0.457071, 0.452332]
              CERESSoilTemperature Temperature
              Nutrient
              Solute NO3: Thickness=[150, 150, 300, 300, 300, 300, 300]; InitialValues=[1, 1, 1, 1, 1, 1, 1]; InitialValuesUnits=ppm; WaterTableConcentration=0; D0=0; DepthConstant=0; MaxDepthSoluteAccessible=0; RunoffEffectivenessAtMovingSolute=0; MaxEffectiveRunoff=0
              Solute NH4: Thickness=[150, 150, 300, 300, 300, 300, 300]; InitialValues=[0.1, 0.1, 0.1, 0.1, 0.1, 0.1, 0.1]; InitialValuesUnits=ppm; WaterTableConcentration=0; D0=0; DepthConstant=0; MaxDepthSoluteAccessible=0; RunoffEffectivenessAtMovingSolute=0; MaxEffectiveRunoff=0
              Solute Urea: Thickness=[150, 150, 300, 300, 300, 300, 300]; InitialValues=[0, 0, 0, 0, 0, 0, 0]; InitialValuesUnits=kg/ha; WaterTableConcentration=0; D0=0; DepthConstant=0; MaxDepthSoluteAccessible=0; RunoffEffectivenessAtMovingSolute=0; MaxEffectiveRunoff=0
            SurfaceOrganicMatter: InitialResidueName=wheat_stubble; InitialResidueType=wheat; InitialResidueMass=500; InitialStandingFraction=0; InitialCPR=0; InitialCNR=100
    Folder ResidueOrientation
      Memo
        This sensibility test demonstrates the effect of residue orientation on decomposition rate and residue cover.  Equal amounts of wheat residues are set at initialisation but as lying and standing residues.
        Standing residues do not decompose and provide less cover because of their orientation.
      Experiment ResidueOrientation
        Memo
          # Overview

          The surface organic matter model allows residues of different types to be applied to the soil surface.  Residue quality (e.g. C:N) affects soil cover and rate of decomposition.  Multiple residue types can be present at the same time, with interactions between residues of different quality.
        Factors
          Factor Type: Specification=[SurfaceOrganicMatter]
            SurfaceOrganicMatter Standing: InitialResidueName=Wheat; InitialResidueType=wheat; InitialResidueMass=2000; InitialStandingFraction=1; InitialCPR=0; InitialCNR=100
            SurfaceOrganicMatter Lying: InitialResidueName=Wheat; InitialResidueType=wheat; InitialResidueMass=2000; InitialStandingFraction=0; InitialCPR=0; InitialCNR=100
        Simulation ResidueOrientationBase: same as Sensibility.ResidueBreakdown.ResidueBreakdown.ResidueBreakdownBase
    Folder ResidueAddition
      Memo
        This sensibility test demonstrates the effect of monthly additions of residues differing in orientation on decomposition rate and residue cover.
      Experiment ResidueAddition
        Memo
          # Overview

          The surface organic matter model allows residues of different types to be applied to the soil surface.  Residue quality (e.g. C:N) affects soil cover and rate of decomposition.  Multiple residue types can be present at the same time, with interactions between residues of different quality.
        Factors
          Factor Type: Specification=[Manager]
            Manager Lying
```csharp
using System;
using Models.Core;
using Models.Interfaces;
using Models.PMF;
using APSIM.Shared.Utilities;

namespace Models
{
    [Serializable]
    public class Script : Model
    {
        [Link] IClock Clock;
        [Link] ISummary Summary;
        [Link] ISurfaceOrganicMatter SOM;

        [EventSubscribe("DoManagement")]
        private void DoDailyCalculations(object sender, EventArgs e)
        {
         if (Clock.Today.Day == 1)
            SOM.Add(1000.0, 10.0, 1.0,"wheat","wheat_stubble");
            
        }
    }
}
```
            Manager Standing
```csharp
using System;
using Models.Core;
using Models.Interfaces;
using Models.PMF;
using APSIM.Shared.Utilities;

namespace Models
{
    [Serializable]
    public class Script : Model
    {
        [Link] IClock Clock;
        [Link] ISummary Summary;
        [Link] ISurfaceOrganicMatter SOM;

        [EventSubscribe("DoManagement")]
        private void DoDailyCalculations(object sender, EventArgs e)
        {
         if (Clock.Today.Day == 1)
            SOM.Add(1000.0, 10.0, 1.0,"wheat","wheat_stubble",1.0);
            
        }
    }
}
```
            Manager Mixed
```csharp
using System;
using Models.Core;
using Models.Interfaces;
using Models.PMF;
using APSIM.Shared.Utilities;

namespace Models
{
    [Serializable]
    public class Script : Model
    {
        [Link] IClock Clock;
        [Link] ISummary Summary;
        [Link] ISurfaceOrganicMatter SOM;

        [EventSubscribe("DoManagement")]
        private void DoDailyCalculations(object sender, EventArgs e)
        {
         if (Clock.Today.Day == 1)
            SOM.Add(1000.0, 10.0, 1.0,"wheat","wheat_stubble",0.5);
            
        }
    }
}
```
        Simulation ResidueAdditionBase
          Clock: Start=1990-01-01; End=1990-12-31
          Summary SummaryFile
          Weather: FileName=%root%\Examples\WeatherFiles\Dalby.met
          MicroClimate: a_interception=0; b_interception=1; c_interception=0; d_interception=0; SoilHeatFluxFraction=0.4; MinimumHeightDiffForNewLayer=0; NightInterceptionFraction=0.5; ReferenceHeight=2
          SoilArbitrator
          Zone Field: Area=1; Slope=0; AspectAngle=0; Altitude=50
            Report: EventNames=[Clock].DoReport
              VariableNames:
                [Clock].Today
                [SurfaceOrganicMatter].Wt
                [SurfaceOrganicMatter].N
                [SurfaceOrganicMatter].Cover
                [Clock].Today.Day
            Fertiliser
            Soil: same as Sensibility.ResidueBreakdown.ResidueBreakdown.ResidueBreakdownBase.Field.Soil
            SurfaceOrganicMatter: InitialResidueName=wheat_stubble; InitialResidueType=wheat; InitialResidueMass=0; InitialStandingFraction=0; InitialCPR=0; InitialCNR=100
            Manager
```csharp
using System;
using Models.Core;
using Models.Interfaces;
using Models.PMF;
using APSIM.Shared.Utilities;

namespace Models
{
    [Serializable]
    public class Script : Model
    {
        [Link] IClock Clock;
        [Link] ISummary Summary;

        [EventSubscribe("DoManagement")]
        private void DoDailyCalculations(object sender, EventArgs e)
        {
            // Called once per day
        }
    }
}
```
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