Simulations: Version=160
  Folder Replacements
    Plant Soybean
      Folder FACTS
        Cultivar FACTS_P92Y75
          Command:
            [Phenology].Vegetative.Target.FixedValue = 300
            [Phenology].EarlyFlowering.Target.FixedValue = 100
            [Phenology].EarlyGrainFilling.Target.FractionofGrainfilling.FixedValue = 0.15
            [Phenology].LateGrainFilling.Target.EntireGrainfillPeriod.FixedValue = 660
            [Phenology].VegetativePhotoperiodModifier.XYPairs.X = 13.59, 17.61
            [Phenology].ReproductivePhotoperiodModifier.XYPairs.X = 13.59, 17.61
            [Leaf].AreaLargestLeaf.FixedValue=0.007
            [Soybean].Root.SpecificRootLength.FixedValue=130
            [Soybean].Root.RootFrontVelocity.early.Function.FixedValue=22
            [Stem].PotentialGrowth.PartitionFraction.StemGrowthPhase.StemFraction.FixedValue=0.35
        Cultivar FACTS_P932T16
          Command:
            [Phenology].Vegetative.Target.FixedValue = 330
            [Phenology].EarlyFlowering.Target.FixedValue = 100
            [Phenology].EarlyGrainFilling.Target.FractionofGrainfilling.FixedValue = 0.05
            [Phenology].LateGrainFilling.Target.EntireGrainfillPeriod.FixedValue = 660
            [Phenology].VegetativePhotoperiodModifier.XYPairs.X = 13.5, 17.5
            [Phenology].ReproductivePhotoperiodModifier.XYPairs.X = 13.5, 17.5
            [Soybean].Root.SpecificRootLength.FixedValue=130
            [Soybean].Root.RootFrontVelocity.early.Function.FixedValue=22
            [Stem].PotentialGrowth.PartitionFraction.StemGrowthPhase.StemFraction.FixedValue=0.35
        Cultivar MG_2: same as Replacements.Soybean.FACTS.FACTS_P92Y75
        Cultivar MG_3: same as Replacements.Soybean.FACTS.FACTS_P932T16
      OrganArbitrator Arbitrator
        BiomassTypeArbitrator DMArbitration
          Folder PotentialPartitioningMethods
            ReallocationMethod
            AllocateFixationMethod
            RetranslocationMethod
            SendPotentialDMAllocationsMethod
          Folder AllocationMethods
            NutrientConstrainedAllocationMethod
            DryMatterAllocationsMethod
          RelativeAllocation ArbitrationMethod
        BiomassTypeArbitrator NArbitration
          Folder PotentialPartitioningMethods
            ReallocationMethod
          Folder ActualPartitioningMethods
            AllocateFixationMethod
            RetranslocationMethod
          Folder AllocationMethods
            NitrogenAllocationsMethod
          RelativeAllocation ArbitrationMethod
          AllocateUptakesMethod
        WaterUptakeMethod
        NitrogenUptakeMethod
      Phenology
        Memo Introduction
          In the new model we simplified phenology by taking out stages that are not measurable (e.g. end of juvenile stage) and by adding new stages that are measurable (e.g. start pod).
          The new phenology follows the V/R staging system.

          ![Comparison of soybean phenological stages for APSIM Classic and APSIM Next Generation.](Diagrams_soy_phenology_comparison.png)
        Memo
          The key differences for cultivars are mostly phenological parameters (e.g., Vegetative.Target, ReproductivePhotoperiodModifier). In some cases, some additional parameters have been changed, see parameter values in the cultivar section.
        SubDailyInterpolation VegetativeThermalTime: agregationMethod=0
          XYPairs Response: X=[10, 20, 30, 40]; Y=[0, 10, 20, 0]
          ThreeHourAirTemperature InterpolationMethod
        LinearInterpolationFunction VegetativePhotoperiodModifier
          XYPairs: X=[14.43, 21.19]; Y=[1, 0]
          Memo
            These parameters are overridden by cultivar parameter descriptions to capture the difference between individual cultivars in terms of their phenological development.  Responses shown here are only indicative.  See cultivar descriptions for more information.
          VariableReference XValue: VariableName=[Phenology].Photoperiod
        SubDailyInterpolation ReproductiveThermalTime: agregationMethod=0
          XYPairs Response: X=[10, 15, 30, 40]; Y=[5, 5, 20, 0]
          ThreeHourAirTemperature InterpolationMethod
          Memo
            Cardinal temperatures for vegetative and reproductive thermal time are the same except the range of 0-15° C. A base temperature of 10° C is used for vegetative phase, which temperature has been used to calibrate 56 soybean cultivars in the USA ([ARCHONTOULIS2014465]) and 72 soybean cultivars in China ([WU2019125940]). The small changes in cardinal temperatures for reproductive thermal time was important for solving issues related to photoperiod response for some Australian cultivars. Such a differentiation in base temperature between V and R stages is supported by [BootChapter1998], DSSAT-CROPGRO soybean model, who showed that cardinal temperatures may differ for vegetative and reproductive development for soybean. This is something to further explore as new data from other environments are added to the APSIM NG database.
        LinearInterpolationFunction ReproductivePhotoperiodModifier: same as Replacements.Soybean.Phenology.VegetativePhotoperiodModifier
        PhaseLookup ThermalTime
          PhaseLookupValue PreEmergence: Start=Sowing; End=Emergence
            VariableReference Base: VariableName=[Phenology].VegetativeThermalTime
          PhaseLookupValue VegetativeGrowth: Start=Emergence; End=EndCanopyDevelopment
            MultiplyFunction TT
              VariableReference Base: VariableName=[Phenology].VegetativeThermalTime
              VariableReference PPModifier: VariableName=[Phenology].VegetativePhotoperiodModifier
          PhaseLookupValue ReproductiveGrowth: Start=EndCanopyDevelopment; End=HarvestRipe
            MultiplyFunction TT
              VariableReference Base: VariableName=[Phenology].ReproductiveThermalTime
              VariableReference PPModifier: VariableName=[Phenology].ReproductivePhotoperiodModifier
        PhotoperiodFunction Photoperiod: Twilight=0; DayLength=0
        GerminatingPhase Germinating: Start=Sowing; End=Germination
        EmergingPhase Emerging: Start=Germination; End=Emergence; TTForTimeStep=0
          VariableReference ThermalTime: VariableName=[Phenology].VegetativeThermalTime
          AddFunction Target
            Constant ShootLag: FixedValue=10
            MultiplyFunction DepthxRate
              VariableReference SowingDepth: VariableName=[Plant].SowingData.Depth
              Constant ShootRate: FixedValue=1
        GenericPhase Vegetative: Start=Emergence; End=StartFlowering
          Constant Target: FixedValue=200
          VariableReference Progression: VariableName=[Phenology].ThermalTime
        GenericPhase EarlyFlowering: Start=StartFlowering; End=StartPodDevelopment
          Memo
            The duration of the grain filling phase has been taken from the model of Robertson et al (2002).
          Constant Target: FixedValue=200
          VariableReference Progression: VariableName=[Phenology].ThermalTime
        GenericPhase EarlyPodDevelopment: Start=StartPodDevelopment; End=StartGrainFilling
          Memo
            The duration of the grain filling phase has been taken from the model of Robertson et al (2002).
          Constant Target: FixedValue=140
          VariableReference Progression: VariableName=[Phenology].ThermalTime
        GenericPhase EarlyGrainFilling: Start=StartGrainFilling; End=EndCanopyDevelopment
          MultiplyFunction Target
            Constant FractionofGrainfilling: FixedValue=0.05
            VariableReference EntireGrainfilling
              VariableName=[Phenology].LateGrainFilling.Target.EntireGrainfillPeriod.FixedValue
          VariableReference Progression: VariableName=[Phenology].ThermalTime
        GenericPhase MidGrainFilling: Start=EndCanopyDevelopment; End=EndPodDevelopment
          MultiplyFunction Target
            Constant FractionofMidToLateGrainfilling: FixedValue=0.5
            SubtractFunction MidToLateGrainfilling
              VariableReference EntireGrainfilling
                VariableName=[Phenology].LateGrainFilling.Target.EntireGrainfillPeriod.FixedValue
              VariableReference EarlyGrainfilling: VariableName=[Phenology].EarlyGrainFilling.Target
          VariableReference Progression: VariableName=[Phenology].ThermalTime
        GenericPhase LateGrainFilling: Start=EndPodDevelopment; End=EndGrainFill
          SubtractFunction Target
            Constant EntireGrainfillPeriod: FixedValue=500
            VariableReference EarlyGrainFillingTarget: VariableName=[Phenology].EarlyGrainFilling.Target
            VariableReference MidGrainFillingTarget: VariableName=[Phenology].MidGrainFilling.Target
          VariableReference Progression: VariableName=[Phenology].ThermalTime
        GenericPhase Maturing: Start=EndGrainFill; End=Maturity
          Constant Target: FixedValue=45
          VariableReference Progression: VariableName=[Phenology].ThermalTime
        GenericPhase Ripening: Start=Maturity; End=HarvestRipe
          Constant Target: FixedValue=45
          VariableReference Progression: VariableName=[Phenology].ThermalTime
        EndPhase ReadyForHarvesting: Start=HarvestRipe; End=Unused
          VariableReference ThermalTime: VariableName=[Phenology].ThermalTime
        OnEventFunction EmergenceDAS: SetEvent=Emergence; ReSetEvent=never
          Memo
            A function is used to provide emergence date as days after sowing(DAS).
          Constant PreEventValue: FixedValue=0
          VariableReference PostEventValue: VariableName=[Plant].DaysAfterSowing
        OnEventFunction FloweringDAS: SetEvent=StartFlowering; ReSetEvent=never
          Memo
            A function is used to provide flowering date as days after sowing(DAS).
          Constant PreEventValue: FixedValue=0
          VariableReference PostEventValue: VariableName=[Plant].DaysAfterSowing
        OnEventFunction MaturityDAS: SetEvent=Maturity; ReSetEvent=never
          Memo
            A function is used to provide maturity date as days after sowing(DAS).
          Constant PreEventValue: FixedValue=0
          VariableReference PostEventValue: VariableName=[Plant].DaysAfterSowing
      SimpleLeaf Leaf: Albedo=0.25; Gsmax350=0.015; R50=150; LeafInitialisationStage=Emergence; Height=0; BaseHeight=0; Width=0; FRGR=0; PotentialEP=0; WaterDemand=0; KDead=0.2; LAIDead=0
        RUEModel Photosynthesis
          Constant RUE: FixedValue=1.2
            Memo
              This value has been fitted to available data. In contrast to Classic, the RUE value in NG refers to the whole plant (above and below ground) and the calibrated value is 1.2 g/MJ. There are no literature references for whole plant RUE in soybean. To come up with this value we considered: RUE for above ground biomass ([SINCLAIR198929]; [VANROEKEL20141189]), biomass and root data from Iowa FACTS experiments and model fitting to available data.
          WeightedTemperatureFunction FT: MaximumTemperatureWeighting=0.5
            XYPairs: X=[10, 20, 30, 40]; Y=[0, 1, 1, 0]
            Memo
              The function for temperature effect on RUE comes from APSIM classic, which seems to work well across diverse environments. We did not find any comments/suggestions in the published papers suggesting alternative ones, so for now we used the same function. As more data from different environments are added to APSIM database, it will be possible to further test the photosynthetic temperature response in the future.
          LinearInterpolationFunction FVPD
            XYPairs: X=[0, 10, 50]; Y=[1, 1, 1]
            VariableReference XValue: VariableName=[Leaf].Photosynthesis.VPD
          LinearInterpolationFunction FN
            XYPairs: X=[0, 1, 1.5]; Y=[0, 1, 1]
            VariableReference XValue: VariableName=[Leaf].Fn
          LinearInterpolationFunction FW
            XYPairs: X=[0, 1]; Y=[0, 1]
            VariableReference XValue: VariableName=[Leaf].Fw
          RUECO2Function FCO2: PhotosyntheticPathway=C3
          VariableReference RadnInt: VariableName=[Leaf].RadiationIntercepted
        StomatalConductanceCO2Modifier
          VariableReference PhotosynthesisCO2Modifier: VariableName=[Leaf].Photosynthesis.FCO2
        MultiplyFunction Area
          VariableReference SLA: VariableName=[Leaf].SpecificArea
          VariableReference LeafLiveWt: VariableName=[Leaf].Live.Wt
        MinimumFunction FRGR
          VariableReference RUE_FT: VariableName=[Leaf].Photosynthesis.FT
          MinimumFunction Others
            VariableReference RUE_FN: VariableName=[Leaf].Photosynthesis.FN
            VariableReference RUE_FVPD: VariableName=[Leaf].Photosynthesis.FVPD
        LinearInterpolationFunction ExtinctionCoefficient
          XYPairs: X=[200, 1000]; Y=[0.6, 0.4]
          VariableReference XValue: VariableName=[Soybean].SowingData.RowSpacing
        LinearInterpolationFunction Tallness
          XYPairs: X=[1, 2, 3, 4, 5, 6, 9]; Y=[0, 0, 50, 400, 700, 900, 1000]
          VariableReference XValue: VariableName=[Phenology].Stage
        AccumulateFunction NodeNumber: StartStageName=Emergence; EndStageName=EndCanopyDevelopment; FractionRemovedOnCut=1; FractionRemovedOnHarvest=1; FractionRemovedOnGraze=1; FractionRemovedOnPrune=0
          DivideFunction DeltaNode
            VariableReference ThermalTime: VariableName=[Phenology].VegetativeThermalTime
            VariableReference Phyllochron: VariableName=[Leaf].Phyllochron
        Constant NReallocationFactor: FixedValue=1
          Memo
            This model assumes that all metabolic and storage N is available for reallocation from senescing leaves.
        PhaseLookup SenescenceRate
          PhaseLookupValue Vegetative: Start=Emergence; End=EndCanopyDevelopment
            Constant Rate: FixedValue=0
          PhaseLookupValue Reproductive: Start=EndCanopyDevelopment; End=Maturity
            DivideFunction Rate
              VariableReference TT: VariableName=[Phenology].ThermalTime
              SubtractFunction TTRemaining
                ExpressionFunction TTRequired
                  Expression=[Phenology].MidGrainFilling.Target + [Phenology].LateGrainFilling.Target + [Phenology].Maturing.Target
                ExpressionFunction TTComplete
                  Expression=[Phenology].MidGrainFilling.ProgressThroughPhase + [Phenology].LateGrainFilling.ProgressThroughPhase + [Phenology].Maturing.ProgressThroughPhase
            Memo
              Leaf senescence rate is calculated to ensure that all leaves are senesced by crop maturity.
            Memo Memo1
              There is no data on detachment rates and so a simple value was chosen to ensure that leaves were not retained in the canopy. In the future, with more data available a thermal time basis leaf detachment rate will be explored.
        Constant DetachmentRate: FixedValue=0.05; Units=/d
        Constant InitialWt: FixedValue=1
        MultiplyFunction LAIDead
          VariableReference SLA: VariableName=[Leaf].SpecificArea
          VariableReference LeafDeadWt: VariableName=[Leaf].Dead.Wt
        LinearInterpolationFunction MaximumNConc
          XYPairs: X=[3, 4, 9]; Y=[0.06, 0.05, 0.03]
          VariableReference XValue: VariableName=[Phenology].Stage
          Memo
            These values have been fitted to the available data. The fitted values are within the observed maximum and minimum values obtained in the FACTS soybean experiments ([ARCHONTOULIS2020721]).
        LinearInterpolationFunction CriticalNConc
          XYPairs: X=[3, 4, 9]; Y=[0.06, 0.05, 0.03]
          VariableReference XValue: VariableName=[Phenology].Stage
        Constant MinimumNConc: FixedValue=0.02
        Constant MaintenanceRespiration: FixedValue=0; Units=0-1
        Constant DMConversionEfficiency: FixedValue=1; Units=0-1
        BiomassRemoval BiomassRemovalDefaults
          OrganBiomassRemovalType Harvest: FractionLiveToRemove=0; FractionDeadToRemove=0; FractionLiveToResidue=1; FractionDeadToResidue=1
          OrganBiomassRemovalType Cut: FractionLiveToRemove=0; FractionDeadToRemove=0; FractionLiveToResidue=1; FractionDeadToResidue=1
        Constant NRetranslocationFactor: FixedValue=0.5
        Constant DMReallocationFactor: FixedValue=0
        Constant DMRetranslocationFactor: FixedValue=0
        Constant RemobilisationCost: FixedValue=0
        Constant CarbonConcentration: FixedValue=0.4
        NutrientDemandFunctions DMDemands
          DivideFunction Structural
            VariableReference DeltaLAI: VariableName=[Leaf].DeltaLAI
            VariableReference SLA: VariableName=[Leaf].SpecificArea
            Memo
              Growth in leaf area is used to calculate the leaf dry matter demand. The same was assumed in the original crop models in APSIM. Further model development can be taken once new experimental data for metabolic, structural and storage forms are provided.
            Memo Memo1
              DeltaLAI describes the LAI variation over the cycle and is calculated using the Area of Largest Leaf, relative leaf area, plant number, branch number and leaf appearance rate (thermal time/phyllochron).
          Constant Storage: FixedValue=0
          Constant Metabolic: FixedValue=0
          Constant QStructuralPriority: FixedValue=1
          Constant QMetabolicPriority: FixedValue=1
          Constant QStoragePriority: FixedValue=1
        NutrientDemandFunctions NDemands
          MultiplyFunction Structural
            VariableReference MinNconc: VariableName=[Leaf].minimumNconc
            VariableReference PotentialDMAllocation: VariableName=[Leaf].potentialDMAllocation.Structural
          MultiplyFunction Metabolic
            SubtractFunction MetabolicNconc
              VariableReference CritNconc: VariableName=[Leaf].criticalNConc
              VariableReference MinNconc: VariableName=[Leaf].minimumNconc
            VariableReference PotentialDMAllocation: VariableName=[Leaf].potentialDMAllocation.Structural
          StorageNDemandFunction Storage
            Constant NitrogenDemandSwitch: FixedValue=1
            VariableReference MaxNconc: VariableName=[Leaf].maximumNconc
          Constant QStructuralPriority: FixedValue=1
          Constant QMetabolicPriority: FixedValue=1
          Constant QStoragePriority: FixedValue=1
        LinearInterpolationFunction FrostFraction
          XYPairs: X=[-4, 4]; Y=[1, 0]
          VariableReference XValue: VariableName=[Weather].MinT
        LinearInterpolationFunction SpecificArea
          XYPairs: X=[0.1, 6]; Y=[0.03, 0.03]
          VariableReference XValue: VariableName=[Leaf].LAI
        PhaseLookup DeltaLAI
          Memo
            DeltaLAI describes the LAI variation over the cycle and is calculated using the Area of Largest Leaf, relative leaf area, plant number, branch number and leaf appearance rate (thermal time/phyllochron).
          PhaseLookupValue Vegetative: Start=Emergence; End=EndCanopyDevelopment
            MultiplyFunction Delta
              VariableReference AreaLargestLeaf: VariableName=[Leaf].AreaLargestLeaf
              PhaseLookup RelativeArea
                PhaseLookupValue BeforeEndPod: Start=Emergence; End=StartPodDevelopment
                  LinearInterpolationFunction RelativeArea
                    XYPairs: X=[2, 7, 10, 18]; Y=[0.6666, 1, 1, 0.83]
                    VariableReference XValue: VariableName=[Leaf].NodeNumber
                PhaseLookupValue AfterEndPod: Start=StartPodDevelopment; End=EndCanopyDevelopment
                  Constant RelativeArea: FixedValue=0.4
              VariableReference PlantNumber: VariableName=[Soybean].SowingData.Population
              LinearInterpolationFunction Branches
                XYPairs: X=[0, 6, 7, 8, 9]; Y=[1, 1, 2, 2, 2]
                VariableReference XValue: VariableName=[Leaf].NodeNumber
              DivideFunction LAR
                VariableReference TT: VariableName=[Phenology].VegetativeThermalTime
                VariableReference Phyllochron: VariableName=[Leaf].Phyllochron
          PhaseLookupValue Reproductive: Start=EndCanopyDevelopment; End=Maturity
            Constant: FixedValue=0
        Constant AreaLargestLeaf: FixedValue=0.006
        Constant Phyllochron: FixedValue=45
        DivideFunction SLN
          VariableReference LiveN: VariableName=[Leaf].Live.N
          VariableReference LAI: VariableName=[Leaf].LAI
      ReproductiveOrgan Grain: GrowthRespiration=0; MaintenanceRespiration=0
        Biomass Live
        Biomass Dead
        Constant PotentialHarvestIndex: FixedValue=0.5
        AddFunction FillingDuration
          VariableReference EarlyGrainFillingDuration: VariableName=[Phenology].EarlyGrainFilling.Target
          VariableReference MidGrainFillingDuration: VariableName=[Phenology].MidGrainFilling.Target
          VariableReference LateGrainFillingDuration: VariableName=[Phenology].LateGrainFilling.Target
        PhaseLookup DMDemandFunction
          PhaseLookupValue GrainFilling: Start=StartGrainFilling; End=EndGrainFill
            MultiplyFunction HIGrainDemand
              VariableReference AboveGroundWt: VariableName=[AboveGround].Wt
              DivideFunction HarvestIndexIncrease
                VariableReference PotentialHarvestIndex: VariableName=[Grain].PotentialHarvestIndex
                VariableReference FillingDuration: VariableName=[Grain].FillingDuration
              VariableReference ThermalTime: VariableName=[Phenology].ThermalTime
        Constant MinimumNConc: FixedValue=0.05
        Constant MaximumNConc: FixedValue=0.058
        Constant WaterContent: FixedValue=0.12
        MultiplyFunction NFillingRate
          VariableReference NConc: VariableName=[Grain].MaximumNConc
          VariableReference DMDemand: VariableName=[Grain].DMDemandFunction
          VariableReference DMConversionEfficiency: VariableName=[Grain].DMConversionEfficiency
        BiomassRemoval BiomassRemovalDefaults
          OrganBiomassRemovalType Harvest: FractionLiveToRemove=1; FractionDeadToRemove=1; FractionLiveToResidue=0; FractionDeadToResidue=0
          OrganBiomassRemovalType Cut: FractionLiveToRemove=0; FractionDeadToRemove=0; FractionLiveToResidue=1; FractionDeadToResidue=1
        Constant DMConversionEfficiency: FixedValue=0.89
        Constant RemobilisationCost: FixedValue=0
        Constant CarbonConcentration: FixedValue=0.4
        DivideFunction HarvestIndex
          VariableReference GrainWt: VariableName=[Grain].Wt
          VariableReference AboveGroundWt: VariableName=[AboveGround].Wt
        Constant MaximumPotentialGrainSize: FixedValue=0
          Memo
            This parameter is not used.  Grain growth is calculated from harvest index increase.
        Constant NumberFunction: FixedValue=0
          Memo
            Grain number is not estimated by this model.
        NutrientPoolFunctions DMDemandPriorityFactors
          Constant Structural: FixedValue=1
          Constant Metabolic: FixedValue=1
          Constant Storage: FixedValue=1
        NutrientPoolFunctions NDemandPriorityFactors: same as Replacements.Soybean.Grain.DMDemandPriorityFactors
      Root: GrowthRespiration=0; MaintenanceRespiration=0
        PhaseLookup RootFrontVelocity
          PhaseLookupValue PreEmergence: Start=Germination; End=Emergence
            Constant Function: FixedValue=5
          PhaseLookupValue early: Start=Emergence; End=StartGrainFilling
            Constant Function: FixedValue=30
          PhaseLookupValue late: Start=StartGrainFilling; End=Maturity
            Constant Function: FixedValue=5
        Constant RootDepthStressFactor: FixedValue=1
          Memo
            No effect of soil water or temperature is considered for daily increases in rooting depth.
        Constant MaximumRootDepth: FixedValue=1000000
          Memo
            There is no intrinsic limit to maximum rooting depth.  Roots will be limited by the depth of the soil profile, or via values of XF in each layer.
        RootShapeCylinder RootShape
        Constant KLModifier: FixedValue=1; Units=0-1
          Memo
            No modification to water extraction rate is assumed in this model.
        LinearInterpolationFunction MaxDailyNUptake
          XYPairs: X=[0, 5]; Y=[1, 3]
          VariableReference XValue: VariableName=[Leaf].LAI
        Constant SenescenceRate: FixedValue=0.005; Units=/d
          Memo
            Roots are assumed to simply senesce at a small and constant rate during the entire growth period.
        Constant MaximumNConc: FixedValue=0.01
        Constant MinimumNConc: FixedValue=0.005
        PhaseLookupValue NitrogenDemandSwitch: Start=Emergence; End=EndGrainFill
          Constant: FixedValue=1
        LinearInterpolationFunction KNO3
          XYPairs: X=[0, 0.003]; Y=[0.02, 0.02]
          VariableReference XValue: VariableName=[Root].LengthDensity
        LinearInterpolationFunction KNH4
          XYPairs: X=[0, 0.003]; Y=[0, 0]
          VariableReference XValue: VariableName=[Root].LengthDensity
          Memo
            The current model version considers only NO3 uptake but NH4 option can be activated by the user (e.g. [Root].KNH4.XYPairs.Y=0.01,0.01). We do not expect activation of NH4 to change total plant N uptake because the nitrification rate (conversion of NH4 to NO3) is very fast in the model. In the future we will re-valuate this.
        BiomassRemoval BiomassRemovalDefaults
          Memo
            Default values for biomass removals for Root are only estimates with no data behind them.
            They are just to consider potential root senescence in response to damage.
          OrganBiomassRemovalType Harvest: FractionLiveToRemove=0; FractionDeadToRemove=0; FractionLiveToResidue=0.2; FractionDeadToResidue=0
          OrganBiomassRemovalType Cut: FractionLiveToRemove=0; FractionDeadToRemove=0; FractionLiveToResidue=0.2; FractionDeadToResidue=0
        LinearInterpolationFunction NUptakeSWFactor
          XYPairs: X=[0, 1]; Y=[0, 1]
          VariableReference XValue: VariableName=[Root].RWC
        Constant SpecificRootLength: FixedValue=40; Units=m/g
        Constant DMConversionEfficiency: FixedValue=1
        Constant MaintenanceRespirationFunction: FixedValue=1
        Constant RemobilisationCost: FixedValue=0
        Constant CarbonConcentration: FixedValue=0.4
        NutrientDemandFunctions DMDemands
          MultiplyFunction Structural
            PartitionFractionDemandFunction DMDemandFunction
              PhaseLookup PartitionFraction
                PhaseLookupValue Early: Start=Emergence; End=StartFlowering
                  Constant Function: FixedValue=0.2
                PhaseLookupValue Middle: Start=StartFlowering; End=StartGrainFilling
                  Constant Function: FixedValue=0.2
                PhaseLookupValue Late: Start=StartGrainFilling; End=Maturity
                  Constant Function: FixedValue=0.05
            Constant StructuralFraction: FixedValue=1
          Constant Metabolic: FixedValue=0
          StorageDMDemandFunction Storage
            SubtractFunction StorageFraction
              Constant One: FixedValue=1
              VariableReference StructuralFraction: VariableName=[Root].DMDemands.Structural.StructuralFraction
          Constant QStructuralPriority: FixedValue=1
          Constant QMetabolicPriority: FixedValue=1
          Constant QStoragePriority: FixedValue=1
        NutrientDemandFunctions NDemands
          MultiplyFunction Structural
            VariableReference MinNconc: VariableName=[Root].minimumNconc
            VariableReference PotentialDMAllocation: VariableName=[Root].potentialDMAllocation.Structural
          MultiplyFunction Metabolic
            SubtractFunction MetabolicNconc
              VariableReference CritNconc: VariableName=[Root].criticalNConc
              VariableReference MinNconc: VariableName=[Root].minimumNconc
            VariableReference PotentialDMAllocation: VariableName=[Root].potentialDMAllocation.Structural
          StorageNDemandFunction Storage
            VariableReference NitrogenDemandSwitch: VariableName=[Root].nitrogenDemandSwitch
            VariableReference MaxNconc: VariableName=[Root].maximumNconc
          Constant QStructuralPriority: FixedValue=1
          Constant QMetabolicPriority: FixedValue=1
          Constant QStoragePriority: FixedValue=1
        VariableReference CriticalNConc: VariableName=[Root].MinimumNConc
        NutrientPoolFunctions InitialWt
          Constant Structural: FixedValue=0.2; Units=g/plant
          Constant Metabolic: FixedValue=0
          Constant Storage: FixedValue=0
        ExpressionFunction RSRatio: Expression=divide([Root].Live.Wt,[AboveGroundLive].Wt)
      Nodule
        Constant FixationMetabolicCost: FixedValue=0
        Constant MaximumNConc: FixedValue=0.02
        Constant MinimumNConc: FixedValue=0.01
        Constant SenescenceRate: FixedValue=0
        Constant NReallocationFactor: FixedValue=0
        PhaseLookupValue NitrogenDemandSwitch: Start=Emergence; End=EndGrainFill
          Constant: FixedValue=1
        BiomassRemoval BiomassRemovalDefaults: same as Replacements.Soybean.Root.BiomassRemovalDefaults
        Constant InitialWtFunction: FixedValue=0; Units=g/m^2
        Constant DetachmentRateFunction: FixedValue=0; Units=/d
        Constant MaintenanceRespirationFunction: FixedValue=0; Units=0-1
        Constant DMConversionEfficiency: FixedValue=1; Units=0-1
        Constant NRetranslocationFactor: FixedValue=0
        Constant DMReallocationFactor: FixedValue=0
        Constant DMRetranslocationFactor: FixedValue=0
        VariableReference CriticalNConc: VariableName=[Nodule].MinimumNConc
        Constant RemobilisationCost: FixedValue=0
        Constant CarbonConcentration: FixedValue=0.4
        HoldFunction FixationRate: WhenToHold=StartGrainFilling
          MinimumFunction DailyPotentialFixationRate
            MultiplyFunction PotentialFixationRate
              VariableReference LiveBiomass: VariableName=[AboveGroundLive].Wt
              PhaseLookup SpecificFixationRate
                PhaseLookupValue VegetativeGrowth: Start=Emergence; End=StartFlowering
                  Constant Rate: FixedValue=0.006
                PhaseLookupValue ReproductiveGrowth: Start=StartFlowering; End=EndGrainFill
                  Constant Rate: FixedValue=0.002
            Constant MaximumFixationRate: FixedValue=0.6; Units=g/g
        NutrientPoolFunctions DMDemands
          MultiplyFunction Structural
            PartitionFractionDemandFunction DMDemandFunction
              PhaseLookup PartitionFraction
                PhaseLookupValue Early: Start=Emergence; End=StartFlowering
                  Constant Function: FixedValue=0.03
                PhaseLookupValue Middle: Start=StartFlowering; End=StartGrainFilling
                  Constant Function: FixedValue=0.02
                PhaseLookupValue Late: Start=StartGrainFilling; End=Maturity
                  Constant Function: FixedValue=0
            Constant StructuralFraction: FixedValue=1; Units=g/g
          Constant Metabolic: FixedValue=0
          StorageDMDemandFunction Storage
            SubtractFunction StorageFraction
              Constant One: FixedValue=1
              VariableReference StructuralFraction: VariableName=[Nodule].DMDemands.Structural.StructuralFraction
        NutrientPoolFunctions NDemands
          MultiplyFunction Structural
            VariableReference MinNconc: VariableName=[Nodule].minimumNconc
            VariableReference PotentialDMAllocation: VariableName=[Nodule].potentialDMAllocation.Structural
          MultiplyFunction Metabolic
            SubtractFunction MetabolicNconc
              VariableReference CritNconc: VariableName=[Nodule].criticalNConc
              VariableReference MinNconc: VariableName=[Nodule].minimumNconc
            VariableReference PotentialDMAllocation: VariableName=[Nodule].potentialDMAllocation.Structural
          StorageNDemandFunction Storage
            VariableReference NitrogenDemandSwitch: VariableName=[Nodule].nitrogenDemandSwitch
            VariableReference MaxNconc: VariableName=[Nodule].maximumNconc
      GenericOrgan Shell: IsAboveGround=true
        Constant NReallocationFactor: FixedValue=1
        Constant NRetranslocationFactor: FixedValue=0.5
        Constant MaximumNConc: FixedValue=0.045
        VariableReference CriticalNConc: VariableName=[Shell].MinimumNConc
        Constant MinimumNConc: FixedValue=0.01
        Constant DMRetranslocationFactor: FixedValue=0.1
        PhaseLookupValue NitrogenDemandSwitch: Start=StartPodDevelopment; End=EndPodDevelopment
          Constant: FixedValue=1
        BiomassRemoval BiomassRemovalDefaults: same as Replacements.Soybean.Leaf.BiomassRemovalDefaults
        PhaseLookup SenescenceRate
          PhaseLookupValue ReproductivePhase: Start=StartPodDevelopment; End=Maturity
            MinimumFunction Rate
              DivideFunction Fraction
                VariableReference TT: VariableName=[Phenology].ThermalTime
                SubtractFunction TTRemaining
                  ExpressionFunction ReproductiveTT
                    Expression=[Phenology].EarlyPodDevelopment.Target+[Phenology].EarlyGrainFilling.Target+[Phenology].MidGrainFilling.Target+[Phenology].LateGrainFilling.Target
                  ExpressionFunction ReproductiveTT1Complete
                    Expression=[Phenology].EarlyPodDevelopment.ProgressThroughPhase+[Phenology].EarlyGrainFilling.ProgressThroughPhase+[Phenology].MidGrainFilling.ProgressThroughPhase+[Phenology].LateGrainFilling.ProgressThroughPhase
              Constant One: FixedValue=1
        Constant DetachmentRateFunction: FixedValue=0; Units=/d
        Constant MaintenanceRespirationFunction: FixedValue=0; Units=0-1
        Constant DMConversionEfficiency: FixedValue=1; Units=0-1
        Constant DMReallocationFactor: FixedValue=0
        Constant RemobilisationCost: FixedValue=0
        Constant CarbonConcentration: FixedValue=0.4
        Constant PotentialHarvestIndex: FixedValue=0.2
        AddFunction FillingDuration
          VariableReference EarlyPodDevelopmentDuration: VariableName=[Phenology].EarlyPodDevelopment.Target
          VariableReference EarlyGrainFillingDuration: VariableName=[Phenology].EarlyGrainFilling.Target
          VariableReference MidGrainFillingDuration: VariableName=[Phenology].MidGrainFilling.Target
        NutrientDemandFunctions DMDemands
          MultiplyFunction Structural
            PhaseLookup DMDemandFunction
              PhaseLookupValue PodDevelopment: Start=StartPodDevelopment; End=EndPodDevelopment
                MultiplyFunction HIPodDemand
                  VariableReference AboveGroundWt: VariableName=[AboveGround].Wt
                  DivideFunction HarvestIndexIncrease
                    VariableReference PotentialHarvestIndex: VariableName=[Shell].PotentialHarvestIndex
                    VariableReference FillingDuration: VariableName=[Shell].FillingDuration
                  VariableReference ThermalTime: VariableName=[Phenology].ThermalTime
            Constant StructuralFraction: FixedValue=1
            Memo
              Shell harvest index is used to calculate shell biomass demand, which follows the same approach than grain harvest index. It represents the fraction of shell biomass in relation to total aboveground biomass.
          Constant Metabolic: FixedValue=0
          StorageDMDemandFunction Storage
            SubtractFunction StorageFraction
              Constant One: FixedValue=1
              VariableReference StructuralFraction: VariableName=[Shell].DMDemands.Structural.StructuralFraction
          Constant QStructuralPriority: FixedValue=1
          Constant QMetabolicPriority: FixedValue=1
          Constant QStoragePriority: FixedValue=1
        NutrientDemandFunctions NDemands
          MultiplyFunction Structural
            VariableReference MinNconc: VariableName=[Shell].minimumNconc
            VariableReference PotentialDMAllocation: VariableName=[Shell].potentialDMAllocation.Structural
          StorageNDemandFunction Storage
            VariableReference NitrogenDemandSwitch: VariableName=[Shell].nitrogenDemandSwitch
            VariableReference MaxNconc: VariableName=[Shell].maximumNconc
          Constant Metabolic: FixedValue=0
          Constant QStructuralPriority: FixedValue=1
          Constant QMetabolicPriority: FixedValue=1
          Constant QStoragePriority: FixedValue=1
        RetranslocateNonStructural RetranslocateNitrogen
        NutrientPoolFunctions InitialWt
          Constant Structural: FixedValue=0; Units=g/m^2
          Constant Metabolic: FixedValue=0
          Constant Storage: FixedValue=0
        Constant Photosynthesis: FixedValue=0
        VariableReference initialNConcFunction: VariableName=[Shell].MinimumNConc
      GenericOrgan Stem: IsAboveGround=true
        Constant NReallocationFactor: FixedValue=1
        Constant NRetranslocationFactor: FixedValue=0.5
        PhaseLookup DMRetranslocationFactor
          PhaseLookupValue GrainFilling: Start=EndCanopyDevelopment; End=EndGrainFill
            Constant RetranslocationFactor: FixedValue=0.2
        LinearInterpolationFunction MaximumNConc
          XYPairs: X=[3, 4, 5]; Y=[0.025, 0.02, 0.015]
          VariableReference XValue: VariableName=[Phenology].Stage
        Constant MinimumNConc: FixedValue=0.006
        PhaseLookupValue NitrogenDemandSwitch: Start=Emergence; End=StartGrainFilling
          Memo
            There is no evidence of stem N storage during grain filling. Also, there is no stem structural growth during this time.
          Constant: FixedValue=1
        BiomassRemoval BiomassRemovalDefaults: same as Replacements.Soybean.Leaf.BiomassRemovalDefaults
        PhaseLookup SenescenceRate
          PhaseLookupValue PostCanopyPhase: Start=EndCanopyDevelopment; End=Maturity
            MinimumFunction Rate
              DivideFunction Fraction
                VariableReference TT: VariableName=[Phenology].ThermalTime
                SubtractFunction TTRemaining
                  ExpressionFunction PostCanopyTT
                    Expression=[Phenology].EarlyPodDevelopment.Target+[Phenology].EarlyGrainFilling.Target+[Phenology].MidGrainFilling.Target+[Phenology].LateGrainFilling.Target
                  ExpressionFunction PostCanopyTTComplete
                    Expression=[Phenology].MidGrainFilling.ProgressThroughPhase+[Phenology].LateGrainFilling.ProgressThroughPhase
              Constant One: FixedValue=1
        Constant DetachmentRateFunction: FixedValue=0; Units=/d
        Constant MaintenanceRespirationFunction: FixedValue=0; Units=0-1
        Constant DMConversionEfficiency: FixedValue=1; Units=0-1
        Constant DMReallocationFactor: FixedValue=0
        VariableReference CriticalNConc: VariableName=[Stem].MinimumNConc
        Constant RemobilisationCost: FixedValue=0
        Constant CarbonConcentration: FixedValue=0.4
        NutrientDemandFunctions DMDemands
          MultiplyFunction Structural
            PhaseLookup Fraction
              PhaseLookupValue StemGrowthPhase: Start=Emergence; End=StartPodDevelopment
                Constant Fraction: FixedValue=0.75
              PhaseLookupValue PodAndGrainGrowth: Start=StartPodDevelopment; End=EndGrainFill
                Constant Fraction: FixedValue=0
            VariableReference DMDemand: VariableName=[Stem].PotentialGrowth
          Constant Metabolic: FixedValue=0
          MultiplyFunction Storage
            VariableReference DMDemand: VariableName=[Stem].PotentialGrowth
            SubtractFunction StorageFraction
              Constant One: FixedValue=1
              VariableReference StructuralFraction: VariableName=[Stem].DMDemands.Structural.Fraction
          Constant QStructuralPriority: FixedValue=1
          Constant QMetabolicPriority: FixedValue=1
          Constant QStoragePriority: FixedValue=1
        NutrientDemandFunctions NDemands
          MultiplyFunction Structural
            VariableReference MinNconc: VariableName=[Stem].minimumNconc
            VariableReference PotentialDMAllocation: VariableName=[Stem].potentialDMAllocation.Structural
          MultiplyFunction Metabolic
            SubtractFunction MetabolicNconc
              VariableReference CritNconc: VariableName=[Stem].criticalNConc
              VariableReference MinNconc: VariableName=[Stem].minimumNconc
            VariableReference PotentialDMAllocation: VariableName=[Stem].potentialDMAllocation.Structural
          StorageNDemandFunction Storage
            VariableReference NitrogenDemandSwitch: VariableName=[Stem].nitrogenDemandSwitch
            VariableReference MaxNconc: VariableName=[Stem].maximumNconc
          Constant QStructuralPriority: FixedValue=1
          Constant QMetabolicPriority: FixedValue=1
          Constant QStoragePriority: FixedValue=1
        PartitionFractionDemandFunction PotentialGrowth
          PhaseLookup PartitionFraction
            PhaseLookupValue StemGrowthPhase: Start=Emergence; End=EndPodDevelopment
              Constant StemFraction: FixedValue=0.4
            PhaseLookupValue GrainFilling: Start=EndPodDevelopment; End=EndGrainFill
              Constant StemFraction: FixedValue=0
        RetranslocateNonStructural RetranslocateNitrogen
        NutrientPoolFunctions InitialWt: same as Replacements.Soybean.Shell.InitialWt
        Constant Photosynthesis: FixedValue=0
        VariableReference initialNConcFunction: VariableName=[Stem].MinimumNConc
      CompositeBiomass AboveGround: OrganNames=[Leaf, Stem, Grain, Shell]; IncludeLive=true; IncludeDead=true
      CompositeBiomass BelowGround: OrganNames=[Root, Nodule]; IncludeLive=true; IncludeDead=true
      CompositeBiomass AboveGroundLive: OrganNames=[Leaf, Stem, Grain, Shell]; IncludeLive=true; IncludeDead=false
      CompositeBiomass Total: OrganNames=[Leaf, Stem, Grain, Shell, Root, Nodule]; IncludeLive=true; IncludeDead=true
      CompositeBiomass TotalLive: OrganNames=[Leaf, Stem, Grain, Shell, Root, Nodule]; IncludeLive=true; IncludeDead=false
      CompositeBiomass TotalDead: OrganNames=[Leaf, Stem, Grain, Shell, Root, Nodule]; IncludeLive=false; IncludeDead=true
      CompositeBiomass Pod: OrganNames=[Shell, Grain]; IncludeLive=true; IncludeDead=true
      Constant MortalityRate: FixedValue=0
      Folder Cultivars
        Folder Australia
          Cultivar Buchanan
            Command:
              [Phenology].Vegetative.Target.FixedValue = 480
              [Phenology].EarlyFlowering.Target.FixedValue = 100
              [Phenology].EarlyGrainFilling.Target.FractionofGrainfilling.FixedValue = 0.015
              [Phenology].LateGrainFilling.Target.EntireGrainfillPeriod.FixedValue = 467
              [Phenology].VegetativePhotoperiodModifier.XYPairs.X = 12.39, 15.61
              [Phenology].ReproductivePhotoperiodModifier.XYPairs.X = 12.39, 15.61
              [Phenology].MidGrainFilling.Target.FractionofMidToLateGrainfilling.FixedValue=0.33
              [Grain].MaximumNConc.FixedValue = 0.067
              [Stem].PotentialGrowth.PartitionFraction.StemGrowthPhase.StemFraction.FixedValue = 0.5
              [Leaf].AreaLargestLeaf.FixedValue=0.009
          Cultivar Djakal
            Command:
              [Phenology].Vegetative.Target.FixedValue = 380
              [Phenology].EarlyFlowering.Target.FixedValue = 100
              [Phenology].EarlyGrainFilling.Target.FractionofGrainfilling.FixedValue = 0.05
              [Phenology].LateGrainFilling.Target.EntireGrainfillPeriod.FixedValue = 405
              [Phenology].VegetativePhotoperiodModifier.XYPairs.X = 13.75, 17
              [Phenology].ReproductivePhotoperiodModifier.XYPairs.X = 11.9, 15.5
              [Leaf].AreaLargestLeaf.FixedValue=0.009
          Cultivar Davis
            Command:
              [Phenology].Vegetative.Target.FixedValue = 480
              [Phenology].EarlyFlowering.Target.FixedValue = 100
              [Phenology].EarlyGrainFilling.Target.FractionofGrainfilling.FixedValue = 0.015
              [Phenology].LateGrainFilling.Target.EntireGrainfillPeriod.FixedValue = 467
              [Phenology].VegetativePhotoperiodModifier.XYPairs.X = 12.39, 15.61
              [Phenology].ReproductivePhotoperiodModifier.XYPairs.X = 12.39, 15.61
              [Phenology].MidGrainFilling.Target.FractionofMidToLateGrainfilling.FixedValue=0.33
              [Grain].MaximumNConc.FixedValue = 0.067
              [Stem].PotentialGrowth.PartitionFraction.StemGrowthPhase.StemFraction.FixedValue = 0.5
              [Leaf].AreaLargestLeaf.FixedValue=0.012
          Cultivar Hooper_MG40
            Command:
              [Phenology].Vegetative.Target.FixedValue = 380
              [Phenology].EarlyFlowering.Target.FixedValue = 80
              [Phenology].EarlyGrainFilling.Target.FractionofGrainfilling.FixedValue = 0.05
              [Phenology].LateGrainFilling.Target.EntireGrainfillPeriod.FixedValue = 440
              [Phenology].VegetativePhotoperiodModifier.XYPairs.X = 13.26, 16.67
              [Phenology].ReproductivePhotoperiodModifier.XYPairs.X = 13.26, 16.67
              [Leaf].AreaLargestLeaf.FixedValue=0.009
          Cultivar Stephens_MG40
            Command:
              [Phenology].Vegetative.Target.FixedValue = 360
              [Phenology].EarlyFlowering.Target.FixedValue = 80
              [Phenology].EarlyGrainFilling.Target.FractionofGrainfilling.FixedValue = 0.05
              [Phenology].LateGrainFilling.Target.EntireGrainfillPeriod.FixedValue = 440
              [Phenology].VegetativePhotoperiodModifier.XYPairs.X = 13.26, 16.67
              [Phenology].ReproductivePhotoperiodModifier.XYPairs.X = 13.26, 16.67
              [Leaf].AreaLargestLeaf.FixedValue=0.009
          Cultivar FiskebyV
            Command:
              [Phenology].Vegetative.Target.FixedValue = 285
              [Phenology].EarlyFlowering.Target.FixedValue = 80
              [Phenology].EarlyGrainFilling.Target.FractionofGrainfilling.FixedValue = 0.05
              [Phenology].LateGrainFilling.Target.EntireGrainfillPeriod.FixedValue = 405
              [Phenology].VegetativePhotoperiodModifier.XYPairs.X = 13.75, 18
              [Phenology].ReproductivePhotoperiodModifier.XYPairs.X = 13.75, 18
            Memo
              Early-maturing, photoperiod-insensitive cultivar developed in Sweden for high latitude environments
          Cultivar F148_7
            Command:
              [Phenology].Vegetative.Target.FixedValue = 314
              [Phenology].EarlyFlowering.Target.FixedValue = 80
              [Phenology].EarlyGrainFilling.Target.FractionofGrainfilling.FixedValue = 0.05
              [Phenology].LateGrainFilling.Target.EntireGrainfillPeriod.FixedValue = 485
              [Phenology].VegetativePhotoperiodModifier.XYPairs.X = 13.75, 17
              [Phenology].ReproductivePhotoperiodModifier.XYPairs.X = 12, 18
              [Leaf].AreaLargestLeaf.FixedValue=0.009
            Memo
              Indeterminate breeding selection from the national soybean breeding program combining phytophthora resistance, earliness,
              culinary quality, and yield
          Cultivar Bowyer
            Command:
              [Phenology].Vegetative.Target.FixedValue = 377
              [Phenology].EarlyFlowering.Target.FixedValue = 80
              [Phenology].EarlyGrainFilling.Target.FractionofGrainfilling.FixedValue = 0.05
              [Phenology].LateGrainFilling.Target.EntireGrainfillPeriod.FixedValue = 405
              [Phenology].VegetativePhotoperiodModifier.XYPairs.X = 13.75, 15.5
              [Phenology].ReproductivePhotoperiodModifier.XYPairs.X = 11.9, 15.5
            Memo
              Brown hilum cultivar, adapted to southern New South Wales, released by K McWhirter in 1982
          Cultivar Bunya
            Command:
              [Phenology].Vegetative.Target.FixedValue = 550
              [Phenology].EarlyFlowering.Target.FixedValue = 80
              [Phenology].EarlyGrainFilling.Target.FractionofGrainfilling.FixedValue = 0.05
              [Phenology].LateGrainFilling.Target.EntireGrainfillPeriod.FixedValue = 405
              [Phenology].VegetativePhotoperiodModifier.XYPairs.X = 13.75, 18
              [Phenology].ReproductivePhotoperiodModifier.XYPairs.X = 10.9, 15.5
              [Leaf].AreaLargestLeaf.FixedValue=0.009
            Memo
              Culinary cultivar released in 2006 by CSIRO with broad adaptation from northern New South Wales to northern Queensland
          Cultivar Cowrie
            Command:
              [Phenology].Vegetative.Target.FixedValue = 390
              [Phenology].EarlyFlowering.Target.FixedValue = 80
              [Phenology].EarlyGrainFilling.Target.FractionofGrainfilling.FixedValue = 0.05
              [Phenology].LateGrainFilling.Target.EntireGrainfillPeriod.FixedValue = 425
              [Phenology].VegetativePhotoperiodModifier.XYPairs.X = 12.75, 16
              [Phenology].ReproductivePhotoperiodModifier.XYPairs.X = 12.75, 16
              [Leaf].AreaLargestLeaf.FixedValue=0.009
            Memo
              Light hilum cultivar released by theNewSouth Wales Department of Agriculture for the coastal Northern Rivers District inNewSouth Wales
          Cultivar Soya791
            Command:
              [Phenology].Vegetative.Target.FixedValue = 430
              [Phenology].EarlyFlowering.Target.FixedValue = 80
              [Phenology].EarlyGrainFilling.Target.FractionofGrainfilling.FixedValue = 0.05
              [Phenology].LateGrainFilling.Target.EntireGrainfillPeriod.FixedValue = 425
              [Phenology].VegetativePhotoperiodModifier.XYPairs.X = 12.75, 15.3
              [Phenology].ReproductivePhotoperiodModifier.XYPairs.X = 12.75, 15.3
              [Leaf].AreaLargestLeaf.FixedValue=0.009
          Cultivar Manark
            Command:
              [Phenology].Vegetative.Target.FixedValue = 440
              [Phenology].EarlyFlowering.Target.FixedValue = 80
              [Phenology].EarlyGrainFilling.Target.FractionofGrainfilling.FixedValue = 0.05
              [Phenology].LateGrainFilling.Target.EntireGrainfillPeriod.FixedValue = 425
              [Phenology].VegetativePhotoperiodModifier.XYPairs.X = 12.75, 15
              [Phenology].ReproductivePhotoperiodModifier.XYPairs.X = 12.75, 15
              [Leaf].AreaLargestLeaf.FixedValue=0.009
          Cultivar Warrigal
            Command:
              [Phenology].Vegetative.Target.FixedValue = 490
              [Phenology].EarlyFlowering.Target.FixedValue = 80
              [Phenology].EarlyGrainFilling.Target.FractionofGrainfilling.FixedValue = 0.05
              [Phenology].LateGrainFilling.Target.EntireGrainfillPeriod.FixedValue = 425
              [Phenology].VegetativePhotoperiodModifier.XYPairs.X = 12.75, 15
              [Phenology].ReproductivePhotoperiodModifier.XYPairs.X = 12.75, 15
              [Leaf].AreaLargestLeaf.FixedValue=0.009
          Cultivar Leichhardt
            Command:
              [Phenology].Vegetative.Target.FixedValue = 806
              [Phenology].EarlyFlowering.Target.FixedValue = 80
              [Phenology].EarlyGrainFilling.Target.FractionofGrainfilling.FixedValue = 0.05
              [Phenology].LateGrainFilling.Target.EntireGrainfillPeriod.FixedValue = 425
              [Phenology].VegetativePhotoperiodModifier.XYPairs.X = 12.75, 14.7
              [Phenology].ReproductivePhotoperiodModifier.XYPairs.X = 12.75, 14.7
              [Leaf].AreaLargestLeaf.FixedValue=0.009
          Cultivar Djakal1
            Command:
              [Phenology].Vegetative.Target.FixedValue = 332
              [Phenology].EarlyFlowering.Target.FixedValue = 80
              [Phenology].EarlyGrainFilling.Target.FractionofGrainfilling.FixedValue = 0.05
              [Phenology].LateGrainFilling.Target.EntireGrainfillPeriod.FixedValue = 440
              [Phenology].VegetativePhotoperiodModifier.XYPairs.X = 13.26, 16.67
              [Phenology].ReproductivePhotoperiodModifier.XYPairs.X = 13.26, 16.67
              [Leaf].AreaLargestLeaf.FixedValue=0.009
        Folder USA
          Cultivar Trial_MG00
            Command:
              [Phenology].Vegetative.Target.FixedValue = 268
              [Phenology].EarlyFlowering.Target.FixedValue = 76
              [Phenology].EarlyGrainFilling.Target.FractionofGrainfilling.FixedValue = 0.05
              [Phenology].LateGrainFilling.Target.EntireGrainfillPeriod.FixedValue = 432
              [Phenology].VegetativePhotoperiodModifier.XYPairs.X = 14.43, 21.19
              [Phenology].ReproductivePhotoperiodModifier.XYPairs.X = 14.43, 21.19
          Cultivar Lambert_MG0
            Command:
              [Phenology].Vegetative.Target.FixedValue = 294
              [Phenology].EarlyFlowering.Target.FixedValue = 81
              [Phenology].EarlyGrainFilling.Target.FractionofGrainfilling.FixedValue = 0.05
              [Phenology].LateGrainFilling.Target.EntireGrainfillPeriod.FixedValue = 442
              [Phenology].VegetativePhotoperiodModifier.XYPairs.X = 14.29, 20.14
              [Phenology].ReproductivePhotoperiodModifier.XYPairs.X = 14.29, 20.14
          Cultivar IA1006_MG10
            Command:
              [Phenology].Vegetative.Target.FixedValue = 336
              [Phenology].EarlyFlowering.Target.FixedValue = 118
              [Phenology].EarlyGrainFilling.Target.FractionofGrainfilling.FixedValue = 0.05
              [Phenology].LateGrainFilling.Target.EntireGrainfillPeriod.FixedValue = 518
              [Phenology].VegetativePhotoperiodModifier.XYPairs.X = 14.37, 19.30
              [Phenology].ReproductivePhotoperiodModifier.XYPairs.X = 14.37, 19.30
          Cultivar IA2008_MG20
            Command:
              [Phenology].Vegetative.Target.FixedValue = 329
              [Phenology].EarlyFlowering.Target.FixedValue = 150
              [Phenology].EarlyGrainFilling.Target.FractionofGrainfilling.FixedValue = 0.05
              [Phenology].LateGrainFilling.Target.EntireGrainfillPeriod.FixedValue = 580
              [Phenology].VegetativePhotoperiodModifier.XYPairs.X = 13.92, 17.93
              [Phenology].ReproductivePhotoperiodModifier.XYPairs.X = 13.92, 17.93
          Cultivar PioneerP22T61_MG22
            Command:
              [Phenology].Vegetative.Target.FixedValue = 328
              [Phenology].EarlyFlowering.Target.FixedValue = 106
              [Phenology].EarlyGrainFilling.Target.FractionofGrainfilling.FixedValue = 0.3
              [Phenology].LateGrainFilling.Target.EntireGrainfillPeriod.FixedValue = 499
              [Phenology].VegetativePhotoperiodModifier.XYPairs.X = 13.59, 17.6
              [Phenology].ReproductivePhotoperiodModifier.XYPairs.X = 13.59, 17.6
          Cultivar PioneerP22T69R_MG22
            Command:
              [Phenology].Vegetative.Target.FixedValue = 328
              [Phenology].EarlyFlowering.Target.FixedValue = 106
              [Phenology].EarlyGrainFilling.Target.FractionofGrainfilling.FixedValue = 0.35
              [Phenology].LateGrainFilling.Target.EntireGrainfillPeriod.FixedValue = 580
              [Phenology].VegetativePhotoperiodModifier.XYPairs.X = 13.59, 17.6
              [Phenology].ReproductivePhotoperiodModifier.XYPairs.X = 13.59, 17.6
          Cultivar Pioneer92MGI_MG26
            Command:
              [Phenology].Vegetative.Target.FixedValue = 271
              [Phenology].EarlyFlowering.Target.FixedValue = 120
              [Phenology].EarlyGrainFilling.Target.FractionofGrainfilling.FixedValue = 0.125
              [Phenology].LateGrainFilling.Target.EntireGrainfillPeriod.FixedValue = 529
              [Phenology].VegetativePhotoperiodModifier.XYPairs.X = 13.77, 17.57
              [Phenology].ReproductivePhotoperiodModifier.XYPairs.X = 13.77, 17.57
          Cultivar PioneerP92Y75_MG27
            Command:
              [Phenology].Vegetative.Target.FixedValue = 328
              [Phenology].EarlyFlowering.Target.FixedValue = 106
              [Phenology].EarlyGrainFilling.Target.FractionofGrainfilling.FixedValue = 0.14
              [Phenology].LateGrainFilling.Target.EntireGrainfillPeriod.FixedValue = 499
              [Phenology].VegetativePhotoperiodModifier.XYPairs.X = 13.59, 17.6
              [Phenology].ReproductivePhotoperiodModifier.XYPairs.X = 13.59, 17.6
          Cultivar Macon_MG30
            Command:
              [Phenology].Vegetative.Target.FixedValue = 367
              [Phenology].EarlyFlowering.Target.FixedValue = 163
              [Phenology].EarlyGrainFilling.Target.FractionofGrainfilling.FixedValue = 0.175
              [Phenology].LateGrainFilling.Target.EntireGrainfillPeriod.FixedValue = 607
              [Phenology].VegetativePhotoperiodModifier.XYPairs.X = 14.05, 17.56
              [Phenology].ReproductivePhotoperiodModifier.XYPairs.X = 14.05, 17.56
          Cultivar PioneerP93M11_MG31
            Command:
              [Phenology].Vegetative.Target.FixedValue = 250
              [Phenology].EarlyFlowering.Target.FixedValue = 110
              [Phenology].EarlyGrainFilling.Target.FractionofGrainfilling.FixedValue = 0.30
              [Phenology].LateGrainFilling.Target.EntireGrainfillPeriod.FixedValue = 457
              [Phenology].VegetativePhotoperiodModifier.XYPairs.X = 13.4, 16.0
              [Phenology].ReproductivePhotoperiodModifier.XYPairs.X = 13.4, 16.0
              [Grain].MaximumNConc.FixedValue = 0.065
              [Shell].PotentialHarvestIndex.FixedValue = 0.5
              [Leaf].AreaLargestLeaf.FixedValue=0.013
          Cultivar Becks321NRR_MG32
            Command:
              [Phenology].Vegetative.Target.FixedValue = 272
              [Phenology].EarlyFlowering.Target.FixedValue = 117
              [Phenology].EarlyGrainFilling.Target.FractionofGrainfilling.FixedValue = 0.20
              [Phenology].LateGrainFilling.Target.EntireGrainfillPeriod.FixedValue = 522
              [Phenology].VegetativePhotoperiodModifier.XYPairs.X = 13.45, 18.0
              [Phenology].ReproductivePhotoperiodModifier.XYPairs.X = 13.45, 18.0
          Cultivar PioneerP932T16R_MG32
            Command:
              [Phenology].Vegetative.Target.FixedValue = 328
              [Phenology].EarlyFlowering.Target.FixedValue = 106
              [Phenology].EarlyGrainFilling.Target.FractionofGrainfilling.FixedValue = 0.40
              [Phenology].LateGrainFilling.Target.EntireGrainfillPeriod.FixedValue = 499
              [Phenology].VegetativePhotoperiodModifier.XYPairs.X = 13.59, 17.6
              [Phenology].ReproductivePhotoperiodModifier.XYPairs.X = 13.59, 17.6
          Cultivar Becks367NRR_MG37
            Command:
              [Phenology].Vegetative.Target.FixedValue = 267
              [Phenology].EarlyFlowering.Target.FixedValue = 112
              [Phenology].EarlyGrainFilling.Target.FractionofGrainfilling.FixedValue = 0.26
              [Phenology].LateGrainFilling.Target.EntireGrainfillPeriod.FixedValue = 506
              [Phenology].VegetativePhotoperiodModifier.XYPairs.X = 13.27, 17.2
              [Phenology].ReproductivePhotoperiodModifier.XYPairs.X = 13.27, 17.2
          Cultivar AsgrowAG4403_MG40
            Command:
              [Phenology].Vegetative.Target.FixedValue = 292
              [Phenology].EarlyFlowering.Target.FixedValue = 123
              [Phenology].EarlyGrainFilling.Target.FractionofGrainfilling.FixedValue = 0.30
              [Phenology].LateGrainFilling.Target.EntireGrainfillPeriod.FixedValue = 535
              [Phenology].VegetativePhotoperiodModifier.XYPairs.X = 13.09, 16.49
              [Phenology].ReproductivePhotoperiodModifier.XYPairs.X = 13.09, 16.49
          Cultivar HornbeckHBK4891_MG40: same as Replacements.Soybean.Cultivars.USA.AsgrowAG4403_MG40
          Cultivar Pioneer94B01_MG40
            Command:
              [Phenology].Vegetative.Target.FixedValue = 322
              [Phenology].EarlyFlowering.Target.FixedValue = 143
              [Phenology].EarlyGrainFilling.Target.FractionofGrainfilling.FixedValue = 0.30
              [Phenology].LateGrainFilling.Target.EntireGrainfillPeriod.FixedValue = 567
              [Phenology].VegetativePhotoperiodModifier.XYPairs.X = 13.05, 16.46
              [Phenology].ReproductivePhotoperiodModifier.XYPairs.X = 13.05, 16.46
          Cultivar PioneerP9504_MG50
            Command:
              [Phenology].Vegetative.Target.FixedValue = 404
              [Phenology].EarlyFlowering.Target.FixedValue = 112
              [Phenology].EarlyGrainFilling.Target.FractionofGrainfilling.FixedValue = 0.30
              [Phenology].LateGrainFilling.Target.EntireGrainfillPeriod.FixedValue = 505
              [Phenology].VegetativePhotoperiodModifier.XYPairs.X = 12.83, 16.13
              [Phenology].ReproductivePhotoperiodModifier.XYPairs.X = 12.83, 16.13
          Cultivar AsgrowAG5701_MG50
            Command:
              [Phenology].Vegetative.Target.FixedValue = 404
              [Phenology].EarlyFlowering.Target.FixedValue = 131
              [Phenology].EarlyGrainFilling.Target.FractionofGrainfilling.FixedValue = 0.30
              [Phenology].LateGrainFilling.Target.EntireGrainfillPeriod.FixedValue = 549
              [Phenology].VegetativePhotoperiodModifier.XYPairs.X = 12.83, 16.13
              [Phenology].ReproductivePhotoperiodModifier.XYPairs.X = 12.83, 16.13
          Cultivar Hutcheson_MG50
            Command:
              [Phenology].Vegetative.Target.FixedValue = 438
              [Phenology].EarlyFlowering.Target.FixedValue = 112
              [Phenology].EarlyGrainFilling.Target.FractionofGrainfilling.FixedValue = 0.30
              [Phenology].LateGrainFilling.Target.EntireGrainfillPeriod.FixedValue = 505
              [Phenology].VegetativePhotoperiodModifier.XYPairs.X = 12.58, 15.88
              [Phenology].ReproductivePhotoperiodModifier.XYPairs.X = 12.58, 15.88
          Cultivar NK622_MG60
            Command:
              [Phenology].Vegetative.Target.FixedValue = 436
              [Phenology].EarlyFlowering.Target.FixedValue = 93
              [Phenology].EarlyGrainFilling.Target.FractionofGrainfilling.FixedValue = 0.30
              [Phenology].LateGrainFilling.Target.EntireGrainfillPeriod.FixedValue = 467
              [Phenology].VegetativePhotoperiodModifier.XYPairs.X = 12.39, 15.61
              [Phenology].ReproductivePhotoperiodModifier.XYPairs.X = 12.39, 15.61
        Folder China
          Cultivar Nandou12
            Command:
              [Phenology].Vegetative.Target.FixedValue = 500
              [Phenology].EarlyFlowering.Target.FixedValue = 120
              [Phenology].EarlyPodDevelopment.Target.FixedValue = 180
              [Phenology].EarlyGrainFilling.Target.FractionofGrainfilling.FixedValue = 0.2
              [Phenology].LateGrainFilling.Target.EntireGrainfillPeriod.FixedValue = 440
              [Phenology].VegetativePhotoperiodModifier.XYPairs.X = 12.63, 15.13
              [Phenology].ReproductivePhotoperiodModifier.XYPairs.X = 12.63, 15.13
              [Phenology].MidGrainFilling.Target.FractionofMidToLateGrainfilling.FixedValue=0.45
              [Leaf].AreaLargestLeaf.FixedValue=0.013
              [Grain].PotentialHarvestIndex.FixedValue=0.35
          Cultivar Texuan13
            Command:
              [Phenology].Vegetative.Target.FixedValue = 500
              [Phenology].EarlyFlowering.Target.FixedValue = 200
              [Phenology].EarlyPodDevelopment.Target.FixedValue = 170
              [Phenology].EarlyGrainFilling.Target.FractionofGrainfilling.FixedValue = 0.2
              [Phenology].LateGrainFilling.Target.EntireGrainfillPeriod.FixedValue = 460
              [Phenology].VegetativePhotoperiodModifier.XYPairs.X = 12.63, 15.13
              [Phenology].ReproductivePhotoperiodModifier.XYPairs.X = 12.63, 15.13
              [Phenology].MidGrainFilling.Target.FractionofMidToLateGrainfilling.FixedValue=0.45
              [Leaf].AreaLargestLeaf.FixedValue=0.013
              [Grain].PotentialHarvestIndex.FixedValue=0.35
          Cultivar Jiuyuehuang
            Command:
              [Phenology].Vegetative.Target.FixedValue = 540
              [Phenology].EarlyFlowering.Target.FixedValue = 140
              [Phenology].EarlyPodDevelopment.Target.FixedValue = 140
              [Phenology].EarlyGrainFilling.Target.FractionofGrainfilling.FixedValue = 0.2
              [Phenology].LateGrainFilling.Target.EntireGrainfillPeriod.FixedValue = 420
              [Phenology].VegetativePhotoperiodModifier.XYPairs.X = 12.94, 15.44
              [Phenology].ReproductivePhotoperiodModifier.XYPairs.X = 12.94, 15.44
              [Phenology].MidGrainFilling.Target.FractionofMidToLateGrainfilling.FixedValue=0.45
              [Leaf].AreaLargestLeaf.FixedValue=0.013
              [Grain].PotentialHarvestIndex.FixedValue=0.25
          Cultivar Hedou19
            Command:
              [Phenology].Vegetative.Target.FixedValue = 370
              [Phenology].EarlyFlowering.Target.FixedValue = 120
              [Phenology].EarlyPodDevelopment.Target.FixedValue = 180
              [Phenology].EarlyGrainFilling.Target.FractionofGrainfilling.FixedValue = 0.361
              [Phenology].LateGrainFilling.Target.EntireGrainfillPeriod.FixedValue = 600
              [Phenology].VegetativePhotoperiodModifier.XYPairs.X = 13.57, 16.07
              [Phenology].ReproductivePhotoperiodModifier.XYPairs.X = 13.57, 16.07
              [Phenology].MidGrainFilling.Target.FractionofMidToLateGrainfilling.FixedValue=0.45
              [Leaf].AreaLargestLeaf.FixedValue=0.02
              [Leaf].Phyllochron.FixedValue=45
        Folder Generic
          Cultivar Generic_MG000
            Command:
              [Phenology].Vegetative.Target.FixedValue = 310
              [Phenology].EarlyFlowering.Target.FixedValue = 100
              [Phenology].EarlyGrainFilling.Target.FractionofGrainfilling.FixedValue = 0.475
              [Phenology].LateGrainFilling.Target.EntireGrainfillPeriod.FixedValue = 590
              [Phenology].VegetativePhotoperiodModifier.XYPairs.X = 14.6, 22.35
              [Phenology].ReproductivePhotoperiodModifier.XYPairs.X = 14.6, 22.35
          Cultivar Generic_MG00
            Command:
              [Phenology].Vegetative.Target.FixedValue = 320
              [Phenology].EarlyFlowering.Target.FixedValue = 100
              [Phenology].EarlyGrainFilling.Target.FractionofGrainfilling.FixedValue = 0.467
              [Phenology].LateGrainFilling.Target.EntireGrainfillPeriod.FixedValue = 600
              [Phenology].VegetativePhotoperiodModifier.XYPairs.X = 14.35, 21.11
              [Phenology].ReproductivePhotoperiodModifier.XYPairs.X = 14.35, 21.11
          Cultivar Generic_MG0
            Command:
              [Phenology].Vegetative.Target.FixedValue = 336
              [Phenology].EarlyFlowering.Target.FixedValue = 120
              [Phenology].EarlyGrainFilling.Target.FractionofGrainfilling.FixedValue = 0.422
              [Phenology].LateGrainFilling.Target.EntireGrainfillPeriod.FixedValue = 616
              [Phenology].VegetativePhotoperiodModifier.XYPairs.X = 14.1, 19.95
              [Phenology].ReproductivePhotoperiodModifier.XYPairs.X = 14.1, 19.95
          Cultivar Generic_MG1
            Command:
              [Phenology].Vegetative.Target.FixedValue = 340
              [Phenology].EarlyFlowering.Target.FixedValue = 120
              [Phenology].EarlyGrainFilling.Target.FractionofGrainfilling.FixedValue = 0.411
              [Phenology].LateGrainFilling.Target.EntireGrainfillPeriod.FixedValue = 632
              [Phenology].VegetativePhotoperiodModifier.XYPairs.X = 13.84, 18.77
              [Phenology].ReproductivePhotoperiodModifier.XYPairs.X = 13.84, 18.77
          Cultivar Generic_MG2
            Command:
              [Phenology].Vegetative.Target.FixedValue = 348
              [Phenology].EarlyFlowering.Target.FixedValue = 120
              [Phenology].EarlyGrainFilling.Target.FractionofGrainfilling.FixedValue = 0.386
              [Phenology].LateGrainFilling.Target.EntireGrainfillPeriod.FixedValue = 648
              [Phenology].VegetativePhotoperiodModifier.XYPairs.X = 13.59, 17.61
              [Phenology].ReproductivePhotoperiodModifier.XYPairs.X = 13.59, 17.61
          Cultivar Generic_MG3
            Command:
              [Phenology].Vegetative.Target.FixedValue = 380
              [Phenology].EarlyFlowering.Target.FixedValue = 120
              [Phenology].EarlyGrainFilling.Target.FractionofGrainfilling.FixedValue = 0.361
              [Phenology].LateGrainFilling.Target.EntireGrainfillPeriod.FixedValue = 664
              [Phenology].VegetativePhotoperiodModifier.XYPairs.X = 13.4, 16.91
              [Phenology].ReproductivePhotoperiodModifier.XYPairs.X = 13.4, 16.91
          Cultivar Generic_MG4
            Command:
              [Phenology].Vegetative.Target.FixedValue = 388
              [Phenology].EarlyFlowering.Target.FixedValue = 140
              [Phenology].EarlyGrainFilling.Target.FractionofGrainfilling.FixedValue = 0.324
              [Phenology].LateGrainFilling.Target.EntireGrainfillPeriod.FixedValue = 664
              [Phenology].VegetativePhotoperiodModifier.XYPairs.X = 13.1, 16.49
              [Phenology].ReproductivePhotoperiodModifier.XYPairs.X = 13.1, 16.49
          Cultivar Generic_MG5
            Command:
              [Phenology].Vegetative.Target.FixedValue = 396
              [Phenology].EarlyFlowering.Target.FixedValue = 160
              [Phenology].EarlyGrainFilling.Target.FractionofGrainfilling.FixedValue = 0.072
              [Phenology].LateGrainFilling.Target.EntireGrainfillPeriod.FixedValue = 696
              [Phenology].VegetativePhotoperiodModifier.XYPairs.X = 12.83, 16.13
              [Phenology].ReproductivePhotoperiodModifier.XYPairs.X = 12.83, 16.13
          Cultivar Generic_MG6
            Command:
              [Phenology].Vegetative.Target.FixedValue = 404
              [Phenology].EarlyFlowering.Target.FixedValue = 180
              [Phenology].EarlyGrainFilling.Target.FractionofGrainfilling.FixedValue = 0.056
              [Phenology].LateGrainFilling.Target.EntireGrainfillPeriod.FixedValue = 712
              [Phenology].VegetativePhotoperiodModifier.XYPairs.X = 12.58, 15.8
              [Phenology].ReproductivePhotoperiodModifier.XYPairs.X = 12.58, 15.8
          Cultivar Generic_MG7
            Command:
              [Phenology].Vegetative.Target.FixedValue = 416
              [Phenology].EarlyFlowering.Target.FixedValue = 200
              [Phenology].EarlyGrainFilling.Target.FractionofGrainfilling.FixedValue = 0.055
              [Phenology].LateGrainFilling.Target.EntireGrainfillPeriod.FixedValue = 728
              [Phenology].VegetativePhotoperiodModifier.XYPairs.X = 12.33, 15.46
              [Phenology].ReproductivePhotoperiodModifier.XYPairs.X = 12.33, 15.46
          Cultivar Generic_MG8
            Command:
              [Phenology].Vegetative.Target.FixedValue = 430
              [Phenology].EarlyFlowering.Target.FixedValue = 200
              [Phenology].EarlyGrainFilling.Target.FractionofGrainfilling.FixedValue = 0.054
              [Phenology].LateGrainFilling.Target.EntireGrainfillPeriod.FixedValue = 744
              [Phenology].VegetativePhotoperiodModifier.XYPairs.X = 12.07, 15.1
              [Phenology].ReproductivePhotoperiodModifier.XYPairs.X = 12.07, 15.1
          Cultivar Generic_MG9
            Command:
              [Phenology].Vegetative.Target.FixedValue = 460
              [Phenology].EarlyFlowering.Target.FixedValue = 200
              [Phenology].EarlyGrainFilling.Target.FractionofGrainfilling.FixedValue = 0.053
              [Phenology].LateGrainFilling.Target.EntireGrainfillPeriod.FixedValue = 748
              [Phenology].VegetativePhotoperiodModifier.XYPairs.X = 11.88, 14.82
              [Phenology].ReproductivePhotoperiodModifier.XYPairs.X = 11.88, 14.82
          Cultivar Generic_MG10
            Command:
              [Phenology].Vegetative.Target.FixedValue = 470
              [Phenology].EarlyFlowering.Target.FixedValue = 200
              [Phenology].EarlyGrainFilling.Target.FractionofGrainfilling.FixedValue = 0.053
              [Phenology].LateGrainFilling.Target.EntireGrainfillPeriod.FixedValue = 748
              [Phenology].VegetativePhotoperiodModifier.XYPairs.X = 11.78, 14.65
              [Phenology].ReproductivePhotoperiodModifier.XYPairs.X = 11.78, 14.65
      CompositeBiomass PodLive: OrganNames=[Shell, Grain]; IncludeLive=true; IncludeDead=false
      CompositeBiomass AboveGround2: OrganNames=[Leaf, Stem, Grain, Shell]; IncludeLive=true; IncludeDead=true
      Constant SeedMortalityRate: FixedValue=0
    Plant Maize
      Memo Introduction
        _Brown, H.E., Teixeira, E.I., Huth, N.I. and Holzworth, D.P._
      Folder FACTS
        Cultivar FACTS_P1197
          Command:
            [Phenology].Juvenile.Target.FixedValue = 270
            [Phenology].Photosensitive.Target.XYPairs.Y = 0,0,0
            [Phenology].FlagLeafToFlowering.Target.FixedValue = 1
            [Phenology].FloweringToGrainFilling.Target.FixedValue = 170
            [Phenology].GrainFilling.Target.FixedValue = 640
            [Phenology].Maturing.Target.FixedValue=50
            [Phenology].MaturityToHarvestRipe.Target.FixedValue=50
            [Maize].Grain.MaximumGrainsPerCob.FixedValue = 640
            [Maize].Grain.MaximumPotentialGrainSize.FixedValue = 0.32
            [Grain].MaximumNConc.InitialPhase.InitialNconc.FixedValue=0.03
            [Maize].Root.SpecificRootLength.FixedValue=170
            [Maize].Root.RootFrontVelocity.PotentialRootFrontVelocity.PreFlowering.RootFrontVelocity.FixedValue=22
            [Maize].Root.MaximumNConc.FixedValue=0.015
            [Maize].Root.MinimumNConc.FixedValue=0.015
      OrganArbitrator Arbitrator: same as Replacements.Soybean.Arbitrator
      Phenology
        MultiplyFunction ThermalTime
          SubDailyInterpolation BaseThermalTime: agregationMethod=0
            XYPairs Response: X=[0, 18, 26, 34, 44]; Y=[0, 10, 18, 26, 0]
            ThreeHourAirTemperature InterpolationMethod
        GerminatingPhase Germinating: Start=Sowing; End=Germination
        EmergingPhase Emerging: Start=Germination; End=Emergence; TTForTimeStep=0
          VariableReference ThermalTime: VariableName=[Phenology].ThermalTime
          AddFunction Target
            Constant ShootLag: FixedValue=55
            MultiplyFunction DepthxRate
              VariableReference SowingDepth: VariableName=[Plant].SowingData.Depth
              Constant ShootRate: FixedValue=0.6
        GenericPhase Juvenile: Start=Emergence; End=EndJuvenile
          Constant Target: FixedValue=200; Units=deg day
          VariableReference Progression: VariableName=[Phenology].ThermalTime
        GenericPhase Photosensitive: Start=EndJuvenile; End=FloralInitiation
          VariableReference Progression: VariableName=[Phenology].ThermalTime
          LinearInterpolationFunction Target
            Memo
              The photoperiod is likely to vary with individual maize cultivars.  Therefore, the response shown here is indicative only.  See the descriptions of individual cultivars for more detail on photoperiod responses used by the maize model.
            XYPairs: X=[0, 12.5, 24]; Y=[0, 0, 10]
            VariableReference XValue: VariableName=[Phenology].Photoperiod
        LeafAppearancePhase LeafAppearance: Start=FloralInitiation; End=FlagLeaf
          VariableReference ThermalTime: VariableName=[Phenology].ThermalTime
          VariableReference FinalLeafNumber: VariableName=[Structure].FinalLeafNumber
          ExpressionFunction LeafNumber
            Expression=[Leaf].ExpandedCohortNo + [Leaf].NextExpandingLeafProportion
          VariableReference FullyExpandedLeafNo: VariableName=[Leaf].ExpandedCohortNo
          VariableReference InitialisedLeafNumber: VariableName=[Leaf].InitialisedCohortNo
        GenericPhase FlagLeafToFlowering: Start=FlagLeaf; End=Flowering
          Constant Target: FixedValue=50; Units=deg day
          VariableReference Progression: VariableName=[Phenology].ThermalTime
        GenericPhase FloweringToGrainFilling: Start=Flowering; End=StartGrainFill
          Constant Target: FixedValue=120; Units=deg day
          VariableReference Progression: VariableName=[Phenology].ThermalTime
        GenericPhase GrainFilling: Start=StartGrainFill; End=EndGrainFill
          Constant Target: FixedValue=550; Units=deg day
          VariableReference Progression: VariableName=[Phenology].ThermalTime
        GenericPhase Maturing: Start=EndGrainFill; End=Maturity
          Constant Target: FixedValue=10; Units=deg day
          VariableReference Progression: VariableName=[Phenology].ThermalTime
        GenericPhase MaturityToHarvestRipe: Start=Maturity; End=HarvestRipe
          Constant Target: FixedValue=10; Units=deg day
          VariableReference Progression: VariableName=[Phenology].ThermalTime
        EndPhase ReadyForHarvesting: Start=HarvestRipe; End=Unused
          VariableReference ThermalTime: VariableName=[Phenology].ThermalTime
        PhotoperiodFunction Photoperiod: Twilight=-6; DayLength=0
        OnEventFunction FloweringDAS: SetEvent=Flowering; ReSetEvent=never
          Memo
            A function is used to provide flowering date as days after sowing(DAS).
          Constant PreEventValue: FixedValue=0
          VariableReference PostEventValue: VariableName=[Plant].DaysAfterSowing
        OnEventFunction MaturityDAS: SetEvent=Maturity; ReSetEvent=never
          Memo
            A function is used to provide maturity date as days after sowing(DAS).
          Constant PreEventValue: FixedValue=0
          VariableReference PostEventValue: VariableName=[Plant].DaysAfterSowing
        BBCH
      Structure: CohortInitialisationStage=Germination; LeafInitialisationStage=Emergence
        Memo
          Though tillering is common in some maize varieties under certain agronomic conditions, no tillering is accounted for within this model.  Therefore all branching has been parameterised out of the current maize model.
        Constant StemSenescenceAge: FixedValue=0
        VariableReference ThermalTime: VariableName=[Phenology].ThermalTime
        PhaseLookup Phyllochron
          PhaseLookupValue Phyllochron: Start=Emergence; End=FlagLeaf
            LinearInterpolationFunction Phyllochron
              XYPairs: X=[1, 3.4, 4]; Y=[30, 30, 42]
              VariableReference XValue: VariableName=[Structure].LeafTipsAppeared
        HeightFunction HeightModel
          LinearInterpolationFunction PotentialHeight
            XYPairs: X=[3, 4, 5, 6]; Y=[20, 400, 450, 1700]
            VariableReference XValue: VariableName=[Phenology].Stage
          LinearInterpolationFunction WaterStress
            XYPairs: X=[0, 0.6]; Y=[0, 1]
            VariableReference XValue: VariableName=[Maize].Leaf.Fw
        Constant BranchingRate: FixedValue=0
        AddFunction BranchMortality
          Constant ShadeInducedBranchMortality: FixedValue=0
          Constant DroughtInducedBranchMortality: FixedValue=0
        Constant zFinalLeafNumber: FixedValue=15
        HoldFunction FinalLeafNumber: WhenToHold=FloralInitiation
          AddFunction ValueToHold
            Constant PrimordiaAtEmergence: FixedValue=6
            DivideFunction PrimordiaDuringJuvenilePhase
              AddFunction
                VariableReference JuvenilePhaseDuration: VariableName=[Phenology].Juvenile.Target
                VariableReference PhotoSensitivePhaseDuration: VariableName=[Phenology].Photosensitive.Target
              PhaseLookup MeanPlastochron
                PhaseLookupValue PreEmerg: Start=Germination; End=Emergence
                  Constant: FixedValue=15
                PhaseLookupValue PostEmerg: Start=Emergence; End=FlagLeaf
                  DivideFunction MeanPlastochron
                    AccumulateFunction AccumulatedPlastochron: StartStageName=Emergence; EndStageName=FloralInitiation; FractionRemovedOnCut=0; FractionRemovedOnHarvest=0; FractionRemovedOnGraze=0; FractionRemovedOnPrune=0
                      MultiplyFunction Plastochron
                        VariableReference Phyllochron: VariableName=[Structure].Phyllochron
                        Constant LeafTipsPerPrimordia: FixedValue=0.5
                    AccumulateFunction Days: StartStageName=Emergence; EndStageName=FloralInitiation; FractionRemovedOnCut=0; FractionRemovedOnHarvest=0; FractionRemovedOnGraze=0; FractionRemovedOnPrune=0
                      Constant: FixedValue=1
      ReproductiveOrgan Grain: GrowthRespiration=0; MaintenanceRespiration=0
        Biomass Live
        Biomass Dead
        Constant DMConversionEfficiency: FixedValue=1
        Constant RemobilisationCost: FixedValue=0
        Constant InitialGrainProportion: FixedValue=0.05
        Constant MaximumPotentialGrainSize: FixedValue=0.3; Units=g
        Constant MaximumGrainsPerCob: FixedValue=700; Units=number
        PhaseLookup DMDemandFunction
          PhaseLookupValue InitialPhase: Start=Flowering; End=StartGrainFill
            FillingRateFunction
              VariableReference NumberFunction: VariableName=[Grain].NumberFunction
              VariableReference FillingDuration: VariableName=[Phenology].FloweringToGrainFilling.Target
              VariableReference ThermalTime: VariableName=[Phenology].ThermalTime
              MultiplyFunction PotentialSizeIncrement
                VariableReference InitialProportion: VariableName=[Grain].InitialGrainProportion
                VariableReference MaximumSize: VariableName=[Grain].MaximumPotentialGrainSize
          PhaseLookupValue LinearPhase: Start=StartGrainFill; End=EndGrainFill
            FillingRateFunction
              VariableReference NumberFunction: VariableName=[Grain].NumberFunction
              VariableReference FillingDuration: VariableName=[Phenology].GrainFilling.Target
              VariableReference ThermalTime: VariableName=[Phenology].ThermalTime
              MultiplyFunction PotentialSizeIncrement
                SubtractFunction ProportionLinearPhase
                  Constant One: FixedValue=1
                  VariableReference InitialProportion: VariableName=[Grain].InitialGrainProportion
                VariableReference MaximumSize: VariableName=[Grain].MaximumPotentialGrainSize
        Constant MinimumNConc: FixedValue=0.008; Units=g/g
        PhaseLookup MaximumNConc
          PhaseLookupValue InitialPhase: Start=Flowering; End=StartGrainFill
            Constant InitialNconc: FixedValue=0.05
          PhaseLookupValue LinearPhase: Start=StartGrainFill; End=EndGrainFill
            Constant FinalNconc: FixedValue=0.013
        Constant WaterContent: FixedValue=0.12; Units=g/g
        PhaseLookup NFillingRate
          PhaseLookupValue GrainFilling: Start=Flowering; End=EndGrainFill
            FillingRateFunction
              VariableReference NumberFunction: VariableName=[Grain].NumberFunction
              AddFunction FillingDuration
                VariableReference FloweringToGrainFilling: VariableName=[Phenology].FloweringToGrainFilling.Target
                VariableReference GrainFilling: VariableName=[Phenology].GrainFilling.Target
              VariableReference ThermalTime: VariableName=[Phenology].ThermalTime
              MultiplyFunction PotentialSizeIncrement
                VariableReference MaximumFinalNConc: VariableName=[Grain].MaximumNConc.LinearPhase.FinalNconc
                VariableReference MaximumSize: VariableName=[Grain].MaximumPotentialGrainSize
        MultiplyFunction NumberFunction
          VariableReference PotentialGrainNumber: VariableName=[MaximumGrainsPerCob]
          LinearInterpolationFunction GrowthRateFactor
            XYPairs: X=[0.55, 3.3, 6.6, 10]; Y=[0, 0.6, 1, 1]
            VariableReference XValue: VariableName=[GrowthRateGrainDevelopment]
          VariableReference Population: VariableName=[Maize].Population
        ExpressionFunction YieldBuPerAcre: Expression=[Grain].Live.Wt * 10 * 56 * 0.4536 * 2.471
        AccumulateFunction GrowthGrainDevelopment: StartStageName=FlagLeaf; EndStageName=StartGrainFill; FractionRemovedOnCut=0; FractionRemovedOnHarvest=0; FractionRemovedOnGraze=0; FractionRemovedOnPrune=0
          VariableReference DailyBiomassProduction: VariableName=[Arbitrator].DM.TotalFixationSupply
        AccumulateFunction DaysGrainDevelopment: StartStageName=FlagLeaf; EndStageName=StartGrainFill; FractionRemovedOnCut=0; FractionRemovedOnHarvest=0; FractionRemovedOnGraze=0; FractionRemovedOnPrune=0
          Constant LenthOfADay: FixedValue=1; Units=days/day
        DivideFunction GrowthRateGrainDevelopment
          VariableReference AccumulatedGrowth: VariableName=[GrowthGrainDevelopment]
          VariableReference GrowthDuration: VariableName=[DaysGrainDevelopment]
          VariableReference Population: VariableName=[Maize].Population
        BiomassRemoval BiomassRemovalDefaults
          OrganBiomassRemovalType Harvest: FractionLiveToRemove=1; FractionDeadToRemove=0; FractionLiveToResidue=0; FractionDeadToResidue=0
          OrganBiomassRemovalType Cut: FractionLiveToRemove=1; FractionDeadToRemove=0; FractionLiveToResidue=0; FractionDeadToResidue=0
          OrganBiomassRemovalType Prune: FractionLiveToRemove=0; FractionDeadToRemove=0; FractionLiveToResidue=0.8; FractionDeadToResidue=0
          OrganBiomassRemovalType Graze: FractionLiveToRemove=0.6; FractionDeadToRemove=0; FractionLiveToResidue=0.2; FractionDeadToResidue=0
        Constant CarbonConcentration: FixedValue=0.4
        DivideFunction GrainsperCob
          VariableReference NumberFunction: VariableName=[Maize].Grain.NumberFunction
          VariableReference Population: VariableName=[Maize].Population
        NutrientPoolFunctions DMDemandPriorityFactors: same as Replacements.Soybean.Grain.DMDemandPriorityFactors
        NutrientPoolFunctions NDemandPriorityFactors: same as Replacements.Soybean.Grain.DMDemandPriorityFactors
      Root: GrowthRespiration=0; MaintenanceRespiration=0
        RootShapeCylinder RootShape
        LinearInterpolationFunction KLModifier
          Memo
            The parameter KL is is described by Meinke et al (1993) to combine elements of soil conductivity (K) with root length (L) in determining root water uptake.  Peake et al (2013) demonstrated that in maize KL varied with plant population through impacts on root length density.  Here we adjust KL linearly with plant population.
          XYPairs: X=[0, 10]; Y=[1, 1]
          VariableReference XValue: VariableName=[Maize].Population
        Constant DMConversionEfficiency: FixedValue=1
        Constant RemobilisationCost: FixedValue=0
        Constant SoilWaterEffect: FixedValue=1
          Memo
            No effect of soil water content on root growth is currently captured in the model.
        Constant MaxDailyNUptake: FixedValue=20; Units=g/m2/d
          Memo
            Maximum daily N uptake is set to an arbitrarily high value.
        Constant SenescenceRate: FixedValue=0.005; Units=/d
          Memo
            Jones and Kiniry (1986) used a constant root senescence fraction in the CERES-Maize model.
        Constant MaximumRootDepth: FixedValue=1000000
        Constant MaximumNConc: FixedValue=0.01; Units=g/g
        Constant MinimumNConc: FixedValue=0.01; Units=g/g
        MultiplyFunction RootFrontVelocity
          PhaseLookup PotentialRootFrontVelocity
            Memo
              [Hammer_etal_2009] used a constant extraction front velocity of 2.5cm per day in their analysis of historical maize yield trends in the US corn belt.
            PhaseLookupValue PreFlowering: Start=Germination; End=Flowering
              Constant RootFrontVelocity: FixedValue=25; Units=mm/d
            PhaseLookupValue PostFlowering: Start=Flowering; End=Maturity
              Constant RootFrontVelocity: FixedValue=0; Units=mm/d
          WeightedTemperatureFunction TemperatureFactor: MaximumTemperatureWeighting=0.5
            XYPairs: X=[0, 8, 15, 35, 50]; Y=[0, 0, 1, 1, 0]
          LinearInterpolationFunction WaterFactor
            SoilWaterScale
            XYPairs: X=[0, 0.25, 1]; Y=[0, 1, 1]
            VariableReference XValue: VariableName=[SoilWaterScale]
        PhaseLookupValue NitrogenDemandSwitch: Start=Germination; End=Maturity
          Constant: FixedValue=1
        BiomassRemoval BiomassRemovalDefaults
          OrganBiomassRemovalType Harvest: FractionLiveToRemove=0; FractionDeadToRemove=0; FractionLiveToResidue=0.2; FractionDeadToResidue=0
          OrganBiomassRemovalType Cut: FractionLiveToRemove=0; FractionDeadToRemove=0; FractionLiveToResidue=0.3; FractionDeadToResidue=0
          OrganBiomassRemovalType Prune: FractionLiveToRemove=0; FractionDeadToRemove=0; FractionLiveToResidue=0.1; FractionDeadToResidue=0
          OrganBiomassRemovalType Graze: FractionLiveToRemove=0; FractionDeadToRemove=0; FractionLiveToResidue=0.15; FractionDeadToResidue=0
        Constant SpecificRootLength: FixedValue=40; Units=m/g
        Constant KNO3: FixedValue=0.03
        Constant KNH4: FixedValue=0.02
        LinearInterpolationFunction NUptakeSWFactor
          XYPairs: X=[0, 1]; Y=[0, 1]
          VariableReference XValue: VariableName=[Root].RWC
        Constant MaintenanceRespirationFunction: FixedValue=0
        Constant CarbonConcentration: FixedValue=0.4
        NutrientDemandFunctions DMDemands
          MultiplyFunction Structural
            PartitionFractionDemandFunction DMDemandFunction
              LinearInterpolationFunction PartitionFraction
                XYPairs: X=[0, 2.99, 3, 6, 7]; Y=[0, 0, 0.2, 0.2, 0]
                VariableReference XValue: VariableName=[Phenology].Stage
            Constant StructuralFraction: FixedValue=1
          Constant Metabolic: FixedValue=0
          StorageDMDemandFunction Storage: same as Replacements.Soybean.Root.DMDemands.Storage
          Constant QStructuralPriority: FixedValue=1
          Constant QMetabolicPriority: FixedValue=1
          Constant QStoragePriority: FixedValue=1
        NutrientDemandFunctions NDemands: same as Replacements.Soybean.Root.NDemands
        VariableReference CriticalNConc: VariableName=[Root].MinimumNConc
        NutrientPoolFunctions InitialWt: same as Replacements.Soybean.Root.InitialWt
        Constant RootDepthStressFactor: FixedValue=1
        ExpressionFunction RSRatio: Expression=divide([Root].Live.Wt,[AboveGroundLive].Wt)
      Leaf: MaxCover=1; Albedo=0.18; Gsmax350=0.009; R50=160; KDead=0.03; MaximumMainStemLeafNumber=30
        zero: CurrentExpandingLeaf, StartFractionExpanded, FractionNextleafExpanded, DeadNodesYesterday, GrowthRespiration, LAI, Depth, Width, FRGR, PotentialEP, WaterDemand, TipsAtEmergence, CohortsAtInitialisation, FractionDied
        ExpressionFunction CO2internal: Expression=(163 - [IWeather].MeanT)/(5 - 0.1*[IWeather].MeanT)
        DivideFunction StomatalConductanceCO2Modifier
          VariableReference FCO2: VariableName=[Leaf].Photosynthesis.FCO2
          ExpressionFunction RelativeCO2Gradient
            Expression=([IWeather].CO2 - [Leaf].CO2internal)/(350 - [Leaf].CO2internal)
        LeafCohort InitialLeaves[1]: Rank=1; Area=380
          zero: NReallocationFactor, DMReallocationFactor, NRetranslocationFactor, DMRetranslocationFactor, ShadeInducedSenRate, SenescedFrac, DeltaPotentialArea, DeltaStressConstrainedArea, DeltaCarbonConstrainedArea, PotentialStructuralDMAllocation, PotentialMetabolicDMAllocation, MetabolicNReallocated, MetabolicWtReallocated, StorageNReallocated, StorageWtReallocated, MetabolicNRetranslocated, StorageNRetrasnlocated, DMRetranslocated, MetabolicNAllocation, StructuralDMAllocation, MetabolicDMAllocation
        LeafCohort InitialLeaves[2]: Rank=2
          zero: NReallocationFactor, DMReallocationFactor, NRetranslocationFactor, DMRetranslocationFactor, ShadeInducedSenRate, SenescedFrac, DeltaPotentialArea, DeltaStressConstrainedArea, DeltaCarbonConstrainedArea, PotentialStructuralDMAllocation, PotentialMetabolicDMAllocation, MetabolicNReallocated, MetabolicWtReallocated, StorageNReallocated, StorageWtReallocated, MetabolicNRetranslocated, StorageNRetrasnlocated, DMRetranslocated, MetabolicNAllocation, StructuralDMAllocation, MetabolicDMAllocation, Area
        LeafCohortParameters CohortParameters: ExpansionStressValue=0; CellDivisionStressValue=0; LagAccelerationValue=0; SenescenceAccelerationValue=0; ShadeInducedSenescenceRateValue=0; SenessingLeafRelativeSizeValue=0
          Constant DMReallocationFactor: FixedValue=1
          Constant RemobilisationCost: FixedValue=0
          Constant LeafSizeShapeParameter: FixedValue=0.01
          Constant MaintenanceRespirationFunction: FixedValue=0
          Constant SenessingLeafRelativeSize: FixedValue=1; Units=0-1
          BellCurveFunction MaxArea
            Memo
              Potential leaf area is calculated from leaf number using the approach of Keating and Wafula (1992).
              Individual leaf size is described using a bell-shaped curve, the parameters of which are derived from final leaf number.
            MultiplyFunction LargestLeafPosition
              VariableReference FinalLeafNumber: VariableName=[Structure].FinalLeafNumber
              Constant RelativePositionOfLargestLeaf: FixedValue=0.67
            LinearInterpolationFunction AreaMax
              XYPairs: X=[0, 2, 7, 12, 17, 22]; Y=[32530, 39259, 49659, 60000, 75000, 90000]
              VariableReference XValue: VariableName=[Structure].FinalLeafNumber
            LinearInterpolationFunction Breadth
              XYPairs: X=[5, 10, 15, 20, 25]; Y=[-0.377, -0.144, -0.059, -0.027, -0.016]
              VariableReference XValue: VariableName=[Structure].FinalLeafNumber
            Constant Skewness: FixedValue=0.00025
          Constant NReallocationFactor: FixedValue=1
          Constant NRetranslocationFactor: FixedValue=0
          Constant DMRetranslocationFactor: FixedValue=0.5
          LinearInterpolationFunction CellDivisionStress
            XYPairs: X=[0.9, 1]; Y=[1, 1]
            VariableReference XValue: VariableName=[Maize].Leaf.Fw
          MinimumFunction ExpansionStress
            LinearInterpolationFunction WaterStressEffect
              XYPairs: X=[0, 0.9, 1.3]; Y=[0, 1, 1]
              VariableReference XValue: VariableName=[Root].WaterTensionFactor
            LinearInterpolationFunction TemperatureEffect
              XYPairs: X=[0, 12, 14]; Y=[0, 1, 1]
              VariableReference XValue: VariableName=[IWeather].MeanT
            LinearInterpolationFunction NitrogenStressEffect
              XYPairs: X=[0, 0.5, 1]; Y=[0.1, 0.1, 1]
              VariableReference XValue: VariableName=[Maize].Leaf.Fn
          LinearInterpolationFunction GrowthDuration
            XYPairs: X=[0, 0.3, 0.5, 1]; Y=[1, 200, 250, 100]
            VariableReference XValue: VariableName=[Structure].RelativeNodeApperance
          LinearInterpolationFunction LagDuration
            XYPairs: X=[0, 0.5, 0.7, 0.8, 1]; Y=[300, 300, 700, 900, 1300]
            VariableReference XValue: VariableName=[Structure].RelativeNodeApperance
          LinearInterpolationFunction SenescenceDuration
            XYPairs: X=[0, 0.3, 0.5]; Y=[150, 150, 350]
            VariableReference XValue: VariableName=[Structure].RelativeNodeApperance
          Constant DetachmentLagDuration: FixedValue=1000000
          Constant DetachmentDuration: FixedValue=1000000
          AddFunction MaximumNConcOLD
            VariableReference CriticalNConc: VariableName=[Leaf].CohortParameters.CriticalNConc
            MultiplyFunction StorageNConc
              LinearInterpolationFunction NonStructuralNConc
                XYPairs: X=[1, 10]; Y=[0.034, 0.01]
                VariableReference XValue: VariableName=[Structure].LeafTipsAppeared
              LinearInterpolationFunction WaterStressEffect
                XYPairs: X=[0.5, 0.95, 1]; Y=[0, 0, 1]
                VariableReference XValue: VariableName=[Root].WaterTensionFactor
          Constant CriticalNConcOLD: FixedValue=0.01; Units=g/g
          Constant MinimumNConcOLD: FixedValue=0.005; Units=g/g
          LinearInterpolationFunction MaximumNConc
            XYPairs: X=[3, 4, 5, 6, 7, 8, 9, 10]; Y=[0.05, 0.05, 0.035, 0.015, 0.015, 0.015, 0.015, 0.015]
            VariableReference XValue: VariableName=[Phenology].Stage
          MultiplyFunction CriticalNConc
            LinearInterpolationFunction CriticalNConcAt350ppm
              XYPairs
                X=[3, 4, 5, 6, 7, 8, 9, 10]
                Y=[0.007, 0.007, 0.006, 0.0045, 0.0045, 0.0045, 0.0045, 0.0045]
              VariableReference XValue: VariableName=[Phenology].Stage
            LinearInterpolationFunction CO2Factor
              XYPairs: X=[350, 700]; Y=[1, 0.93]
              VariableReference XValue: VariableName=[IWeather].CO2
          LinearInterpolationFunction MinimumNConc
            XYPairs: X=[3, 4, 5, 6, 7, 8, 9, 10]; Y=[0.003, 0.003, 0.003, 0.003, 0.003, 0.003, 0.003, 0.003]
            VariableReference XValue: VariableName=[Phenology].Stage
          AddFunction LagAcceleration
            Constant One: FixedValue=1
            MultiplyFunction Stress
              Constant StressResponseCoefficient: FixedValue=2
              LinearInterpolationFunction StressFactor
                XYPairs: X=[0.5, 1]; Y=[1, 0]
                VariableReference XValue: VariableName=[Maize].Leaf.Fw
          AddFunction SenescenceAcceleration
            Constant One: FixedValue=1
            MultiplyFunction Stress
              Constant StressResponseCoefficient: FixedValue=0
              LinearInterpolationFunction StressFactor
                XYPairs: X=[0, 1]; Y=[1, 0]
                VariableReference XValue: VariableName=[Root].WaterTensionFactor
          LinearInterpolationFunction SpecificLeafAreaMax
            XYPairs: X=[1, 9]; Y=[30000, 20000]
            VariableReference XValue: VariableName=[Structure].LeafTipsAppeared
          LinearInterpolationFunction SpecificLeafAreaMin
            XYPairs: X=[1, 9]; Y=[25000, 15000]
            VariableReference XValue: VariableName=[Structure].LeafTipsAppeared
          Constant StructuralFraction: FixedValue=0.3
          Constant StorageFraction: FixedValue=0.1
          LinearInterpolationFunction ShadeInducedSenescenceRate
            XYPairs: X=[0, 0.7, 0.8, 0.96, 0.99]; Y=[0, 0, 0, 0, 0]
            VariableReference XValue: VariableName=[Leaf].CohortCurrentRankCoverAbove
          Constant InitialNConc: FixedValue=0; Units=g/g
          ArrayFunction LagDurationAgeMultiplier: Values=1 1 1
          ArrayFunction SenescenceDurationAgeMultiplier: Values=1 1 1
          ArrayFunction LeafSizeAgeMultiplier: Values=1 1 1 1 1 1 1 1 1 1 1 1
        RUEModel Photosynthesis
          Constant RUE: FixedValue=2
          WeightedTemperatureFunction FT: MaximumTemperatureWeighting=0.75
            XYPairs: X=[0, 8, 15, 35, 50]; Y=[0, 0, 1, 1, 0]
          LinearInterpolationFunction FVPD
            XYPairs: X=[0, 10, 50]; Y=[1, 1, 1]
            VariableReference XValue: VariableName=[Leaf].Photosynthesis.VPD
          LinearInterpolationFunction FN
            XYPairs: X=[0, 1]; Y=[0.3, 1]
            VariableReference XValue: VariableName=[Leaf].Fn
          LinearInterpolationFunction FW
            XYPairs: X=[0, 0.3]; Y=[0, 1]
            VariableReference XValue: VariableName=[Leaf].Fw
          RUECO2Function FCO2: PhotosyntheticPathway=C4
          VariableReference RadnInt: VariableName=[Leaf].RadiationIntercepted
        MultiplyFunction ExtinctionCoeff
          Memo
            Extinction coefficient is specified in terms of a potential extinction coefficient which is then discounted during periods of water stress to account for the impact of leaf curling.
          LinearInterpolationFunction PotentialExtinctionCoeff
            XYPairs: X=[0.2, 0.5, 1]; Y=[0.7, 0.5, 0.4]
            VariableReference XValue: VariableName=[Maize].SowingData.RowSpacing
          LinearInterpolationFunction WaterStressImpact
            XYPairs: X=[0, 0.7]; Y=[0.5, 1]
            VariableReference XValue: VariableName=[Maize].Leaf.Fw
        LinearInterpolationFunction FrostFraction
          XYPairs: X=[-2, 2]; Y=[1, 0]
          VariableReference XValue: VariableName=[Weather].MinT
        VariableReference ThermalTime: VariableName=[Phenology].ThermalTime
        Constant RemobilisationCost: FixedValue=0
        MinimumFunction FRGRFunction
          VariableReference FT: VariableName=[Leaf].Photosynthesis.FT
          VariableReference FN: VariableName=[Leaf].Photosynthesis.FN
          VariableReference FVPD: VariableName=[Leaf].Photosynthesis.FVPD
        Constant StructuralFraction: FixedValue=0.7
        Constant DMConversionEfficiency: FixedValue=1; Units=0-1
        BiomassRemoval BiomassRemovalDefaults
          OrganBiomassRemovalType Harvest: FractionLiveToRemove=0; FractionDeadToRemove=0; FractionLiveToResidue=0.3; FractionDeadToResidue=0
          OrganBiomassRemovalType Cut: FractionLiveToRemove=0.8; FractionDeadToRemove=0; FractionLiveToResidue=0; FractionDeadToResidue=0
          OrganBiomassRemovalType Prune: FractionLiveToRemove=0; FractionDeadToRemove=0; FractionLiveToResidue=0.6; FractionDeadToResidue=0
          OrganBiomassRemovalType Graze: FractionLiveToRemove=0.6; FractionDeadToRemove=0; FractionLiveToResidue=0.1; FractionDeadToResidue=0
        Constant CarbonConcentration: FixedValue=0.4
        Constant WidthFunction: FixedValue=0
        VariableReference DepthFunction: VariableName=[Leaf].Height
        DivideFunction SpecificAreaTotal
          ExpressionFunction TotalLAI: Expression=[Leaf].LAITotal*1000000
          VariableReference TotalWt: VariableName=[Leaf].Wt
        DivideFunction SpecificAreaDead
          ExpressionFunction LAIDead: Expression=[Leaf].LAIDead*1000000
          VariableReference DeadWt: VariableName=[Leaf].Dead.Wt
        DivideFunction SpecificNitrogenTotal
          ExpressionFunction TotalN: Expression=[Leaf].N
          VariableReference TotalLAI: VariableName=[Leaf].LAITotal
        DivideFunction SpecificNitrogenDead
          ExpressionFunction DeadN: Expression=[Leaf].Dead.N
          VariableReference DeadLAI: VariableName=[Leaf].LAIDead*
        NutrientPoolFunctions DMDemandPriorityFactors: same as Replacements.Soybean.Grain.DMDemandPriorityFactors
        NutrientPoolFunctions NDemandPriorityFactors: same as Replacements.Soybean.Grain.DMDemandPriorityFactors
      GenericOrgan Husk: IsAboveGround=true
        Constant NReallocationFactor: FixedValue=0
        Constant RemobilisationCost: FixedValue=0
        Constant NRetranslocationFactor: FixedValue=0.1
        Constant MaximumNConc: FixedValue=0.007; Units=g/g
        Constant SenescenceRate: FixedValue=0; Units=/d
        Constant MinimumNConc: FixedValue=0.005; Units=g/g
        Constant DMRetranslocationFactor: FixedValue=0.1
        BiomassRemoval BiomassRemovalDefaults
          OrganBiomassRemovalType Harvest: FractionLiveToRemove=0.5; FractionDeadToRemove=0; FractionLiveToResidue=0.1; FractionDeadToResidue=0
          OrganBiomassRemovalType Cut: FractionLiveToRemove=0.8; FractionDeadToRemove=0; FractionLiveToResidue=0; FractionDeadToResidue=0
          OrganBiomassRemovalType Prune: FractionLiveToRemove=0; FractionDeadToRemove=0; FractionLiveToResidue=0.6; FractionDeadToResidue=0
          OrganBiomassRemovalType Graze: FractionLiveToRemove=0.6; FractionDeadToRemove=0; FractionLiveToResidue=0.2; FractionDeadToResidue=0
        Constant DetachmentRateFunction: FixedValue=0; Units=/d
        Constant MaintenanceRespirationFunction: FixedValue=0; Units=0-1
        Constant DMConversionEfficiency: FixedValue=1; Units=0-1
        Constant DMReallocationFactor: FixedValue=0
        VariableReference CriticalNConc: VariableName=[Husk].MinimumNConc
        PhaseLookupValue NitrogenDemandSwitch: Start=Emergence; End=StartGrainFill
          Constant: FixedValue=1
        Constant CarbonConcentration: FixedValue=0.4
        NutrientDemandFunctions DMDemands
          MultiplyFunction Structural
            PopulationBasedDemandFunction DMDemandFunction
              VariableReference ThermalTime: VariableName=[Phenology].ThermalTime
              Constant StartStage: FixedValue=5.5
              Constant GrowthDuration: FixedValue=300
              Constant MaximumOrganWt: FixedValue=25
              VariableReference OrganPopulation: VariableName=[Rachis].CobNumber
              Constant SenescenceRate: FixedValue=0; Units=/d
              LinearInterpolationFunction ExpansionStress2
                XYPairs: X=[0, 0.35]; Y=[0, 1]
                VariableReference XValue: VariableName=[Maize].Leaf.Fw
              MinimumFunction ExpansionStress
                LinearInterpolationFunction WaterStressEffect
                  XYPairs: X=[0.1, 0.7, 1.3]; Y=[0, 1, 1]
                  VariableReference XValue: VariableName=[Root].WaterTensionFactor
                LinearInterpolationFunction TemperatureEffect
                  XYPairs: X=[0, 12, 14]; Y=[0, 1, 1]
                  VariableReference XValue: VariableName=[IWeather].MeanT
                LinearInterpolationFunction NitrogenStressEffect
                  XYPairs: X=[0, 0.5, 1]; Y=[0.1, 0.1, 1]
                  VariableReference XValue: VariableName=[Maize].Leaf.Fn
            PhaseLookup StructuralFraction
              PhaseLookupValue PreStemElongation: Start=Emergence; End=StartGrainFill
                Constant StemFraction: FixedValue=0.5
              PhaseLookupValue StemElongation: Start=StartGrainFill; End=HarvestRipe
                Constant StemFraction: FixedValue=1
          Constant Metabolic: FixedValue=0
          StorageDMDemandFunction Storage
            SubtractFunction StorageFraction
              Constant One: FixedValue=1
              VariableReference StructuralFraction: VariableName=[Husk].DMDemands.Structural.StructuralFraction
          Constant QStructuralPriority: FixedValue=1
          Constant QMetabolicPriority: FixedValue=1
          Constant QStoragePriority: FixedValue=1
        NutrientDemandFunctions NDemands
          MultiplyFunction Structural
            VariableReference MinNconc: VariableName=[Husk].minimumNconc
            VariableReference PotentialDMAllocation: VariableName=[Husk].potentialDMAllocation.Structural
          MultiplyFunction Metabolic
            SubtractFunction MetabolicNconc
              VariableReference CritNconc: VariableName=[Husk].criticalNConc
              VariableReference MinNconc: VariableName=[Husk].minimumNconc
            VariableReference PotentialDMAllocation: VariableName=[Husk].potentialDMAllocation.Structural
          StorageNDemandFunction Storage
            VariableReference NitrogenDemandSwitch: VariableName=[Husk].nitrogenDemandSwitch
            VariableReference MaxNconc: VariableName=[Husk].maximumNconc
          Constant QStructuralPriority: FixedValue=1
          Constant QMetabolicPriority: FixedValue=1
          Constant QStoragePriority: FixedValue=1
        RetranslocateNonStructural RetranslocateNitrogen
        NutrientPoolFunctions InitialWt: same as Replacements.Soybean.Shell.InitialWt
        Constant Photosynthesis: FixedValue=0
        VariableReference initialNConcFunction: VariableName=[Husk].MinimumNConc
      GenericOrgan Rachis: IsAboveGround=true
        MultiplyFunction CobNumber
          VariableReference StemNumber: VariableName=[Structure].TotalStemPopn
          Constant CobsPerStem: FixedValue=1.1
        DivideFunction CobSize
          VariableReference CobMass: VariableName=[Rachis].Live.Wt
          VariableReference CobNumber: VariableName=[Rachis].CobNumber
        Constant NReallocationFactor: FixedValue=0
        Constant RemobilisationCost: FixedValue=0
        Constant NRetranslocationFactor: FixedValue=0.1
        Constant MaximumNConc: FixedValue=0.008; Units=g/g
        Constant SenescenceRate: FixedValue=0; Units=/d
        Constant MinimumNConc: FixedValue=0.003; Units=g/g
        LinearInterpolationFunction ExpansionStress
          XYPairs: X=[0.1, 0.7]; Y=[0, 1]
          VariableReference XValue: VariableName=[Maize].Leaf.Fw
        BiomassRemoval BiomassRemovalDefaults: same as Replacements.Maize.Husk.BiomassRemovalDefaults
        Constant DetachmentRateFunction: FixedValue=0; Units=/d
        Constant MaintenanceRespirationFunction: FixedValue=0; Units=0-1
        Constant DMConversionEfficiency: FixedValue=1; Units=0-1
        Constant DMReallocationFactor: FixedValue=0
        Constant DMRetranslocationFactor: FixedValue=0
        VariableReference CriticalNConc: VariableName=[Rachis].MinimumNConc
        PhaseLookupValue NitrogenDemandSwitch: Start=Emergence; End=StartGrainFill
          Constant: FixedValue=1
        Constant CarbonConcentration: FixedValue=0.4
        NutrientDemandFunctions DMDemands
          MultiplyFunction Structural
            PopulationBasedDemandFunction DMDemandFunction
              VariableReference ThermalTime: VariableName=[Phenology].ThermalTime
              Constant StartStage: FixedValue=5.5
              Constant GrowthDuration: FixedValue=300
              Constant MaximumOrganWt: FixedValue=23
              VariableReference OrganPopulation: VariableName=[Rachis].CobNumber
              MinimumFunction ExpansionStress: same as Replacements.Maize.Husk.DMDemands.Structural.DMDemandFunction.ExpansionStress
            Constant StructuralFraction: FixedValue=1; Units=g/g
          Constant Metabolic: FixedValue=0
          StorageDMDemandFunction Storage
            SubtractFunction StorageFraction
              Constant One: FixedValue=1
              VariableReference StructuralFraction: VariableName=[Rachis].DMDemands.Structural.StructuralFraction
          Constant QStructuralPriority: FixedValue=1
          Constant QMetabolicPriority: FixedValue=1
          Constant QStoragePriority: FixedValue=1
        NutrientDemandFunctions NDemands
          MultiplyFunction Structural
            VariableReference MinNconc: VariableName=[Rachis].minimumNconc
            VariableReference PotentialDMAllocation: VariableName=[Rachis].potentialDMAllocation.Structural
          MultiplyFunction Metabolic
            SubtractFunction MetabolicNconc
              VariableReference CritNconc: VariableName=[Rachis].criticalNConc
              VariableReference MinNconc: VariableName=[Rachis].minimumNconc
            VariableReference PotentialDMAllocation: VariableName=[Rachis].potentialDMAllocation.Structural
          StorageNDemandFunction Storage
            VariableReference NitrogenDemandSwitch: VariableName=[Rachis].nitrogenDemandSwitch
            VariableReference MaxNconc: VariableName=[Rachis].maximumNconc
          Constant QStructuralPriority: FixedValue=1
          Constant QMetabolicPriority: FixedValue=1
          Constant QStoragePriority: FixedValue=1
        RetranslocateNonStructural RetranslocateNitrogen
        NutrientPoolFunctions InitialWt: same as Replacements.Soybean.Shell.InitialWt
        Constant Photosynthesis: FixedValue=0
        VariableReference initialNConcFunction: VariableName=[Rachis].MinimumNConc
      GenericOrgan Stem: IsAboveGround=true
        Constant RemobilisationCost: FixedValue=0
        LinearInterpolationFunction MaximumNConc
          XYPairs: X=[0, 0.7, 1]; Y=[0.025, 0.025, 0.005]
          VariableReference XValue: VariableName=[Structure].RelativeNodeApperance
        Constant MinimumNConc: FixedValue=0.004; Units=g/g
        PhaseLookupValue NitrogenDemandSwitch: Start=Emergence; End=StartGrainFill
          Constant: FixedValue=1
        Constant NReallocationFactor: FixedValue=0
        PhaseLookup NRetranslocationFactor
          PhaseLookupValue PreStemElongation: Start=Emergence; End=FlagLeaf
            Constant StemFraction: FixedValue=0
          PhaseLookupValue StemElongation: Start=FlagLeaf; End=HarvestRipe
            Constant NRetranslocationFactor: FixedValue=0.05
        Constant DMRetranslocationFactor: FixedValue=0.1
        BiomassRemoval BiomassRemovalDefaults: same as Replacements.Maize.Husk.BiomassRemovalDefaults
        Constant DetachmentRateFunction: FixedValue=0; Units=/d
        Constant SenescenceRate: FixedValue=0; Units=/d
        Constant MaintenanceRespirationFunction: FixedValue=0; Units=0-1
        Constant DMConversionEfficiency: FixedValue=1; Units=0-1
        Constant DMReallocationFactor: FixedValue=0
        AddFunction CriticalNConc
          VariableReference MinimumNConc: VariableName=[Stem].MinimumNConc
          MultiplyFunction MetabolicNConc
            SubtractFunction NonStructuralNConc
              VariableReference MaximumNConc: VariableName=[Stem].MaximumNConc
              VariableReference MinimumNConc: VariableName=[Stem].MinimumNConc
            Constant Proportion: FixedValue=0.2
        Constant CarbonConcentration: FixedValue=0.4
        NutrientDemandFunctions DMDemands
          MultiplyFunction Structural
            PartitionFractionDemandFunction DMDemandFunction
              LinearInterpolationFunction PartitionFraction
                XYPairs: X=[3, 5, 6, 7, 7.0001]; Y=[0.1, 0.1, 1, 1, 0]
                VariableReference XValue: VariableName=[Phenology].Stage
            PhaseLookup StructuralFraction: same as Replacements.Maize.Husk.DMDemands.Structural.StructuralFraction
          Constant Metabolic: FixedValue=0
          StorageDMDemandFunction Storage
            SubtractFunction StorageFraction
              Constant One: FixedValue=1
              VariableReference StructuralFraction: VariableName=[Stem].DMDemands.Structural.StructuralFraction
          Constant QStructuralPriority: FixedValue=1
          Constant QMetabolicPriority: FixedValue=1
          Constant QStoragePriority: FixedValue=1
        NutrientDemandFunctions NDemands: same as Replacements.Soybean.Stem.NDemands
        RetranslocateNonStructural RetranslocateNitrogen
        NutrientPoolFunctions InitialWt: same as Replacements.Soybean.Shell.InitialWt
        Constant Photosynthesis: FixedValue=0
        VariableReference initialNConcFunction: VariableName=[Stem].MinimumNConc
      CompositeBiomass AboveGround: OrganNames=[Leaf, Stem, Husk, Grain, Rachis]; IncludeLive=true; IncludeDead=true
        Memo
          The AboveGround composite biomass object includes all organs occurring above the soil surface to allow output for total dry matter and Nutrient contents, including total structural, non-structural and metabolic pools.
      CompositeBiomass BelowGround: OrganNames=[Root]; IncludeLive=true; IncludeDead=true
        Memo
          The BelowGround composite biomass object includes all root biomass pools to allow output for total dry matter and Nutrient contents, including total structural, non-structural and metabolic pools.
      CompositeBiomass Total: OrganNames=[Leaf, Stem, Husk, Grain, Rachis, Root]; IncludeLive=true; IncludeDead=true
        Memo
          The Total composite biomass object includes all organs (above+below ground) to allow output for total dry matter and Nutrient contents, including total structural, non-structural and metabolic pools.
      CompositeBiomass TotalLive: OrganNames=[Leaf, Stem, Husk, Grain, Rachis, Root]; IncludeLive=true; IncludeDead=false
        Memo
          The TotalLive composite biomass object includes the Live pools of all organs (above+below ground) to allow output for total dry matter and Nutrient contents, including total structural, non-structural and metabolic pools.
      CompositeBiomass TotalDead: OrganNames=[Leaf, Stem, Husk, Grain, Rachis, Root]; IncludeLive=false; IncludeDead=true
        Memo
          The TotalDead composite biomass object includes the Dead pools of all organs (above+below ground) to allow output for total dry matter and Nutrient contents, including total structural, non-structural and metabolic pools.
      CompositeBiomass EarLive: OrganNames=[Husk, Grain, Rachis]; IncludeLive=true; IncludeDead=false
        Memo
          The EarLive composite biomass object includes the Live pools of all organs within the Ear to allow output for total dry matter and Nutrient contents, including total structural, non-structural and metabolic pools.
      CompositeBiomass AboveGroundLive: OrganNames=[Leaf, Stem, Husk, Grain, Rachis]; IncludeLive=true; IncludeDead=false
        Memo
          The AboveGroundLive composite biomass object includes the Live pools of all organs occurring above the soil surface to allow output for total dry matter and Nutrient contents, including total structural, non-structural and metabolic pools.
      CompositeBiomass AboveGroundDead: OrganNames=[Leaf, Stem, Husk, Grain, Rachis]; IncludeLive=false; IncludeDead=true
        Memo
          The AboveGroundDead composite biomass object includes the Dead pools of all organs occurring above the soil surface to allow output for total dry matter and Nutrient contents, including total structural, non-structural and metabolic pools.
      Memo Future Development Needs
        #Future Development requirements

        * Phenology not responding to stress events.  Requires better data sets for quantifying the effects of water and nitrogen on leaf apperance and the timing of development stages.
        * Phosphorus response
        * Improved parameterisation of supply and demand for N and DM from organs and arbitration of these resources.
        * Heat Stress responses in grain number
        * More validation under a wider range of environments with more detailed datasets
        * Seedling mortality
        * Water demand (MicroClimate) needs validation
      Folder CultivarFolder
        Cultivar Hycorn_53
          Command:
            [Phenology].Juvenile.Target.FixedValue = 190
            [Phenology].Photosensitive.Target.XYPairs.X = 0, 12.5, 24
            [Phenology].Photosensitive.Target.XYPairs.Y = 0, 0, 124
            [Phenology].FlagLeafToFlowering.Target.FixedValue = 10
            [Phenology].FloweringToGrainFilling.Target.FixedValue = 170
            [Phenology].GrainFilling.Target.FixedValue = 520
            [Rachis].DMDemands.Structural.DMDemandFunction.MaximumOrganWt.FixedValue = 25
            [Grain].MaximumGrainsPerCob.FixedValue =  550
        Cultivar Pioneer_33M54
          Command:
            [Phenology].GrainFilling.Target.FixedValue = 550
            [Phenology].Juvenile.Target.FixedValue = 270
        Cultivar Pioneer_38H20
          Command:
            [Phenology].Juvenile.Target.FixedValue = 210
            [Phenology].GrainFilling.Target.FixedValue = 550
        Cultivar Pioneer_34K77
          Command:
            [Phenology].Juvenile.Target.FixedValue = 280
            [Phenology].GrainFilling.Target.FixedValue = 550
          Memo
            VShort duration variety released in New Zealand by Pioneer
        Cultivar Pioneer_39V43
          Command:
            [Phenology].Juvenile.Target.FixedValue = 100
            [Phenology].GrainFilling.Target.FixedValue = 500
            [Phenology].FloweringToGrainFilling.Target.FixedValue = 170
            [Structure].Phyllochron.Phyllochron.Phyllochron.XYPairs.X = 1, 4, 4.2, 10.5, 11
            [Structure].Phyllochron.Phyllochron.Phyllochron.XYPairs.Y = 26, 26, 46, 46, 70
            [Rachis].DMDemands.Structural.DMDemandFunction.MaximumOrganWt.FixedValue = 18
            [Structure].HeightModel.PotentialHeight.XYPairs.X = 3, 4, 5, 6
            [Structure].HeightModel.PotentialHeight.XYPairs.Y = 20, 40, 50, 1300
          Memo
            VShort duration variety released in New Zealand by Pioneer
        Cultivar Atrium
          Command:
            [Phenology].Juvenile.Target.FixedValue = 150
            [Phenology].GrainFilling.Target.FixedValue = 500
            [Phenology].FloweringToGrainFilling.Target.FixedValue = 170
            [Structure].Phyllochron.Phyllochron.Phyllochron.XYPairs.X = 1, 4, 4.2, 10.5, 11
            [Structure].Phyllochron.Phyllochron.Phyllochron.XYPairs.Y = 26, 26, 46, 46, 70
            [Rachis].DMDemands.Structural.DMDemandFunction.MaximumOrganWt.FixedValue = 18
            [Structure].HeightModel.PotentialHeight.XYPairs.X = 3, 4, 5, 6
            [Structure].HeightModel.PotentialHeight.XYPairs.Y = 20, 40, 50, 2370
          Memo
            Maize variety used in trials at Wageningen University
        Cultivar Laila
          Command:
            [Phenology].Juvenile.Target.FixedValue = 211
            [Phenology].Photosensitive.Target.XYPairs.X = 0, 12.5, 24
            [Phenology].Photosensitive.Target.XYPairs.Y = 0, 0, 0
            [Phenology].FlagLeafToFlowering.Target.FixedValue = 1
            [Phenology].FloweringToGrainFilling.Target.FixedValue = 170
            [Phenology].GrainFilling.Target.FixedValue = 812
            [Phenology].Maturing.Target.FixedValue = 1
            [Phenology].MaturityToHarvestRipe.Target.FixedValue = 1
            [Rachis].DMDemands.Structural.DMDemandFunction.MaximumOrganWt.FixedValue = 36
            [Grain].MaximumGrainsPerCob.FixedValue =  720
        Cultivar GH_5019WX
          Command:
            [Phenology].Juvenile.Target.FixedValue = 225
            [Phenology].Photosensitive.Target.XYPairs.X = 0, 12.5, 24.0
            [Phenology].Photosensitive.Target.XYPairs.Y = 0, 0, 124
            [Phenology].FlagLeafToFlowering.Target.FixedValue = 101
            [Phenology].FloweringToGrainFilling.Target.FixedValue = 170
            [Phenology].GrainFilling.Target.FixedValue = 694
            [Rachis].DMDemands.Structural.DMDemandFunction.MaximumOrganWt.FixedValue = 25
            [Grain].MaximumGrainsPerCob.FixedValue = 550
        Cultivar Hycorn_40
          Command:
            [Phenology].Juvenile.Target.FixedValue = 190
            [Phenology].Photosensitive.Target.XYPairs.X = 0, 12.5, 24
            [Phenology].Photosensitive.Target.XYPairs.Y = 0, 0, 124
            [Phenology].FlagLeafToFlowering.Target.FixedValue = 50
            [Phenology].FloweringToGrainFilling.Target.FixedValue = 170
            [Phenology].GrainFilling.Target.FixedValue = 713
            [Rachis].DMDemands.Structural.DMDemandFunction.MaximumOrganWt.FixedValue = 25
            [Grain].MaximumGrainsPerCob.FixedValue =  550
        Cultivar GH_5009
          Command:
            [Phenology].Juvenile.Target.FixedValue = 190
            [Phenology].Photosensitive.Target.XYPairs.X = 0, 12.5, 24
            [Phenology].Photosensitive.Target.XYPairs.Y = 0, 0, 300
            [Phenology].FlagLeafToFlowering.Target.FixedValue = 50
            [Phenology].FloweringToGrainFilling.Target.FixedValue = 170
            [Phenology].GrainFilling.Target.FixedValue = 713
            [Rachis].DMDemands.Structural.DMDemandFunction.MaximumOrganWt.FixedValue = 25
            [Grain].MaximumGrainsPerCob.FixedValue =  550
        Cultivar Dekalb_XL82
          Command:
            [Phenology].Juvenile.Target.FixedValue = 211
            [Phenology].Photosensitive.Target.XYPairs.X = 0, 12.5, 24
            [Phenology].Photosensitive.Target.XYPairs.Y = 0, 0, 472
            [Phenology].FlagLeafToFlowering.Target.FixedValue = 101
            [Phenology].FloweringToGrainFilling.Target.FixedValue = 170
            [Phenology].GrainFilling.Target.FixedValue = 813
            [Rachis].DMDemands.Structural.DMDemandFunction.MaximumOrganWt.FixedValue = 25
            [Grain].MaximumGrainsPerCob.FixedValue = 550
        Cultivar malawi_local
          Command:
            [Phenology].Juvenile.Target.FixedValue = 280
            [Phenology].Photosensitive.Target.XYPairs.X = 0, 12.5, 24
            [Phenology].Photosensitive.Target.XYPairs.Y = 0, 0, 264.5
            [Phenology].FlagLeafToFlowering.Target.FixedValue = 10
            [Phenology].FloweringToGrainFilling.Target.FixedValue = 170
            [Phenology].GrainFilling.Target.FixedValue = 600
            [Rachis].DMDemands.Structural.DMDemandFunction.MaximumOrganWt.FixedValue = 14
            [Grain].MaximumGrainsPerCob.FixedValue = 360
            [Grain].MaximumPotentialGrainSize.FixedValue = 0.217
          Memo
            The variety malawi_local is a Malawian medium-late maturing local variety.  Photoperiod response is taken from Ellis et al Crop Sci 32:1225 for SR52.
        Cultivar mh19
          Command:
            [Phenology].Juvenile.Target.FixedValue = 290
            [Phenology].Photosensitive.Target.XYPairs.X = 0, 12.5, 24
            [Phenology].Photosensitive.Target.XYPairs.Y = 0, 0, 264.5
            [Phenology].FlagLeafToFlowering.Target.FixedValue = 10
            [Phenology].FloweringToGrainFilling.Target.FixedValue = 170
            [Phenology].GrainFilling.Target.FixedValue = 570
            [Rachis].DMDemands.Structural.DMDemandFunction.MaximumOrganWt.FixedValue = 14
            [Grain].MaximumGrainsPerCob.FixedValue = 504
            [Grain].MaximumPotentialGrainSize.FixedValue = 0.361
          Memo
            The variety mh19 is a Malawian medium-late maturing hybrid.  Photoperiod response is taken from Ellis et al Crop Sci 32:1225 for SR52.
        Cultivar mh17
          Command:
            [Phenology].Juvenile.Target.FixedValue = 290
            [Phenology].Photosensitive.Target.XYPairs.X = 0, 12.5, 24
            [Phenology].Photosensitive.Target.XYPairs.Y = 0, 0, 264.5
            [Phenology].FlagLeafToFlowering.Target.FixedValue = 10
            [Phenology].FloweringToGrainFilling.Target.FixedValue = 170
            [Phenology].GrainFilling.Target.FixedValue = 570
            [Rachis].DMDemands.Structural.DMDemandFunction.MaximumOrganWt.FixedValue = 14
            [Grain].MaximumGrainsPerCob.FixedValue = 504
            [Grain].MaximumPotentialGrainSize.FixedValue = 0.361
          Memo
            The variety mh17 is a Malawian medium-late maturing hybrid.  Photoperiod response is taken from Ellis et al Crop Sci 32:1225 for SR52.
        Cultivar mh16
          Command:
            [Phenology].Juvenile.Target.FixedValue = 290
            [Phenology].Photosensitive.Target.XYPairs.X = 0, 12.5, 24
            [Phenology].Photosensitive.Target.XYPairs.Y = 0, 0, 264.5
            [Phenology].FlagLeafToFlowering.Target.FixedValue = 10
            [Phenology].FloweringToGrainFilling.Target.FixedValue = 170
            [Phenology].GrainFilling.Target.FixedValue = 570
            [Rachis].DMDemands.Structural.DMDemandFunction.MaximumOrganWt.FixedValue = 14
            [Grain].MaximumGrainsPerCob.FixedValue = 504
            [Grain].MaximumPotentialGrainSize.FixedValue = 0.361
          Memo
            The variety mh16 is a Malawian medium-late maturing hybrid.  Photoperiod response is taken from Ellis et al Crop Sci 32:1225 for SR52.
        Cultivar mh12
          Command:
            [Phenology].Juvenile.Target.FixedValue = 290
            [Phenology].Photosensitive.Target.XYPairs.X = 0, 12.5, 24
            [Phenology].Photosensitive.Target.XYPairs.Y = 0, 0, 264.5
            [Phenology].FlagLeafToFlowering.Target.FixedValue = 10
            [Phenology].FloweringToGrainFilling.Target.FixedValue = 170
            [Phenology].GrainFilling.Target.FixedValue = 570
            [Rachis].DMDemands.Structural.DMDemandFunction.MaximumOrganWt.FixedValue = 14
            [Grain].MaximumGrainsPerCob.FixedValue = 504
            [Grain].MaximumPotentialGrainSize.FixedValue = 0.361
          Memo
            The variety mh12 is a Malawian medium-late maturing hybrid.  Photoperiod response is taken from Ellis et al Crop Sci 32:1225 for SR52.
        Cultivar sc623
          Command:
            [Phenology].Juvenile.Target.FixedValue = 280
            [Phenology].Photosensitive.Target.XYPairs.X = 0, 12.5, 24
            [Phenology].Photosensitive.Target.XYPairs.Y = 0, 0, 264.5
            [Phenology].FlagLeafToFlowering.Target.FixedValue = 10
            [Phenology].FloweringToGrainFilling.Target.FixedValue = 170
            [Phenology].GrainFilling.Target.FixedValue = 550
            [Rachis].DMDemands.Structural.DMDemandFunction.MaximumOrganWt.FixedValue = 14
            [Grain].MaximumGrainsPerCob.FixedValue = 504
            [Grain].MaximumPotentialGrainSize.FixedValue = 0.361
          Memo
            The variety sc623 is a Zimbabwean medium-late maturing hybrid.  Photoperiod response is taken from Ellis et al Crop Sci 32:1225 for SR52.
        Cultivar sc625
          Command:
            [Phenology].Juvenile.Target.FixedValue = 280
            [Phenology].Photosensitive.Target.XYPairs.X = 0, 12.5, 24
            [Phenology].Photosensitive.Target.XYPairs.Y = 0, 0, 264.5
            [Phenology].FlagLeafToFlowering.Target.FixedValue = 10
            [Phenology].FloweringToGrainFilling.Target.FixedValue = 170
            [Phenology].GrainFilling.Target.FixedValue = 570
            [Rachis].DMDemands.Structural.DMDemandFunction.MaximumOrganWt.FixedValue = 14
            [Grain].MaximumGrainsPerCob.FixedValue = 504
            [Grain].MaximumPotentialGrainSize.FixedValue = 0.361
          Memo
            The variety sc625 is a Zimbabwean medium-late maturing hybrid.  Photoperiod response is taken from Ellis et al Crop Sci 32:1225 for SR52.
        Cultivar sc601
          Command:
            [Phenology].Juvenile.Target.FixedValue = 280
            [Phenology].Photosensitive.Target.XYPairs.X = 0, 12.5, 24
            [Phenology].Photosensitive.Target.XYPairs.Y = 0, 0, 264.5
            [Phenology].FlagLeafToFlowering.Target.FixedValue = 10
            [Phenology].FloweringToGrainFilling.Target.FixedValue = 170
            [Phenology].GrainFilling.Target.FixedValue = 560
            [Rachis].DMDemands.Structural.DMDemandFunction.MaximumOrganWt.FixedValue = 14
            [Grain].MaximumGrainsPerCob.FixedValue = 495
            [Grain].MaximumPotentialGrainSize.FixedValue = 0.361
          Memo
            The variety sc601 is a Zimbabwean medium-late maturing hybrid.  Photoperiod response is taken from Ellis et al Crop Sci 32:1225 for SR52.
        Cultivar CG4141
          Command:
            [Phenology].Juvenile.Target.FixedValue = 233
            [Phenology].Photosensitive.Target.XYPairs.X = 0, 12.5, 24
            [Phenology].Photosensitive.Target.XYPairs.Y = 0, 0, 264.5
            [Phenology].FlagLeafToFlowering.Target.FixedValue = 10
            [Phenology].FloweringToGrainFilling.Target.FixedValue = 170
            [Phenology].GrainFilling.Target.FixedValue = 550
            [Rachis].DMDemands.Structural.DMDemandFunction.MaximumOrganWt.FixedValue = 14
            [Grain].MaximumGrainsPerCob.FixedValue = 468
            [Grain].MaximumPotentialGrainSize.FixedValue = 0.361
          Memo
            The variety CG4141 is a Zimbabwean early-medium maturing hybrid.  Photoperiod response is taken from Ellis et al Crop Sci 32:1225 for SR52.
        Cultivar mh18
          Command:
            [Phenology].Juvenile.Target.FixedValue = 260
            [Phenology].Photosensitive.Target.XYPairs.X = 0, 12.5, 24
            [Phenology].Photosensitive.Target.XYPairs.Y = 0, 0, 264.5
            [Phenology].FlagLeafToFlowering.Target.FixedValue = 10
            [Phenology].FloweringToGrainFilling.Target.FixedValue = 170
            [Phenology].GrainFilling.Target.FixedValue = 550
            [Rachis].DMDemands.Structural.DMDemandFunction.MaximumOrganWt.FixedValue = 14
            [Grain].MaximumGrainsPerCob.FixedValue = 486
            [Grain].MaximumPotentialGrainSize.FixedValue = 0.361
          Memo
            The variety mh18 is a Zimbabwean early-medium maturing hybrid.  Photoperiod response is taken from Ellis et al Crop Sci 32:1225 for SR52.
        Cultivar r215
          Command:
            [Phenology].Juvenile.Target.FixedValue = 250
            [Phenology].Photosensitive.Target.XYPairs.X = 0, 12.5, 24
            [Phenology].Photosensitive.Target.XYPairs.Y = 0, 0, 264.5
            [Phenology].FlagLeafToFlowering.Target.FixedValue = 10
            [Phenology].FloweringToGrainFilling.Target.FixedValue = 170
            [Phenology].GrainFilling.Target.FixedValue = 550
            [Rachis].DMDemands.Structural.DMDemandFunction.MaximumOrganWt.FixedValue = 14
            [Grain].MaximumGrainsPerCob.FixedValue = 468
            [Grain].MaximumPotentialGrainSize.FixedValue = 0.361
          Memo
            The variety r215 is a Zimbabwean early-medium maturing hybrid.  Photoperiod response is taken from Ellis et al Crop Sci 32:1225 for SR52.
        Cultivar Melkassa
          Command:
            [Phenology].Juvenile.Target.FixedValue = 230
            [Phenology].Photosensitive.Target.XYPairs.X = 0, 12.5, 24
            [Phenology].Photosensitive.Target.XYPairs.Y = 0, 0, 264.5
            [Phenology].FlagLeafToFlowering.Target.FixedValue = 10
            [Phenology].FloweringToGrainFilling.Target.FixedValue = 160
            [Phenology].GrainFilling.Target.FixedValue = 550
            [Rachis].DMDemands.Structural.DMDemandFunction.MaximumOrganWt.FixedValue = 14
            [Grain].MaximumGrainsPerCob.FixedValue = 387
            [Grain].MaximumPotentialGrainSize.FixedValue = 0.33
          Memo
            The variety Melkassa is a local early-medium maturing Ethiopian variety.
        Cultivar sr52
          Command:
            [Phenology].Juvenile.Target.FixedValue = 250
            [Phenology].Photosensitive.Target.XYPairs.X = 0, 12.5, 24
            [Phenology].Photosensitive.Target.XYPairs.Y = 0, 0, 264.5
            [Phenology].FlagLeafToFlowering.Target.FixedValue = 10
            [Phenology].FloweringToGrainFilling.Target.FixedValue = 170
            [Phenology].GrainFilling.Target.FixedValue = 550
            [Rachis].DMDemands.Structural.DMDemandFunction.MaximumOrganWt.FixedValue = 14
            [Grain].MaximumGrainsPerCob.FixedValue = 468
            [Grain].MaximumPotentialGrainSize.FixedValue = 0.361
          Memo
            The variety sr52 is a Zimbabwean early-medium maturing hybrid.  Photoperiod response is taken from Ellis et al Crop Sci 32:1225 for SR52.
        Cultivar sc501
          Command:
            [Phenology].Juvenile.Target.FixedValue = 250
            [Phenology].Photosensitive.Target.XYPairs.X = 0, 12.5, 24
            [Phenology].Photosensitive.Target.XYPairs.Y = 0, 0, 264.5
            [Phenology].FlagLeafToFlowering.Target.FixedValue = 10
            [Phenology].FloweringToGrainFilling.Target.FixedValue = 170
            [Phenology].GrainFilling.Target.FixedValue = 550
            [Rachis].DMDemands.Structural.DMDemandFunction.MaximumOrganWt.FixedValue = 14
            [Grain].MaximumGrainsPerCob.FixedValue = 468
            [Grain].MaximumPotentialGrainSize.FixedValue = 0.361
          Memo
            The variety sc501 is a Zimbabwean early-medium maturing hybrid.  Photoperiod response is taken from Ellis et al Crop Sci 32:1225 for SR52.
        Cultivar r201
          Command:
            [Phenology].Juvenile.Target.FixedValue = 230
            [Phenology].Photosensitive.Target.XYPairs.X = 0, 12.5, 24
            [Phenology].Photosensitive.Target.XYPairs.Y = 0, 0, 264.5
            [Phenology].FlagLeafToFlowering.Target.FixedValue = 10
            [Phenology].FloweringToGrainFilling.Target.FixedValue = 170
            [Phenology].GrainFilling.Target.FixedValue = 550
            [Rachis].DMDemands.Structural.DMDemandFunction.MaximumOrganWt.FixedValue = 14
            [Grain].MaximumGrainsPerCob.FixedValue = 450
            [Grain].MaximumPotentialGrainSize.FixedValue = 0.375
          Memo
            The variety r201 is a Zimbabwean early maturing hybrid.  Photoperiod response is taken from Ellis et al Crop Sci 32:1225 for SR52.
        Cultivar sc401
          Command:
            [Phenology].Juvenile.Target.FixedValue = 230
            [Phenology].Photosensitive.Target.XYPairs.X = 0, 12.5, 24
            [Phenology].Photosensitive.Target.XYPairs.Y = 0, 0, 264.5
            [Phenology].FlagLeafToFlowering.Target.FixedValue = 10
            [Phenology].FloweringToGrainFilling.Target.FixedValue = 170
            [Phenology].GrainFilling.Target.FixedValue = 550
            [Rachis].DMDemands.Structural.DMDemandFunction.MaximumOrganWt.FixedValue = 14
            [Grain].MaximumGrainsPerCob.FixedValue = 450
            [Grain].MaximumPotentialGrainSize.FixedValue = 0.375
          Memo
            The variety NSCM_41 is a Zimbabwean early maturing hybrid.  Photoperiod response is taken from Ellis et al Crop Sci 32:1225 for SR52.
        Cultivar NSCM_41: same as Replacements.Maize.CultivarFolder.sc401
        Cultivar Makueni
          Command:
            [Phenology].Juvenile.Target.FixedValue = 150
            [Phenology].Photosensitive.Target.XYPairs.X = 0, 12.5, 24
            [Phenology].Photosensitive.Target.XYPairs.Y = 0, 0, 115
            [Phenology].FlagLeafToFlowering.Target.FixedValue = 10
            [Phenology].FloweringToGrainFilling.Target.FixedValue = 120
            [Phenology].GrainFilling.Target.FixedValue = 530
            [Rachis].DMDemands.Structural.DMDemandFunction.MaximumOrganWt.FixedValue = 14
            [Grain].MaximumGrainsPerCob.FixedValue = 432
            [Grain].MaximumPotentialGrainSize.FixedValue = 0.375
          Memo
            The variety Makueni Composite is a kenyan variety with similar phenology but slightly higher cob size than Katumani composite.
        Cultivar Katumani
          Command:
            [Phenology].Juvenile.Target.FixedValue = 150
            [Phenology].Photosensitive.Target.XYPairs.X = 0, 12.5, 24
            [Phenology].Photosensitive.Target.XYPairs.Y = 0, 0, 115
            [Phenology].FlagLeafToFlowering.Target.FixedValue = 10
            [Phenology].FloweringToGrainFilling.Target.FixedValue = 120
            [Phenology].GrainFilling.Target.FixedValue = 530
            [Rachis].DMDemands.Structural.DMDemandFunction.MaximumOrganWt.FixedValue = 14
            [Grain].MaximumGrainsPerCob.FixedValue = 405
            [Grain].MaximumPotentialGrainSize.FixedValue = 0.375
          Memo
            The variety Katumani Composite B was formed in 1966 and released in 1968 as part of the maize breeding work undertaken at the Katumani Research Station in Kenya which started in 1956.  Katumani Composite B was an advanced generation of Katumani Synthetic V X Katumani Synthetic VI.  It has slight photoperiod sensitivity and relatively small potential cob size.
        Cultivar Pioneer_3153
        Cultivar Pioneer_39G12
          Command:
            [Phenology].Juvenile.Target.FixedValue = 180
            [Phenology].GrainFilling.Target.FixedValue = 500
            [Grain].MaximumGrainsPerCob.FixedValue = 550
            [Grain].NumberFunction.GrowthRateFactor.XYPairs.X = 0.2,2,4,10
            [Grain].NumberFunction.GrowthRateFactor.XYPairs.Y = 0,0.6,1,1
            [Grain].MaximumPotentialGrainSize.FixedValue = 0.25
      CompositeBiomass Spike: OrganNames=[Husk, Rachis]; IncludeLive=true; IncludeDead=false
        Memo
          The SpikeLive composite biomass object includes the Live pools of then non-grain organs within the reproductive spike to allow output for total dry matter and Nutrient contents, including total structural, non-structural and metabolic pools.
      Constant MortalityRate: FixedValue=0
      Constant SeedMortalityRate: FixedValue=0
    Report MaizeReport: EventNames=[Clock].DoReport
      VariableNames:
        //========================================================
        //=======Systems variables for FACTS experiment assessment
        //========================================================
        //=======Dates|Phenology
        [Clock].Today
        [Clock].Today.DayOfYear
        [Maize].DaysAfterSowing
        [Maize].Phenology.CurrentStageName
        [Clock].Today.Year
        //=======Crop variables
        [Maize].AboveGroundLive.Wt * 10
        [Maize].AboveGroundLive.N * 10
        [Maize].AboveGroundLive.NConc * 100
        [Maize].Rachis.Live.Wt * 10
        [Maize].Rachis.Live.N * 10
        [Maize].Rachis.Live.NConc * 100
        [Maize].Husk.Live.Wt * 10
        [Maize].Husk.Live.N * 10
        [Maize].Husk.Live.NConc * 100
        [Maize].Rachis.Live.Wt * 10
        [Maize].Rachis.Live.N * 10
        [Maize].Rachis.Live.NConc * 100
        [Maize].Grain.Wt * 10
        [Maize].Grain.N * 10
        [Maize].Grain.Nconc * 100
        //===I Created GrainsperCob output|Check it
        [Maize].Grain.GrainsperCob
        [Maize].Grain.Number
        [Maize].Grain.Size
        [Maize].Root.Live.Wt * 10
        [Maize].Root.Live.N * 10
        [Maize].Root.Live.NConc * 100
        [Maize].Root.Depth
        [Maize].Root.RSRatio
        [Maize].Root.SpecificRootLength.FixedValue
        [Maize].Stem.Live.Wt * 10
        [Maize].Stem.Live.N * 10
        [Maize].Stem.Live.NConc * 100
        [Maize].Leaf.Live.Wt * 10
        [Maize].Leaf.Live.N * 10
        [Maize].Leaf.Live.NConc * 100
        [Maize].Leaf.Nconc * 100
        [Maize].Leaf.Dead.Wt * 10
        [Maize].Leaf.Dead.N * 10
        [Maize].Leaf.Dead.NConc * 100
        [Maize].Leaf.Wt * 10
        [Maize].Leaf.N * 10
        //=====For some reason I can't multiply Leaf.NConc by 100
        [Maize].Leaf.Nconc
        [Maize].Leaf.LAI
        [Maize].Leaf.SpecificArea
        [Maize].Leaf.SpecificNitrogen
        [Maize].Structure.LeafTipsAppeared
        [Maize].Leaf.LAITotal
        [Maize].Leaf.LAIDead
        //=====SpecificAreaDead and Total were created in Leaf model
        [Maize].Leaf.SpecificAreaDead
        [Maize].Leaf.SpecificAreaTotal
        [Maize].Leaf.SpecificNitrogenTotal
        [Maize].Leaf.SpecificNitrogenDead
        [Maize].Structure.LeafTipsAppeared
        [Maize].Leaf.CohortArea
        [Maize].Leaf.PlantAppearedLeafNo
        [Maize].Leaf.ExpandedCohortNo
        [Maize].Leaf.AppearedCohortNo
        [Maize].Leaf.DeadCohortNo
        [Maize].Leaf.SenescingCohortNo
        [Maize].Leaf.DeadCohortNo + [Maize].Leaf.SenescingCohortNo as MaizeLeafDeadCohortNo2
        //=======ET/CO2/NO2
        [Maize].Leaf.Transpiration
        [Field].Soil.SoilWater.Es
        [Maize].Leaf.Transpiration + [Field].Soil.SoilWater.Es as Maize_ET
        //=====N2 generated from denitrification
        sum([Soil].Nutrient.Natm) as Nutrient.Natm
        //======N2O generated from both denitrification and nitrification
        sum([Soil].Nutrient.N2Oatm) as Nutrient.N2Oatm
        //======N2O generated from both denitrification and nitrification/sum of different pools
        sum([Nutrient].Denitrification.N2Oatm)+ sum([Nutrient].Nitrification.N2Oatm) as Nutrient.N2Oatm_2
        //====== N2O/separated pools
        sum([Nutrient].Denitrification.N2Oatm) as NO3.Denitrification.N2Oatm
        sum([Nutrient].Nitrification.N2Oatm) as NH4.Nitrification.N2Oatm
        //======Total CO2 lost to the atmosphere
        sum([Soil].Nutrient.Catm) as Nutrient.Catm
        //======Total CO2 lost to the atmosphere/sum of different pools/should be the same value
        sum([Soil].Nutrient.Humic.Decomposition.Catm) + sum([Soil].Nutrient.Microbial.Decomposition.Catm) + sum([Soil].Nutrient.FOMCarbohydrate.Decomposition.Catm) +sum([Soil].Nutrient.FOMCellulose.Decomposition.Catm) + sum([Soil].Nutrient.FOMLignin.Decomposition.Catm) +sum([Soil].Nutrient.SurfaceResidue.Decomposition.Catm) as Nutrient.Catm_2
        //======Total CO2 lost to the atmosphere/Separated pools
        sum([Soil].Nutrient.Humic.Decomposition.Catm) as Humic.Decomposition.Catm
        sum([Soil].Nutrient.Microbial.Decomposition.Catm) as Microbial.Decomposition.Catm
        sum([Soil].Nutrient.FOMCarbohydrate.Decomposition.Catm) as FOMCarbohydrate.Decomposition.Catm
        sum([Soil].Nutrient.FOMCellulose.Decomposition.Catm) as FOMCellulose.Decomposition.Catm
        sum([Soil].Nutrient.FOMLignin.Decomposition.Catm) as FOMLignin.Decomposition.Catm
        sum([Soil].Nutrient.SurfaceResidue.Decomposition.Catm) as SurfaceResidue.Decomposition.Catm
        //======Total N2O by layer
        sum([Soil].Nutrient.N2Oatm[1:5]) as Nutrient.N2Oatm_030
        sum([Soil].Nutrient.N2Oatm[6:7]) as Nutrient.N2Oatm_3060
        sum([Soil].Nutrient.N2Oatm[8:9]) as Nutrient.N2Oatm_6090
        sum([Soil].Nutrient.N2Oatm[10:11]) as Nutrient.N2Oatm_90120
        [Soil].Nutrient.N2Oatm[12] as Nutrient.N2Oatm_120150
        [Soil].Nutrient.N2Oatm[13] as Nutrient.N2Oatm_150180
        [Soil].Nutrient.N2Oatm[14] as Nutrient.N2Oatm_180210
        [Soil].Nutrient.N2Oatm[15] as Nutrient.N2Oatm_210240
        [Soil].Nutrient.N2Oatm[16] as Nutrient.N2Oatm_240270
        [Soil].Nutrient.N2Oatm[17] as Nutrient.N2Oatm_270300
        [Soil].Nutrient.N2Oatm[18] as Nutrient.N2Oatm_300330
        [Soil].Nutrient.N2Oatm[19] as Nutrient.N2Oatm_330360
        [Soil].Nutrient.N2Oatm[20] as Nutrient.N2Oatm_360390
        //=======Soil variables
        [Field].Soil.SoilWater.SW[4] as SW15
        ([Field].Soil.SoilWater.SW[6] + [Field].Soil.SoilWater.SW[7]) / 2 as SW45
        mean([Field].Soil.SoilWater.SW[6:7]) as SW45_2
        [Field].Soil.Temperature.Value[4] as ST15
        ([Field].Soil.Temperature.Value[6] + [Field].Soil.Temperature.Value[7]) / 2 as ST45
        sum([Field].Soil.Nutrient.NO3.kgha[1:5]) as NO3_0_30cm
        sum([Field].Soil.Nutrient.NO3.kgha[6:7]) as NO3_30_60cm
        sum([Field].Soil.Nutrient.NH4.kgha[1:5]) as NH4_0_30cm
        sum([Field].Soil.Nutrient.NH4.kgha[6:7]) as NH4_30_60cm
        [Field].Soil.SoilWater.WaterTable
        //=======Campbell sensors | soil_system_1_mesonet spreadsheet
        ([Soil].Water.Volumetric[5]*1.5 + [Soil].Water.Volumetric[6]*1)/2.5 as SW30
        ([Soil].Water.Volumetric[7] + [Soil].Water.Volumetric[8])/2 as SW60
        ([Soil].Water.Volumetric[11]*2 + [Soil].Water.Volumetric[12]*1)/3 as SW120
        ([Soil].Temperature.Value[3]*2 + [Soil].Temperature.Value[4]*1)/3 as ST10
        ([Soil].Temperature.Value[5]*1.5 + [Soil].Temperature.Value[6]*1)/2.5 as ST30
        ([Soil].Temperature.Value[7] + [Soil].Temperature.Value[8])/2 as ST60
        ([Soil].Temperature.Value[11]*2 + [Soil].Temperature.Value[12]*1)/3 as ST120
        //=======Detailed soil N
        sum([Field].Soil.Nutrient.NO3.kgha[1:3]) as NO3_0_10cm
        [Field].Soil.Nutrient.NO3.kgha[4] as NO3_10_20cm
        [Field].Soil.Nutrient.NO3.kgha[5] as NO3_20_30cm
        [Field].Soil.Nutrient.NO3.kgha[6] * 2/3 as NO3_30_40cm
        ([Field].Soil.Nutrient.NO3.kgha[6] * 1/3) + [Field].Soil.Nutrient.NO3.kgha[7] as NO3_40_60cm
        [Field].Soil.Nutrient.NO3.kgha[8] + ([Field].Soil.Nutrient.NO3.kgha[9] * 1/3) as NO3_60_80cm
        sum([Field].Soil.Nutrient.NH4.kgha[1:3]) as NH4_0_10cm
        [Field].Soil.Nutrient.NH4.kgha[4] as NH4_10_20cm
        [Field].Soil.Nutrient.NH4.kgha[5] as NH4_20_30cm
        [Field].Soil.Nutrient.NH4.kgha[6] * 2/3 as NH4_30_40cm
        ([Field].Soil.Nutrient.NH4.kgha[6] * 1/3) + [Field].Soil.Nutrient.NH4.kgha[7] as NH4_40_60cm
        [Field].Soil.Nutrient.NH4.kgha[8] + ([Field].Soil.Nutrient.NH4.kgha[9] * 1/3) as NH4_60_80cm
        //=======Root biomass per layer
        10 * (sum([Maize].Root.LayerLive.Wt[1:3]) + 0.5* [Maize].Root.LayerLive.Wt[4]) as rootmass_015
        10 * (0.5* [Maize].Root.LayerLive.Wt[4] + [Maize].Root.LayerLive.Wt[5]) as rootmass_1530
        10 * sum([Maize].Root.LayerLive.Wt[1:5]) as rootmass_030
        10 * sum([Maize].Root.LayerLive.Wt[6:7]) as rootmass_3060
        10 * sum([Maize].Root.LayerLive.Wt[8:9]) as rootmass_6090
        10 * sum([Maize].Root.LayerLive.Wt[10:11]) as rootmass_90120
        10 * [Maize].Root.LayerLive.Wt[12] as rootmass_120150
        10 * [Maize].Root.LayerLive.Wt[13] as rootmass_150180
        10 * [Maize].Root.LayerLive.Wt[14] as rootmass_180210
        10 * [Maize].Root.LayerLive.Wt[15] as rootmass_210240
        10 * [Maize].Root.LayerLive.Wt[16] as rootmass_240270
        10 * [Maize].Root.LayerLive.Wt[17] as rootmass_270300
        10 * [Maize].Root.LayerLive.Wt[18] as rootmass_300330
        10 * [Maize].Root.LayerLive.Wt[19] as rootmass_330360
        10 * [Maize].Root.LayerLive.Wt[20] as rootmass_360390
        //=======Root length | from m/m2 to km/m2
        //=======I think Root length output is root depth, so I tried to calculate root length
        (sum([Maize].Root.LayerLive.Wt[1:3]) + 0.5 * [Maize].Root.LayerLive.Wt[4]) * [Maize].Root.SpecificRootLength.FixedValue / 1000 as rootlength_015
        (0.5* [Maize].Root.LayerLive.Wt[4] + [Maize].Root.LayerLive.Wt[5]) * [Maize].Root.SpecificRootLength.FixedValue / 1000 as rootlength_1530
        sum([Maize].Root.LayerLive.Wt[1:5]) * [Maize].Root.SpecificRootLength.FixedValue / 1000 as rootlength_030
        sum([Maize].Root.LayerLive.Wt[6:7]) * [Maize].Root.SpecificRootLength.FixedValue / 1000 as rootlength_3060
        sum([Maize].Root.LayerLive.Wt[8:9]) * [Maize].Root.SpecificRootLength.FixedValue / 1000 as rootlength_6090
        sum([Maize].Root.LayerLive.Wt[10:11]) * [Maize].Root.SpecificRootLength.FixedValue / 1000 as rootlength_90120
        [Maize].Root.LayerLive.Wt[12] * [Maize].Root.SpecificRootLength.FixedValue / 1000 as rootlength_120150
        [Maize].Root.LayerLive.Wt[13] * [Maize].Root.SpecificRootLength.FixedValue / 1000 as rootlength_150180
        [Maize].Root.LayerLive.Wt[14] * [Maize].Root.SpecificRootLength.FixedValue / 1000 as rootlength_180210
        [Maize].Root.LayerLive.Wt[15] * [Maize].Root.SpecificRootLength.FixedValue / 1000 as rootlength_210240
        [Maize].Root.LayerLive.Wt[16] * [Maize].Root.SpecificRootLength.FixedValue / 1000 as rootlength_240270
        [Maize].Root.LayerLive.Wt[17] * [Maize].Root.SpecificRootLength.FixedValue / 1000 as rootlength_270300
        [Maize].Root.LayerLive.Wt[18] * [Maize].Root.SpecificRootLength.FixedValue / 1000 as rootlength_300330
        [Maize].Root.LayerLive.Wt[19] * [Maize].Root.SpecificRootLength.FixedValue / 1000 as rootlength_330360
        [Maize].Root.LayerLive.Wt[20] * [Maize].Root.SpecificRootLength.FixedValue / 1000 as rootlength_360390
        [Maize].Root.Live.Wt * [Maize].Root.SpecificRootLength.FixedValue / 1000 as totalrootlength
        //=======Root length density - RLD | from mm/mm3 to cm/cm3
        mean([Maize].Root.LengthDensity[1:5]) * 100 as lengthDensity_030
        mean([Maize].Root.LengthDensity[6:7]) * 100 as lengthDensity_3060
        mean([Maize].Root.LengthDensity[8:9]) * 100 as lengthDensity_6090
        mean([Maize].Root.LengthDensity[10:11]) * 100 as LengthDensity_90120
        [Maize].Root.LengthDensity[12] * 100 as lengthDensity_120150
        [Maize].Root.LengthDensity[13] * 100 as lengthDensity_150180
        [Maize].Root.LengthDensity[14] * 100 as lengthDensity_180210
        [Maize].Root.LengthDensity[15] * 100 as lengthDensity_210240
        [Maize].Root.LengthDensity[16] * 100 as lengthDensity_240270
        [Maize].Root.LengthDensity[17] * 100 as lengthDensity_270300
        [Maize].Root.LengthDensity[18] * 100 as lengthDensity_300330
        [Maize].Root.LengthDensity[19] * 100 as lengthDensity_330360
        [Maize].Root.LengthDensity[20] * 100 as lengthDensity_360390
        mean([Maize].Root.LengthDensity[1:20]) * 100 as totallengthDensity
        //=======Root Nitrogen per layer
        10 * (sum([Maize].Root.LayerLive.N[1:3]) + 0.5* [Maize].Root.LayerLive.N[4]) as rootN_015
        10 * (0.5* [Maize].Root.LayerLive.N[4] + [Maize].Root.LayerLive.N[5]) as rootN_1530
        10 * sum([Maize].Root.LayerLive.N[1:5]) as rootN_030
        10 * sum([Maize].Root.LayerLive.N[6:7]) as rootN_3060
        10 * sum([Maize].Root.LayerLive.N[8:9]) as rootN_6090
        10 * sum([Maize].Root.LayerLive.N[10:11]) as rootN_90120
        10 * [Maize].Root.LayerLive.N[12] as rootN_120150
        10 * [Maize].Root.LayerLive.N[13] as rootN_150180
        10 * [Maize].Root.LayerLive.N[14] as rootN_180210
        10 * [Maize].Root.LayerLive.N[15] as rootN_210240
        10 * [Maize].Root.LayerLive.N[16] as rootN_240270
        10 * [Maize].Root.LayerLive.N[17] as rootN_270300
        10 * [Maize].Root.LayerLive.N[18] as rootN_300330
        10 * [Maize].Root.LayerLive.N[19] as rootN_330360
        10 * [Maize].Root.LayerLive.N[20] as rootN_360390
        [Weather].Rain
        [Soil].SoilWater.Depth
        [Maize].Root.LayerLive.Wt
        [SurfaceOrganicMatter].Wt
        [SurfaceOrganicMatter].Cover
    Report SoybeanReport: EventNames=[Clock].DoReport
      VariableNames:
        //========================================================
        //=======Systems variables for FACTS experiment assessment
        //========================================================
        //=======Dates|Phenology
        [Clock].Today
        [Clock].Today.DayOfYear
        [Soybean].DaysAfterSowing
        [Soybean].Phenology.CurrentStageName
        //=======Crop variables
        [Soybean].AboveGroundLive.Wt * 10
        [Soybean].AboveGroundLive.N * 10
        [Soybean].AboveGroundLive.NConc * 100
        //=======I created another composite factor (AboveGround2) to better represent our measurements
        [Soybean].AboveGround2.Wt * 10
        [Soybean].AboveGround2.N * 10
        [Soybean].AboveGround2.NConc * 100
        //=======Shell is equivalent to pod in measured data
        [Soybean].Shell.Live.Wt * 10
        [Soybean].Shell.Live.N * 10
        [Soybean].Shell.Live.NConc * 100
        //=======Check which one to use (I am using the total Wt because of a senescence rate)
        [Soybean].Shell.Wt * 10
        [Soybean].Shell.N * 10
        [Soybean].Shell.Nconc * 100
        //=======Pod = Shell + grain
        //=======I created PodLive composite biomass
        //=======Pod is equivalent to fruit in measured data
        [Soybean].PodLive.Wt * 10
        [Soybean].PodLive.N * 10
        [Soybean].PodLive.NConc * 100
        //=======Check which one to use (I am using the total Wt for shell)
        [Soybean].Pod.Wt * 10
        [Soybean].Pod.N * 10
        [Soybean].Pod.NConc * 100
        [Soybean].Grain.Wt * 10
        [Soybean].Grain.N * 10
        [Soybean].Grain.Nconc * 100
        [Soybean].Root.Live.Wt * 10
        [Soybean].Root.Live.N * 10
        [Soybean].Root.Live.NConc * 100
        [Soybean].Root.Depth
        [Soybean].Root.RSRatio
        [Soybean].Root.SpecificRootLength.FixedValue
        [Soybean].Stem.Live.Wt * 10
        [Soybean].Stem.Live.N * 10
        [Soybean].Stem.Live.NConc * 100
        //=======Check which one to use (I am using the total Wt)
        [Soybean].Stem.Wt * 10
        [Soybean].Stem.N * 10
        [Soybean].Stem.Nconc * 100
        [Soybean].Leaf.Live.Wt * 10
        [Soybean].Leaf.Live.N * 10
        [Soybean].Leaf.Live.NConc * 100
        [Soybean].Leaf.Dead.Wt * 10
        [Soybean].Leaf.Dead.N * 10
        [Soybean].Leaf.Dead.NConc * 100
        [Soybean].Leaf.Wt * 10
        [Soybean].Leaf.N * 10
        //=====For some reason I can't multiply Leaf.NConc by 100
        [Soybean].Leaf.NConc
        [Soybean].Leaf.LAI
        //=======SLA units differ for maize (mm2/g) and soybean (m2/g)
        //=======For some reason, multiplying/dividing Leaf.SpecificArea by any number results zero
        //=======So I changed units of the measured data
        [Soybean].Leaf.SpecificArea
        //=======There is no output for SLN, so it was created
        [Soybean].Leaf.SLN
        [Soybean].Leaf.Detached.Wt
        [Soybean].Leaf.Dead.Wt
        [Soybean].Leaf.Senesced.Wt*10
        sum of [Soybean].Leaf.Senesced.Wt*10 from [Soybean].Sowing to [Soybean].Harvesting as LeafSencescedCumWt
        sum of [Soybean].Leaf.Detached.Wt*10 from [Soybean].Sowing to [Soybean].Harvesting as LeafDetachedCumWt
        [Soybean].Leaf.Detached.Wt*10
        [Soybean].Leaf.NodeNumber
        //=======ET/CO2/NO2
        [Soybean].Leaf.Transpiration
        [Field].Soil.SoilWater.Es
        [Soybean].Leaf.Transpiration + [Field].Soil.SoilWater.Es as Soybean_ET
        //=====N2 generated from denitrification
        sum([Soil].Nutrient.Natm) as Nutrient.Natm
        //======N2O generated from both denitrification and nitrification
        sum([Soil].Nutrient.N2Oatm) as Nutrient.N2Oatm
        //======N2O generated from both denitrification and nitrification/sum of different pools
        sum([Nutrient].Denitrification.N2Oatm)+ sum([Nutrient].Nitrification.N2Oatm) as Nutrient.N2Oatm_2
        //====== N2O/separated pools
        sum([Nutrient].Denitrification.N2Oatm) as NO3.Denitrification.N2Oatm
        sum([Nutrient].Nitrification.N2Oatm) as NH4.Nitrification.N2Oatm
        //======Total CO2 lost to the atmosphere
        sum([Soil].Nutrient.Catm) as Nutrient.Catm
        //======Total CO2 lost to the atmosphere/sum of different pools/should be the same value
        sum([Soil].Nutrient.Humic.Decomposition.Catm) + sum([Soil].Nutrient.Microbial.Decomposition.Catm) + sum([Soil].Nutrient.FOMCarbohydrate.Decomposition.Catm) +sum([Soil].Nutrient.FOMCellulose.Decomposition.Catm) + sum([Soil].Nutrient.FOMLignin.Decomposition.Catm) +sum([Soil].Nutrient.SurfaceResidue.Decomposition.Catm) as Nutrient.Catm_2
        //======Total CO2 lost to the atmosphere/Separated pools
        sum([Soil].Nutrient.Humic.Decomposition.Catm) as Humic.Decomposition.Catm
        sum([Soil].Nutrient.Microbial.Decomposition.Catm) as Microbial.Decomposition.Catm
        sum([Soil].Nutrient.FOMCarbohydrate.Decomposition.Catm) as FOMCarbohydrate.Decomposition.Catm
        sum([Soil].Nutrient.FOMCellulose.Decomposition.Catm) as FOMCellulose.Decomposition.Catm
        sum([Soil].Nutrient.FOMLignin.Decomposition.Catm) as FOMLignin.Decomposition.Catm
        sum([Soil].Nutrient.SurfaceResidue.Decomposition.Catm) as SurfaceResidue.Decomposition.Catm
        //======Total N2O by layer
        sum([Soil].Nutrient.N2Oatm[1:5]) as Nutrient.N2Oatm_030
        sum([Soil].Nutrient.N2Oatm[6:7]) as Nutrient.N2Oatm_3060
        sum([Soil].Nutrient.N2Oatm[8:9]) as Nutrient.N2Oatm_6090
        sum([Soil].Nutrient.N2Oatm[10:11]) as Nutrient.N2Oatm_90120
        [Soil].Nutrient.N2Oatm[12] as Nutrient.N2Oatm_120150
        [Soil].Nutrient.N2Oatm[13] as Nutrient.N2Oatm_150180
        [Soil].Nutrient.N2Oatm[14] as Nutrient.N2Oatm_180210
        [Soil].Nutrient.N2Oatm[15] as Nutrient.N2Oatm_210240
        [Soil].Nutrient.N2Oatm[16] as Nutrient.N2Oatm_240270
        [Soil].Nutrient.N2Oatm[17] as Nutrient.N2Oatm_270300
        [Soil].Nutrient.N2Oatm[18] as Nutrient.N2Oatm_300330
        [Soil].Nutrient.N2Oatm[19] as Nutrient.N2Oatm_330360
        [Soil].Nutrient.N2Oatm[20] as Nutrient.N2Oatm_360390
        //=======Soil variables
        [Field].Soil.SoilWater.SW[4] as SW15
        ([Field].Soil.SoilWater.SW[6] + [Field].Soil.SoilWater.SW[7]) / 2 as SW45
        [Field].Soil.Temperature.Value[4] as ST15
        ([Field].Soil.Temperature.Value[6] + [Field].Soil.Temperature.Value[7]) / 2 as ST45
        sum([Field].Soil.Nutrient.NO3.kgha[1:5]) as NO3_0_30cm
        sum([Field].Soil.Nutrient.NO3.kgha[6:7]) as NO3_30_60cm
        sum([Field].Soil.Nutrient.NH4.kgha[1:5]) as NH4_0_30cm
        sum([Field].Soil.Nutrient.NH4.kgha[6:7]) as NH4_30_60cm
        [Field].Soil.SoilWater.WaterTable
        //=======Detailed soil N
        sum([Field].Soil.Nutrient.NO3.kgha[1:3]) as NO3_0_10cm
        [Field].Soil.Nutrient.NO3.kgha[4] as NO3_10_20cm
        [Field].Soil.Nutrient.NO3.kgha[5] as NO3_20_30cm
        [Field].Soil.Nutrient.NO3.kgha[6] * 2/3 as NO3_30_40cm
        ([Field].Soil.Nutrient.NO3.kgha[6] * 1/3) + [Field].Soil.Nutrient.NO3.kgha[7] as NO3_40_60cm
        [Field].Soil.Nutrient.NO3.kgha[8] + ([Field].Soil.Nutrient.NO3.kgha[9] * 1/3) as NO3_60_80cm
        sum([Field].Soil.Nutrient.NH4.kgha[1:3]) as NH4_0_10cm
        [Field].Soil.Nutrient.NH4.kgha[4] as NH4_10_20cm
        [Field].Soil.Nutrient.NH4.kgha[5] as NH4_20_30cm
        [Field].Soil.Nutrient.NH4.kgha[6] * 2/3 as NH4_30_40cm
        ([Field].Soil.Nutrient.NH4.kgha[6] * 1/3) + [Field].Soil.Nutrient.NH4.kgha[7] as NH4_40_60cm
        [Field].Soil.Nutrient.NH4.kgha[8] + ([Field].Soil.Nutrient.NH4.kgha[9] * 1/3) as NH4_60_80cm
        //=======Soil variables and detailed soil N outputs are the same as MaizeReport
        //=======Root biomass per layer
        10 * (sum([Soybean].Root.LayerLive.Wt[1:3]) + 0.5* [Soybean].Root.LayerLive.Wt[4]) as rootmass_015
        10 * (0.5* [Soybean].Root.LayerLive.Wt[4] + [Soybean].Root.LayerLive.Wt[5]) as rootmass_1530
        10 * sum([Soybean].Root.LayerLive.Wt[1:5]) as rootmass_030
        10 * sum([Soybean].Root.LayerLive.Wt[6:7]) as rootmass_3060
        10 * sum([Soybean].Root.LayerLive.Wt[8:9]) as rootmass_6090
        10 * sum([Soybean].Root.LayerLive.Wt[10:11]) as rootmass_90120
        10 * sum([Soybean].Root.LayerLive.Wt[8:11]) as rootmass_90150
        10 * [Soybean].Root.LayerLive.Wt[12] as rootmass_120150
        10 * [Soybean].Root.LayerLive.Wt[13] as rootmass_150180
        10 * [Soybean].Root.LayerLive.Wt[14] as rootmass_180210
        10 * [Soybean].Root.LayerLive.Wt[15] as rootmass_210240
        10 * [Soybean].Root.LayerLive.Wt[16] as rootmass_240270
        10 * [Soybean].Root.LayerLive.Wt[17] as rootmass_270300
        10 * [Soybean].Root.LayerLive.Wt[18] as rootmass_300330
        10 * [Soybean].Root.LayerLive.Wt[19] as rootmass_330360
        10 * [Soybean].Root.LayerLive.Wt[20] as rootmass_360390
        //=======Root length | from m/m2 to km/m2
        //=======I think Root length output is actually root depth, so I tried to calculate root length
        (sum([Soybean].Root.LayerLive.Wt[1:3]) + 0.5 * [Soybean].Root.LayerLive.Wt[4]) * [Soybean].Root.SpecificRootLength.FixedValue / 1000 as rootlength_015
        (0.5* [Soybean].Root.LayerLive.Wt[4] + [Soybean].Root.LayerLive.Wt[5]) * [Soybean].Root.SpecificRootLength.FixedValue / 1000 as rootlength_1530
        sum([Soybean].Root.LayerLive.Wt[1:5]) * [Soybean].Root.SpecificRootLength.FixedValue / 1000 as rootlength_030
        sum([Soybean].Root.LayerLive.Wt[6:7]) * [Soybean].Root.SpecificRootLength.FixedValue / 1000 as rootlength_3060
        sum([Soybean].Root.LayerLive.Wt[8:9]) * [Soybean].Root.SpecificRootLength.FixedValue / 1000 as rootlength_6090
        sum([Soybean].Root.LayerLive.Wt[10:11]) * [Soybean].Root.SpecificRootLength.FixedValue / 1000 as rootlength_90120
        [Soybean].Root.LayerLive.Wt[12] * [Soybean].Root.SpecificRootLength.FixedValue / 1000 as rootlength_120150
        [Soybean].Root.LayerLive.Wt[13] * [Soybean].Root.SpecificRootLength.FixedValue / 1000 as rootlength_150180
        [Soybean].Root.LayerLive.Wt[14] * [Soybean].Root.SpecificRootLength.FixedValue / 1000 as rootlength_180210
        [Soybean].Root.LayerLive.Wt[15] * [Soybean].Root.SpecificRootLength.FixedValue / 1000 as rootlength_210240
        [Soybean].Root.LayerLive.Wt[16] * [Soybean].Root.SpecificRootLength.FixedValue / 1000 as rootlength_240270
        [Soybean].Root.LayerLive.Wt[17] * [Soybean].Root.SpecificRootLength.FixedValue / 1000 as rootlength_270300
        [Soybean].Root.LayerLive.Wt[18] * [Soybean].Root.SpecificRootLength.FixedValue / 1000 as rootlength_300330
        [Soybean].Root.LayerLive.Wt[19] * [Soybean].Root.SpecificRootLength.FixedValue / 1000 as rootlength_330360
        [Soybean].Root.LayerLive.Wt[20] * [Soybean].Root.SpecificRootLength.FixedValue / 1000 as rootlength_360390
        [Soybean].Root.Live.Wt * [Soybean].Root.SpecificRootLength.FixedValue / 1000 as totalrootlength
        //=======Root length density - RLD | from mm/mm3 to cm/cm3
        mean([Soybean].Root.LengthDensity[1:5]) * 100 as lengthDensity_030
        mean([Soybean].Root.LengthDensity[6:7]) * 100 as lengthDensity_3060
        mean([Soybean].Root.LengthDensity[8:9]) * 100 as lengthDensity_6090
        mean([Soybean].Root.LengthDensity[10:11]) * 100 as LengthDensity_90120
        [Soybean].Root.LengthDensity[12] * 100 as lengthDensity_120150
        [Soybean].Root.LengthDensity[13] * 100 as lengthDensity_150180
        [Soybean].Root.LengthDensity[14] * 100 as lengthDensity_180210
        [Soybean].Root.LengthDensity[15] * 100 as lengthDensity_210240
        [Soybean].Root.LengthDensity[16] * 100 as lengthDensity_240270
        [Soybean].Root.LengthDensity[17] * 100 as lengthDensity_270300
        [Soybean].Root.LengthDensity[18] * 100 as lengthDensity_300330
        [Soybean].Root.LengthDensity[19] * 100 as lengthDensity_330360
        [Soybean].Root.LengthDensity[20] * 100 as lengthDensity_360390
        mean([Soybean].Root.LengthDensity[1:20]) * 100 as totallengthDensity
        //=======Root Nitrogen per layer
        10 * (sum([Soybean].Root.LayerLive.N[1:3]) + 0.5* [Soybean].Root.LayerLive.N[4]) as rootN_015
        10 * (0.5* [Soybean].Root.LayerLive.N[4] + [Soybean].Root.LayerLive.N[5]) as rootN_1530
        10 * sum([Soybean].Root.LayerLive.N[1:5]) as rootN_030
        10 * sum([Soybean].Root.LayerLive.N[6:7]) as rootN_3060
        10 * sum([Soybean].Root.LayerLive.N[8:9]) as rootN_6090
        10 * sum([Soybean].Root.LayerLive.N[10:11]) as rootN_90120
        10 * [Soybean].Root.LayerLive.N[12] as rootN_120150
        10 * [Soybean].Root.LayerLive.N[13] as rootN_150180
        10 * [Soybean].Root.LayerLive.N[14] as rootN_180210
        10 * [Soybean].Root.LayerLive.N[15] as rootN_210240
        10 * [Soybean].Root.LayerLive.N[16] as rootN_240270
        10 * [Soybean].Root.LayerLive.N[17] as rootN_270300
        10 * [Soybean].Root.LayerLive.N[18] as rootN_300330
        10 * [Soybean].Root.LayerLive.N[19] as rootN_330360
        10 * [Soybean].Root.LayerLive.N[20] as rootN_360390
        //========Further checks
        [Soybean].Stem.SenescenceRate
        sum of [Soybean].Nodule.NFixed*10 from [Soybean].Sowing to [Soybean].Harvesting as Nfixed_kgha
        sum of sum([Soil].Nutrient.MineralisedN) from [Soybean].Sowing to [Soybean].Harvesting as MineralisedN_kgha
  DataStore
    ExcelInput: FileNames=[Ames3N_measured_data.xlsx]
      SheetNames=[Crop, Root, Nitrogen, Water, RootShootRatio, rootbylayer, Crop2]
    PredictedObserved PredictedObserved_Crop: PredictedTableName=MaizeReport; ObservedTableName=Crop; FieldNameUsedForMatch=SimulationName; FieldName2UsedForMatch=Clock.Today; AllColumns=true
    PredictedObserved PredictedObserved_Root: PredictedTableName=MaizeReport; ObservedTableName=Root; FieldNameUsedForMatch=SimulationName; FieldName2UsedForMatch=Clock.Today; AllColumns=true
    PredictedObserved PredictedObserved_RootbyLayer: PredictedTableName=MaizeReport; ObservedTableName=rootbylayer; FieldNameUsedForMatch=SimulationName; FieldName2UsedForMatch=Clock.Today; AllColumns=true
    PredictedObserved PredictedObserved_RSRatio: PredictedTableName=MaizeReport; ObservedTableName=RootShootRatio; FieldNameUsedForMatch=SimulationName; FieldName2UsedForMatch=Clock.Today; AllColumns=true
  Folder Ames3N
    Experiment Ames3N
      Factors
        Factor System: Specification=[Field].Operations
          Operations 31
            2015-04-28  [SurfaceOrganicMatter].Incorporate(0.25, 150);
            2015-11-11  [SurfaceOrganicMatter].Incorporate(0.75, 250);
            2015-05-15  [Soybean].Sow(population: 25, cultivar: "MG_2", depth: 50, rowSpacing: 760);
            2015-10-06  [Soybean].Harvest;
            2015-10-06  [Soybean].EndCrop;
            2016-05-05  [SurfaceOrganicMatter].Incorporate(0.10, 100);
            2016-05-11  [Maize].Sow(population: 7.4, cultivar: "FACTS_P1197", depth: 50, rowSpacing: 760);
            2016-05-11  [Fertiliser].Apply(168, Fertiliser.Types.UreaN, 50);
            2016-10-11  [Maize].Harvest
            2016-10-11  [Maize].EndCrop
            2016-11-12  [SurfaceOrganicMatter].Incorporate(0.75, 250);
            2017-04-14  [Fertiliser].Apply(0, Fertiliser.Types.UreaN, 50);
            2017-04-23  [SurfaceOrganicMatter].Incorporate(0.25, 150);
            2017-05-09  [Maize].Sow(population: 9, cultivar: "FACTS_P1197", depth: 50, rowSpacing: 760);
            2017-10-20  [Maize].Harvest
            2017-10-20  [Maize].EndCrop
            2017-11-12  [SurfaceOrganicMatter].Incorporate(0.75, 250);
            2018-04-14  [Fertiliser].Apply(0, Fertiliser.Types.UreaN, 50);
            2018-04-23  [SurfaceOrganicMatter].Incorporate(0.25, 150);
            2018-05-08  [Maize].Sow(population: 9.3, cultivar: "FACTS_P1197", depth: 50, rowSpacing: 760);
            2018-09-29  [Maize].Harvest
            2018-09-29  [Maize].EndCrop
            2018-11-12  [SurfaceOrganicMatter].Incorporate(0.75, 250);
            2019-04-14  [Fertiliser].Apply(0, Fertiliser.Types.UreaN, 50);
            2019-04-23  [SurfaceOrganicMatter].Incorporate(0.25, 150);
            2019-05-16  [Maize].Sow(population: 8.6, cultivar: "FACTS_P1197", depth: 50, rowSpacing: 760);
            2019-10-20  [Maize].Harvest
            2019-10-20  [Maize].EndCrop
          Operations 32
            2015-04-28  [SurfaceOrganicMatter].Incorporate(0.25, 150);
            2015-05-15  [Soybean].Sow(population: 25, cultivar: "MG_2", depth: 50, rowSpacing: 760);
            2015-10-06  [Soybean].Harvest;
            2015-10-06  [Soybean].EndCrop;
            2016-05-05  [SurfaceOrganicMatter].Incorporate(0.10, 100);
            2016-05-11  [Maize].Sow(population: 7.4, cultivar: "FACTS_P1197", depth: 50, rowSpacing: 760);
            2016-05-11  [Fertiliser].Apply(168, Fertiliser.Types.UreaN, 50);
            2016-10-13  [Maize].Harvest
            2016-10-13  [Maize].EndCrop
            2016-11-12  [SurfaceOrganicMatter].Incorporate(0.75, 250);
            2017-04-23  [SurfaceOrganicMatter].Incorporate(0.25, 150);
            2017-05-09  [Maize].Sow(population: 9, cultivar: "FACTS_P1197", depth: 50, rowSpacing: 760);
            2017-05-17  [Fertiliser].Apply(168, Fertiliser.Types.UreaN, 50);
            2017-10-20  [Maize].Harvest
            2017-10-20  [Maize].EndCrop
            2017-11-12  [SurfaceOrganicMatter].Incorporate(0.75, 250);
            2018-04-23  [SurfaceOrganicMatter].Incorporate(0.25, 150);
            2018-05-07  [Fertiliser].Apply(168, Fertiliser.Types.UreaN, 50);
            2018-05-08  [Maize].Sow(population: 9.3, cultivar: "FACTS_P1197", depth: 50, rowSpacing: 760);
            2018-09-29  [Maize].Harvest
            2018-09-29  [Maize].EndCrop
            2018-11-12  [SurfaceOrganicMatter].Incorporate(0.75, 250);
            2019-04-23  [SurfaceOrganicMatter].Incorporate(0.25, 150);
            2019-04-24  [Fertiliser].Apply(168, Fertiliser.Types.UreaN, 50);
            2019-05-16  [Maize].Sow(population: 8.6, cultivar: "FACTS_P1197", depth: 50, rowSpacing: 760);
            2019-10-20  [Maize].Harvest
            2019-10-20  [Maize].EndCrop
          Operations 33
            2015-04-28  [SurfaceOrganicMatter].Incorporate(0.25, 150);
            2015-05-15  [Soybean].Sow(population: 25, cultivar: "MG_2", depth: 50, rowSpacing: 760);
            2015-10-06  [Soybean].Harvest;
            2015-10-06  [Soybean].EndCrop;
            2016-05-05  [SurfaceOrganicMatter].Incorporate(0.10, 100);
            2016-05-11  [Maize].Sow(population: 7.4, cultivar: "FACTS_P1197", depth: 50, rowSpacing: 760);
            2016-05-11  [Fertiliser].Apply(168, Fertiliser.Types.UreaN, 50);
            2016-10-13  [Maize].Harvest
            2016-10-13  [Maize].EndCrop
            2016-11-12  [SurfaceOrganicMatter].Incorporate(0.75, 250);
            2017-04-14  [Fertiliser].Apply(336, Fertiliser.Types.UreaN, 50);
            2017-04-23  [SurfaceOrganicMatter].Incorporate(0.25, 150);
            2017-05-09  [Maize].Sow(population: 9, cultivar: "FACTS_P1197", depth: 50, rowSpacing: 760);
            2017-10-20  [Maize].Harvest
            2017-10-20  [Maize].EndCrop
            2017-11-12  [SurfaceOrganicMatter].Incorporate(0.75, 250);
            2018-04-14  [Fertiliser].Apply(336, Fertiliser.Types.UreaN, 50);
            2018-04-23  [SurfaceOrganicMatter].Incorporate(0.25, 150);
            2018-05-08  [Maize].Sow(population: 9.3, cultivar: "FACTS_P1197", depth: 50, rowSpacing: 760);
            2018-09-29  [Maize].Harvest
            2018-09-29  [Maize].EndCrop
            2018-11-12  [SurfaceOrganicMatter].Incorporate(0.75, 250);
            2019-04-14  [Fertiliser].Apply(336, Fertiliser.Types.UreaN, 50);
            2019-04-23  [SurfaceOrganicMatter].Incorporate(0.25, 150);
            2019-05-16  [Maize].Sow(population: 8.6, cultivar: "FACTS_P1197", depth: 50, rowSpacing: 760);
            2019-10-20  [Maize].Harvest
            2019-10-20  [Maize].EndCrop
      Simulation Ames3NBase
        Clock: Start=2015-01-01; End=2019-12-31
        Summary SummaryFile
        Weather: FileName=Ames.Jul1.2020.met
        SoilArbitrator Soil Arbitrator
        Zone Field: Area=1; Slope=0; AspectAngle=0; Altitude=50
          Fertiliser
          Soil: SoilType=Nicollet; NearestTown=Ames; Region=Boone; State=Iowa; Country=US; ApsoilNumber=34; Latitude=42.02204; Longitude=-93.769115; DataSource=mesured data and web soil survey; Comments=hydrological parameters and BD from Saxton and Rawls, 2006
            Physical
              Thickness  BD    AirDry  LL15   DUL    SAT    KS
              25         1.25  0.087   0.174  0.31   0.445  146
              25         1.25  0.087   0.174  0.31   0.455  146
              50         1.25  0.087   0.174  0.3    0.42   146
              100        1.25  0.132   0.165  0.25   0.43   146
              100        1.25  0.12    0.12   0.22   0.35   146
              150        1.35  0.11    0.11   0.21   0.34   146
              150        1.35  0.102   0.102  0.22   0.33   133
              150        1.36  0.126   0.126  0.265  0.393  133
              150        1.36  0.133   0.133  0.261  0.393  133
              150        1.36  0.128   0.128  0.253  0.393  388
              150        1.6   0.128   0.128  0.2    0.393  388
              300        1.6   0.09    0.09   0.2    0.393  388
              300        1.6   0.09    0.09   0.2    0.285  54.236
              300        1.6   0.09    0.09   0.2    0.273  33.11
              300        1.6   0.09    0.09   0.2    0.263  20.213
              300        1.6   0.09    0.09   0.2    0.254  12.34
              300        1.6   0.09    0.09   0.2    0.246  7.533
              300        1.6   0.09    0.09   0.2    0.24   4.599
              300        1.6   0.09    0.09   0.2    0.234  2.808
              300        1.6   0.09    0.09   0.2    0.23   1.714
              SoilCrop MaizeSoil
                LL=[0.174, 0.174, 0.174, 0.165, 0.12, 0.136, 0.144, 0.187, 0.198, 0.201, 0.174, 0.169, 0.179, 0.188, 0.188, 0.188, 0.188, 0.188, 0.188, 0.188]
                KL=[0.08, 0.08, 0.08, 0.08, 0.08, 0.08, 0.08, 0.08, 0.08, 0.08, 0.08, 0.04, 0.04, 0.03, 0.02, 0.02, 0.01, 0.01, 0, 0]
                XF=[1, 1, 1, 1, 1, 1, 1, 1, 1, 1, 1, 1, 1, 0.4, 0.4, 0, 0, 0, 0, 0]
              SoilCrop SoybeanSoil: same as Ames3N.Ames3N.Ames3NBase.Field.Soil.Physical.MaizeSoil
            WaterBalance SoilWater: SummerDate=1-Nov; SummerU=8; SummerCona=4; WinterDate=1-Apr; WinterU=8; WinterCona=4; DiffusConst=88; DiffusSlope=36; Salb=0.13; CN2Bare=65; CNRed=20; CNCov=0.8; PSIDul=-100
              Thickness=[25, 25, 50, 100, 100, 150, 150, 150, 150, 150, 150, 300, 300, 300, 300, 300, 300, 300, 300, 300]
              SWCON=[0.31, 0.31, 0.3, 0.25, 0.22, 0.21, 0.22, 0.265, 0.261, 0.253, 0.2, 0.393, 0.285, 0.273, 0.263, 0.254, 0.246, 0.24, 0.234, 0.23]
            Organic: FOMCNRatio=36.5; CarbonUnits=Total
              Thickness  Carbon  SoilCNRatio  FBiom  FInert  FOM
              25         2.47    12.5         0.165  0.42    483.114
              25         2.41    12.5         0.165  0.42    468.836
              50         2.41    12.5         0.111  0.42    441.533
              100        2.38    12.5         0.07   0.483   391.605
              100        1.97    12.5         0.05   0.525   347.322
              150        1.95    12.5         0.038  0.803   290.108
              150        0.97    12.5         0.031  0.825   242.318
              150        0.97    12.5         0.026  0.849   202.401
              150        0.49    12.5         0.023  0.87    169.06
              150        0.49    12.5         0.02   0.999   141.211
              150        0.49    12.5         0.018  0.999   117.949
              300        0.49    12.5         0.016  0.999   82.29
              300        0.49    12.5         0.014  0.999   57.412
              300        0.49    12.5         0.013  0.999   40.055
              300        0.49    12.5         0.012  0.999   22.191
              300        0.1     12.5         0.011  0.999   22.191
              300        0.1     12.5         0.01   0.999   22.191
              300        0.1     12.5         0.009  0.999   22.191
              300        0.1     12.5         0.009  0.999   22.191
              300        0.1     12.5         0.008  0.999   22.191
            Chemical: PHUnits=Water
              Thickness=[25, 25, 50, 100, 100, 150, 150, 150, 150, 150, 150, 300, 300, 300, 300, 300, 300, 300, 300, 300]
              PH=[7.48, 7.48, 7.48, 7.38, 7.43, 7.43, 7.73, 7.73, 8.08, 8.08, 8.08, 8.08, 8.08, 8.08, 8.08, 8.08, 8.08, 8.08, 8.08, 8.08]
            Water: InitialPAWmm=430.9; RelativeTo=LL15; FilledFromTop=false
              Thickness=[25, 25, 50, 100, 100, 150, 150, 150, 150, 150, 150, 300, 300, 300, 300, 300, 300, 300, 300, 300]
              InitialValues=[0.31, 0.31, 0.3, 0.25, 0.22, 0.21, 0.22, 0.265, 0.261, 0.253, 0.2, 0.2, 0.2, 0.2, 0.2, 0.2, 0.2, 0.2, 0.2, 0.2]
            CERESSoilTemperature Temperature
            Nutrient
            Solute NO3: InitialValuesUnits=ppm; WaterTableConcentration=0; D0=0; DepthConstant=0; MaxDepthSoluteAccessible=0; RunoffEffectivenessAtMovingSolute=0; MaxEffectiveRunoff=0
              Thickness=[25, 25, 50, 100, 100, 150, 150, 150, 150, 150, 150, 300, 300, 300, 300, 300, 300, 300, 300, 300]
              InitialValues=[7.04, 7.36, 4.8, 2.4, 1.6, 0.988, 0.988, 0.539, 0.539, 0.49, 0.292, 0.104, 0.188, 0.167, 0, 0.188, 0.188, 0.188, 0.167, 0]
            Solute NH4: InitialValuesUnits=ppm; WaterTableConcentration=0; D0=0; DepthConstant=0; MaxDepthSoluteAccessible=0; RunoffEffectivenessAtMovingSolute=0; MaxEffectiveRunoff=0
              Thickness=[25, 25, 50, 100, 100, 150, 150, 150, 150, 150, 150, 300, 300, 300, 300, 300, 300, 300, 300, 300]
              InitialValues=[12.8, 12.8, 6.4, 3.2, 3.2, 1.975, 1.975, 0.49, 0.49, 0.49, 0.417, 0.063, 0.083, 0, 0, 0.083, 0.083, 0.083, 0, 0]
            Solute Urea: InitialValuesUnits=kg/ha; WaterTableConcentration=0; D0=0; DepthConstant=0; MaxDepthSoluteAccessible=0; RunoffEffectivenessAtMovingSolute=0; MaxEffectiveRunoff=0
              Thickness=[25, 25, 50, 100, 100, 150, 150, 150, 150, 150, 150, 300, 300, 300, 300, 300, 300, 300, 300, 300]
              InitialValues=[0, 0, 0, 0, 0, 0, 0, 0, 0, 0, 0, 0, 0, 0, 0, 0, 0, 0, 0, 0]
          SurfaceOrganicMatter: InitialResidueName=soybean; InitialResidueType=soybean; InitialResidueMass=1400; InitialStandingFraction=0; InitialCPR=0; InitialCNR=36.5
          MicroClimate: a_interception=0; b_interception=1; c_interception=0; d_interception=0; SoilHeatFluxFraction=0.4; MinimumHeightDiffForNewLayer=0; NightInterceptionFraction=0.5; ReferenceHeight=2
          Plant Maize
          Plant Soybean: IsEnding=false; DaysAfterEnding=0
            Folder AgMIP_NE
              Cultivar AG2703
                Command:
                  "Step 1"
                  [Phenology].Vegetative.Target.FixedValue = 405
                  [Phenology].EarlyFlowering.Target.FixedValue = 200
                  [Phenology].EarlyPodDevelopment.Target.FixedValue = 150
                  [Phenology].EarlyGrainFilling.Target.FractionofGrainfilling.FixedValue = 0.35
                  [Phenology].LateGrainFilling.Target.EntireGrainfillPeriod.FixedValue = 420
                  [Phenology].Maturing.Target.FixedValue = 45
                  [Phenology].Ripening.Target.FixedValue = 90
                  [Phenology].VegetativePhotoperiodModifier.XYPairs.X = 13.59, 17.6
                  [Phenology].ReproductivePhotoperiodModifier.XYPairs.X = 13.59, 17.6
                  "Step 2"
                  [Leaf].SpecificArea.XYPairs.Y=0.025,0.025
                  [Stem].SenescenceRate.PostCanopyPhase.Rate.One.FixedValue = 0
                  [Stem].PotentialGrowth.PartitionFraction.StemGrowthPhase.StemFraction.FixedValue = 0.35
                  [Shell].SenescenceRate.ReproductivePhase.Rate.One.FixedValue = 0
                  [Shell].PotentialHarvestIndex.FixedValue = 0.24
                  [Grain].PotentialHarvestIndex.FixedValue = 0.48
              Cultivar P93B09
                Command:
                  "Step 1"
                  [Phenology].Vegetative.Target.FixedValue = 285
                  [Phenology].EarlyFlowering.Target.FixedValue = 200
                  [Phenology].EarlyPodDevelopment.Target.FixedValue = 120
                  [Phenology].EarlyGrainFilling.Target.FractionofGrainfilling.FixedValue = 0.35
                  [Phenology].LateGrainFilling.Target.EntireGrainfillPeriod.FixedValue = 400
                  [Phenology].Maturing.Target.FixedValue = 45
                  [Phenology].Ripening.Target.FixedValue = 60
                  [Phenology].VegetativePhotoperiodModifier.XYPairs.X = 13.59, 17.6
                  [Phenology].ReproductivePhotoperiodModifier.XYPairs.X = 13.59, 17.6
                  "Step 2"
                  [Leaf].SpecificArea.XYPairs.Y=0.026,0.026
                  [Leaf].AreaLargestLeaf.FixedValue = 0.007
                  [Stem].SenescenceRate.PostCanopyPhase.Rate.One.FixedValue = 0
                  [Shell].PotentialHarvestIndex.FixedValue = 0.22
                  [Shell].SenescenceRate.ReproductivePhase.Rate.One.FixedValue = 0
                  [Grain].PotentialHarvestIndex.FixedValue = 0.52
              Cultivar P93M11
                Command:
                  "Step 1"
                  [Phenology].Vegetative.Target.FixedValue = 320
                  [Phenology].EarlyFlowering.Target.FixedValue = 185
                  [Phenology].EarlyPodDevelopment.Target.FixedValue = 170
                  [Phenology].EarlyGrainFilling.Target.FractionofGrainfilling.FixedValue = 0.35
                  [Phenology].LateGrainFilling.Target.EntireGrainfillPeriod.FixedValue = 500
                  [Phenology].Maturing.Target.FixedValue = 45
                  [Phenology].Ripening.Target.FixedValue = 85
                  [Phenology].VegetativePhotoperiodModifier.XYPairs.X = 13.59, 17.6
                  [Phenology].ReproductivePhotoperiodModifier.XYPairs.X = 13.59, 17.6
                  "Step 2"
                  [Leaf].SpecificArea.XYPairs.Y=0.025,0.025
                  [Leaf].AreaLargestLeaf.FixedValue = 0.0055
                  [Stem].PotentialGrowth.PartitionFraction.StemGrowthPhase.StemFraction.FixedValue = 0.30
                  [Stem].SenescenceRate.PostCanopyPhase.Rate.One.FixedValue = 0
                  [Shell].PotentialHarvestIndex.FixedValue = 0.25
                  [Shell].SenescenceRate.ReproductivePhase.Rate.One.FixedValue = 0
                  [Grain].PotentialHarvestIndex.FixedValue = 0.55
              Cultivar P93M43
                Command:
                  "Step 1"
                  [Phenology].Vegetative.Target.FixedValue = 360
                  [Phenology].EarlyFlowering.Target.FixedValue = 120
                  [Phenology].EarlyPodDevelopment.Target.FixedValue = 260
                  [Phenology].EarlyGrainFilling.Target.FractionofGrainfilling.FixedValue = 0.35
                  [Phenology].LateGrainFilling.Target.EntireGrainfillPeriod.FixedValue = 400
                  [Phenology].Maturing.Target.FixedValue = 30
                  [Phenology].Ripening.Target.FixedValue = 90
                  [Phenology].VegetativePhotoperiodModifier.XYPairs.X = 13.59, 17.6
                  [Phenology].ReproductivePhotoperiodModifier.XYPairs.X = 13.59, 17.6
                  "Step 2"
              Cultivar P92Y83
                Command:
                  "Step 1"
                  [Phenology].Vegetative.Target.FixedValue = 300
                  [Phenology].EarlyFlowering.Target.FixedValue = 150
                  [Phenology].EarlyPodDevelopment.Target.FixedValue = 140
                  [Phenology].EarlyGrainFilling.Target.FractionofGrainfilling.FixedValue = 0.35
                  [Phenology].LateGrainFilling.Target.EntireGrainfillPeriod.FixedValue = 480
                  [Phenology].Maturing.Target.FixedValue = 30
                  [Phenology].Ripening.Target.FixedValue = 90
                  [Phenology].VegetativePhotoperiodModifier.XYPairs.X = 13.59, 17.6
                  [Phenology].ReproductivePhotoperiodModifier.XYPairs.X = 13.59, 17.6
                  "Step 2"
                  [Stem].PotentialGrowth.PartitionFraction.StemGrowthPhase.StemFraction.FixedValue = 0.30
                  [Stem].SenescenceRate.PostCanopyPhase.Rate.One.FixedValue = 0
                  [Shell].SenescenceRate.ReproductivePhase.Rate.One.FixedValue = 0
                  [Leaf].SpecificArea.XYPairs.Y=0.027,0.027
                  [Shell].PotentialHarvestIndex.FixedValue = 0.22
                  [Grain].PotentialHarvestIndex.FixedValue = 0.54
            Folder USA: same as Replacements.Soybean.Cultivars.USA
            Folder Australia: same as Replacements.Soybean.Cultivars.Australia
            Folder Generic: same as Replacements.Soybean.Cultivars.Generic
            OrganArbitrator Arbitrator: same as Replacements.Soybean.Arbitrator
            Phenology
              Memo Introduction
                In the new model we simplified phenology by taking out stages that are not measurable (e.g. end of juvenile stage) and by adding new stages that are measurable (e.g. start pod).
                The new phenology follows the V/R staging system
              SubDailyInterpolation VegetativeThermalTime: same as Replacements.Soybean.Phenology.VegetativeThermalTime
              LinearInterpolationFunction VegetativePhotoperiodModifier: same as Replacements.Soybean.Phenology.VegetativePhotoperiodModifier
              SubDailyInterpolation ReproductiveThermalTime: agregationMethod=0
                XYPairs Response: X=[10, 15, 30, 40]; Y=[5, 5, 20, 0]
                ThreeHourAirTemperature InterpolationMethod
              LinearInterpolationFunction ReproductivePhotoperiodModifier: same as Replacements.Soybean.Phenology.VegetativePhotoperiodModifier
              PhaseLookup ThermalTime: same as Replacements.Soybean.Phenology.ThermalTime
              PhotoperiodFunction Photoperiod: Twilight=0; DayLength=0
              GerminatingPhase Germinating: Start=Sowing; End=Germination
              EmergingPhase Emerging: same as Replacements.Soybean.Phenology.Emerging
              GenericPhase Vegetative: Start=Emergence; End=StartFlowering
                Constant Target: FixedValue=200
                VariableReference Progression: VariableName=[Phenology].ThermalTime
              GenericPhase EarlyFlowering: same as Replacements.Soybean.Phenology.EarlyFlowering
              GenericPhase EarlyPodDevelopment: same as Replacements.Soybean.Phenology.EarlyPodDevelopment
              GenericPhase EarlyGrainFilling: same as Replacements.Soybean.Phenology.EarlyGrainFilling
              GenericPhase MidGrainFilling: same as Replacements.Soybean.Phenology.MidGrainFilling
              GenericPhase LateGrainFilling: same as Replacements.Soybean.Phenology.LateGrainFilling
              GenericPhase Maturing: Start=EndGrainFill; End=Maturity
                Constant Target: FixedValue=45
                VariableReference Progression: VariableName=[Phenology].ThermalTime
              GenericPhase Ripening: Start=Maturity; End=HarvestRipe
                Constant Target: FixedValue=45
                VariableReference Progression: VariableName=[Phenology].ThermalTime
              EndPhase ReadyForHarvesting: Start=HarvestRipe; End=Unused
                VariableReference ThermalTime: VariableName=[Phenology].ThermalTime
              OnEventFunction EmergenceDAS: SetEvent=Emergence; ReSetEvent=never
                Memo
                  A function is used to provide maturity date as days after sowing(DAS).
                Constant PreEventValue: FixedValue=0
                VariableReference PostEventValue: VariableName=[Plant].DaysAfterSowing
              OnEventFunction FloweringDAS: same as Replacements.Soybean.Phenology.FloweringDAS
              OnEventFunction MaturityDAS: same as Replacements.Soybean.Phenology.MaturityDAS
            SimpleLeaf Leaf: Albedo=0.25; Gsmax350=0.015; R50=150; LeafInitialisationStage=Emergence; Height=0; BaseHeight=0; Width=0; FRGR=0; PotentialEP=0; WaterDemand=0; KDead=0.2; LAIDead=0
              Memo Description
                Stover represents any part of the crop that is not removed at harvest (i.e not part of the product).
              RUEModel Photosynthesis
                Constant RUE: FixedValue=1.2
                WeightedTemperatureFunction FT: MaximumTemperatureWeighting=0.5
                  XYPairs: X=[10, 20, 30, 40]; Y=[0, 1, 1, 0]
                LinearInterpolationFunction FVPD
                  XYPairs: X=[0, 10, 50]; Y=[1, 1, 1]
                  VariableReference XValue: VariableName=[Leaf].Photosynthesis.VPD
                LinearInterpolationFunction FN
                  XYPairs: X=[0, 1, 1.5]; Y=[0, 1, 1]
                  VariableReference XValue: VariableName=[Leaf].Fn
                LinearInterpolationFunction FW
                  XYPairs: X=[0, 0.4]; Y=[0, 1]
                  VariableReference XValue: VariableName=[Leaf].Fw
                RUECO2Function FCO2: PhotosyntheticPathway=C3
                VariableReference RadnInt: VariableName=[Leaf].RadiationIntercepted
              ExpressionFunction CO2internal: Expression=(163 - [IWeather].MeanT)/(5 - 0.1*[IWeather].MeanT)
              DivideFunction StomatalConductanceCO2Modifier
                VariableReference FCO2: VariableName=[Leaf].Photosynthesis.FCO2
                ExpressionFunction RelativeCO2Gradient
                  Expression=([IWeather].CO2 - [Leaf].CO2internal)/(350 - [Leaf].CO2internal)
              MultiplyFunction Area
                VariableReference SLA: VariableName=[Leaf].SpecificArea
                VariableReference LeafLiveWt: VariableName=[Leaf].Live.Wt
              MinimumFunction FRGR: same as Replacements.Soybean.Leaf.FRGR
              LinearInterpolationFunction ExtinctionCoefficient: same as Replacements.Soybean.Leaf.ExtinctionCoefficient
              LinearInterpolationFunction Tallness: same as Replacements.Soybean.Leaf.Tallness
              AccumulateFunction NodeNumber: same as Replacements.Soybean.Leaf.NodeNumber
              Constant NReallocationFactor: FixedValue=1
                Memo
                  This model assumes that all metabolic and storage N is available for reallocation from senescing leaves.
              PhaseLookup SenescenceRate
                PhaseLookupValue Vegetative: Start=Emergence; End=EndCanopyDevelopment
                  Constant Rate: FixedValue=0
                PhaseLookupValue Reproductive: Start=EndCanopyDevelopment; End=Maturity
                  Memo
                    Leaf senescence rate is calculated to ensure that all leaves are senesced by crop maturity.
                  DivideFunction Rate: same as Replacements.Soybean.Leaf.SenescenceRate.Reproductive.Rate
              Constant DetachmentRate: FixedValue=0.05; Units=/d
              Constant InitialWt: FixedValue=1
              MultiplyFunction LAIDead
                VariableReference SLA: VariableName=[Leaf].SpecificArea
                VariableReference LeafDeadWt: VariableName=[Leaf].Dead.Wt
              LinearInterpolationFunction MaximumNConc
                XYPairs: X=[3, 4, 9]; Y=[0.06, 0.05, 0.03]
                VariableReference XValue: VariableName=[Phenology].Stage
              LinearInterpolationFunction CriticalNConc
                XYPairs: X=[3, 4, 9]; Y=[0.06, 0.05, 0.03]
                VariableReference XValue: VariableName=[Phenology].Stage
              Constant MinimumNConc: FixedValue=0.02
              Constant MaintenanceRespiration: FixedValue=0; Units=0-1
              Constant DMConversionEfficiency: FixedValue=1; Units=0-1
              BiomassRemoval BiomassRemovalDefaults
                OrganBiomassRemovalType Harvest: FractionLiveToRemove=0; FractionDeadToRemove=0; FractionLiveToResidue=1; FractionDeadToResidue=1
                OrganBiomassRemovalType Cut: FractionLiveToRemove=0; FractionDeadToRemove=0; FractionLiveToResidue=1; FractionDeadToResidue=1
                OrganBiomassRemovalType Prune: FractionLiveToRemove=0; FractionDeadToRemove=0; FractionLiveToResidue=0; FractionDeadToResidue=0
                OrganBiomassRemovalType Graze: FractionLiveToRemove=0; FractionDeadToRemove=0; FractionLiveToResidue=0; FractionDeadToResidue=0
              Constant NRetranslocationFactor: FixedValue=0.5
              Constant DMReallocationFactor: FixedValue=0
              Constant DMRetranslocationFactor: FixedValue=0.5
              Constant RemobilisationCost: FixedValue=0
              Constant CarbonConcentration: FixedValue=0.4
              NutrientDemandFunctions DMDemands
                DivideFunction Structural
                  VariableReference DeltaLAI: VariableName=[Leaf].DeltaLAI
                  VariableReference SLA: VariableName=[Leaf].SpecificArea
                  Memo
                    Growth in leaf area is used to calculate the leaf dry matter demand.  Note that leaf biomass is assumed to consist of entirely structural dry matter.
                Constant Storage: FixedValue=0
                Constant Metabolic: FixedValue=0
                Constant QStructuralPriority: FixedValue=1
                Constant QMetabolicPriority: FixedValue=1
                Constant QStoragePriority: FixedValue=1
              NutrientDemandFunctions NDemands: same as Replacements.Soybean.Leaf.NDemands
              LinearInterpolationFunction FrostFraction: same as Replacements.Soybean.Leaf.FrostFraction
              LinearInterpolationFunction SpecificArea: same as Replacements.Soybean.Leaf.SpecificArea
              PhaseLookup DeltaLAI
                PhaseLookupValue Vegetative: same as Replacements.Soybean.Leaf.DeltaLAI.Vegetative
                PhaseLookupValue Reproductive: Start=EndCanopyDevelopment; End=Maturity
                  Constant: FixedValue=0
              Constant AreaLargestLeaf: FixedValue=0.006
              Constant Phyllochron: FixedValue=45
              MultiplyFunction SLA
                VariableReference SpecificArea: VariableName=[Leaf].SpecificArea
                Constant one: FixedValue=10000
            ReproductiveOrgan Grain: GrowthRespiration=0; MaintenanceRespiration=0
              Biomass Live
              Biomass Dead
              Constant PotentialHarvestIndex: FixedValue=0.5
              AddFunction FillingDuration: same as Replacements.Soybean.Grain.FillingDuration
              PhaseLookup DMDemandFunction: same as Replacements.Soybean.Grain.DMDemandFunction
              Constant MinimumNConc: FixedValue=0.05
              Constant MaximumNConc: FixedValue=0.058
              Constant WaterContent: FixedValue=0.12
              MultiplyFunction NFillingRate: same as Replacements.Soybean.Grain.NFillingRate
              BiomassRemoval BiomassRemovalDefaults
                OrganBiomassRemovalType Harvest: FractionLiveToRemove=1; FractionDeadToRemove=1; FractionLiveToResidue=0; FractionDeadToResidue=0
                OrganBiomassRemovalType Cut: FractionLiveToRemove=0; FractionDeadToRemove=0; FractionLiveToResidue=1; FractionDeadToResidue=1
                OrganBiomassRemovalType Prune: FractionLiveToRemove=0; FractionDeadToRemove=0; FractionLiveToResidue=0; FractionDeadToResidue=0
                OrganBiomassRemovalType Graze: FractionLiveToRemove=0; FractionDeadToRemove=0; FractionLiveToResidue=0; FractionDeadToResidue=0
              Constant DMConversionEfficiency: FixedValue=0.89
              Constant RemobilisationCost: FixedValue=0
              Constant CarbonConcentration: FixedValue=0.4
              DivideFunction HarvestIndex
                VariableReference GrainWt: VariableName=[Grain].Wt
                VariableReference AboveGroundWt: VariableName=[AboveGround].Wt
              Constant MaximumPotentialGrainSize: FixedValue=0
                Memo
                  This parameter is not used.  Grain growth is calculated from harvest index increase.
              Constant NumberFunction: FixedValue=0
                Memo
                  Grain number is not estimated by this model.
              DivideFunction HarvestIndex2
                VariableReference GrainWt: VariableName=[Grain].Wt
                VariableReference AboveGroundWt: VariableName=[AboveGroundLive].Wt
              NutrientPoolFunctions DMDemandPriorityFactors: same as Replacements.Soybean.Grain.DMDemandPriorityFactors
              NutrientPoolFunctions NDemandPriorityFactors: same as Replacements.Soybean.Grain.DMDemandPriorityFactors
            Root: GrowthRespiration=0; MaintenanceRespiration=0
              RootShapeCylinder RootShape
              LinearInterpolationFunction KLModifier
                XYPairs: X=[0, 3]; Y=[1, 1]
                VariableReference XValue: VariableName=[Leaf].LAI
              SubDailyInterpolation TemperatureEffect: agregationMethod=0
                XYPairs Response: X=[0, 26, 35]; Y=[1, 1, 1]
                ThreeHourAirTemperature InterpolationMethod
              LinearInterpolationFunction MaxDailyNUptake
                XYPairs: X=[0, 5]; Y=[1, 3]
                VariableReference XValue: VariableName=[Leaf].LAI
              Constant SenescenceRate: FixedValue=0.005
              Constant MaximumRootDepth: FixedValue=1000000
              PhaseLookup RootFrontVelocity: same as Replacements.Soybean.Root.RootFrontVelocity
              Constant MaximumNConc: FixedValue=0.01
              Constant MinimumNConc: FixedValue=0.005
              PhaseLookupValue NitrogenDemandSwitch: Start=Emergence; End=EndGrainFill
                Constant: FixedValue=1
              LinearInterpolationFunction KNO3
                XYPairs: X=[0, 0.003]; Y=[0.02, 0.02]
                VariableReference XValue: VariableName=[Root].LengthDensity
              LinearInterpolationFunction KNH4
                XYPairs: X=[0, 0.003]; Y=[0, 0]
                VariableReference XValue: VariableName=[Root].LengthDensity
              BiomassRemoval BiomassRemovalDefaults
                OrganBiomassRemovalType Harvest: FractionLiveToRemove=0; FractionDeadToRemove=0; FractionLiveToResidue=0.2; FractionDeadToResidue=0
                OrganBiomassRemovalType Cut: FractionLiveToRemove=0; FractionDeadToRemove=0; FractionLiveToResidue=0.2; FractionDeadToResidue=0
                OrganBiomassRemovalType Prune: FractionLiveToRemove=0; FractionDeadToRemove=0; FractionLiveToResidue=0; FractionDeadToResidue=0
                OrganBiomassRemovalType Graze: FractionLiveToRemove=0; FractionDeadToRemove=0; FractionLiveToResidue=0; FractionDeadToResidue=0
              LinearInterpolationFunction NUptakeSWFactor
                XYPairs: X=[0, 1]; Y=[0, 1]
                VariableReference XValue: VariableName=[Root].RWC
              Constant SpecificRootLength: FixedValue=40; Units=m/g
              Constant DMConversionEfficiency: FixedValue=1
              Constant MaintenanceRespirationFunction: FixedValue=1
              Constant RemobilisationCost: FixedValue=0
              Constant CarbonConcentration: FixedValue=0.4
              NutrientDemandFunctions DMDemands: same as Replacements.Soybean.Root.DMDemands
              NutrientDemandFunctions NDemands: same as Replacements.Soybean.Root.NDemands
              VariableReference CriticalNConc: VariableName=[Root].MinimumNConc
              NutrientPoolFunctions InitialWt: same as Replacements.Soybean.Root.InitialWt
              Constant RootDepthStressFactor: FixedValue=1
            Nodule
              Constant FixationMetabolicCost: FixedValue=0
              Constant MaximumNConc: FixedValue=0.02
              Constant MinimumNConc: FixedValue=0.01
              Constant SenescenceRate: FixedValue=0
              Constant NReallocationFactor: FixedValue=0
              PhaseLookupValue NitrogenDemandSwitch: Start=Emergence; End=EndGrainFill
                Constant: FixedValue=1
              BiomassRemoval BiomassRemovalDefaults: same as Ames3N.Ames3N.Ames3NBase.Field.Soybean.Root.BiomassRemovalDefaults
              Constant InitialWtFunction: FixedValue=0; Units=g/m^2
              Constant DetachmentRateFunction: FixedValue=0; Units=/d
              Constant MaintenanceRespirationFunction: FixedValue=0; Units=0-1
              Constant DMConversionEfficiency: FixedValue=1; Units=0-1
              Constant NRetranslocationFactor: FixedValue=0
              Constant DMReallocationFactor: FixedValue=0
              Constant DMRetranslocationFactor: FixedValue=0
              VariableReference CriticalNConc: VariableName=[Nodule].MinimumNConc
              Constant RemobilisationCost: FixedValue=0
              Constant CarbonConcentration: FixedValue=0.4
              HoldFunction FixationRate: WhenToHold=StartGrainFilling
                MinimumFunction DailyPotentialFixationRate
                  MultiplyFunction PotentialFixationRate: same as Replacements.Soybean.Nodule.FixationRate.DailyPotentialFixationRate.PotentialFixationRate
                  Constant MaximumFixationRate: FixedValue=0.6
              NutrientPoolFunctions DMDemands: same as Replacements.Soybean.Nodule.DMDemands
              NutrientPoolFunctions NDemands: same as Replacements.Soybean.Nodule.NDemands
            GenericOrgan Shell: IsAboveGround=true
              Constant NReallocationFactor: FixedValue=1
              Constant NRetranslocationFactor: FixedValue=0.5
              Constant MaximumNConc: FixedValue=0.045
              VariableReference CriticalNConc: VariableName=[Shell].MinimumNConc
              Constant MinimumNConc: FixedValue=0.01
              Constant DMRetranslocationFactor: FixedValue=0.1
              PhaseLookupValue NitrogenDemandSwitch: Start=StartPodDevelopment; End=EndPodDevelopment
                Constant: FixedValue=1
              BiomassRemoval BiomassRemovalDefaults: same as Ames3N.Ames3N.Ames3NBase.Field.Soybean.Leaf.BiomassRemovalDefaults
              PhaseLookup SenescenceRate: same as Replacements.Soybean.Shell.SenescenceRate
              Constant DetachmentRateFunction: FixedValue=0; Units=/d
              Constant MaintenanceRespirationFunction: FixedValue=0; Units=0-1
              Constant DMConversionEfficiency: FixedValue=1; Units=0-1
              Constant DMReallocationFactor: FixedValue=0
              Constant RemobilisationCost: FixedValue=0
              Constant CarbonConcentration: FixedValue=0.4
              Constant PotentialHarvestIndex: FixedValue=0.2
              AddFunction FillingDuration: same as Replacements.Soybean.Shell.FillingDuration
              NutrientDemandFunctions DMDemands
                MultiplyFunction Structural
                  PhaseLookup DMDemandFunction: same as Replacements.Soybean.Shell.DMDemands.Structural.DMDemandFunction
                  Constant StructuralFraction: FixedValue=1
                Constant Metabolic: FixedValue=0
                StorageDMDemandFunction Storage: same as Replacements.Soybean.Shell.DMDemands.Storage
                Constant QStructuralPriority: FixedValue=1
                Constant QMetabolicPriority: FixedValue=1
                Constant QStoragePriority: FixedValue=1
              NutrientDemandFunctions NDemands: same as Replacements.Soybean.Shell.NDemands
              RetranslocateNonStructural RetranslocateNitrogen
              NutrientPoolFunctions InitialWt: same as Replacements.Soybean.Shell.InitialWt
              Constant Photosynthesis: FixedValue=0
              VariableReference initialNConcFunction: VariableName=[Shell].MinimumNConc
            GenericOrgan Stem: IsAboveGround=true
              Constant NReallocationFactor: FixedValue=1
              Constant NRetranslocationFactor: FixedValue=0.5
              PhaseLookup DMRetranslocationFactor
                PhaseLookupValue GrainFilling: Start=EndCanopyDevelopment; End=EndGrainFill
                  Constant RetranslocationFactor: FixedValue=0.2
              LinearInterpolationFunction MaximumNConc
                XYPairs: X=[3, 4, 5]; Y=[0.025, 0.02, 0.015]
                VariableReference XValue: VariableName=[Phenology].Stage
              Constant MinimumNConc: FixedValue=0.006
              PhaseLookupValue NitrogenDemandSwitch: Start=Emergence; End=StartGrainFilling
                Constant: FixedValue=1
              BiomassRemoval BiomassRemovalDefaults: same as Ames3N.Ames3N.Ames3NBase.Field.Soybean.Leaf.BiomassRemovalDefaults
              PhaseLookup SenescenceRate: same as Replacements.Soybean.Stem.SenescenceRate
              Constant SenescenceRateoldd: FixedValue=0
              Constant DetachmentRateFunction: FixedValue=0; Units=/d
              Constant MaintenanceRespirationFunction: FixedValue=0; Units=0-1
              Constant DMConversionEfficiency: FixedValue=1; Units=0-1
              Constant DMReallocationFactor: FixedValue=0
              VariableReference CriticalNConc: VariableName=[Stem].MinimumNConc
              Constant RemobilisationCost: FixedValue=0
              Constant CarbonConcentration: FixedValue=0.4
              NutrientDemandFunctions DMDemands: same as Replacements.Soybean.Stem.DMDemands
              NutrientDemandFunctions NDemands: same as Replacements.Soybean.Stem.NDemands
              PartitionFractionDemandFunction PotentialGrowth: same as Replacements.Soybean.Stem.PotentialGrowth
              RetranslocateNonStructural RetranslocateNitrogen
              NutrientPoolFunctions InitialWt: same as Replacements.Soybean.Shell.InitialWt
              Constant Photosynthesis: FixedValue=0
              VariableReference initialNConcFunction: VariableName=[Stem].MinimumNConc
            CompositeBiomass AboveGround: OrganNames=[Leaf, Stem, Grain, Shell]; IncludeLive=true; IncludeDead=true
            CompositeBiomass BelowGround: OrganNames=[Root, Nodule]; IncludeLive=true; IncludeDead=true
            CompositeBiomass AboveGroundLive: OrganNames=[Leaf, Stem, Grain, Shell]; IncludeLive=true; IncludeDead=false
            CompositeBiomass Total: OrganNames=[Leaf, Stem, Grain, Shell, Root, Nodule]; IncludeLive=true; IncludeDead=true
            CompositeBiomass TotalLive: OrganNames=[Leaf, Stem, Grain, Shell, Root, Nodule]; IncludeLive=true; IncludeDead=false
            CompositeBiomass TotalDead: OrganNames=[Leaf, Stem, Grain, Shell, Root, Nodule]; IncludeLive=false; IncludeDead=true
            CompositeBiomass Pod: OrganNames=[Shell, Grain]; IncludeLive=true; IncludeDead=true
            CompositeBiomass AboveGroundDead: OrganNames=[Leaf, Stem, Grain, Shell]; IncludeLive=false; IncludeDead=true
            Constant MortalityRate: FixedValue=0
            Constant SeedMortalityRate: FixedValue=0
          Report MaizeReport: EventNames=[Clock].DoReport
            VariableNames:
              [Clock].Today
              [Maize].Phenology.CurrentStageName
          Report SoybeanReport: EventNames=[Clock].DoReport
            VariableNames:
              [Clock].Today
              [Soybean].Phenology.CurrentStageName
          Report DetailedReport: EventNames=[Clock].DoReport
            VariableNames:
              [Clock].Today
              [Maize].Phenology.CurrentStageName
              //Arbitrator
              [Maize].Arbitrator.DM.TotalFixationSupply
              sum([Maize].Arbitrator.N.Fixation) as NFixed
              [Maize].Arbitrator.DM.TotalPlantDemand
              //Leaf
              [Maize].Leaf.Wt
              [Maize].Leaf.N
              [Maize].Leaf.Total.StructuralWt
              [Maize].Leaf.Total.StructuralN
              [Maize].Leaf.Live.StructuralWt
              [Maize].Leaf.Live.StructuralN
              [Maize].Leaf.Live.Wt
              [Maize].Leaf.Live.StructuralWt
              [Maize].Leaf.Live.N
              [Maize].Leaf.Live.NConc
              [Maize].Leaf.NConc
              [Maize].Leaf.Live.NConc
              [Maize].Leaf.Nconc
              [Maize].Leaf.MinNconc
              [Maize].Leaf.CohortParameters.CriticalNConc
              [Maize].Leaf.CohortParameters.MaximumNConc
              [Maize].Leaf.CohortParameters.MinimumNConc
              [Maize].Leaf.Total.StorageWt
              [Maize].Leaf.Total.MetabolicWt
              [Maize].Leaf.Live.StorageWt
              [Maize].Leaf.Live.MetabolicWt
              //Stem
              [Maize].Stem.Wt
              [Maize].Stem.Total.StructuralWt
              [Maize].Stem.Live.Wt
              [Maize].Stem.Live.StructuralWt
              [Maize].Stem.N
              [Maize].Stem.Total.StructuralN
              [Maize].Stem.Live.N
              [Maize].Stem.Live.StructuralN
              [Maize].Stem.Nconc
              [Maize].Stem.MinimumNConc
              [Maize].Stem.CriticalNConc
              [Maize].Stem.MaximumNConc
              [Maize].Stem.Total.StorageN
              [Maize].Stem.Total.MetabolicN
              //Root
              [Maize].Root.Wt
              [Maize].Root.Total.StructuralWt
              [Maize].Root.Live.Wt
              [Maize].Root.Live.StructuralWt
              [Maize].Root.N
              [Maize].Root.Total.StructuralN
              [Maize].Root.Live.N
              [Maize].Root.Live.StructuralN
              [Maize].Root.Nconc
              [Maize].Root.MinimumNConc
              [Maize].Root.CriticalNConc
              [Maize].Root.MaximumNConc
              [Maize].Root.Total.StorageN
              [Maize].Root.Total.StorageWt
              [Maize].Root.Total.MetabolicN
              [Maize].Root.Total.MetabolicWt
              //Husk
              [Maize].Husk.Wt
              [Maize].Husk.Total.StructuralWt
              [Maize].Husk.Live.Wt
              [Maize].Husk.Live.StructuralWt
              [Maize].Husk.N
              [Maize].Husk.Total.StructuralN
              [Maize].Husk.Live.N
              [Maize].Husk.Live.StructuralN
              [Maize].Husk.Nconc
              [Maize].Husk.MinimumNConc
              [Maize].Husk.CriticalNConc
              [Maize].Husk.MaximumNConc
              //Rachis
              [Maize].Rachis.Wt
              [Maize].Rachis.Total.StructuralWt
              [Maize].Rachis.Live.Wt
              [Maize].Rachis.Live.StructuralWt
              [Maize].Rachis.N
              [Maize].Rachis.Total.StructuralN
              [Maize].Rachis.Live.N
              [Maize].Rachis.Live.StructuralN
              [Maize].Rachis.Nconc
              [Maize].Rachis.MinimumNConc
              [Maize].Rachis.CriticalNConc
              [Maize].Rachis.MaximumNConc
              [Maize].Rachis.Total.StorageN
              [Maize].Rachis.Total.MetabolicN
              //Grain
              [Maize].Grain.Wt
              [Maize].Grain.Total.StructuralWt
              [Maize].Grain.Live.Wt
              [Maize].Grain.Live.StructuralWt
              [Maize].Grain.N
              [Maize].Grain.Total.StructuralN
              [Maize].Grain.Live.N
              [Maize].Grain.Live.StructuralN
              [Maize].Grain.Nconc
              [Maize].Grain.MinimumNConc
              [Maize].Grain.MaxNconc
              //Organ demands and supplies
              [Maize].Leaf.DMDemand.Total
              [Maize].Grain.DMDemand.Total
              [Maize].Husk.DMDemand.Total
              [Maize].Rachis.DMDemand.Total
              [Maize].Stem.DMDemand.Total
              [Maize].Root.DMDemand.Total
              [Maize].Leaf.DMSupply.Total
              [Maize].Grain.DMSupply.Total
              [Maize].Husk.DMSupply.Total
              [Maize].Rachis.DMSupply.Total
              [Maize].Stem.DMSupply.Total
              [Maize].Root.DMSupply.Total
              //Partitioning
              [Maize].Leaf.Live.Wt
              [Maize].Root.Live.Wt
              [Maize].Rachis.Live.Wt
              [Maize].Husk.Live.Wt
              [Maize].Grain.Live.Wt
              [Maize].Stem.Live.Wt
              [Maize].TotalLive.Wt
              // Dm demand test
              [Maize].Root.DMDemand.Structural
              [Maize].Root.DMDemands.Structural
          Operations
          Manager WaterTableManager2015
            InitialWaterTableDepth = 2000
            InSeasonWaterTableDepth = 1000
            StartDate = 05/01/2015 00:00:00
            EndDate = 05/20/2015 00:00:00
```csharp
using Models.Interfaces;
using Models.Soils;
using APSIM.Shared.Utilities;
using Models.PMF;
using Models.Core;
using System;
using Models.Soils.Nutrients;
        
        namespace Models
        {
           [Serializable] 
           [System.Xml.Serialization.XmlInclude(typeof(Model))]
            public class Script : Model
            {      
        [Link] private Soil Soil;
        [Link] private Clock Clock;
        [Link]
        private ISoilWater waterBalance;

               [Description("Initial Water Table Depth (mm)")]
               public double InitialWaterTableDepth { get; set; }

              [Description("InSeason Table Depth (mm)")]
               public double InSeasonWaterTableDepth { get; set; }

               [Description("Start Date")]
               public DateTime StartDate { get; set; }

               [Description("End Date")]
               public DateTime EndDate { get; set; }


        [EventSubscribe("StartOfSimulation")]
        private void OnSimulationCommencing(object sender, EventArgs e)
        {
        //(waterBalance).WaterTable = InitialWaterTableDepth;
        }       

               [EventSubscribe("DoManagement")]
               private void OnDoManagement(object sender, EventArgs e)
               {
                if (Clock.Today.Date >= StartDate && Clock.Today.Date >= EndDate)
                   (waterBalance).WaterTable = InSeasonWaterTableDepth;
                else
                    (waterBalance).WaterTable = InitialWaterTableDepth;
               }
            }
        }
```
          Manager WaterTableManager2016
            InitialWaterTableDepth = 2000
            InSeasonWaterTableDepth = 1000
            StartDate = 05/01/2016 00:00:00
            EndDate = 05/20/2016 00:00:00
            script: same as in Ames3N.Ames3N.Ames3NBase.Field.WaterTableManager2015
          Manager WaterTableManager2017
            InitialWaterTableDepth = 2000
            InSeasonWaterTableDepth = 1000
            StartDate = 05/01/2017 00:00:00
            EndDate = 05/20/2017 00:00:00
            script: same as in Ames3N.Ames3N.Ames3NBase.Field.WaterTableManager2015
          Manager WaterTableManager2018
            InitialWaterTableDepth = 2000
            InSeasonWaterTableDepth = 1000
            StartDate = 05/01/2018 00:00:00
            EndDate = 05/20/2018 00:00:00
            script: same as in Ames3N.Ames3N.Ames3NBase.Field.WaterTableManager2015
          Manager WaterTableManager2019
            InitialWaterTableDepth = 2000
            InSeasonWaterTableDepth = 1000
            StartDate = 05/01/2019 00:00:00
            EndDate = 05/20/2019 00:00:00
            script: same as in Ames3N.Ames3N.Ames3NBase.Field.WaterTableManager2015
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