Simulations: Version=160
  DataStore
    ExcelInput: FileNames=[Kanawha_measured_data.xlsx]
      SheetNames=[Crop, Root, Nitrogen, Water, RootShootRatio, rootbylayer, Crop2Corn, Crop2Soy]
    PredictedObserved Maize_Crop: PredictedTableName=MaizeReport; ObservedTableName=Crop; FieldNameUsedForMatch=SimulationName; FieldName2UsedForMatch=Clock.Today; AllColumns=true
    PredictedObserved Maize_Root: PredictedTableName=MaizeReport; ObservedTableName=Root; FieldNameUsedForMatch=SimulationName; FieldName2UsedForMatch=Clock.Today; AllColumns=true
    PredictedObserved Maize_RS: PredictedTableName=MaizeReport; ObservedTableName=RootShootRatio; FieldNameUsedForMatch=SimulationName; FieldName2UsedForMatch=Clock.Today; AllColumns=true
    PredictedObserved Soybean_Crop: PredictedTableName=SoybeanReport; ObservedTableName=Crop; FieldNameUsedForMatch=SimulationName; FieldName2UsedForMatch=Clock.Today; AllColumns=true
    PredictedObserved Soybean_Root: PredictedTableName=SoybeanReport; ObservedTableName=Root; FieldNameUsedForMatch=SimulationName; FieldName2UsedForMatch=Clock.Today; AllColumns=true
  Folder Replacements
    Report MaizeReport: EventNames=[Clock].DoReport
      VariableNames:
        //========================================================
        //=======Systems variables for FACTS experiment assessment
        //========================================================
        //=======Dates|Phenology
        [Clock].Today
        [Clock].Today.DayOfYear
        [Maize].DaysAfterSowing
        [Maize].Phenology.CurrentStageName
        [Clock].Today.Year
        //=======Crop variables
        [Maize].AboveGroundLive.Wt * 10
        [Maize].AboveGroundLive.N * 10
        [Maize].AboveGroundLive.NConc * 100
        [Maize].Rachis.Live.Wt * 10
        [Maize].Rachis.Live.N * 10
        [Maize].Rachis.Live.NConc * 100
        [Maize].Husk.Live.Wt * 10
        [Maize].Husk.Live.N * 10
        [Maize].Husk.Live.NConc * 100
        [Maize].Rachis.Live.Wt * 10
        [Maize].Rachis.Live.N * 10
        [Maize].Rachis.Live.NConc * 100
        [Maize].Grain.Wt * 10
        [Maize].Grain.N * 10
        [Maize].Grain.Nconc * 100
        //===I Created GrainsperCob output|Check it
        [Maize].Grain.GrainsperCob
        [Maize].Grain.Number
        [Maize].Grain.Size
        [Maize].Root.Live.Wt * 10
        [Maize].Root.Live.N * 10
        [Maize].Root.Live.NConc * 100
        [Maize].Root.Depth
        [Maize].Root.RSRatio
        [Maize].Root.SpecificRootLength.FixedValue
        [Maize].Stem.Live.Wt * 10
        [Maize].Stem.Live.N * 10
        [Maize].Stem.Live.NConc * 100
        [Maize].Leaf.Live.Wt * 10
        [Maize].Leaf.Live.N * 10
        [Maize].Leaf.Live.NConc * 100
        [Maize].Leaf.Nconc * 100
        [Maize].Leaf.Dead.Wt * 10
        [Maize].Leaf.Dead.N * 10
        [Maize].Leaf.Dead.NConc * 100
        [Maize].Leaf.Wt * 10
        [Maize].Leaf.N * 10
        //=====For some reason I can't multiply Leaf.NConc by 100
        [Maize].Leaf.Nconc
        [Maize].Leaf.LAI
        [Maize].Leaf.SpecificArea
        [Maize].Leaf.SpecificNitrogen
        [Maize].Structure.LeafTipsAppeared
        [Maize].Leaf.LAITotal
        [Maize].Leaf.LAIDead
        //=====SpecificAreaDead and Total were created in Leaf model
        [Maize].Leaf.SpecificAreaDead
        [Maize].Leaf.SpecificAreaTotal
        [Maize].Leaf.SpecificNitrogenTotal
        [Maize].Leaf.SpecificNitrogenDead
        [Maize].Structure.LeafTipsAppeared
        [Maize].Leaf.CohortArea
        [Maize].Leaf.PlantAppearedLeafNo
        [Maize].Leaf.ExpandedCohortNo
        [Maize].Leaf.AppearedCohortNo
        [Maize].Leaf.DeadCohortNo
        [Maize].Leaf.SenescingCohortNo
        [Maize].Leaf.DeadCohortNo + [Maize].Leaf.SenescingCohortNo as MaizeLeafDeadCohortNo2
        //=======ET/CO2/NO2
        [Maize].Leaf.Transpiration
        [Field].Soil.SoilWater.Es
        [Maize].Leaf.Transpiration + [Field].Soil.SoilWater.Es as Maize_ET
        //=====N2 generated from denitrification
        sum([Soil].Nutrient.Natm) as Nutrient.Natm
        //======N2O generated from both denitrification and nitrification
        sum([Soil].Nutrient.N2Oatm) as Nutrient.N2Oatm
        //======N2O generated from both denitrification and nitrification/sum of different pools
        sum([Nutrient].Denitrification.N2Oatm)+ sum([Nutrient].Nitrification.N2Oatm) as Nutrient.N2Oatm_2
        //====== N2O/separated pools
        sum([Nutrient].Denitrification.N2Oatm) as NO3.Denitrification.N2Oatm
        sum([Nutrient].Nitrification.N2Oatm) as NH4.Nitrification.N2Oatm
        //======Total CO2 lost to the atmosphere
        sum([Soil].Nutrient.Catm) as Nutrient.Catm
        //======Total CO2 lost to the atmosphere/sum of different pools/should be the same value
        sum([Soil].Nutrient.Humic.Decomposition.Catm) + sum([Soil].Nutrient.Microbial.Decomposition.Catm) + sum([Soil].Nutrient.FOMCarbohydrate.Decomposition.Catm) +sum([Soil].Nutrient.FOMCellulose.Decomposition.Catm) + sum([Soil].Nutrient.FOMLignin.Decomposition.Catm) +sum([Soil].Nutrient.SurfaceResidue.Decomposition.Catm) as Nutrient.Catm_2
        //======Total CO2 lost to the atmosphere/Separated pools
        sum([Soil].Nutrient.Humic.Decomposition.Catm) as Humic.Decomposition.Catm
        sum([Soil].Nutrient.Microbial.Decomposition.Catm) as Microbial.Decomposition.Catm
        sum([Soil].Nutrient.FOMCarbohydrate.Decomposition.Catm) as FOMCarbohydrate.Decomposition.Catm
        sum([Soil].Nutrient.FOMCellulose.Decomposition.Catm) as FOMCellulose.Decomposition.Catm
        sum([Soil].Nutrient.FOMLignin.Decomposition.Catm) as FOMLignin.Decomposition.Catm
        sum([Soil].Nutrient.SurfaceResidue.Decomposition.Catm) as SurfaceResidue.Decomposition.Catm
        //======Total N2O by layer
        sum([Soil].Nutrient.N2Oatm[1:5]) as Nutrient.N2Oatm_030
        sum([Soil].Nutrient.N2Oatm[6:7]) as Nutrient.N2Oatm_3060
        sum([Soil].Nutrient.N2Oatm[8:9]) as Nutrient.N2Oatm_6090
        sum([Soil].Nutrient.N2Oatm[10:11]) as Nutrient.N2Oatm_90120
        [Soil].Nutrient.N2Oatm[12] as Nutrient.N2Oatm_120150
        [Soil].Nutrient.N2Oatm[13] as Nutrient.N2Oatm_150180
        [Soil].Nutrient.N2Oatm[14] as Nutrient.N2Oatm_180210
        [Soil].Nutrient.N2Oatm[15] as Nutrient.N2Oatm_210240
        [Soil].Nutrient.N2Oatm[16] as Nutrient.N2Oatm_240270
        [Soil].Nutrient.N2Oatm[17] as Nutrient.N2Oatm_270300
        [Soil].Nutrient.N2Oatm[18] as Nutrient.N2Oatm_300330
        [Soil].Nutrient.N2Oatm[19] as Nutrient.N2Oatm_330360
        [Soil].Nutrient.N2Oatm[20] as Nutrient.N2Oatm_360390
        //=======Soil variables
        [Field].Soil.SoilWater.SW[4] as SW15
        ([Field].Soil.SoilWater.SW[6] + [Field].Soil.SoilWater.SW[7]) / 2 as SW45
        mean([Field].Soil.SoilWater.SW[6:7]) as SW45_2
        [Field].Soil.Temperature.Value[4] as ST15
        ([Field].Soil.Temperature.Value[6] + [Field].Soil.Temperature.Value[7]) / 2 as ST45
        sum([Field].Soil.Nutrient.NO3.kgha[1:5]) as NO3_0_30cm
        sum([Field].Soil.Nutrient.NO3.kgha[6:7]) as NO3_30_60cm
        sum([Field].Soil.Nutrient.NH4.kgha[1:5]) as NH4_0_30cm
        sum([Field].Soil.Nutrient.NH4.kgha[6:7]) as NH4_30_60cm
        [Field].Soil.SoilWater.WaterTable
        //=======Campbell sensors | soil_system_1_mesonet spreadsheet
        ([Soil].Water.Volumetric[5]*1.5 + [Soil].Water.Volumetric[6]*1)/2.5 as SW30
        ([Soil].Water.Volumetric[7] + [Soil].Water.Volumetric[8])/2 as SW60
        ([Soil].Water.Volumetric[11]*2 + [Soil].Water.Volumetric[12]*1)/3 as SW120
        ([Soil].Temperature.Value[3]*2 + [Soil].Temperature.Value[4]*1)/3 as ST10
        ([Soil].Temperature.Value[5]*1.5 + [Soil].Temperature.Value[6]*1)/2.5 as ST30
        ([Soil].Temperature.Value[7] + [Soil].Temperature.Value[8])/2 as ST60
        ([Soil].Temperature.Value[11]*2 + [Soil].Temperature.Value[12]*1)/3 as ST120
        //=======Detailed soil N
        sum([Field].Soil.Nutrient.NO3.kgha[1:3]) as NO3_0_10cm
        [Field].Soil.Nutrient.NO3.kgha[4] as NO3_10_20cm
        [Field].Soil.Nutrient.NO3.kgha[5] as NO3_20_30cm
        [Field].Soil.Nutrient.NO3.kgha[6] * 2/3 as NO3_30_40cm
        ([Field].Soil.Nutrient.NO3.kgha[6] * 1/3) + [Field].Soil.Nutrient.NO3.kgha[7] as NO3_40_60cm
        [Field].Soil.Nutrient.NO3.kgha[8] + ([Field].Soil.Nutrient.NO3.kgha[9] * 1/3) as NO3_60_80cm
        sum([Field].Soil.Nutrient.NH4.kgha[1:3]) as NH4_0_10cm
        [Field].Soil.Nutrient.NH4.kgha[4] as NH4_10_20cm
        [Field].Soil.Nutrient.NH4.kgha[5] as NH4_20_30cm
        [Field].Soil.Nutrient.NH4.kgha[6] * 2/3 as NH4_30_40cm
        ([Field].Soil.Nutrient.NH4.kgha[6] * 1/3) + [Field].Soil.Nutrient.NH4.kgha[7] as NH4_40_60cm
        [Field].Soil.Nutrient.NH4.kgha[8] + ([Field].Soil.Nutrient.NH4.kgha[9] * 1/3) as NH4_60_80cm
        //=======Root biomass per layer
        10 * (sum([Maize].Root.LayerLive.Wt[1:3]) + 0.5* [Maize].Root.LayerLive.Wt[4]) as rootmass_015
        10 * (0.5* [Maize].Root.LayerLive.Wt[4] + [Maize].Root.LayerLive.Wt[5]) as rootmass_1530
        10 * sum([Maize].Root.LayerLive.Wt[1:5]) as rootmass_030
        10 * sum([Maize].Root.LayerLive.Wt[6:7]) as rootmass_3060
        10 * sum([Maize].Root.LayerLive.Wt[8:9]) as rootmass_6090
        10 * sum([Maize].Root.LayerLive.Wt[10:11]) as rootmass_90120
        10 * [Maize].Root.LayerLive.Wt[12] as rootmass_120150
        10 * [Maize].Root.LayerLive.Wt[13] as rootmass_150180
        10 * [Maize].Root.LayerLive.Wt[14] as rootmass_180210
        10 * [Maize].Root.LayerLive.Wt[15] as rootmass_210240
        10 * [Maize].Root.LayerLive.Wt[16] as rootmass_240270
        10 * [Maize].Root.LayerLive.Wt[17] as rootmass_270300
        10 * [Maize].Root.LayerLive.Wt[18] as rootmass_300330
        10 * [Maize].Root.LayerLive.Wt[19] as rootmass_330360
        10 * [Maize].Root.LayerLive.Wt[20] as rootmass_360390
        //=======Root length | from m/m2 to km/m2
        //=======I think Root length output is root depth, so I tried to calculate root length
        (sum([Maize].Root.LayerLive.Wt[1:3]) + 0.5 * [Maize].Root.LayerLive.Wt[4]) * [Maize].Root.SpecificRootLength.FixedValue / 1000 as rootlength_015
        (0.5* [Maize].Root.LayerLive.Wt[4] + [Maize].Root.LayerLive.Wt[5]) * [Maize].Root.SpecificRootLength.FixedValue / 1000 as rootlength_1530
        sum([Maize].Root.LayerLive.Wt[1:5]) * [Maize].Root.SpecificRootLength.FixedValue / 1000 as rootlength_030
        sum([Maize].Root.LayerLive.Wt[6:7]) * [Maize].Root.SpecificRootLength.FixedValue / 1000 as rootlength_3060
        sum([Maize].Root.LayerLive.Wt[8:9]) * [Maize].Root.SpecificRootLength.FixedValue / 1000 as rootlength_6090
        sum([Maize].Root.LayerLive.Wt[10:11]) * [Maize].Root.SpecificRootLength.FixedValue / 1000 as rootlength_90120
        [Maize].Root.LayerLive.Wt[12] * [Maize].Root.SpecificRootLength.FixedValue / 1000 as rootlength_120150
        [Maize].Root.LayerLive.Wt[13] * [Maize].Root.SpecificRootLength.FixedValue / 1000 as rootlength_150180
        [Maize].Root.LayerLive.Wt[14] * [Maize].Root.SpecificRootLength.FixedValue / 1000 as rootlength_180210
        [Maize].Root.LayerLive.Wt[15] * [Maize].Root.SpecificRootLength.FixedValue / 1000 as rootlength_210240
        [Maize].Root.LayerLive.Wt[16] * [Maize].Root.SpecificRootLength.FixedValue / 1000 as rootlength_240270
        [Maize].Root.LayerLive.Wt[17] * [Maize].Root.SpecificRootLength.FixedValue / 1000 as rootlength_270300
        [Maize].Root.LayerLive.Wt[18] * [Maize].Root.SpecificRootLength.FixedValue / 1000 as rootlength_300330
        [Maize].Root.LayerLive.Wt[19] * [Maize].Root.SpecificRootLength.FixedValue / 1000 as rootlength_330360
        [Maize].Root.LayerLive.Wt[20] * [Maize].Root.SpecificRootLength.FixedValue / 1000 as rootlength_360390
        [Maize].Root.Live.Wt * [Maize].Root.SpecificRootLength.FixedValue / 1000 as totalrootlength
        //=======Root length density - RLD | from mm/mm3 to cm/cm3
        mean([Maize].Root.LengthDensity[1:5]) * 100 as lengthDensity_030
        mean([Maize].Root.LengthDensity[6:7]) * 100 as lengthDensity_3060
        mean([Maize].Root.LengthDensity[8:9]) * 100 as lengthDensity_6090
        mean([Maize].Root.LengthDensity[10:11]) * 100 as LengthDensity_90120
        [Maize].Root.LengthDensity[12] * 100 as lengthDensity_120150
        [Maize].Root.LengthDensity[13] * 100 as lengthDensity_150180
        [Maize].Root.LengthDensity[14] * 100 as lengthDensity_180210
        [Maize].Root.LengthDensity[15] * 100 as lengthDensity_210240
        [Maize].Root.LengthDensity[16] * 100 as lengthDensity_240270
        [Maize].Root.LengthDensity[17] * 100 as lengthDensity_270300
        [Maize].Root.LengthDensity[18] * 100 as lengthDensity_300330
        [Maize].Root.LengthDensity[19] * 100 as lengthDensity_330360
        [Maize].Root.LengthDensity[20] * 100 as lengthDensity_360390
        mean([Maize].Root.LengthDensity[1:20]) * 100 as totallengthDensity
        //=======Root Nitrogen per layer
        10 * (sum([Maize].Root.LayerLive.N[1:3]) + 0.5* [Maize].Root.LayerLive.N[4]) as rootN_015
        10 * (0.5* [Maize].Root.LayerLive.N[4] + [Maize].Root.LayerLive.N[5]) as rootN_1530
        10 * sum([Maize].Root.LayerLive.N[1:5]) as rootN_030
        10 * sum([Maize].Root.LayerLive.N[6:7]) as rootN_3060
        10 * sum([Maize].Root.LayerLive.N[8:9]) as rootN_6090
        10 * sum([Maize].Root.LayerLive.N[10:11]) as rootN_90120
        10 * [Maize].Root.LayerLive.N[12] as rootN_120150
        10 * [Maize].Root.LayerLive.N[13] as rootN_150180
        10 * [Maize].Root.LayerLive.N[14] as rootN_180210
        10 * [Maize].Root.LayerLive.N[15] as rootN_210240
        10 * [Maize].Root.LayerLive.N[16] as rootN_240270
        10 * [Maize].Root.LayerLive.N[17] as rootN_270300
        10 * [Maize].Root.LayerLive.N[18] as rootN_300330
        10 * [Maize].Root.LayerLive.N[19] as rootN_330360
        10 * [Maize].Root.LayerLive.N[20] as rootN_360390
        [Weather].Rain
        [Soil].SoilWater.Depth
        [Maize].Root.LayerLive.Wt
        [SurfaceOrganicMatter].Wt
        [SurfaceOrganicMatter].Cover
    Report SoybeanReport: EventNames=[Clock].DoReport
      VariableNames:
        //========================================================
        //=======Systems variables for FACTS experiment assessment
        //========================================================
        //=======Dates|Phenology
        [Clock].Today
        [Clock].Today.DayOfYear
        [Soybean].DaysAfterSowing
        [Soybean].Phenology.CurrentStageName
        //=======Crop variables
        [Soybean].AboveGroundLive.Wt * 10
        [Soybean].AboveGroundLive.N * 10
        [Soybean].AboveGroundLive.NConc * 100
        //=======I created another composite factor (AboveGround2) to better represent our measurements
        [Soybean].AboveGround2.Wt * 10
        [Soybean].AboveGround2.N * 10
        [Soybean].AboveGround2.NConc * 100
        //=======Shell is equivalent to pod in measured data
        [Soybean].Shell.Live.Wt * 10
        [Soybean].Shell.Live.N * 10
        [Soybean].Shell.Live.NConc * 100
        //=======Check which one to use (I am using the total Wt)
        [Soybean].Shell.Wt * 10
        [Soybean].Shell.N * 10
        [Soybean].Shell.Nconc * 100
        //=======Pod = Shell + grain
        //=======I created PodLive composite biomass
        //=======Pod is equivalent to fruit in measured data
        [Soybean].PodLive.Wt * 10
        [Soybean].PodLive.N * 10
        [Soybean].PodLive.NConc * 100
        //=======Check which one to use (I am using the total Wt)
        [Soybean].Pod.Wt * 10
        [Soybean].Pod.N * 10
        [Soybean].Pod.NConc * 100
        [Soybean].Grain.Wt * 10
        [Soybean].Grain.N * 10
        [Soybean].Grain.Nconc * 100
        [Soybean].Root.Live.Wt * 10
        [Soybean].Root.Live.N * 10
        [Soybean].Root.Live.NConc * 100
        [Soybean].Root.Depth
        [Soybean].Root.RSRatio
        [Soybean].Root.SpecificRootLength.FixedValue
        [Soybean].Stem.Live.Wt * 10
        [Soybean].Stem.Live.N * 10
        [Soybean].Stem.Live.NConc * 100
        //=======Check which one to use (I am using the total Wt)
        [Soybean].Stem.Wt * 10
        [Soybean].Stem.N * 10
        [Soybean].Stem.Nconc * 100
        [Soybean].Leaf.Live.Wt * 10
        [Soybean].Leaf.Live.N * 10
        [Soybean].Leaf.Live.NConc * 100
        [Soybean].Leaf.Dead.Wt * 10
        [Soybean].Leaf.Dead.N * 10
        [Soybean].Leaf.Dead.NConc * 100
        [Soybean].Leaf.Wt * 10
        [Soybean].Leaf.N * 10
        //=====For some reason I can't multiply Leaf.NConc by 100
        [Soybean].Leaf.NConc
        [Soybean].Leaf.LAI
        //=======SLA units differ for maize (mm2/g) and soybean (m2/g)
        //=======For some reason, multiplying/dividing Leaf.SpecificArea by any number results zero
        //=======So I changed units of the measured data
        [Soybean].Leaf.SpecificArea
        //=======There is no output for SLN, so it was created
        [Soybean].Leaf.SLN
        [Soybean].Leaf.Detached.Wt
        [Soybean].Leaf.Dead.Wt
        [Soybean].Leaf.Senesced.Wt*10
        sum of [Soybean].Leaf.Senesced.Wt*10 from [Soybean].Sowing to [Soybean].Harvesting as LeafSencescedCumWt
        sum of [Soybean].Leaf.Detached.Wt*10 from [Soybean].Sowing to [Soybean].Harvesting as LeafDetachedCumWt
        [Soybean].Leaf.Detached.Wt*10
        [Soybean].Leaf.NodeNumber
        //=======ET/CO2/NO2
        [Soybean].Leaf.Transpiration
        [Field].Soil.SoilWater.Es
        [Soybean].Leaf.Transpiration + [Field].Soil.SoilWater.Es as Soybean_ET
        //=====N2 generated from denitrification
        sum([Soil].Nutrient.Natm) as Nutrient.Natm
        //======N2O generated from both denitrification and nitrification
        sum([Soil].Nutrient.N2Oatm) as Nutrient.N2Oatm
        //======N2O generated from both denitrification and nitrification/sum of different pools
        sum([Nutrient].Denitrification.N2Oatm)+ sum([Nutrient].Nitrification.N2Oatm) as Nutrient.N2Oatm_2
        //====== N2O/separated pools
        sum([Nutrient].Denitrification.N2Oatm) as NO3.Denitrification.N2Oatm
        sum([Nutrient].Nitrification.N2Oatm) as NH4.Nitrification.N2Oatm
        //======Total CO2 lost to the atmosphere
        sum([Soil].Nutrient.Catm) as Nutrient.Catm
        //======Total CO2 lost to the atmosphere/sum of different pools/should be the same value
        sum([Soil].Nutrient.Humic.Decomposition.Catm) + sum([Soil].Nutrient.Microbial.Decomposition.Catm) + sum([Soil].Nutrient.FOMCarbohydrate.Decomposition.Catm) +sum([Soil].Nutrient.FOMCellulose.Decomposition.Catm) + sum([Soil].Nutrient.FOMLignin.Decomposition.Catm) +sum([Soil].Nutrient.SurfaceResidue.Decomposition.Catm) as Nutrient.Catm_2
        //======Total CO2 lost to the atmosphere/Separated pools
        sum([Soil].Nutrient.Humic.Decomposition.Catm) as Humic.Decomposition.Catm
        sum([Soil].Nutrient.Microbial.Decomposition.Catm) as Microbial.Decomposition.Catm
        sum([Soil].Nutrient.FOMCarbohydrate.Decomposition.Catm) as FOMCarbohydrate.Decomposition.Catm
        sum([Soil].Nutrient.FOMCellulose.Decomposition.Catm) as FOMCellulose.Decomposition.Catm
        sum([Soil].Nutrient.FOMLignin.Decomposition.Catm) as FOMLignin.Decomposition.Catm
        sum([Soil].Nutrient.SurfaceResidue.Decomposition.Catm) as SurfaceResidue.Decomposition.Catm
        //======Total N2O by layer
        sum([Soil].Nutrient.N2Oatm[1:5]) as Nutrient.N2Oatm_030
        sum([Soil].Nutrient.N2Oatm[6:7]) as Nutrient.N2Oatm_3060
        sum([Soil].Nutrient.N2Oatm[8:9]) as Nutrient.N2Oatm_6090
        sum([Soil].Nutrient.N2Oatm[10:11]) as Nutrient.N2Oatm_90120
        [Soil].Nutrient.N2Oatm[12] as Nutrient.N2Oatm_120150
        [Soil].Nutrient.N2Oatm[13] as Nutrient.N2Oatm_150180
        [Soil].Nutrient.N2Oatm[14] as Nutrient.N2Oatm_180210
        [Soil].Nutrient.N2Oatm[15] as Nutrient.N2Oatm_210240
        [Soil].Nutrient.N2Oatm[16] as Nutrient.N2Oatm_240270
        [Soil].Nutrient.N2Oatm[17] as Nutrient.N2Oatm_270300
        [Soil].Nutrient.N2Oatm[18] as Nutrient.N2Oatm_300330
        [Soil].Nutrient.N2Oatm[19] as Nutrient.N2Oatm_330360
        [Soil].Nutrient.N2Oatm[20] as Nutrient.N2Oatm_360390
        //=======Soil variables
        [Field].Soil.SoilWater.SW[4] as SW15
        ([Field].Soil.SoilWater.SW[6] + [Field].Soil.SoilWater.SW[7]) / 2 as SW45
        [Field].Soil.Temperature.Value[4] as ST15
        ([Field].Soil.Temperature.Value[6] + [Field].Soil.Temperature.Value[7]) / 2 as ST45
        sum([Field].Soil.Nutrient.NO3.kgha[1:5]) as NO3_0_30cm
        sum([Field].Soil.Nutrient.NO3.kgha[6:7]) as NO3_30_60cm
        sum([Field].Soil.Nutrient.NH4.kgha[1:5]) as NH4_0_30cm
        sum([Field].Soil.Nutrient.NH4.kgha[6:7]) as NH4_30_60cm
        [Field].Soil.SoilWater.WaterTable
        //=======Detailed soil N
        sum([Field].Soil.Nutrient.NO3.kgha[1:3]) as NO3_0_10cm
        [Field].Soil.Nutrient.NO3.kgha[4] as NO3_10_20cm
        [Field].Soil.Nutrient.NO3.kgha[5] as NO3_20_30cm
        [Field].Soil.Nutrient.NO3.kgha[6] * 2/3 as NO3_30_40cm
        ([Field].Soil.Nutrient.NO3.kgha[6] * 1/3) + [Field].Soil.Nutrient.NO3.kgha[7] as NO3_40_60cm
        [Field].Soil.Nutrient.NO3.kgha[8] + ([Field].Soil.Nutrient.NO3.kgha[9] * 1/3) as NO3_60_80cm
        sum([Field].Soil.Nutrient.NH4.kgha[1:3]) as NH4_0_10cm
        [Field].Soil.Nutrient.NH4.kgha[4] as NH4_10_20cm
        [Field].Soil.Nutrient.NH4.kgha[5] as NH4_20_30cm
        [Field].Soil.Nutrient.NH4.kgha[6] * 2/3 as NH4_30_40cm
        ([Field].Soil.Nutrient.NH4.kgha[6] * 1/3) + [Field].Soil.Nutrient.NH4.kgha[7] as NH4_40_60cm
        [Field].Soil.Nutrient.NH4.kgha[8] + ([Field].Soil.Nutrient.NH4.kgha[9] * 1/3) as NH4_60_80cm
        //=======Soil variables and detailed soil N outputs are the same as MaizeReport
        //=======Root biomass per layer
        10 * (sum([Soybean].Root.LayerLive.Wt[1:3]) + 0.5* [Soybean].Root.LayerLive.Wt[4]) as rootmass_015
        10 * (0.5* [Soybean].Root.LayerLive.Wt[4] + [Soybean].Root.LayerLive.Wt[5]) as rootmass_1530
        10 * sum([Soybean].Root.LayerLive.Wt[1:5]) as rootmass_030
        10 * sum([Soybean].Root.LayerLive.Wt[6:7]) as rootmass_3060
        10 * sum([Soybean].Root.LayerLive.Wt[8:9]) as rootmass_6090
        10 * sum([Soybean].Root.LayerLive.Wt[10:11]) as rootmass_90120
        10 * sum([Soybean].Root.LayerLive.Wt[8:11]) as rootmass_90150
        10 * [Soybean].Root.LayerLive.Wt[12] as rootmass_120150
        10 * [Soybean].Root.LayerLive.Wt[13] as rootmass_150180
        10 * [Soybean].Root.LayerLive.Wt[14] as rootmass_180210
        10 * [Soybean].Root.LayerLive.Wt[15] as rootmass_210240
        10 * [Soybean].Root.LayerLive.Wt[16] as rootmass_240270
        10 * [Soybean].Root.LayerLive.Wt[17] as rootmass_270300
        10 * [Soybean].Root.LayerLive.Wt[18] as rootmass_300330
        10 * [Soybean].Root.LayerLive.Wt[19] as rootmass_330360
        10 * [Soybean].Root.LayerLive.Wt[20] as rootmass_360390
        //=======Root length | from m/m2 to km/m2
        //=======I think Root length output is actually root depth, so I tried to calculate root length
        (sum([Soybean].Root.LayerLive.Wt[1:3]) + 0.5 * [Soybean].Root.LayerLive.Wt[4]) * [Soybean].Root.SpecificRootLength.FixedValue / 1000 as rootlength_015
        (0.5* [Soybean].Root.LayerLive.Wt[4] + [Soybean].Root.LayerLive.Wt[5]) * [Soybean].Root.SpecificRootLength.FixedValue / 1000 as rootlength_1530
        sum([Soybean].Root.LayerLive.Wt[1:5]) * [Soybean].Root.SpecificRootLength.FixedValue / 1000 as rootlength_030
        sum([Soybean].Root.LayerLive.Wt[6:7]) * [Soybean].Root.SpecificRootLength.FixedValue / 1000 as rootlength_3060
        sum([Soybean].Root.LayerLive.Wt[8:9]) * [Soybean].Root.SpecificRootLength.FixedValue / 1000 as rootlength_6090
        sum([Soybean].Root.LayerLive.Wt[10:11]) * [Soybean].Root.SpecificRootLength.FixedValue / 1000 as rootlength_90120
        [Soybean].Root.LayerLive.Wt[12] * [Soybean].Root.SpecificRootLength.FixedValue / 1000 as rootlength_120150
        [Soybean].Root.LayerLive.Wt[13] * [Soybean].Root.SpecificRootLength.FixedValue / 1000 as rootlength_150180
        [Soybean].Root.LayerLive.Wt[14] * [Soybean].Root.SpecificRootLength.FixedValue / 1000 as rootlength_180210
        [Soybean].Root.LayerLive.Wt[15] * [Soybean].Root.SpecificRootLength.FixedValue / 1000 as rootlength_210240
        [Soybean].Root.LayerLive.Wt[16] * [Soybean].Root.SpecificRootLength.FixedValue / 1000 as rootlength_240270
        [Soybean].Root.LayerLive.Wt[17] * [Soybean].Root.SpecificRootLength.FixedValue / 1000 as rootlength_270300
        [Soybean].Root.LayerLive.Wt[18] * [Soybean].Root.SpecificRootLength.FixedValue / 1000 as rootlength_300330
        [Soybean].Root.LayerLive.Wt[19] * [Soybean].Root.SpecificRootLength.FixedValue / 1000 as rootlength_330360
        [Soybean].Root.LayerLive.Wt[20] * [Soybean].Root.SpecificRootLength.FixedValue / 1000 as rootlength_360390
        [Soybean].Root.Live.Wt * [Soybean].Root.SpecificRootLength.FixedValue / 1000 as totalrootlength
        //=======Root length density - RLD | from mm/mm3 to cm/cm3
        mean([Soybean].Root.LengthDensity[1:5]) * 100 as lengthDensity_030
        mean([Soybean].Root.LengthDensity[6:7]) * 100 as lengthDensity_3060
        mean([Soybean].Root.LengthDensity[8:9]) * 100 as lengthDensity_6090
        mean([Soybean].Root.LengthDensity[10:11]) * 100 as LengthDensity_90120
        [Soybean].Root.LengthDensity[12] * 100 as lengthDensity_120150
        [Soybean].Root.LengthDensity[13] * 100 as lengthDensity_150180
        [Soybean].Root.LengthDensity[14] * 100 as lengthDensity_180210
        [Soybean].Root.LengthDensity[15] * 100 as lengthDensity_210240
        [Soybean].Root.LengthDensity[16] * 100 as lengthDensity_240270
        [Soybean].Root.LengthDensity[17] * 100 as lengthDensity_270300
        [Soybean].Root.LengthDensity[18] * 100 as lengthDensity_300330
        [Soybean].Root.LengthDensity[19] * 100 as lengthDensity_330360
        [Soybean].Root.LengthDensity[20] * 100 as lengthDensity_360390
        mean([Soybean].Root.LengthDensity[1:20]) * 100 as totallengthDensity
        //=======Root Nitrogen per layer
        10 * (sum([Soybean].Root.LayerLive.N[1:3]) + 0.5* [Soybean].Root.LayerLive.N[4]) as rootN_015
        10 * (0.5* [Soybean].Root.LayerLive.N[4] + [Soybean].Root.LayerLive.N[5]) as rootN_1530
        10 * sum([Soybean].Root.LayerLive.N[1:5]) as rootN_030
        10 * sum([Soybean].Root.LayerLive.N[6:7]) as rootN_3060
        10 * sum([Soybean].Root.LayerLive.N[8:9]) as rootN_6090
        10 * sum([Soybean].Root.LayerLive.N[10:11]) as rootN_90120
        10 * [Soybean].Root.LayerLive.N[12] as rootN_120150
        10 * [Soybean].Root.LayerLive.N[13] as rootN_150180
        10 * [Soybean].Root.LayerLive.N[14] as rootN_180210
        10 * [Soybean].Root.LayerLive.N[15] as rootN_210240
        10 * [Soybean].Root.LayerLive.N[16] as rootN_240270
        10 * [Soybean].Root.LayerLive.N[17] as rootN_270300
        10 * [Soybean].Root.LayerLive.N[18] as rootN_300330
        10 * [Soybean].Root.LayerLive.N[19] as rootN_330360
        10 * [Soybean].Root.LayerLive.N[20] as rootN_360390
        //========Further checks
        [Soybean].Stem.SenescenceRate
        sum of [Soybean].Nodule.NFixed*10 from [Soybean].Sowing to [Soybean].Harvesting as Nfixed_kgha
        sum of sum([Soil].Nutrient.MineralisedN) from [Soybean].Sowing to [Soybean].Harvesting as MineralisedN_kgha
  Folder Kanawaha
    Experiment Kanawaha
      Factors
        Factor System: Specification=[Simulation].Field.Operations
          Operations 21
            2014-04-20  [SurfaceOrganicMatter].Incorporate(0.25, 150);
            2014-05-11  [Maize].Sow(population: 8, cultivar: "FACTS_P1151", depth: 50, rowSpacing: 760);
            2014-10-11  [Maize].Harvest;
            2014-10-11  [Maize].EndCrop;
            2015-05-15  [Soybean].Sow(population: 25, cultivar: "MG_2", depth: 50, rowSpacing: 760);
            2015-10-06  [Soybean].Harvest;
            2015-10-06  [Soybean].EndCrop;
            2015-11-11  [SurfaceOrganicMatter].Incorporate(0.05, 250);
            2016-05-04  [Fertiliser].Apply(168, Fertiliser.Types.UreaN, 50);
            2016-05-05  [SurfaceOrganicMatter].Incorporate(0.10, 100);
            2016-05-11  [Maize].Sow(population: 8, cultivar: "FACTS_P1151", depth: 50, rowSpacing: 760);
            2016-10-11  [Maize].Harvest;
            2016-10-11  [Maize].EndCrop;
            2016-11-12  [SurfaceOrganicMatter].Incorporate(0.75, 250);
            2017-04-23  [SurfaceOrganicMatter].Incorporate(0.25, 150);
            2017-05-05  [Fertiliser].Apply(0, Fertiliser.Types.UreaN, 50);
            2017-05-12  [Maize].Sow(population: 8.8, cultivar: "FACTS_P1151", depth: 50, rowSpacing: 760);
            2017-10-29  [Maize].Harvest;
            2017-10-29  [Maize].EndCrop;
            2017-11-12  [SurfaceOrganicMatter].Incorporate(0.75, 250);
            2018-04-17  [SurfaceOrganicMatter].Incorporate(0.25, 150);
            2018-05-29  [Soybean].Sow(population: 35, cultivar: "FACTS_P932T16", depth: 50, rowSpacing: 760);
            2018-10-30  [Soybean].Harvest;
            2018-10-30  [Soybean].EndCrop;
            2018-11-12  [SurfaceOrganicMatter].Incorporate(0.05, 250);
            2019-04-30  [Fertiliser].Apply(0, Fertiliser.Types.UreaN, 50);
            2019-05-03  [SurfaceOrganicMatter].Incorporate(0.25, 150);
            2019-05-04  [Maize].Sow(population: 8.4, cultivar: "FACTS_P1151", depth: 50, rowSpacing: 760);
            2019-10-19  [Maize].Harvest;
            2019-10-19  [Maize].EndCrop;
          Operations 22
            2014-04-20  [SurfaceOrganicMatter].Incorporate(0.25, 150);
            2014-05-11  [Maize].Sow(population: 8, cultivar: "FACTS_P1151", depth: 50, rowSpacing: 760);
            2014-10-11  [Maize].Harvest;
            2014-10-11  [Maize].EndCrop;
            2015-04-20  [SurfaceOrganicMatter].Incorporate(0.25, 150);
            2015-05-15  [Soybean].Sow(population: 25, cultivar: "MG_2", depth: 50, rowSpacing: 760);
            2015-10-06  [Soybean].Harvest;
            2015-10-06  [Soybean].EndCrop;
            2015-11-11  [SurfaceOrganicMatter].Incorporate(0.05, 250);
            2016-05-04  [Fertiliser].Apply(168, Fertiliser.Types.UreaN, 50);
            2016-05-05  [SurfaceOrganicMatter].Incorporate(0.10, 100);
            2016-05-11  [Maize].Sow(population: 8, cultivar: "FACTS_P1151", depth: 50, rowSpacing: 760);
            2016-10-11  [Maize].Harvest;
            2016-10-11  [Maize].EndCrop;
            2016-11-12  [SurfaceOrganicMatter].Incorporate(0.75, 250);
            2017-04-23  [SurfaceOrganicMatter].Incorporate(0.25, 150);
            2017-05-05  [Fertiliser].Apply(168, Fertiliser.Types.UreaN, 50);
            2017-05-12  [Maize].Sow(population: 8.8, cultivar: "FACTS_P1151", depth: 50, rowSpacing: 760);
            2017-10-29  [Maize].Harvest;
            2017-10-29  [Maize].EndCrop;
            2017-11-12  [SurfaceOrganicMatter].Incorporate(0.75, 250);
            2018-04-17  [SurfaceOrganicMatter].Incorporate(0.25, 150);
            2018-05-29  [Soybean].Sow(population: 35, cultivar: "FACTS_P932T16", depth: 50, rowSpacing: 760);
            2018-10-30  [Soybean].Harvest;
            2018-10-30  [Soybean].EndCrop;
            2018-11-12  [SurfaceOrganicMatter].Incorporate(0.05, 250);
            2019-04-30  [Fertiliser].Apply(168, Fertiliser.Types.UreaN, 50);
            2019-05-03  [SurfaceOrganicMatter].Incorporate(0.25, 150);
            2019-05-04  [Maize].Sow(population: 8.4, cultivar: "FACTS_P1151", depth: 50, rowSpacing: 760);
            2019-10-19  [Maize].Harvest;
            2019-10-19  [Maize].EndCrop;
          Operations 23
            2014-04-20  [SurfaceOrganicMatter].Incorporate(0.25, 150);
            2014-05-11  [Maize].Sow(population: 8, cultivar: "FACTS_P1151", depth: 50, rowSpacing: 760);
            2014-10-11  [Maize].Harvest;
            2014-10-11  [Maize].EndCrop;
            2015-04-20  [SurfaceOrganicMatter].Incorporate(0.25, 150);
            2015-05-15  [Soybean].Sow(population: 25, cultivar: "MG_2", depth: 50, rowSpacing: 760);
            2015-10-06  [Soybean].Harvest;
            2015-10-06  [Soybean].EndCrop;
            2015-11-11  [SurfaceOrganicMatter].Incorporate(0.05, 250);
            2016-05-04  [Fertiliser].Apply(168, Fertiliser.Types.UreaN, 50);
            2016-05-05  [SurfaceOrganicMatter].Incorporate(0.10, 100);
            2016-05-11  [Maize].Sow(population: 8, cultivar: "FACTS_P1151", depth: 50, rowSpacing: 760);
            2016-10-11  [Maize].Harvest;
            2016-10-11  [Maize].EndCrop;
            2016-11-12  [SurfaceOrganicMatter].Incorporate(0.75, 250);
            2017-04-23  [SurfaceOrganicMatter].Incorporate(0.25, 150);
            2017-05-05  [Fertiliser].Apply(336, Fertiliser.Types.UreaN, 50);
            2017-05-12  [Maize].Sow(population: 8.8, cultivar: "FACTS_P1151", depth: 50, rowSpacing: 760);
            2017-10-29  [Maize].Harvest;
            2017-10-29  [Maize].EndCrop;
            2017-11-12  [SurfaceOrganicMatter].Incorporate(0.75, 250);
            2018-04-17  [SurfaceOrganicMatter].Incorporate(0.25, 150);
            2018-05-29  [Soybean].Sow(population: 35, cultivar: "FACTS_P932T16", depth: 50, rowSpacing: 760);
            2018-10-30  [Soybean].Harvest;
            2018-10-30  [Soybean].EndCrop;
            2018-11-12  [SurfaceOrganicMatter].Incorporate(0.05, 250);
            2019-04-30  [Fertiliser].Apply(336, Fertiliser.Types.UreaN, 50);
            2019-05-03  [SurfaceOrganicMatter].Incorporate(0.25, 150);
            2019-05-04  [Maize].Sow(population: 8.4, cultivar: "FACTS_P1151", depth: 50, rowSpacing: 760);
            2019-10-19  [Maize].Harvest;
            2019-10-19  [Maize].EndCrop;
          Operations 24
            2014-04-20  [SurfaceOrganicMatter].Incorporate(0.25, 150);
            2014-05-11  [Maize].Sow(population: 8, cultivar: "FACTS_P1151", depth: 50, rowSpacing: 760);
            2014-10-11  [Maize].Harvest;
            2014-10-11  [Maize].EndCrop;
            2015-04-20  [SurfaceOrganicMatter].Incorporate(0.25, 150);
            2015-05-15  [Soybean].Sow(population: 25, cultivar: "MG_2", depth: 50, rowSpacing: 760);
            2015-10-06  [Soybean].Harvest;
            2015-10-06  [Soybean].EndCrop;
            2015-11-11  [SurfaceOrganicMatter].Incorporate(0.05, 250);
            2016-05-04  [Fertiliser].Apply(168, Fertiliser.Types.UreaN, 50);
            2016-05-05  [SurfaceOrganicMatter].Incorporate(0.10, 100);
            2016-05-11  [Maize].Sow(population: 8, cultivar: "FACTS_P1151", depth: 50, rowSpacing: 760);
            2016-10-11  [Maize].Harvest;
            2016-10-11  [Maize].EndCrop;
            2016-11-12  [SurfaceOrganicMatter].Incorporate(0.75, 250);
            2017-04-17  [SurfaceOrganicMatter].Incorporate(0.25, 150);
            2017-05-09  [Soybean].Sow(population: 25, cultivar: "FACTS_P932T16", depth: 50, rowSpacing: 760);
            2017-10-31  [Soybean].Harvest;
            2017-10-31  [Soybean].EndCrop;
            2017-11-12  [SurfaceOrganicMatter].Incorporate(0.05, 250);
            2018-05-17  [SurfaceOrganicMatter].Incorporate(0.25, 150);
            2018-05-17  [Fertiliser].Apply(168, Fertiliser.Types.UreaN, 50);
            2018-05-18  [Maize].Sow(population: 8.8, cultivar: "FACTS_P1151", depth: 50, rowSpacing: 760);
            2018-10-22  [Maize].Harvest;
            2018-10-22  [Maize].EndCrop;
            2018-11-12  [SurfaceOrganicMatter].Incorporate(0.75, 250);
            2019-04-21  [SurfaceOrganicMatter].Incorporate(0.25, 150);
            2019-05-06  [Soybean].Sow(population: 30, cultivar: "FACTS_P932T16", depth: 50, rowSpacing: 760);
            2019-10-20  [Soybean].Harvest;
            2019-10-20  [Soybean].EndCrop;
            2019-11-09  [SurfaceOrganicMatter].Incorporate(0.05, 250);
          Operations 21b
            2014-04-20  [SurfaceOrganicMatter].Incorporate(0.25, 150);
            2014-05-11  [Maize].Sow(population: 8, cultivar: "FACTS_P1151", depth: 50, rowSpacing: 760);
            2014-10-11  [Maize].Harvest;
            2014-10-11  [Maize].EndCrop;
            2015-04-20  [SurfaceOrganicMatter].Incorporate(0.25, 150);
            2015-05-15  [Soybean].Sow(population: 25, cultivar: "MG_2", depth: 50, rowSpacing: 760);
            2015-10-06  [Soybean].Harvest;
            2015-10-06  [Soybean].EndCrop;
            2015-11-11  [SurfaceOrganicMatter].Incorporate(0.05, 250);
            2016-05-04  [Fertiliser].Apply(168, Fertiliser.Types.UreaN, 50);
            2016-05-05  [SurfaceOrganicMatter].Incorporate(0.10, 100);
            2016-05-11  [Maize].Sow(population: 8, cultivar: "FACTS_P1151", depth: 50, rowSpacing: 760);
            2016-10-11  [Maize].Harvest;
            2016-10-11  [Maize].EndCrop;
            2016-11-12  [SurfaceOrganicMatter].Incorporate(0.75, 250);
            2017-04-17  [SurfaceOrganicMatter].Incorporate(0.25, 150);
            2017-05-09  [Soybean].Sow(population: 25, cultivar: "FACTS_P932T16", depth: 50, rowSpacing: 760);
            2017-10-31  [Soybean].Harvest;
            2017-10-31  [Soybean].EndCrop;
            2017-11-12  [SurfaceOrganicMatter].Incorporate(0.05, 250);
            2018-05-17  [SurfaceOrganicMatter].Incorporate(0.25, 150);
            2018-05-17  [Fertiliser].Apply(0, Fertiliser.Types.UreaN, 50);
            2018-05-18  [Maize].Sow(population: 8.8, cultivar: "FACTS_P1151", depth: 50, rowSpacing: 760);
            2018-10-22  [Maize].Harvest;
            2018-10-22  [Maize].EndCrop;
            2018-11-12  [SurfaceOrganicMatter].Incorporate(0.75, 250);
            2019-04-21  [SurfaceOrganicMatter].Incorporate(0.25, 150);
            2019-05-06  [Soybean].Sow(population: 30, cultivar: "FACTS_P932T16", depth: 50, rowSpacing: 760);
            2019-10-20  [Soybean].Harvest;
            2019-10-20  [Soybean].EndCrop;
            2019-11-09  [SurfaceOrganicMatter].Incorporate(0.05, 250);
          Operations 23b
            2014-04-20  [SurfaceOrganicMatter].Incorporate(0.25, 150);
            2014-05-11  [Maize].Sow(population: 8, cultivar: "FACTS_P1151", depth: 50, rowSpacing: 760);
            2014-10-11  [Maize].Harvest;
            2014-10-11  [Maize].EndCrop;
            2015-04-20  [SurfaceOrganicMatter].Incorporate(0.25, 150);
            2015-05-15  [Soybean].Sow(population: 25, cultivar: "MG_2", depth: 50, rowSpacing: 760);
            2015-10-06  [Soybean].Harvest;
            2015-10-06  [Soybean].EndCrop;
            2015-11-11  [SurfaceOrganicMatter].Incorporate(0.05, 250);
            2016-05-04  [Fertiliser].Apply(168, Fertiliser.Types.UreaN, 50);
            2016-05-05  [SurfaceOrganicMatter].Incorporate(0.10, 100);
            2016-05-11  [Maize].Sow(population: 8, cultivar: "FACTS_P1151", depth: 50, rowSpacing: 760);
            2016-10-11  [Maize].Harvest;
            2016-10-11  [Maize].EndCrop;
            2016-11-12  [SurfaceOrganicMatter].Incorporate(0.75, 250);
            2017-04-17  [SurfaceOrganicMatter].Incorporate(0.25, 150);
            2017-05-09  [Soybean].Sow(population: 25, cultivar: "FACTS_P932T16", depth: 50, rowSpacing: 760);
            2017-10-31  [Soybean].Harvest;
            2017-10-31  [Soybean].EndCrop;
            2017-11-12  [SurfaceOrganicMatter].Incorporate(0.05, 250);
            2018-05-17  [SurfaceOrganicMatter].Incorporate(0.25, 150);
            2018-05-17  [Fertiliser].Apply(336, Fertiliser.Types.UreaN, 50);
            2018-05-18  [Maize].Sow(population: 8.8, cultivar: "FACTS_P1151", depth: 50, rowSpacing: 760);
            2018-10-22  [Maize].Harvest;
            2018-10-22  [Maize].EndCrop;
            2018-11-12  [SurfaceOrganicMatter].Incorporate(0.75, 250);
            2019-04-21  [SurfaceOrganicMatter].Incorporate(0.25, 150);
            2019-05-06  [Soybean].Sow(population: 30, cultivar: "FACTS_P932T16", depth: 50, rowSpacing: 760);
            2019-10-20  [Soybean].Harvest;
            2019-10-20  [Soybean].EndCrop;
            2019-11-09  [SurfaceOrganicMatter].Incorporate(0.05, 250);
      Simulation KanawahaBase
        Clock: Start=2014-01-01; End=2019-12-31
        Summary SummaryFile
        Weather: FileName=Kanawaha.July5.2020.met
        SoilArbitrator Soil Arbitrator
        Zone Field: Area=1; Slope=0; AspectAngle=0; Altitude=50
          Operations
          Report MaizeReport: VariableNames=[Clock].Today; EventNames=[Maize].Harvesting
          Report SoybeanReport: VariableNames=[Clock].Today; EventNames=[Maize].Harvesting
          Fertiliser
          Soil
            Physical
              Thickness  ParticleSizeClay  ParticleSizeSand  ParticleSizeSilt  BD     AirDry  LL15   DUL    SAT    KS
              25         32                30                38                1.2    0.097   0.194  0.319  0.547  409
              25         32                30                38                1.2    0.097   0.194  0.319  0.547  409
              50         32                30                38                1.2    0.097   0.194  0.319  0.547  409
              100        32                30                38                1.2    0.155   0.194  0.319  0.547  409
              100        32                32                36                1.25   0.23    0.23   0.336  0.491  148
              150        32                32                36                1.35   0.23    0.23   0.336  0.491  148
              150        32                32                36                1.35   0.207   0.207  0.324  0.458  106
              150        27                39                34                1.4    0.171   0.171  0.304  0.426  134
              150        27                39                34                1.4    0.171   0.171  0.304  0.426  134
              150        21                44                35                1.598  0.132   0.132  0.276  0.397  205
              150        21                44                35                1.598  0.132   0.132  0.276  0.397  205
              300        21                44                35                1.598  0.132   0.132  0.276  0.397  205
              300        21                44                35                1.6    0.132   0.132  0.276  0.342  23.593
              300        21                44                35                1.6    0.132   0.132  0.276  0.335  16.369
              300        21                44                35                1.6    0.132   0.132  0.276  0.329  11.357
              300        21                44                35                1.6    0.132   0.132  0.276  0.323  7.88
              300        21                44                35                1.6    0.132   0.132  0.276  0.318  5.467
              300        21                44                35                1.6    0.132   0.132  0.276  0.314  3.793
              300        21                44                35                1.6    0.132   0.132  0.276  0.31   2.632
              300        21                44                35                1.6    0.132   0.132  0.276  0.306  1.826
              SoilCrop MaizeSoil
                LL=[0.194, 0.194, 0.194, 0.194, 0.23, 0.258, 0.248, 0.229, 0.238, 0.216, 0.224, 0.236, 0.248, 0.261, 0.264, 0.264, 0.264, 0.264, 0.264, 0.264]
                KL=[0.08, 0.08, 0.08, 0.08, 0.08, 0.08, 0.08, 0.08, 0.08, 0.08, 0.08, 0.04, 0.04, 0.03, 0.02, 0.02, 0.01, 0.01, 0, 0]
                XF=[1, 1, 1, 1, 1, 1, 1, 1, 1, 1, 1, 1, 1, 0.4, 0.4, 0, 0, 0, 0, 0]
              SoilCrop SoybeanSoil: same as Kanawaha.Kanawaha.KanawahaBase.Field.Soil.Physical.MaizeSoil
            WaterBalance SoilWater: SummerDate=1-Nov; SummerU=5; SummerCona=5; WinterDate=1-Apr; WinterU=5; WinterCona=5; DiffusConst=40; DiffusSlope=16; Salb=0.13; CN2Bare=72; CNRed=20; CNCov=0.8; PSIDul=-100
              Thickness=[25, 25, 50, 100, 100, 150, 150, 150, 150, 150, 150, 300, 300, 300, 300, 300, 300, 300, 300, 300, -]
              SWCON=[0.3, 0.3, 0.3, 0.3, 0.3, 0.3, 0.3, 0.3, 0.3, 0.3, 0.3, 0.3, 0.3, 0.3, 0.3, 0.3, 0.3, 0.3, 0.3, 0.3, -]
            Organic: FOMCNRatio=40; CarbonUnits=Total
              Thickness  Carbon  SoilCNRatio  FBiom  FInert  FOM
              25         3.35    12           0.25   0.365   483.114
              25         3.35    12           0.176  0.365   468.836
              50         3.35    12           0.111  0.365   441.533
              100        2.32    12           0.07   0.42    391.605
              100        2.32    12           0.05   0.456   347.322
              150        1.31    12           0.038  0.5     290.108
              150        1.31    12           0.031  0.718   242.318
              150        0.75    12           0.026  0.738   202.401
              150        0.75    12           0.023  0.757   169.06
              150        0.63    12           0.02   0.961   141.211
              150        0.63    12           0.018  0.97    117.949
              300        0.6     12           0.016  0.984   82.29
              300        0.58    12           0.014  0.999   57.412
              300        0.52    12           0.013  0.999   40.055
              300        0.5     12           0.012  0.999   40.055
              300        0.1     12           0.011  0.999   22.191
              300        0.1     12           0.01   0.999   22.191
              300        0.1     12           0.009  0.999   22.191
              300        0.1     12           0.009  0.999   22.191
              300        0.1     12           0.008  0.999   22.191
            Chemical: PHUnits=Water
              Thickness=[25, 25, 50, 100, 100, 150, 150, 150, 150, 150, 150, 300, 300, 300, 300, 300, 300, 300, 300, 300]
              PH=[7.4, 7.4, 7.4, 7.4, 7.4, 7.4, 7.4, 7.4, 7.4, 7.4, 7.4, 7.4, 7.4, 7.4, 7.4, 7.4, 7.4, 7.4, 7.4, 7.4]
            Water: InitialPAWmm=540.95; RelativeTo=LL15; FilledFromTop=false
              Thickness=[25, 25, 50, 100, 100, 150, 150, 150, 150, 150, 150, 300, 300, 300, 300, 300, 300, 300, 300, 300]
              InitialValues=[0.319, 0.319, 0.319, 0.319, 0.336, 0.336, 0.324, 0.304, 0.304, 0.276, 0.276, 0.276, 0.276, 0.276, 0.276, 0.276, 0.276, 0.276, 0.276, 0.276]
            CERESSoilTemperature Temperature
            Nutrient
            Solute NO3: InitialValuesUnits=ppm; WaterTableConcentration=0; D0=0; DepthConstant=0; MaxDepthSoluteAccessible=0; RunoffEffectivenessAtMovingSolute=0; MaxEffectiveRunoff=0
              Thickness=[25, 25, 50, 100, 100, 150, 150, 150, 150, 150, 150, 300, 300, 300, 300, 300, 300, 300, 300, 300]
              InitialValues=[0.96, 1.28, 1.28, 1.76, 2.08, 2.123, 1.877, 1.619, 1.143, 0.75, 0.417, 0.271, 0.167, 0.167, 0.146, 0.146, 0.083, 0.063, 0.042, 0]
            Solute NH4: InitialValuesUnits=ppm; WaterTableConcentration=0; D0=0; DepthConstant=0; MaxDepthSoluteAccessible=0; RunoffEffectivenessAtMovingSolute=0; MaxEffectiveRunoff=0
              Thickness=[25, 25, 50, 100, 100, 150, 150, 150, 150, 150, 150, 300, 300, 300, 300, 300, 300, 300, 300, 300]
              InitialValues=[2.24, 2.56, 2.56, 0.96, 0.64, 0.296, 0.247, 0.143, 0.143, 0, 0, 0, 0.146, 0, 0, 0, 0, 0, 0, 0]
            Solute Urea: InitialValuesUnits=kg/ha; WaterTableConcentration=0; D0=0; DepthConstant=0; MaxDepthSoluteAccessible=0; RunoffEffectivenessAtMovingSolute=0; MaxEffectiveRunoff=0
              Thickness=[25, 25, 50, 100, 100, 150, 150, 150, 150, 150, 150, 300, 300, 300, 300, 300, 300, 300, 300, 300]
              InitialValues=[0, 0, 0, 0, 0, 0, 0, 0, 0, 0, 0, 0, 0, 0, 0, 0, 0, 0, 0, 0]
          SurfaceOrganicMatter: InitialResidueName=soybean; InitialResidueType=soybean; InitialResidueMass=1400; InitialStandingFraction=0; InitialCPR=0; InitialCNR=36.5
          Plant Maize
          Plant Soybean: IsEnding=false; DaysAfterEnding=0
            Folder AgMIP_NE
              Cultivar AG2703
                Command:
                  "Step 1"
                  [Phenology].Vegetative.Target.FixedValue = 405
                  [Phenology].EarlyFlowering.Target.FixedValue = 200
                  [Phenology].EarlyPodDevelopment.Target.FixedValue = 150
                  [Phenology].EarlyGrainFilling.Target.FractionofGrainfilling.FixedValue = 0.35
                  [Phenology].LateGrainFilling.Target.EntireGrainfillPeriod.FixedValue = 420
                  [Phenology].Maturing.Target.FixedValue = 45
                  [Phenology].Ripening.Target.FixedValue = 90
                  [Phenology].VegetativePhotoperiodModifier.XYPairs.X = 13.59, 17.6
                  [Phenology].ReproductivePhotoperiodModifier.XYPairs.X = 13.59, 17.6
                  "Step 2"
                  [Leaf].SpecificArea.XYPairs.Y=0.025,0.025
                  [Stem].SenescenceRate.PostCanopyPhase.Rate.One.FixedValue = 0
                  [Stem].PotentialGrowth.PartitionFraction.StemGrowthPhase.StemFraction.FixedValue = 0.35
                  [Shell].SenescenceRate.ReproductivePhase.Rate.One.FixedValue = 0
                  [Shell].PotentialHarvestIndex.FixedValue = 0.24
                  [Grain].PotentialHarvestIndex.FixedValue = 0.48
              Cultivar P93B09
                Command:
                  "Step 1"
                  [Phenology].Vegetative.Target.FixedValue = 285
                  [Phenology].EarlyFlowering.Target.FixedValue = 200
                  [Phenology].EarlyPodDevelopment.Target.FixedValue = 120
                  [Phenology].EarlyGrainFilling.Target.FractionofGrainfilling.FixedValue = 0.35
                  [Phenology].LateGrainFilling.Target.EntireGrainfillPeriod.FixedValue = 400
                  [Phenology].Maturing.Target.FixedValue = 45
                  [Phenology].Ripening.Target.FixedValue = 60
                  [Phenology].VegetativePhotoperiodModifier.XYPairs.X = 13.59, 17.6
                  [Phenology].ReproductivePhotoperiodModifier.XYPairs.X = 13.59, 17.6
                  "Step 2"
                  [Leaf].SpecificArea.XYPairs.Y=0.026,0.026
                  [Leaf].AreaLargestLeaf.FixedValue = 0.007
                  [Stem].SenescenceRate.PostCanopyPhase.Rate.One.FixedValue = 0
                  [Shell].PotentialHarvestIndex.FixedValue = 0.22
                  [Shell].SenescenceRate.ReproductivePhase.Rate.One.FixedValue = 0
                  [Grain].PotentialHarvestIndex.FixedValue = 0.52
              Cultivar P93M11
                Command:
                  "Step 1"
                  [Phenology].Vegetative.Target.FixedValue = 320
                  [Phenology].EarlyFlowering.Target.FixedValue = 185
                  [Phenology].EarlyPodDevelopment.Target.FixedValue = 170
                  [Phenology].EarlyGrainFilling.Target.FractionofGrainfilling.FixedValue = 0.35
                  [Phenology].LateGrainFilling.Target.EntireGrainfillPeriod.FixedValue = 500
                  [Phenology].Maturing.Target.FixedValue = 45
                  [Phenology].Ripening.Target.FixedValue = 85
                  [Phenology].VegetativePhotoperiodModifier.XYPairs.X = 13.59, 17.6
                  [Phenology].ReproductivePhotoperiodModifier.XYPairs.X = 13.59, 17.6
                  "Step 2"
                  [Leaf].SpecificArea.XYPairs.Y=0.025,0.025
                  [Leaf].AreaLargestLeaf.FixedValue = 0.0055
                  [Stem].PotentialGrowth.PartitionFraction.StemGrowthPhase.StemFraction.FixedValue = 0.30
                  [Stem].SenescenceRate.PostCanopyPhase.Rate.One.FixedValue = 0
                  [Shell].PotentialHarvestIndex.FixedValue = 0.25
                  [Shell].SenescenceRate.ReproductivePhase.Rate.One.FixedValue = 0
                  [Grain].PotentialHarvestIndex.FixedValue = 0.55
              Cultivar P93M43
                Command:
                  "Step 1"
                  [Phenology].Vegetative.Target.FixedValue = 360
                  [Phenology].EarlyFlowering.Target.FixedValue = 120
                  [Phenology].EarlyPodDevelopment.Target.FixedValue = 260
                  [Phenology].EarlyGrainFilling.Target.FractionofGrainfilling.FixedValue = 0.35
                  [Phenology].LateGrainFilling.Target.EntireGrainfillPeriod.FixedValue = 400
                  [Phenology].Maturing.Target.FixedValue = 30
                  [Phenology].Ripening.Target.FixedValue = 90
                  [Phenology].VegetativePhotoperiodModifier.XYPairs.X = 13.59, 17.6
                  [Phenology].ReproductivePhotoperiodModifier.XYPairs.X = 13.59, 17.6
                  "Step 2"
              Cultivar P92Y83
                Command:
                  "Step 1"
                  [Phenology].Vegetative.Target.FixedValue = 300
                  [Phenology].EarlyFlowering.Target.FixedValue = 150
                  [Phenology].EarlyPodDevelopment.Target.FixedValue = 140
                  [Phenology].EarlyGrainFilling.Target.FractionofGrainfilling.FixedValue = 0.35
                  [Phenology].LateGrainFilling.Target.EntireGrainfillPeriod.FixedValue = 480
                  [Phenology].Maturing.Target.FixedValue = 30
                  [Phenology].Ripening.Target.FixedValue = 90
                  [Phenology].VegetativePhotoperiodModifier.XYPairs.X = 13.59, 17.6
                  [Phenology].ReproductivePhotoperiodModifier.XYPairs.X = 13.59, 17.6
                  "Step 2"
                  [Stem].PotentialGrowth.PartitionFraction.StemGrowthPhase.StemFraction.FixedValue = 0.30
                  [Stem].SenescenceRate.PostCanopyPhase.Rate.One.FixedValue = 0
                  [Shell].SenescenceRate.ReproductivePhase.Rate.One.FixedValue = 0
                  [Leaf].SpecificArea.XYPairs.Y=0.027,0.027
                  [Shell].PotentialHarvestIndex.FixedValue = 0.22
                  [Grain].PotentialHarvestIndex.FixedValue = 0.54
            Folder USA
              Cultivar Trial_MG00
                Command:
                  [Phenology].Vegetative.Target.FixedValue = 268
                  [Phenology].EarlyFlowering.Target.FixedValue = 76
                  [Phenology].EarlyGrainFilling.Target.FractionofGrainfilling.FixedValue = 0.05
                  [Phenology].LateGrainFilling.Target.EntireGrainfillPeriod.FixedValue = 432
                  [Phenology].VegetativePhotoperiodModifier.XYPairs.X = 14.43, 21.19
                  [Phenology].ReproductivePhotoperiodModifier.XYPairs.X = 14.43, 21.19
              Cultivar Lambert_MG0
                Command:
                  [Phenology].Vegetative.Target.FixedValue = 294
                  [Phenology].EarlyFlowering.Target.FixedValue = 81
                  [Phenology].EarlyGrainFilling.Target.FractionofGrainfilling.FixedValue = 0.05
                  [Phenology].LateGrainFilling.Target.EntireGrainfillPeriod.FixedValue = 442
                  [Phenology].VegetativePhotoperiodModifier.XYPairs.X = 14.29, 20.14
                  [Phenology].ReproductivePhotoperiodModifier.XYPairs.X = 14.29, 20.14
              Cultivar IA1006_MG10
                Command:
                  [Phenology].Vegetative.Target.FixedValue = 336
                  [Phenology].EarlyFlowering.Target.FixedValue = 118
                  [Phenology].EarlyGrainFilling.Target.FractionofGrainfilling.FixedValue = 0.05
                  [Phenology].LateGrainFilling.Target.EntireGrainfillPeriod.FixedValue = 518
                  [Phenology].VegetativePhotoperiodModifier.XYPairs.X = 14.37, 19.30
                  [Phenology].ReproductivePhotoperiodModifier.XYPairs.X = 14.37, 19.30
              Cultivar IA2008_MG20
                Command:
                  [Phenology].Vegetative.Target.FixedValue = 329
                  [Phenology].EarlyFlowering.Target.FixedValue = 150
                  [Phenology].EarlyGrainFilling.Target.FractionofGrainfilling.FixedValue = 0.05
                  [Phenology].LateGrainFilling.Target.EntireGrainfillPeriod.FixedValue = 580
                  [Phenology].VegetativePhotoperiodModifier.XYPairs.X = 13.92, 17.93
                  [Phenology].ReproductivePhotoperiodModifier.XYPairs.X = 13.92, 17.93
              Cultivar PioneerP22T61_MG22
                Command:
                  [Phenology].Vegetative.Target.FixedValue = 328
                  [Phenology].EarlyFlowering.Target.FixedValue = 106
                  [Phenology].EarlyGrainFilling.Target.FractionofGrainfilling.FixedValue = 0.3
                  [Phenology].LateGrainFilling.Target.EntireGrainfillPeriod.FixedValue = 499
                  [Phenology].VegetativePhotoperiodModifier.XYPairs.X = 13.59, 17.6
                  [Phenology].ReproductivePhotoperiodModifier.XYPairs.X = 13.59, 17.6
              Cultivar PioneerP22T69R_MG22
                Command:
                  [Phenology].Vegetative.Target.FixedValue = 328
                  [Phenology].EarlyFlowering.Target.FixedValue = 106
                  [Phenology].EarlyGrainFilling.Target.FractionofGrainfilling.FixedValue = 0.35
                  [Phenology].LateGrainFilling.Target.EntireGrainfillPeriod.FixedValue = 580
                  [Phenology].VegetativePhotoperiodModifier.XYPairs.X = 13.59, 17.6
                  [Phenology].ReproductivePhotoperiodModifier.XYPairs.X = 13.59, 17.6
              Cultivar Pioneer92MGI_MG26
                Command:
                  [Phenology].Vegetative.Target.FixedValue = 271
                  [Phenology].EarlyFlowering.Target.FixedValue = 120
                  [Phenology].EarlyGrainFilling.Target.FractionofGrainfilling.FixedValue = 0.125
                  [Phenology].LateGrainFilling.Target.EntireGrainfillPeriod.FixedValue = 529
                  [Phenology].VegetativePhotoperiodModifier.XYPairs.X = 13.77, 17.57
                  [Phenology].ReproductivePhotoperiodModifier.XYPairs.X = 13.77, 17.57
              Cultivar PioneerP92Y75_MG27
                Command:
                  [Phenology].Vegetative.Target.FixedValue = 328
                  [Phenology].EarlyFlowering.Target.FixedValue = 106
                  [Phenology].EarlyGrainFilling.Target.FractionofGrainfilling.FixedValue = 0.14
                  [Phenology].LateGrainFilling.Target.EntireGrainfillPeriod.FixedValue = 499
                  [Phenology].VegetativePhotoperiodModifier.XYPairs.X = 13.59, 17.6
                  [Phenology].ReproductivePhotoperiodModifier.XYPairs.X = 13.59, 17.6
              Cultivar Macon_MG30
                Command:
                  [Phenology].Vegetative.Target.FixedValue = 367
                  [Phenology].EarlyFlowering.Target.FixedValue = 163
                  [Phenology].EarlyGrainFilling.Target.FractionofGrainfilling.FixedValue = 0.175
                  [Phenology].LateGrainFilling.Target.EntireGrainfillPeriod.FixedValue = 607
                  [Phenology].VegetativePhotoperiodModifier.XYPairs.X = 14.05, 17.56
                  [Phenology].ReproductivePhotoperiodModifier.XYPairs.X = 14.05, 17.56
              Cultivar PioneerP93M11_MG31
                Command:
                  [Phenology].Vegetative.Target.FixedValue = 250
                  [Phenology].EarlyFlowering.Target.FixedValue = 110
                  [Phenology].EarlyGrainFilling.Target.FractionofGrainfilling.FixedValue = 0.30
                  [Phenology].LateGrainFilling.Target.EntireGrainfillPeriod.FixedValue = 457
                  [Phenology].VegetativePhotoperiodModifier.XYPairs.X = 13.4, 16.0
                  [Phenology].ReproductivePhotoperiodModifier.XYPairs.X = 13.4, 16.0
                  [Grain].MaximumNConc.FixedValue = 0.065
                  [Shell].PotentialHarvestIndex.FixedValue = 0.5
                  [Leaf].AreaLargestLeaf.FixedValue=0.013
              Cultivar Becks321NRR_MG32
                Command:
                  [Phenology].Vegetative.Target.FixedValue = 272
                  [Phenology].EarlyFlowering.Target.FixedValue = 117
                  [Phenology].EarlyGrainFilling.Target.FractionofGrainfilling.FixedValue = 0.20
                  [Phenology].LateGrainFilling.Target.EntireGrainfillPeriod.FixedValue = 522
                  [Phenology].VegetativePhotoperiodModifier.XYPairs.X = 13.45, 18.0
                  [Phenology].ReproductivePhotoperiodModifier.XYPairs.X = 13.45, 18.0
              Cultivar PioneerP932T16R_MG32
                Command:
                  [Phenology].Vegetative.Target.FixedValue = 328
                  [Phenology].EarlyFlowering.Target.FixedValue = 106
                  [Phenology].EarlyGrainFilling.Target.FractionofGrainfilling.FixedValue = 0.40
                  [Phenology].LateGrainFilling.Target.EntireGrainfillPeriod.FixedValue = 499
                  [Phenology].VegetativePhotoperiodModifier.XYPairs.X = 13.59, 17.6
                  [Phenology].ReproductivePhotoperiodModifier.XYPairs.X = 13.59, 17.6
              Cultivar Becks367NRR_MG37
                Command:
                  [Phenology].Vegetative.Target.FixedValue = 267
                  [Phenology].EarlyFlowering.Target.FixedValue = 112
                  [Phenology].EarlyGrainFilling.Target.FractionofGrainfilling.FixedValue = 0.26
                  [Phenology].LateGrainFilling.Target.EntireGrainfillPeriod.FixedValue = 506
                  [Phenology].VegetativePhotoperiodModifier.XYPairs.X = 13.27, 17.2
                  [Phenology].ReproductivePhotoperiodModifier.XYPairs.X = 13.27, 17.2
              Cultivar AsgrowAG4403_MG40
                Command:
                  [Phenology].Vegetative.Target.FixedValue = 292
                  [Phenology].EarlyFlowering.Target.FixedValue = 123
                  [Phenology].EarlyGrainFilling.Target.FractionofGrainfilling.FixedValue = 0.30
                  [Phenology].LateGrainFilling.Target.EntireGrainfillPeriod.FixedValue = 535
                  [Phenology].VegetativePhotoperiodModifier.XYPairs.X = 13.09, 16.49
                  [Phenology].ReproductivePhotoperiodModifier.XYPairs.X = 13.09, 16.49
              Cultivar HornbeckHBK4891_MG40: same as Kanawaha.Kanawaha.KanawahaBase.Field.Soybean.USA.AsgrowAG4403_MG40
              Cultivar Pioneer94B01_MG40
                Command:
                  [Phenology].Vegetative.Target.FixedValue = 322
                  [Phenology].EarlyFlowering.Target.FixedValue = 143
                  [Phenology].EarlyGrainFilling.Target.FractionofGrainfilling.FixedValue = 0.30
                  [Phenology].LateGrainFilling.Target.EntireGrainfillPeriod.FixedValue = 567
                  [Phenology].VegetativePhotoperiodModifier.XYPairs.X = 13.05, 16.46
                  [Phenology].ReproductivePhotoperiodModifier.XYPairs.X = 13.05, 16.46
              Cultivar PioneerP9504_MG50
                Command:
                  [Phenology].Vegetative.Target.FixedValue = 404
                  [Phenology].EarlyFlowering.Target.FixedValue = 112
                  [Phenology].EarlyGrainFilling.Target.FractionofGrainfilling.FixedValue = 0.30
                  [Phenology].LateGrainFilling.Target.EntireGrainfillPeriod.FixedValue = 505
                  [Phenology].VegetativePhotoperiodModifier.XYPairs.X = 12.83, 16.13
                  [Phenology].ReproductivePhotoperiodModifier.XYPairs.X = 12.83, 16.13
              Cultivar AsgrowAG5701_MG50
                Command:
                  [Phenology].Vegetative.Target.FixedValue = 404
                  [Phenology].EarlyFlowering.Target.FixedValue = 131
                  [Phenology].EarlyGrainFilling.Target.FractionofGrainfilling.FixedValue = 0.30
                  [Phenology].LateGrainFilling.Target.EntireGrainfillPeriod.FixedValue = 549
                  [Phenology].VegetativePhotoperiodModifier.XYPairs.X = 12.83, 16.13
                  [Phenology].ReproductivePhotoperiodModifier.XYPairs.X = 12.83, 16.13
              Cultivar Hutcheson_MG50
                Command:
                  [Phenology].Vegetative.Target.FixedValue = 438
                  [Phenology].EarlyFlowering.Target.FixedValue = 112
                  [Phenology].EarlyGrainFilling.Target.FractionofGrainfilling.FixedValue = 0.30
                  [Phenology].LateGrainFilling.Target.EntireGrainfillPeriod.FixedValue = 505
                  [Phenology].VegetativePhotoperiodModifier.XYPairs.X = 12.58, 15.88
                  [Phenology].ReproductivePhotoperiodModifier.XYPairs.X = 12.58, 15.88
              Cultivar NK622_MG60
                Command:
                  [Phenology].Vegetative.Target.FixedValue = 436
                  [Phenology].EarlyFlowering.Target.FixedValue = 93
                  [Phenology].EarlyGrainFilling.Target.FractionofGrainfilling.FixedValue = 0.30
                  [Phenology].LateGrainFilling.Target.EntireGrainfillPeriod.FixedValue = 467
                  [Phenology].VegetativePhotoperiodModifier.XYPairs.X = 12.39, 15.61
                  [Phenology].ReproductivePhotoperiodModifier.XYPairs.X = 12.39, 15.61
            Folder Australia
              Cultivar Buchanan
                Command:
                  [Phenology].Vegetative.Target.FixedValue = 480
                  [Phenology].EarlyFlowering.Target.FixedValue = 100
                  [Phenology].EarlyGrainFilling.Target.FractionofGrainfilling.FixedValue = 0.015
                  [Phenology].LateGrainFilling.Target.EntireGrainfillPeriod.FixedValue = 467
                  [Phenology].VegetativePhotoperiodModifier.XYPairs.X = 12.39, 15.61
                  [Phenology].ReproductivePhotoperiodModifier.XYPairs.X = 12.39, 15.61
                  [Phenology].MidGrainFilling.Target.FractionofMidToLateGrainfilling.FixedValue=0.33
                  [Grain].MaximumNConc.FixedValue = 0.067
                  [Stem].PotentialGrowth.PartitionFraction.StemGrowthPhase.StemFraction.FixedValue = 0.5
                  [Leaf].AreaLargestLeaf.FixedValue=0.009
              Cultivar Djakal
                Command:
                  [Phenology].Vegetative.Target.FixedValue = 380
                  [Phenology].EarlyFlowering.Target.FixedValue = 100
                  [Phenology].EarlyGrainFilling.Target.FractionofGrainfilling.FixedValue = 0.05
                  [Phenology].LateGrainFilling.Target.EntireGrainfillPeriod.FixedValue = 405
                  [Phenology].VegetativePhotoperiodModifier.XYPairs.X = 13.75, 17
                  [Phenology].ReproductivePhotoperiodModifier.XYPairs.X = 11.9, 15.5
                  [Leaf].AreaLargestLeaf.FixedValue=0.009
              Cultivar Davis
                Command:
                  [Phenology].Vegetative.Target.FixedValue = 480
                  [Phenology].EarlyFlowering.Target.FixedValue = 100
                  [Phenology].EarlyGrainFilling.Target.FractionofGrainfilling.FixedValue = 0.015
                  [Phenology].LateGrainFilling.Target.EntireGrainfillPeriod.FixedValue = 467
                  [Phenology].VegetativePhotoperiodModifier.XYPairs.X = 12.39, 15.61
                  [Phenology].ReproductivePhotoperiodModifier.XYPairs.X = 12.39, 15.61
                  [Phenology].MidGrainFilling.Target.FractionofMidToLateGrainfilling.FixedValue=0.33
                  [Grain].MaximumNConc.FixedValue = 0.067
                  [Stem].PotentialGrowth.PartitionFraction.StemGrowthPhase.StemFraction.FixedValue = 0.5
                  [Leaf].AreaLargestLeaf.FixedValue=0.012
              Cultivar Hooper_MG40
                Command:
                  [Phenology].Vegetative.Target.FixedValue = 380
                  [Phenology].EarlyFlowering.Target.FixedValue = 80
                  [Phenology].EarlyGrainFilling.Target.FractionofGrainfilling.FixedValue = 0.05
                  [Phenology].LateGrainFilling.Target.EntireGrainfillPeriod.FixedValue = 440
                  [Phenology].VegetativePhotoperiodModifier.XYPairs.X = 13.26, 16.67
                  [Phenology].ReproductivePhotoperiodModifier.XYPairs.X = 13.26, 16.67
                  [Leaf].AreaLargestLeaf.FixedValue=0.009
              Cultivar Stephens_MG40
                Command:
                  [Phenology].Vegetative.Target.FixedValue = 360
                  [Phenology].EarlyFlowering.Target.FixedValue = 80
                  [Phenology].EarlyGrainFilling.Target.FractionofGrainfilling.FixedValue = 0.05
                  [Phenology].LateGrainFilling.Target.EntireGrainfillPeriod.FixedValue = 440
                  [Phenology].VegetativePhotoperiodModifier.XYPairs.X = 13.26, 16.67
                  [Phenology].ReproductivePhotoperiodModifier.XYPairs.X = 13.26, 16.67
                  [Leaf].AreaLargestLeaf.FixedValue=0.009
              Cultivar FiskebyV
                Command:
                  [Phenology].Vegetative.Target.FixedValue = 285
                  [Phenology].EarlyFlowering.Target.FixedValue = 80
                  [Phenology].EarlyGrainFilling.Target.FractionofGrainfilling.FixedValue = 0.05
                  [Phenology].LateGrainFilling.Target.EntireGrainfillPeriod.FixedValue = 405
                  [Phenology].VegetativePhotoperiodModifier.XYPairs.X = 13.75, 18
                  [Phenology].ReproductivePhotoperiodModifier.XYPairs.X = 13.75, 18
                Memo
                  Early-maturing, photoperiod-insensitive cultivar developed in Sweden for high latitude environments
              Cultivar F148_7
                Command:
                  [Phenology].Vegetative.Target.FixedValue = 314
                  [Phenology].EarlyFlowering.Target.FixedValue = 80
                  [Phenology].EarlyGrainFilling.Target.FractionofGrainfilling.FixedValue = 0.05
                  [Phenology].LateGrainFilling.Target.EntireGrainfillPeriod.FixedValue = 485
                  [Phenology].VegetativePhotoperiodModifier.XYPairs.X = 13.75, 17
                  [Phenology].ReproductivePhotoperiodModifier.XYPairs.X = 12, 18
                  [Leaf].AreaLargestLeaf.FixedValue=0.009
                Memo
                  Indeterminate breeding selection from the national soybean breeding program combining phytophthora resistance, earliness,
                  culinary quality, and yield
              Cultivar Bowyer
                Command:
                  [Phenology].Vegetative.Target.FixedValue = 377
                  [Phenology].EarlyFlowering.Target.FixedValue = 80
                  [Phenology].EarlyGrainFilling.Target.FractionofGrainfilling.FixedValue = 0.05
                  [Phenology].LateGrainFilling.Target.EntireGrainfillPeriod.FixedValue = 405
                  [Phenology].VegetativePhotoperiodModifier.XYPairs.X = 13.75, 15.5
                  [Phenology].ReproductivePhotoperiodModifier.XYPairs.X = 11.9, 15.5
                Memo
                  Brown hilum cultivar, adapted to southern New South Wales, released by K McWhirter in 1982
              Cultivar Bunya
                Command:
                  [Phenology].Vegetative.Target.FixedValue = 550
                  [Phenology].EarlyFlowering.Target.FixedValue = 80
                  [Phenology].EarlyGrainFilling.Target.FractionofGrainfilling.FixedValue = 0.05
                  [Phenology].LateGrainFilling.Target.EntireGrainfillPeriod.FixedValue = 405
                  [Phenology].VegetativePhotoperiodModifier.XYPairs.X = 13.75, 18
                  [Phenology].ReproductivePhotoperiodModifier.XYPairs.X = 10.9, 15.5
                  [Leaf].AreaLargestLeaf.FixedValue=0.009
                Memo
                  Culinary cultivar released in 2006 by CSIRO with broad adaptation from northern New South Wales to northern Queensland
              Cultivar Cowrie
                Command:
                  [Phenology].Vegetative.Target.FixedValue = 390
                  [Phenology].EarlyFlowering.Target.FixedValue = 80
                  [Phenology].EarlyGrainFilling.Target.FractionofGrainfilling.FixedValue = 0.05
                  [Phenology].LateGrainFilling.Target.EntireGrainfillPeriod.FixedValue = 425
                  [Phenology].VegetativePhotoperiodModifier.XYPairs.X = 12.75, 16
                  [Phenology].ReproductivePhotoperiodModifier.XYPairs.X = 12.75, 16
                  [Leaf].AreaLargestLeaf.FixedValue=0.009
                Memo
                  Light hilum cultivar released by theNewSouth Wales Department of Agriculture for the coastal Northern Rivers District inNewSouth Wales
              Cultivar Soya791
                Command:
                  [Phenology].Vegetative.Target.FixedValue = 430
                  [Phenology].EarlyFlowering.Target.FixedValue = 80
                  [Phenology].EarlyGrainFilling.Target.FractionofGrainfilling.FixedValue = 0.05
                  [Phenology].LateGrainFilling.Target.EntireGrainfillPeriod.FixedValue = 425
                  [Phenology].VegetativePhotoperiodModifier.XYPairs.X = 12.75, 15.3
                  [Phenology].ReproductivePhotoperiodModifier.XYPairs.X = 12.75, 15.3
                  [Leaf].AreaLargestLeaf.FixedValue=0.009
              Cultivar Manark
                Command:
                  [Phenology].Vegetative.Target.FixedValue = 440
                  [Phenology].EarlyFlowering.Target.FixedValue = 80
                  [Phenology].EarlyGrainFilling.Target.FractionofGrainfilling.FixedValue = 0.05
                  [Phenology].LateGrainFilling.Target.EntireGrainfillPeriod.FixedValue = 425
                  [Phenology].VegetativePhotoperiodModifier.XYPairs.X = 12.75, 15
                  [Phenology].ReproductivePhotoperiodModifier.XYPairs.X = 12.75, 15
                  [Leaf].AreaLargestLeaf.FixedValue=0.009
              Cultivar Warrigal
                Command:
                  [Phenology].Vegetative.Target.FixedValue = 490
                  [Phenology].EarlyFlowering.Target.FixedValue = 80
                  [Phenology].EarlyGrainFilling.Target.FractionofGrainfilling.FixedValue = 0.05
                  [Phenology].LateGrainFilling.Target.EntireGrainfillPeriod.FixedValue = 425
                  [Phenology].VegetativePhotoperiodModifier.XYPairs.X = 12.75, 15
                  [Phenology].ReproductivePhotoperiodModifier.XYPairs.X = 12.75, 15
                  [Leaf].AreaLargestLeaf.FixedValue=0.009
              Cultivar Leichhardt
                Command:
                  [Phenology].Vegetative.Target.FixedValue = 806
                  [Phenology].EarlyFlowering.Target.FixedValue = 80
                  [Phenology].EarlyGrainFilling.Target.FractionofGrainfilling.FixedValue = 0.05
                  [Phenology].LateGrainFilling.Target.EntireGrainfillPeriod.FixedValue = 425
                  [Phenology].VegetativePhotoperiodModifier.XYPairs.X = 12.75, 14.7
                  [Phenology].ReproductivePhotoperiodModifier.XYPairs.X = 12.75, 14.7
                  [Leaf].AreaLargestLeaf.FixedValue=0.009
              Cultivar Djakal1
                Command:
                  [Phenology].Vegetative.Target.FixedValue = 332
                  [Phenology].EarlyFlowering.Target.FixedValue = 80
                  [Phenology].EarlyGrainFilling.Target.FractionofGrainfilling.FixedValue = 0.05
                  [Phenology].LateGrainFilling.Target.EntireGrainfillPeriod.FixedValue = 440
                  [Phenology].VegetativePhotoperiodModifier.XYPairs.X = 13.26, 16.67
                  [Phenology].ReproductivePhotoperiodModifier.XYPairs.X = 13.26, 16.67
                  [Leaf].AreaLargestLeaf.FixedValue=0.009
            Folder Generic
              Cultivar Generic_MG000
                Command:
                  [Phenology].Vegetative.Target.FixedValue = 310
                  [Phenology].EarlyFlowering.Target.FixedValue = 100
                  [Phenology].EarlyGrainFilling.Target.FractionofGrainfilling.FixedValue = 0.475
                  [Phenology].LateGrainFilling.Target.EntireGrainfillPeriod.FixedValue = 590
                  [Phenology].VegetativePhotoperiodModifier.XYPairs.X = 14.6, 22.35
                  [Phenology].ReproductivePhotoperiodModifier.XYPairs.X = 14.6, 22.35
              Cultivar Generic_MG00
                Command:
                  [Phenology].Vegetative.Target.FixedValue = 320
                  [Phenology].EarlyFlowering.Target.FixedValue = 100
                  [Phenology].EarlyGrainFilling.Target.FractionofGrainfilling.FixedValue = 0.467
                  [Phenology].LateGrainFilling.Target.EntireGrainfillPeriod.FixedValue = 600
                  [Phenology].VegetativePhotoperiodModifier.XYPairs.X = 14.35, 21.11
                  [Phenology].ReproductivePhotoperiodModifier.XYPairs.X = 14.35, 21.11
              Cultivar Generic_MG0
                Command:
                  [Phenology].Vegetative.Target.FixedValue = 336
                  [Phenology].EarlyFlowering.Target.FixedValue = 120
                  [Phenology].EarlyGrainFilling.Target.FractionofGrainfilling.FixedValue = 0.422
                  [Phenology].LateGrainFilling.Target.EntireGrainfillPeriod.FixedValue = 616
                  [Phenology].VegetativePhotoperiodModifier.XYPairs.X = 14.1, 19.95
                  [Phenology].ReproductivePhotoperiodModifier.XYPairs.X = 14.1, 19.95
              Cultivar Generic_MG1
                Command:
                  [Phenology].Vegetative.Target.FixedValue = 340
                  [Phenology].EarlyFlowering.Target.FixedValue = 120
                  [Phenology].EarlyGrainFilling.Target.FractionofGrainfilling.FixedValue = 0.411
                  [Phenology].LateGrainFilling.Target.EntireGrainfillPeriod.FixedValue = 632
                  [Phenology].VegetativePhotoperiodModifier.XYPairs.X = 13.84, 18.77
                  [Phenology].ReproductivePhotoperiodModifier.XYPairs.X = 13.84, 18.77
              Cultivar Generic_MG2
                Command:
                  [Phenology].Vegetative.Target.FixedValue = 348
                  [Phenology].EarlyFlowering.Target.FixedValue = 120
                  [Phenology].EarlyGrainFilling.Target.FractionofGrainfilling.FixedValue = 0.386
                  [Phenology].LateGrainFilling.Target.EntireGrainfillPeriod.FixedValue = 648
                  [Phenology].VegetativePhotoperiodModifier.XYPairs.X = 13.59, 17.61
                  [Phenology].ReproductivePhotoperiodModifier.XYPairs.X = 13.59, 17.61
              Cultivar Generic_MG3
                Command:
                  [Phenology].Vegetative.Target.FixedValue = 380
                  [Phenology].EarlyFlowering.Target.FixedValue = 120
                  [Phenology].EarlyGrainFilling.Target.FractionofGrainfilling.FixedValue = 0.361
                  [Phenology].LateGrainFilling.Target.EntireGrainfillPeriod.FixedValue = 664
                  [Phenology].VegetativePhotoperiodModifier.XYPairs.X = 13.4, 16.91
                  [Phenology].ReproductivePhotoperiodModifier.XYPairs.X = 13.4, 16.91
              Cultivar Generic_MG4
                Command:
                  [Phenology].Vegetative.Target.FixedValue = 388
                  [Phenology].EarlyFlowering.Target.FixedValue = 140
                  [Phenology].EarlyGrainFilling.Target.FractionofGrainfilling.FixedValue = 0.324
                  [Phenology].LateGrainFilling.Target.EntireGrainfillPeriod.FixedValue = 664
                  [Phenology].VegetativePhotoperiodModifier.XYPairs.X = 13.1, 16.49
                  [Phenology].ReproductivePhotoperiodModifier.XYPairs.X = 13.1, 16.49
              Cultivar Generic_MG5
                Command:
                  [Phenology].Vegetative.Target.FixedValue = 396
                  [Phenology].EarlyFlowering.Target.FixedValue = 160
                  [Phenology].EarlyGrainFilling.Target.FractionofGrainfilling.FixedValue = 0.072
                  [Phenology].LateGrainFilling.Target.EntireGrainfillPeriod.FixedValue = 696
                  [Phenology].VegetativePhotoperiodModifier.XYPairs.X = 12.83, 16.13
                  [Phenology].ReproductivePhotoperiodModifier.XYPairs.X = 12.83, 16.13
              Cultivar Generic_MG6
                Command:
                  [Phenology].Vegetative.Target.FixedValue = 404
                  [Phenology].EarlyFlowering.Target.FixedValue = 180
                  [Phenology].EarlyGrainFilling.Target.FractionofGrainfilling.FixedValue = 0.056
                  [Phenology].LateGrainFilling.Target.EntireGrainfillPeriod.FixedValue = 712
                  [Phenology].VegetativePhotoperiodModifier.XYPairs.X = 12.58, 15.8
                  [Phenology].ReproductivePhotoperiodModifier.XYPairs.X = 12.58, 15.8
              Cultivar Generic_MG7
                Command:
                  [Phenology].Vegetative.Target.FixedValue = 416
                  [Phenology].EarlyFlowering.Target.FixedValue = 200
                  [Phenology].EarlyGrainFilling.Target.FractionofGrainfilling.FixedValue = 0.055
                  [Phenology].LateGrainFilling.Target.EntireGrainfillPeriod.FixedValue = 728
                  [Phenology].VegetativePhotoperiodModifier.XYPairs.X = 12.33, 15.46
                  [Phenology].ReproductivePhotoperiodModifier.XYPairs.X = 12.33, 15.46
              Cultivar Generic_MG8
                Command:
                  [Phenology].Vegetative.Target.FixedValue = 430
                  [Phenology].EarlyFlowering.Target.FixedValue = 200
                  [Phenology].EarlyGrainFilling.Target.FractionofGrainfilling.FixedValue = 0.054
                  [Phenology].LateGrainFilling.Target.EntireGrainfillPeriod.FixedValue = 744
                  [Phenology].VegetativePhotoperiodModifier.XYPairs.X = 12.07, 15.1
                  [Phenology].ReproductivePhotoperiodModifier.XYPairs.X = 12.07, 15.1
              Cultivar Generic_MG9
                Command:
                  [Phenology].Vegetative.Target.FixedValue = 460
                  [Phenology].EarlyFlowering.Target.FixedValue = 200
                  [Phenology].EarlyGrainFilling.Target.FractionofGrainfilling.FixedValue = 0.053
                  [Phenology].LateGrainFilling.Target.EntireGrainfillPeriod.FixedValue = 748
                  [Phenology].VegetativePhotoperiodModifier.XYPairs.X = 11.88, 14.82
                  [Phenology].ReproductivePhotoperiodModifier.XYPairs.X = 11.88, 14.82
              Cultivar Generic_MG10
                Command:
                  [Phenology].Vegetative.Target.FixedValue = 470
                  [Phenology].EarlyFlowering.Target.FixedValue = 200
                  [Phenology].EarlyGrainFilling.Target.FractionofGrainfilling.FixedValue = 0.053
                  [Phenology].LateGrainFilling.Target.EntireGrainfillPeriod.FixedValue = 748
                  [Phenology].VegetativePhotoperiodModifier.XYPairs.X = 11.78, 14.65
                  [Phenology].ReproductivePhotoperiodModifier.XYPairs.X = 11.78, 14.65
            OrganArbitrator Arbitrator
              BiomassTypeArbitrator DMArbitration
                Folder PotentialPartitioningMethods
                  ReallocationMethod
                  AllocateFixationMethod
                  RetranslocationMethod
                  SendPotentialDMAllocationsMethod
                Folder AllocationMethods
                  NutrientConstrainedAllocationMethod
                  DryMatterAllocationsMethod
                RelativeAllocation ArbitrationMethod
              BiomassTypeArbitrator NArbitration
                Folder PotentialPartitioningMethods
                  ReallocationMethod
                Folder ActualPartitioningMethods
                  AllocateFixationMethod
                  RetranslocationMethod
                Folder AllocationMethods
                  NitrogenAllocationsMethod
                RelativeAllocation ArbitrationMethod
                AllocateUptakesMethod
              WaterUptakeMethod
              NitrogenUptakeMethod
            Phenology
              Memo Introduction
                In the new model we simplified phenology by taking out stages that are not measurable (e.g. end of juvenile stage) and by adding new stages that are measurable (e.g. start pod).
                The new phenology follows the V/R staging system
              SubDailyInterpolation VegetativeThermalTime: agregationMethod=0
                XYPairs Response: X=[10, 20, 30, 40]; Y=[0, 10, 20, 0]
                ThreeHourAirTemperature InterpolationMethod
              LinearInterpolationFunction VegetativePhotoperiodModifier
                XYPairs: X=[14.43, 21.19]; Y=[1, 0]
                Memo
                  These parameters are overridden by cultivar parameter descriptions to capture the difference between individual cultivars in terms of their phenological development.  Responses shown here are only indicative.  See cultivar descriptions for more information.
                VariableReference XValue: VariableName=[Phenology].Photoperiod
              SubDailyInterpolation ReproductiveThermalTime: agregationMethod=0
                XYPairs Response: X=[10, 15, 30, 40]; Y=[5, 5, 20, 0]
                ThreeHourAirTemperature InterpolationMethod
              LinearInterpolationFunction ReproductivePhotoperiodModifier: same as Kanawaha.Kanawaha.KanawahaBase.Field.Soybean.Phenology.VegetativePhotoperiodModifier
              PhaseLookup ThermalTime
                PhaseLookupValue PreEmergence: Start=Sowing; End=Emergence
                  VariableReference Base: VariableName=[Phenology].VegetativeThermalTime
                PhaseLookupValue VegetativeGrowth: Start=Emergence; End=EndCanopyDevelopment
                  MultiplyFunction TT
                    VariableReference Base: VariableName=[Phenology].VegetativeThermalTime
                    VariableReference PPModifier: VariableName=[Phenology].VegetativePhotoperiodModifier
                PhaseLookupValue ReproductiveGrowth: Start=EndCanopyDevelopment; End=HarvestRipe
                  MultiplyFunction TT
                    VariableReference Base: VariableName=[Phenology].ReproductiveThermalTime
                    VariableReference PPModifier: VariableName=[Phenology].ReproductivePhotoperiodModifier
              PhotoperiodFunction Photoperiod: Twilight=0; DayLength=0
              GerminatingPhase Germinating: Start=Sowing; End=Germination
              EmergingPhase Emerging: Start=Germination; End=Emergence; TTForTimeStep=0
                VariableReference ThermalTime: VariableName=[Phenology].VegetativeThermalTime
                AddFunction Target
                  Constant ShootLag: FixedValue=10
                  MultiplyFunction DepthxRate
                    VariableReference SowingDepth: VariableName=[Plant].SowingData.Depth
                    Constant ShootRate: FixedValue=1
              GenericPhase Vegetative: Start=Emergence; End=StartFlowering
                Constant Target: FixedValue=200
                VariableReference Progression: VariableName=[Phenology].ThermalTime
              GenericPhase EarlyFlowering: Start=StartFlowering; End=StartPodDevelopment
                Memo
                  The duration of the grain filling phase has been taken from the model of Robertson et al (2002).
                Constant Target: FixedValue=200
                VariableReference Progression: VariableName=[Phenology].ThermalTime
              GenericPhase EarlyPodDevelopment: Start=StartPodDevelopment; End=StartGrainFilling
                Memo
                  The duration of the grain filling phase has been taken from the model of Robertson et al (2002).
                Constant Target: FixedValue=140
                VariableReference Progression: VariableName=[Phenology].ThermalTime
              GenericPhase EarlyGrainFilling: Start=StartGrainFilling; End=EndCanopyDevelopment
                MultiplyFunction Target
                  Constant FractionofGrainfilling: FixedValue=0.05
                  VariableReference EntireGrainfilling
                    VariableName=[Phenology].LateGrainFilling.Target.EntireGrainfillPeriod.FixedValue
                VariableReference Progression: VariableName=[Phenology].ThermalTime
              GenericPhase MidGrainFilling: Start=EndCanopyDevelopment; End=EndPodDevelopment
                MultiplyFunction Target
                  Constant FractionofMidToLateGrainfilling: FixedValue=0.5
                  SubtractFunction MidToLateGrainfilling
                    VariableReference EntireGrainfilling
                      VariableName=[Phenology].LateGrainFilling.Target.EntireGrainfillPeriod.FixedValue
                    VariableReference EarlyGrainfilling: VariableName=[Phenology].EarlyGrainFilling.Target
                VariableReference Progression: VariableName=[Phenology].ThermalTime
              GenericPhase LateGrainFilling: Start=EndPodDevelopment; End=EndGrainFill
                SubtractFunction Target
                  Constant EntireGrainfillPeriod: FixedValue=500
                  VariableReference EarlyGrainFillingTarget: VariableName=[Phenology].EarlyGrainFilling.Target
                  VariableReference MidGrainFillingTarget: VariableName=[Phenology].MidGrainFilling.Target
                VariableReference Progression: VariableName=[Phenology].ThermalTime
              GenericPhase Maturing: Start=EndGrainFill; End=Maturity
                Constant Target: FixedValue=45
                VariableReference Progression: VariableName=[Phenology].ThermalTime
              GenericPhase Ripening: Start=Maturity; End=HarvestRipe
                Constant Target: FixedValue=45
                VariableReference Progression: VariableName=[Phenology].ThermalTime
              EndPhase ReadyForHarvesting: Start=HarvestRipe; End=Unused
                VariableReference ThermalTime: VariableName=[Phenology].ThermalTime
              OnEventFunction EmergenceDAS: SetEvent=Emergence; ReSetEvent=never
                Memo
                  A function is used to provide maturity date as days after sowing(DAS).
                Constant PreEventValue: FixedValue=0
                VariableReference PostEventValue: VariableName=[Plant].DaysAfterSowing
              OnEventFunction FloweringDAS: SetEvent=StartFlowering; ReSetEvent=never
                Memo
                  A function is used to provide flowering date as days after sowing(DAS).
                Constant PreEventValue: FixedValue=0
                VariableReference PostEventValue: VariableName=[Plant].DaysAfterSowing
              OnEventFunction MaturityDAS: SetEvent=Maturity; ReSetEvent=never
                Memo
                  A function is used to provide maturity date as days after sowing(DAS).
                Constant PreEventValue: FixedValue=0
                VariableReference PostEventValue: VariableName=[Plant].DaysAfterSowing
            SimpleLeaf Leaf: Albedo=0.25; Gsmax350=0.015; R50=150; LeafInitialisationStage=Emergence; Height=0; BaseHeight=0; Width=0; FRGR=0; PotentialEP=0; WaterDemand=0; KDead=0.2; LAIDead=0
              Memo Description
                Stover represents any part of the crop that is not removed at harvest (i.e not part of the product).
              RUEModel Photosynthesis
                Constant RUE: FixedValue=1.2
                WeightedTemperatureFunction FT: MaximumTemperatureWeighting=0.5
                  XYPairs: X=[10, 20, 30, 40]; Y=[0, 1, 1, 0]
                LinearInterpolationFunction FVPD
                  XYPairs: X=[0, 10, 50]; Y=[1, 1, 1]
                  VariableReference XValue: VariableName=[Leaf].Photosynthesis.VPD
                LinearInterpolationFunction FN
                  XYPairs: X=[0, 1, 1.5]; Y=[0, 1, 1]
                  VariableReference XValue: VariableName=[Leaf].Fn
                LinearInterpolationFunction FW
                  XYPairs: X=[0, 0.4]; Y=[0, 1]
                  VariableReference XValue: VariableName=[Leaf].Fw
                RUECO2Function FCO2: PhotosyntheticPathway=C3
                VariableReference RadnInt: VariableName=[Leaf].RadiationIntercepted
              ExpressionFunction CO2internal: Expression=(163 - [IWeather].MeanT)/(5 - 0.1*[IWeather].MeanT)
              DivideFunction StomatalConductanceCO2Modifier
                VariableReference FCO2: VariableName=[Leaf].Photosynthesis.FCO2
                ExpressionFunction RelativeCO2Gradient
                  Expression=([IWeather].CO2 - [Leaf].CO2internal)/(350 - [Leaf].CO2internal)
              MultiplyFunction Area
                VariableReference SLA: VariableName=[Leaf].SpecificArea
                VariableReference LeafLiveWt: VariableName=[Leaf].Live.Wt
              MinimumFunction FRGR
                VariableReference RUE_FT: VariableName=[Leaf].Photosynthesis.FT
                MinimumFunction Others
                  VariableReference RUE_FN: VariableName=[Leaf].Photosynthesis.FN
                  VariableReference RUE_FVPD: VariableName=[Leaf].Photosynthesis.FVPD
              LinearInterpolationFunction ExtinctionCoefficient
                XYPairs: X=[200, 1000]; Y=[0.6, 0.4]
                VariableReference XValue: VariableName=[Soybean].SowingData.RowSpacing
              LinearInterpolationFunction Tallness
                XYPairs: X=[1, 2, 3, 4, 5, 6, 9]; Y=[0, 0, 50, 400, 700, 900, 1000]
                VariableReference XValue: VariableName=[Phenology].Stage
              AccumulateFunction NodeNumber: StartStageName=Emergence; EndStageName=EndCanopyDevelopment; FractionRemovedOnCut=1; FractionRemovedOnHarvest=1; FractionRemovedOnGraze=1; FractionRemovedOnPrune=0
                DivideFunction DeltaNode
                  VariableReference ThermalTime: VariableName=[Phenology].VegetativeThermalTime
                  VariableReference Phyllochron: VariableName=[Leaf].Phyllochron
              Constant NReallocationFactor: FixedValue=1
                Memo
                  This model assumes that all metabolic and storage N is available for reallocation from senescing leaves.
              PhaseLookup SenescenceRate
                PhaseLookupValue Vegetative: Start=Emergence; End=EndCanopyDevelopment
                  Constant Rate: FixedValue=0
                PhaseLookupValue Reproductive: Start=EndCanopyDevelopment; End=Maturity
                  Memo
                    Leaf senescence rate is calculated to ensure that all leaves are senesced by crop maturity.
                  DivideFunction Rate
                    VariableReference TT: VariableName=[Phenology].ThermalTime
                    SubtractFunction TTRemaining
                      ExpressionFunction TTRequired
                        Expression=[Phenology].MidGrainFilling.Target + [Phenology].LateGrainFilling.Target + [Phenology].Maturing.Target
                      ExpressionFunction TTComplete
                        Expression=[Phenology].MidGrainFilling.ProgressThroughPhase + [Phenology].LateGrainFilling.ProgressThroughPhase + [Phenology].Maturing.ProgressThroughPhase
              Constant DetachmentRate: FixedValue=0.05; Units=/d
              Constant InitialWt: FixedValue=1
              MultiplyFunction LAIDead
                VariableReference SLA: VariableName=[Leaf].SpecificArea
                VariableReference LeafDeadWt: VariableName=[Leaf].Dead.Wt
              LinearInterpolationFunction MaximumNConc
                XYPairs: X=[3, 4, 9]; Y=[0.06, 0.05, 0.03]
                VariableReference XValue: VariableName=[Phenology].Stage
              LinearInterpolationFunction CriticalNConc
                XYPairs: X=[3, 4, 9]; Y=[0.06, 0.05, 0.03]
                VariableReference XValue: VariableName=[Phenology].Stage
              Constant MinimumNConc: FixedValue=0.02
              Constant MaintenanceRespiration: FixedValue=0; Units=0-1
              Constant DMConversionEfficiency: FixedValue=1; Units=0-1
              BiomassRemoval BiomassRemovalDefaults
                OrganBiomassRemovalType Harvest: FractionLiveToRemove=0; FractionDeadToRemove=0; FractionLiveToResidue=1; FractionDeadToResidue=1
                OrganBiomassRemovalType Cut: FractionLiveToRemove=0; FractionDeadToRemove=0; FractionLiveToResidue=1; FractionDeadToResidue=1
                OrganBiomassRemovalType Prune: FractionLiveToRemove=0; FractionDeadToRemove=0; FractionLiveToResidue=0; FractionDeadToResidue=0
                OrganBiomassRemovalType Graze: FractionLiveToRemove=0; FractionDeadToRemove=0; FractionLiveToResidue=0; FractionDeadToResidue=0
              Constant NRetranslocationFactor: FixedValue=0.5
              Constant DMReallocationFactor: FixedValue=0
              Constant DMRetranslocationFactor: FixedValue=0.5
              Constant RemobilisationCost: FixedValue=0
              Constant CarbonConcentration: FixedValue=0.4
              NutrientDemandFunctions DMDemands
                DivideFunction Structural
                  VariableReference DeltaLAI: VariableName=[Leaf].DeltaLAI
                  VariableReference SLA: VariableName=[Leaf].SpecificArea
                  Memo
                    Growth in leaf area is used to calculate the leaf dry matter demand.  Note that leaf biomass is assumed to consist of entirely structural dry matter.
                Constant Storage: FixedValue=0
                Constant Metabolic: FixedValue=0
                Constant QStructuralPriority: FixedValue=1
                Constant QMetabolicPriority: FixedValue=1
                Constant QStoragePriority: FixedValue=1
              NutrientDemandFunctions NDemands
                MultiplyFunction Structural
                  VariableReference MinNconc: VariableName=[Leaf].minimumNconc
                  VariableReference PotentialDMAllocation: VariableName=[Leaf].potentialDMAllocation.Structural
                MultiplyFunction Metabolic
                  SubtractFunction MetabolicNconc
                    VariableReference CritNconc: VariableName=[Leaf].criticalNConc
                    VariableReference MinNconc: VariableName=[Leaf].minimumNconc
                  VariableReference PotentialDMAllocation: VariableName=[Leaf].potentialDMAllocation.Structural
                StorageNDemandFunction Storage
                  Constant NitrogenDemandSwitch: FixedValue=1
                  VariableReference MaxNconc: VariableName=[Leaf].maximumNconc
                Constant QStructuralPriority: FixedValue=1
                Constant QMetabolicPriority: FixedValue=1
                Constant QStoragePriority: FixedValue=1
              LinearInterpolationFunction FrostFraction
                XYPairs: X=[-4, 4]; Y=[1, 0]
                VariableReference XValue: VariableName=[Weather].MinT
              LinearInterpolationFunction SpecificArea
                XYPairs: X=[0.1, 6]; Y=[0.03, 0.03]
                VariableReference XValue: VariableName=[Leaf].LAI
              PhaseLookup DeltaLAI
                PhaseLookupValue Vegetative: Start=Emergence; End=EndCanopyDevelopment
                  MultiplyFunction Delta
                    VariableReference AreaLargestLeaf: VariableName=[Leaf].AreaLargestLeaf
                    PhaseLookup RelativeArea
                      PhaseLookupValue BeforeEndPod: Start=Emergence; End=StartPodDevelopment
                        LinearInterpolationFunction RelativeArea
                          XYPairs: X=[2, 7, 10, 18]; Y=[0.6666, 1, 1, 0.83]
                          VariableReference XValue: VariableName=[Leaf].NodeNumber
                      PhaseLookupValue AfterEndPod: Start=StartPodDevelopment; End=EndCanopyDevelopment
                        Constant RelativeArea: FixedValue=0.4
                    VariableReference PlantNumber: VariableName=[Soybean].SowingData.Population
                    LinearInterpolationFunction Branches
                      XYPairs: X=[0, 6, 7, 8, 9]; Y=[1, 1, 2, 2, 2]
                      VariableReference XValue: VariableName=[Leaf].NodeNumber
                    DivideFunction LAR
                      VariableReference TT: VariableName=[Phenology].VegetativeThermalTime
                      VariableReference Phyllochron: VariableName=[Leaf].Phyllochron
                PhaseLookupValue Reproductive: Start=EndCanopyDevelopment; End=Maturity
                  Constant: FixedValue=0
              Constant AreaLargestLeaf: FixedValue=0.006
              Constant Phyllochron: FixedValue=45
              MultiplyFunction SLA
                VariableReference SpecificArea: VariableName=[Leaf].SpecificArea
                Constant one: FixedValue=10000
            ReproductiveOrgan Grain: GrowthRespiration=0; MaintenanceRespiration=0
              Biomass Live
              Biomass Dead
              Constant PotentialHarvestIndex: FixedValue=0.5
              AddFunction FillingDuration
                VariableReference EarlyGrainFillingDuration: VariableName=[Phenology].EarlyGrainFilling.Target
                VariableReference MidGrainFillingDuration: VariableName=[Phenology].MidGrainFilling.Target
                VariableReference LateGrainFillingDuration: VariableName=[Phenology].LateGrainFilling.Target
              PhaseLookup DMDemandFunction
                PhaseLookupValue GrainFilling: Start=StartGrainFilling; End=EndGrainFill
                  MultiplyFunction HIGrainDemand
                    VariableReference AboveGroundWt: VariableName=[AboveGround].Wt
                    DivideFunction HarvestIndexIncrease
                      VariableReference PotentialHarvestIndex: VariableName=[Grain].PotentialHarvestIndex
                      VariableReference FillingDuration: VariableName=[Grain].FillingDuration
                    VariableReference ThermalTime: VariableName=[Phenology].ThermalTime
              Constant MinimumNConc: FixedValue=0.05
              Constant MaximumNConc: FixedValue=0.058
              Constant WaterContent: FixedValue=0.12
              MultiplyFunction NFillingRate
                VariableReference NConc: VariableName=[Grain].MaximumNConc
                VariableReference DMDemand: VariableName=[Grain].DMDemandFunction
                VariableReference DMConversionEfficiency: VariableName=[Grain].DMConversionEfficiency
              BiomassRemoval BiomassRemovalDefaults
                OrganBiomassRemovalType Harvest: FractionLiveToRemove=1; FractionDeadToRemove=1; FractionLiveToResidue=0; FractionDeadToResidue=0
                OrganBiomassRemovalType Cut: FractionLiveToRemove=0; FractionDeadToRemove=0; FractionLiveToResidue=1; FractionDeadToResidue=1
                OrganBiomassRemovalType Prune: FractionLiveToRemove=0; FractionDeadToRemove=0; FractionLiveToResidue=0; FractionDeadToResidue=0
                OrganBiomassRemovalType Graze: FractionLiveToRemove=0; FractionDeadToRemove=0; FractionLiveToResidue=0; FractionDeadToResidue=0
              Constant DMConversionEfficiency: FixedValue=0.89
              Constant RemobilisationCost: FixedValue=0
              Constant CarbonConcentration: FixedValue=0.4
              DivideFunction HarvestIndex
                VariableReference GrainWt: VariableName=[Grain].Wt
                VariableReference AboveGroundWt: VariableName=[AboveGround].Wt
              Constant MaximumPotentialGrainSize: FixedValue=0
                Memo
                  This parameter is not used.  Grain growth is calculated from harvest index increase.
              Constant NumberFunction: FixedValue=0
                Memo
                  Grain number is not estimated by this model.
              DivideFunction HarvestIndex2
                VariableReference GrainWt: VariableName=[Grain].Wt
                VariableReference AboveGroundWt: VariableName=[AboveGroundLive].Wt
              NutrientPoolFunctions DMDemandPriorityFactors
                Constant Structural: FixedValue=1
                Constant Metabolic: FixedValue=1
                Constant Storage: FixedValue=1
              NutrientPoolFunctions NDemandPriorityFactors: same as Kanawaha.Kanawaha.KanawahaBase.Field.Soybean.Grain.DMDemandPriorityFactors
            Root: GrowthRespiration=0; MaintenanceRespiration=0
              RootShapeCylinder RootShape
              LinearInterpolationFunction KLModifier
                XYPairs: X=[0, 3]; Y=[1, 1]
                VariableReference XValue: VariableName=[Leaf].LAI
              SubDailyInterpolation TemperatureEffect: agregationMethod=0
                XYPairs Response: X=[0, 26, 35]; Y=[1, 1, 1]
                ThreeHourAirTemperature InterpolationMethod
              LinearInterpolationFunction MaxDailyNUptake
                XYPairs: X=[0, 5]; Y=[1, 3]
                VariableReference XValue: VariableName=[Leaf].LAI
              Constant SenescenceRate: FixedValue=0.005
              Constant MaximumRootDepth: FixedValue=1000000
              PhaseLookup RootFrontVelocity
                PhaseLookupValue PreEmergence: Start=Germination; End=Emergence
                  Constant Function: FixedValue=5
                PhaseLookupValue early: Start=Emergence; End=StartGrainFilling
                  Constant Function: FixedValue=30
                PhaseLookupValue late: Start=StartGrainFilling; End=Maturity
                  Constant Function: FixedValue=5
              Constant MaximumNConc: FixedValue=0.01
              Constant MinimumNConc: FixedValue=0.005
              PhaseLookupValue NitrogenDemandSwitch: Start=Emergence; End=EndGrainFill
                Constant: FixedValue=1
              LinearInterpolationFunction KNO3
                XYPairs: X=[0, 0.003]; Y=[0.02, 0.02]
                VariableReference XValue: VariableName=[Root].LengthDensity
              LinearInterpolationFunction KNH4
                XYPairs: X=[0, 0.003]; Y=[0, 0]
                VariableReference XValue: VariableName=[Root].LengthDensity
              BiomassRemoval BiomassRemovalDefaults
                OrganBiomassRemovalType Harvest: FractionLiveToRemove=0; FractionDeadToRemove=0; FractionLiveToResidue=0.2; FractionDeadToResidue=0
                OrganBiomassRemovalType Cut: FractionLiveToRemove=0; FractionDeadToRemove=0; FractionLiveToResidue=0.2; FractionDeadToResidue=0
                OrganBiomassRemovalType Prune: FractionLiveToRemove=0; FractionDeadToRemove=0; FractionLiveToResidue=0; FractionDeadToResidue=0
                OrganBiomassRemovalType Graze: FractionLiveToRemove=0; FractionDeadToRemove=0; FractionLiveToResidue=0; FractionDeadToResidue=0
              LinearInterpolationFunction NUptakeSWFactor
                XYPairs: X=[0, 1]; Y=[0, 1]
                VariableReference XValue: VariableName=[Root].RWC
              Constant SpecificRootLength: FixedValue=40; Units=m/g
              Constant DMConversionEfficiency: FixedValue=1
              Constant MaintenanceRespirationFunction: FixedValue=1
              Constant RemobilisationCost: FixedValue=0
              Constant CarbonConcentration: FixedValue=0.4
              NutrientDemandFunctions DMDemands
                MultiplyFunction Structural
                  PartitionFractionDemandFunction DMDemandFunction
                    PhaseLookup PartitionFraction
                      PhaseLookupValue Early: Start=Emergence; End=StartFlowering
                        Constant Function: FixedValue=0.2
                      PhaseLookupValue Middle: Start=StartFlowering; End=StartGrainFilling
                        Constant Function: FixedValue=0.2
                      PhaseLookupValue Late: Start=StartGrainFilling; End=Maturity
                        Constant Function: FixedValue=0.05
                  Constant StructuralFraction: FixedValue=1
                Constant Metabolic: FixedValue=0
                StorageDMDemandFunction Storage
                  SubtractFunction StorageFraction
                    Constant One: FixedValue=1
                    VariableReference StructuralFraction: VariableName=[Root].DMDemands.Structural.StructuralFraction
                Constant QStructuralPriority: FixedValue=1
                Constant QMetabolicPriority: FixedValue=1
                Constant QStoragePriority: FixedValue=1
              NutrientDemandFunctions NDemands
                MultiplyFunction Structural
                  VariableReference MinNconc: VariableName=[Root].minimumNconc
                  VariableReference PotentialDMAllocation: VariableName=[Root].potentialDMAllocation.Structural
                MultiplyFunction Metabolic
                  SubtractFunction MetabolicNconc
                    VariableReference CritNconc: VariableName=[Root].criticalNConc
                    VariableReference MinNconc: VariableName=[Root].minimumNconc
                  VariableReference PotentialDMAllocation: VariableName=[Root].potentialDMAllocation.Structural
                StorageNDemandFunction Storage
                  VariableReference NitrogenDemandSwitch: VariableName=[Root].nitrogenDemandSwitch
                  VariableReference MaxNconc: VariableName=[Root].maximumNconc
                Constant QStructuralPriority: FixedValue=1
                Constant QMetabolicPriority: FixedValue=1
                Constant QStoragePriority: FixedValue=1
              VariableReference CriticalNConc: VariableName=[Root].MinimumNConc
              NutrientPoolFunctions InitialWt
                Constant Structural: FixedValue=0.2; Units=g/plant
                Constant Metabolic: FixedValue=0
                Constant Storage: FixedValue=0
              Constant RootDepthStressFactor: FixedValue=1
            Nodule
              Constant FixationMetabolicCost: FixedValue=0
              Constant MaximumNConc: FixedValue=0.02
              Constant MinimumNConc: FixedValue=0.01
              Constant SenescenceRate: FixedValue=0
              Constant NReallocationFactor: FixedValue=0
              PhaseLookupValue NitrogenDemandSwitch: Start=Emergence; End=EndGrainFill
                Constant: FixedValue=1
              BiomassRemoval BiomassRemovalDefaults: same as Kanawaha.Kanawaha.KanawahaBase.Field.Soybean.Root.BiomassRemovalDefaults
              Constant InitialWtFunction: FixedValue=0; Units=g/m^2
              Constant DetachmentRateFunction: FixedValue=0; Units=/d
              Constant MaintenanceRespirationFunction: FixedValue=0; Units=0-1
              Constant DMConversionEfficiency: FixedValue=1; Units=0-1
              Constant NRetranslocationFactor: FixedValue=0
              Constant DMReallocationFactor: FixedValue=0
              Constant DMRetranslocationFactor: FixedValue=0
              VariableReference CriticalNConc: VariableName=[Nodule].MinimumNConc
              Constant RemobilisationCost: FixedValue=0
              Constant CarbonConcentration: FixedValue=0.4
              HoldFunction FixationRate: WhenToHold=StartGrainFilling
                MinimumFunction DailyPotentialFixationRate
                  MultiplyFunction PotentialFixationRate
                    VariableReference LiveBiomass: VariableName=[AboveGroundLive].Wt
                    PhaseLookup SpecificFixationRate
                      PhaseLookupValue VegetativeGrowth: Start=Emergence; End=StartFlowering
                        Constant Rate: FixedValue=0.006
                      PhaseLookupValue ReproductiveGrowth: Start=StartFlowering; End=EndGrainFill
                        Constant Rate: FixedValue=0.002
                  Constant MaximumFixationRate: FixedValue=0.6
              NutrientPoolFunctions DMDemands
                MultiplyFunction Structural
                  PartitionFractionDemandFunction DMDemandFunction
                    PhaseLookup PartitionFraction
                      PhaseLookupValue Early: Start=Emergence; End=StartFlowering
                        Constant Function: FixedValue=0.03
                      PhaseLookupValue Middle: Start=StartFlowering; End=StartGrainFilling
                        Constant Function: FixedValue=0.02
                      PhaseLookupValue Late: Start=StartGrainFilling; End=Maturity
                        Constant Function: FixedValue=0
                  Constant StructuralFraction: FixedValue=1; Units=g/g
                Constant Metabolic: FixedValue=0
                StorageDMDemandFunction Storage
                  SubtractFunction StorageFraction
                    Constant One: FixedValue=1
                    VariableReference StructuralFraction: VariableName=[Nodule].DMDemands.Structural.StructuralFraction
              NutrientPoolFunctions NDemands
                MultiplyFunction Structural
                  VariableReference MinNconc: VariableName=[Nodule].minimumNconc
                  VariableReference PotentialDMAllocation: VariableName=[Nodule].potentialDMAllocation.Structural
                MultiplyFunction Metabolic
                  SubtractFunction MetabolicNconc
                    VariableReference CritNconc: VariableName=[Nodule].criticalNConc
                    VariableReference MinNconc: VariableName=[Nodule].minimumNconc
                  VariableReference PotentialDMAllocation: VariableName=[Nodule].potentialDMAllocation.Structural
                StorageNDemandFunction Storage
                  VariableReference NitrogenDemandSwitch: VariableName=[Nodule].nitrogenDemandSwitch
                  VariableReference MaxNconc: VariableName=[Nodule].maximumNconc
            GenericOrgan Shell: IsAboveGround=true
              Constant NReallocationFactor: FixedValue=1
              Constant NRetranslocationFactor: FixedValue=0.5
              Constant MaximumNConc: FixedValue=0.045
              VariableReference CriticalNConc: VariableName=[Shell].MinimumNConc
              Constant MinimumNConc: FixedValue=0.01
              Constant DMRetranslocationFactor: FixedValue=0.1
              PhaseLookupValue NitrogenDemandSwitch: Start=StartPodDevelopment; End=EndPodDevelopment
                Constant: FixedValue=1
              BiomassRemoval BiomassRemovalDefaults: same as Kanawaha.Kanawaha.KanawahaBase.Field.Soybean.Leaf.BiomassRemovalDefaults
              PhaseLookup SenescenceRate
                PhaseLookupValue ReproductivePhase: Start=StartPodDevelopment; End=Maturity
                  MinimumFunction Rate
                    DivideFunction Fraction
                      VariableReference TT: VariableName=[Phenology].ThermalTime
                      SubtractFunction TTRemaining
                        ExpressionFunction ReproductiveTT
                          Expression=[Phenology].EarlyPodDevelopment.Target+[Phenology].EarlyGrainFilling.Target+[Phenology].MidGrainFilling.Target+[Phenology].LateGrainFilling.Target
                        ExpressionFunction ReproductiveTT1Complete
                          Expression=[Phenology].EarlyPodDevelopment.ProgressThroughPhase+[Phenology].EarlyGrainFilling.ProgressThroughPhase+[Phenology].MidGrainFilling.ProgressThroughPhase+[Phenology].LateGrainFilling.ProgressThroughPhase
                    Constant One: FixedValue=1
              Constant DetachmentRateFunction: FixedValue=0; Units=/d
              Constant MaintenanceRespirationFunction: FixedValue=0; Units=0-1
              Constant DMConversionEfficiency: FixedValue=1; Units=0-1
              Constant DMReallocationFactor: FixedValue=0
              Constant RemobilisationCost: FixedValue=0
              Constant CarbonConcentration: FixedValue=0.4
              Constant PotentialHarvestIndex: FixedValue=0.2
              AddFunction FillingDuration
                VariableReference EarlyPodDevelopmentDuration: VariableName=[Phenology].EarlyPodDevelopment.Target
                VariableReference EarlyGrainFillingDuration: VariableName=[Phenology].EarlyGrainFilling.Target
                VariableReference MidGrainFillingDuration: VariableName=[Phenology].MidGrainFilling.Target
              NutrientDemandFunctions DMDemands
                MultiplyFunction Structural
                  PhaseLookup DMDemandFunction
                    PhaseLookupValue PodDevelopment: Start=StartPodDevelopment; End=EndPodDevelopment
                      MultiplyFunction HIPodDemand
                        VariableReference AboveGroundWt: VariableName=[AboveGround].Wt
                        DivideFunction HarvestIndexIncrease
                          VariableReference PotentialHarvestIndex: VariableName=[Shell].PotentialHarvestIndex
                          VariableReference FillingDuration: VariableName=[Shell].FillingDuration
                        VariableReference ThermalTime: VariableName=[Phenology].ThermalTime
                  Constant StructuralFraction: FixedValue=1
                Constant Metabolic: FixedValue=0
                StorageDMDemandFunction Storage
                  SubtractFunction StorageFraction
                    Constant One: FixedValue=1
                    VariableReference StructuralFraction: VariableName=[Shell].DMDemands.Structural.StructuralFraction
                Constant QStructuralPriority: FixedValue=1
                Constant QMetabolicPriority: FixedValue=1
                Constant QStoragePriority: FixedValue=1
              NutrientDemandFunctions NDemands
                MultiplyFunction Structural
                  VariableReference MinNconc: VariableName=[Shell].minimumNconc
                  VariableReference PotentialDMAllocation: VariableName=[Shell].potentialDMAllocation.Structural
                StorageNDemandFunction Storage
                  VariableReference NitrogenDemandSwitch: VariableName=[Shell].nitrogenDemandSwitch
                  VariableReference MaxNconc: VariableName=[Shell].maximumNconc
                Constant Metabolic: FixedValue=0
                Constant QStructuralPriority: FixedValue=1
                Constant QMetabolicPriority: FixedValue=1
                Constant QStoragePriority: FixedValue=1
              RetranslocateNonStructural RetranslocateNitrogen
              NutrientPoolFunctions InitialWt
                Constant Structural: FixedValue=0; Units=g/m^2
                Constant Metabolic: FixedValue=0
                Constant Storage: FixedValue=0
              Constant Photosynthesis: FixedValue=0
              VariableReference initialNConcFunction: VariableName=[Shell].MinimumNConc
            GenericOrgan Stem: IsAboveGround=true
              Constant NReallocationFactor: FixedValue=1
              Constant NRetranslocationFactor: FixedValue=0.5
              PhaseLookup DMRetranslocationFactor
                PhaseLookupValue GrainFilling: Start=EndCanopyDevelopment; End=EndGrainFill
                  Constant RetranslocationFactor: FixedValue=0.2
              LinearInterpolationFunction MaximumNConc
                XYPairs: X=[3, 4, 5]; Y=[0.025, 0.02, 0.015]
                VariableReference XValue: VariableName=[Phenology].Stage
              Constant MinimumNConc: FixedValue=0.006
              PhaseLookupValue NitrogenDemandSwitch: Start=Emergence; End=StartGrainFilling
                Constant: FixedValue=1
              BiomassRemoval BiomassRemovalDefaults: same as Kanawaha.Kanawaha.KanawahaBase.Field.Soybean.Leaf.BiomassRemovalDefaults
              PhaseLookup SenescenceRate
                PhaseLookupValue PostCanopyPhase: Start=EndCanopyDevelopment; End=Maturity
                  MinimumFunction Rate
                    DivideFunction Fraction
                      VariableReference TT: VariableName=[Phenology].ThermalTime
                      SubtractFunction TTRemaining
                        ExpressionFunction PostCanopyTT
                          Expression=[Phenology].EarlyPodDevelopment.Target+[Phenology].EarlyGrainFilling.Target+[Phenology].MidGrainFilling.Target+[Phenology].LateGrainFilling.Target
                        ExpressionFunction PostCanopyTTComplete
                          Expression=[Phenology].MidGrainFilling.ProgressThroughPhase+[Phenology].LateGrainFilling.ProgressThroughPhase
                    Constant One: FixedValue=1
              Constant SenescenceRateoldd: FixedValue=0
              Constant DetachmentRateFunction: FixedValue=0; Units=/d
              Constant MaintenanceRespirationFunction: FixedValue=0; Units=0-1
              Constant DMConversionEfficiency: FixedValue=1; Units=0-1
              Constant DMReallocationFactor: FixedValue=0
              VariableReference CriticalNConc: VariableName=[Stem].MinimumNConc
              Constant RemobilisationCost: FixedValue=0
              Constant CarbonConcentration: FixedValue=0.4
              NutrientDemandFunctions DMDemands
                MultiplyFunction Structural
                  PhaseLookup Fraction
                    PhaseLookupValue StemGrowthPhase: Start=Emergence; End=StartPodDevelopment
                      Constant Fraction: FixedValue=0.75
                    PhaseLookupValue PodAndGrainGrowth: Start=StartPodDevelopment; End=EndGrainFill
                      Constant Fraction: FixedValue=0
                  VariableReference DMDemand: VariableName=[Stem].PotentialGrowth
                Constant Metabolic: FixedValue=0
                MultiplyFunction Storage
                  VariableReference DMDemand: VariableName=[Stem].PotentialGrowth
                  SubtractFunction StorageFraction
                    Constant One: FixedValue=1
                    VariableReference StructuralFraction: VariableName=[Stem].DMDemands.Structural.Fraction
                Constant QStructuralPriority: FixedValue=1
                Constant QMetabolicPriority: FixedValue=1
                Constant QStoragePriority: FixedValue=1
              NutrientDemandFunctions NDemands
                MultiplyFunction Structural
                  VariableReference MinNconc: VariableName=[Stem].minimumNconc
                  VariableReference PotentialDMAllocation: VariableName=[Stem].potentialDMAllocation.Structural
                MultiplyFunction Metabolic
                  SubtractFunction MetabolicNconc
                    VariableReference CritNconc: VariableName=[Stem].criticalNConc
                    VariableReference MinNconc: VariableName=[Stem].minimumNconc
                  VariableReference PotentialDMAllocation: VariableName=[Stem].potentialDMAllocation.Structural
                StorageNDemandFunction Storage
                  VariableReference NitrogenDemandSwitch: VariableName=[Stem].nitrogenDemandSwitch
                  VariableReference MaxNconc: VariableName=[Stem].maximumNconc
                Constant QStructuralPriority: FixedValue=1
                Constant QMetabolicPriority: FixedValue=1
                Constant QStoragePriority: FixedValue=1
              PartitionFractionDemandFunction PotentialGrowth
                PhaseLookup PartitionFraction
                  PhaseLookupValue StemGrowthPhase: Start=Emergence; End=EndPodDevelopment
                    Constant StemFraction: FixedValue=0.4
                  PhaseLookupValue GrainFilling: Start=EndPodDevelopment; End=EndGrainFill
                    Constant StemFraction: FixedValue=0
              RetranslocateNonStructural RetranslocateNitrogen
              NutrientPoolFunctions InitialWt: same as Kanawaha.Kanawaha.KanawahaBase.Field.Soybean.Shell.InitialWt
              Constant Photosynthesis: FixedValue=0
              VariableReference initialNConcFunction: VariableName=[Stem].MinimumNConc
            CompositeBiomass AboveGround: OrganNames=[Leaf, Stem, Grain, Shell]; IncludeLive=true; IncludeDead=true
            CompositeBiomass BelowGround: OrganNames=[Root, Nodule]; IncludeLive=true; IncludeDead=true
            CompositeBiomass AboveGroundLive: OrganNames=[Leaf, Stem, Grain, Shell]; IncludeLive=true; IncludeDead=false
            CompositeBiomass Total: OrganNames=[Leaf, Stem, Grain, Shell, Root, Nodule]; IncludeLive=true; IncludeDead=true
            CompositeBiomass TotalLive: OrganNames=[Leaf, Stem, Grain, Shell, Root, Nodule]; IncludeLive=true; IncludeDead=false
            CompositeBiomass TotalDead: OrganNames=[Leaf, Stem, Grain, Shell, Root, Nodule]; IncludeLive=false; IncludeDead=true
            CompositeBiomass Pod: OrganNames=[Shell, Grain]; IncludeLive=true; IncludeDead=true
            CompositeBiomass AboveGroundDead: OrganNames=[Leaf, Stem, Grain, Shell]; IncludeLive=false; IncludeDead=true
            Constant MortalityRate: FixedValue=0
            Constant SeedMortalityRate: FixedValue=0
          MicroClimate: a_interception=0; b_interception=1; c_interception=0; d_interception=0; SoilHeatFluxFraction=0.4; MinimumHeightDiffForNewLayer=0; NightInterceptionFraction=0.5; ReferenceHeight=2
          Report MaizeReportHarvest: VariableNames=[Clock].Today; EventNames=[Clock].DoReport
          Manager WaterTableManager2015
            InitialWaterTableDepth = 2000
            InSeasonWaterTableDepth = 1250
            StartDate = 05/01/2015 00:00:00
            EndDate = 05/20/2015 00:00:00
```csharp
using Models.Interfaces;
using Models.Soils;
using APSIM.Shared.Utilities;
using Models.PMF;
using Models.Core;
using System;
using Models.Soils.Nutrients;
        
        namespace Models
        {
           [Serializable] 
           [System.Xml.Serialization.XmlInclude(typeof(Model))]
            public class Script : Model
            {      
        [Link] private Soil Soil;
        [Link] private Clock Clock;
        [Link]
        private ISoilWater waterBalance;

               [Description("Initial Water Table Depth (mm)")]
               public double InitialWaterTableDepth { get; set; }

              [Description("InSeason Table Depth (mm)")]
               public double InSeasonWaterTableDepth { get; set; }

               [Description("Start Date")]
               public DateTime StartDate { get; set; }

               [Description("End Date")]
               public DateTime EndDate { get; set; }


        [EventSubscribe("StartOfSimulation")]
        private void OnSimulationCommencing(object sender, EventArgs e)
        {
        //(waterBalance).WaterTable = InitialWaterTableDepth;
        }       

               [EventSubscribe("DoManagement")]
               private void OnDoManagement(object sender, EventArgs e)
               {
                if (Clock.Today.Date >= StartDate && Clock.Today.Date >= EndDate)
                   (waterBalance).WaterTable = InSeasonWaterTableDepth;
                else
                    (waterBalance).WaterTable = InitialWaterTableDepth;
               }
            }
        }
```
          Manager WaterTableManager2016
            InitialWaterTableDepth = 2000
            InSeasonWaterTableDepth = 1250
            StartDate = 05/01/2016 00:00:00
            EndDate = 05/20/2016 00:00:00
            script: same as in Kanawaha.Kanawaha.KanawahaBase.Field.WaterTableManager2015
          Manager WaterTableManager2017
            InitialWaterTableDepth = 2000
            InSeasonWaterTableDepth = 1250
            StartDate = 05/01/2017 00:00:00
            EndDate = 05/20/2017 00:00:00
            script: same as in Kanawaha.Kanawaha.KanawahaBase.Field.WaterTableManager2015
          Manager WaterTableManager2018
            InitialWaterTableDepth = 2000
            InSeasonWaterTableDepth = 1250
            StartDate = 05/01/2018 00:00:00
            EndDate = 05/20/2018 00:00:00
            script: same as in Kanawaha.Kanawaha.KanawahaBase.Field.WaterTableManager2015
          Manager WaterTableManager2019
            InitialWaterTableDepth = 2000
            InSeasonWaterTableDepth = 1250
            StartDate = 05/01/2019 00:00:00
            EndDate = 05/20/2019 00:00:00
            script: same as in Kanawaha.Kanawaha.KanawahaBase.Field.WaterTableManager2015
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