Simulations: Version=155
  Experiment APSIM_default
    Factors
      Factor Fertiliser: Specification=[Fertilise on fixed dates].Script.Amount=0 to 200 step 200
    Simulation base_default
      Clock: Start=2010-04-27; End=2010-06-30
      Summary SummaryFile
      Weather: FileName=canberra_c.met
      SoilArbitrator
      MicroClimate: a_interception=0; b_interception=1; c_interception=0; d_interception=0; SoilHeatFluxFraction=0.4; MinimumHeightDiffForNewLayer=0; NightInterceptionFraction=0.5; ReferenceHeight=2
      Zone Field: Area=1; Slope=0; AspectAngle=0; Altitude=50
        Soil: SoilType=Black Vertosol; LocalName=Canberra; Site=Ginninderra site; NearestTown=Canberra; Region=ACT; State=ACT; NaturalVegetation=Farm field; Latitude=0; Longitude=0; YearOfSampling=0
          Physical
            Thickness  ParticleSizeClay  BD    AirDry  LL15  DUL   SAT   KS
            50         52                1.27  0.09    0.11  0.26  0.35  24
            50         52                1.28  0.11    0.13  0.25  0.35  24
            100        62                1.35  0.15    0.21  0.31  0.36  24
            100        62                1.54  0.15    0.29  0.34  0.38  24
            100        47                1.58  0.15    0.3   0.34  0.37  24
            100        47                1.59  0.16    0.31  0.34  0.37  24
            250        54                1.64  0.16    0.21  0.32  0.35  24
            250        46                1.64  0.18    0.21  0.32  0.35  24
            500        46                1.66  0.18    0.23  0.32  0.35  24
            SoilCrop WheatSoil: LL=[0.106, 0.13, 0.21, 0.29, 0.3, 0.18, 0.18, 0.18, 0.18]; KL=[0.08, 0.08, 0.08, 0.08, 0.08, 0.07, 0.06, 0.05, 0.05]; XF=[1, 0.8, 0.8, 0.8, 0.8, 0.8, 0.8, 0.8, 0.8]
          WaterBalance SoilWater: SummerDate=1-Nov; SummerU=9; SummerCona=3.5; WinterDate=1-Apr; WinterU=2.5; WinterCona=2.5; DiffusConst=40; DiffusSlope=16; Salb=0.13; CN2Bare=73; CNRed=20; CNCov=0.8; PSIDul=-100; Thickness=[50, 50, 100, 100, 100, 100, 250, 250, 500]; SWCON=[0.5, 0.4, 0.4, 0.4, 0.5, 0.4, 0.2, 0.2, 0.2]
          Organic: FOMCNRatio=40; CarbonUnits=Total
            Thickness  Carbon  SoilCNRatio  FBiom  FInert  FOM
            50         2.169   12.5         0.03   0.4     43.4166
            50         1.778   12.5         0.03   0.4     39.285
            100        1.307   12.5         0.025  0.5     32.1638
            100        0.976   12.5         0.02   0.6     26.3335
            100        0.743   12.5         0.02   0.65    21.5601
            100        0.635   12.5         0.01   0.7     17.6519
            250        0.514   12.5         0.005  0.8     10.7064
            250        0.506   12.5         0.001  0.9     6.49377
            500        0.506   12.5         0.001  0.9     2.38892
          Chemical: PHUnits=Water
            Thickness  PH     EC
            50         6.858  0.26
            50         6.018  0.26
            100        6.07   0.31
            100        6.83   0.31
            100        7.296  0.26
            100        7.51   0.26
            250        7.898  0.26
            250        8.312  0.23
            500        8.312  0.23
          Water: Thickness=[50, 50, 100, 100, 100, 100, 250, 250, 500]; InitialValues=[0.16, 0.253, 0.255, 0.28, 0.25, 0.3, 0.311, 0.31, 0.31]; FilledFromTop=false
          Nutrient
          CERESSoilTemperature Temperature
          Solute NO3: Thickness=[50, 50, 100, 100, 100, 100, 250, 250, 500]; InitialValuesUnits=ppm; WaterTableConcentration=0; D0=0; DepthConstant=0; MaxDepthSoluteAccessible=0; RunoffEffectivenessAtMovingSolute=0; MaxEffectiveRunoff=0
            InitialValues=[29.324, 20.631, 12.42, 12.256, 11.23, 10.889, 9.05, 6.018, 6.018]
          Solute NH4: Thickness=[50, 50, 100, 100, 100, 100, 250, 250, 500]; InitialValuesUnits=ppm; WaterTableConcentration=0; D0=0; DepthConstant=0; MaxDepthSoluteAccessible=0; RunoffEffectivenessAtMovingSolute=0; MaxEffectiveRunoff=0
            InitialValues=[54.562, 50.301, 24.894, 20.028, 12.651, 10.677, 7.962, 3.684, 3.684]
          Solute Urea: Thickness=[50, 50, 100, 100, 100, 100, 250, 250, 500]; InitialValues=[0, 0, 0, 0, 0, 0, 0, 0, 0]; InitialValuesUnits=kg/ha; WaterTableConcentration=0; D0=0; DepthConstant=0; MaxDepthSoluteAccessible=0; RunoffEffectivenessAtMovingSolute=0; MaxEffectiveRunoff=0
        SurfaceOrganicMatter: InitialResidueName=wheat_stubble; InitialResidueType=wheat; InitialResidueMass=4840; InitialStandingFraction=0; InitialCPR=0; InitialCNR=72.4
        Fertiliser
        Plant Wheat
        Manager Sowing Rule
          Crop = [Wheat]
          Verbose = False
          StartDate = 2-aug
          EndDate = 10-aug
          MinESW = 200
          MinRain = 100
          RainDays = 3
          MustSow = False
          CultivarName = Hartog
          SowingDepth = 30
          RowSpacing = 250
          Population = 100
```csharp
using Models.Interfaces;
using APSIM.Shared.Utilities;
using Models.Utilities;
using Models.Soils;
using Models.PMF;
using Models.Core;
using System;
using Models.Climate;

namespace Models
{
    [Serializable]
    public class Script : Model
    {
        [Link] private Clock Clock;
        [Link] private Summary Summary;
        [Link] private Soil Soil;
        [Link]
        private ISoilWater waterBalance;
        //[Link] Simulation Simulation;

        [Separator("Script Configuration")]
        [Description("Crop to manage")]
        public IPlant Crop { get; set; }

        [Description("Run script in verbose mode?")]
        [Tooltip("If enabled, the script will print a large number of diagnostics to the summary file, to aid debugging")]
        public bool Verbose { get; set; }

        [Separator("Sowing Conditions")]
        [Description("Start of sowing window (d-mmm)")]
        public string StartDate { get; set; }
        [Description("End of sowing window (d-mmm)")]
        public string EndDate { get; set; }
        [Description("Minimum extractable soil water for sowing (mm)")]
        public double MinESW { get; set; }
        [Description("Accumulated rainfall required for sowing (mm)")]
        public double MinRain { get; set; }
        [Description("Duration of rainfall accumulation (d)")]
        public int RainDays { get; set; }
        [Tooltip("If enabled, and if sowing conditions are not met, the crop will be sown on the final day of the sowing window.")]
        [Description("Must sow (yes/no)")]
        public bool MustSow { get; set; }

        [Separator("Sowing Properties")]
        [Description("Cultivar to be sown")]
        [Display(Type = DisplayType.CultivarName)]
        public string CultivarName { get; set; }
        [Description("Sowing depth (mm)")]
        public double SowingDepth { get; set; }
        [Description("Row spacing (mm)")]
        public double RowSpacing { get; set; }
        [Description("Plant population (/m2)")]
        public double Population { get; set; }

        public Accumulator accumulatedRain { get; private set; }
        private bool afterInit = false;
                
        [EventSubscribe("StartOfSimulation")]
        private void OnSimulationCommencing(object sender, EventArgs e)
        {
            if (Crop == null)
                throw new Exception("Crop must not be null in rotations");
            accumulatedRain = new Accumulator(this, "[Weather].Rain", RainDays);
            Summary.WriteMessage(this, this.FullPath + " - Commence, crop=" + (Crop as Model).Name, MessageType.Diagnostic);
            afterInit = true;
        }
        
        [EventSubscribe("DoManagement")]
        private void DoManagement(object sender, EventArgs e)
        {
            accumulatedRain.Update();
        }

        // Test whether we can sow a crop today
        // +ve number - yes
        // 0          - no
        // -ve number - no, out of scope (planting window)
        [Units("0-1")]
        public int CanSow
        {
            get
            {
                if (!afterInit)
                    return 0;
                bool isPossibleToday = false;
                bool inWindow = DateUtilities.WithinDates(StartDate, Clock.Today, EndDate);
                bool endOfWindow = DateUtilities.DatesEqual(EndDate, Clock.Today);
                if (!Crop.IsAlive && inWindow && accumulatedRain.Sum > MinRain && MathUtilities.Sum(waterBalance.ESW) > MinESW)
                    isPossibleToday = true;

                if (isPossibleToday)
                    return 1;
         
                if (!Crop.IsAlive && endOfWindow && MustSow)
                    return 1;

                if (!Crop.IsAlive && !inWindow)
                    return -1;
                return 0;
            }
        }

        public void SowCrop()
        {
            Summary.WriteMessage(this, this.FullPath + " -  sowing " + (Crop as Model).Name, MessageType.Diagnostic);
            Crop.Sow(population: Population, cultivar: CultivarName, depth: SowingDepth, rowSpacing: RowSpacing);    
        }

        [Units("0-1")] 
        public int CanHarvest
        {
            get
            {
                if (!afterInit)
                    return (0);
                //Summary.WriteMessage(this, "canLeave:" + Crop.IsReadyForHarvesting, MessageType.Diagnostic);
                return Crop.IsReadyForHarvesting ? 1 : 0;
            }
        }

        public void HarvestCrop()
        {
            Crop.Harvest();
            Crop.EndCrop();
        }
    }
}
```
        Manager Fertilise on fixed dates
          Amount = 200
          FertiliserType = Urea
          FertiliserDates = 2-may
          AmountType = False
```csharp
using Models.Soils;
using System;
using Models.Core;
using Models.PMF;
using APSIM.Shared.Utilities;
namespace Models
{
    [Serializable]
    public class Script : Model
    {
        [Link] Clock Clock;
        [Link] Fertiliser Fertiliser;
        
        [Separator("A component to apply fertiliser on one or more dates on every year of the simulation")]

        [Description("Type of fertiliser to apply? ")] 
        public Fertiliser.Types FertiliserType { get; set; }

        [Description("Enter the fertilisation dates as dd-mmm with comma separation (any year information entered will be ignored): ")] 
        public string[] FertiliserDates { get; set; } 

        [Description("Amount of fertiliser to be applied (kg /ha)")] 
        public double Amount { get; set; }

        [Description("Is the above amount to be applied each time? (yes/ticked)? Or is it the total annual amount across all dates (no/unticked)")] 
        public bool AmountType { get; set; }
        
        [EventSubscribe("DoManagement")]
        private void OnDoManagement(object sender, EventArgs e)
        {
            foreach (string ddMMM in FertiliserDates)
            {
                if (DateUtilities.DatesEqual(ddMMM, Clock.Today))
                {
                    if (AmountType)
                        Fertiliser.Apply(Amount: Amount, Type: FertiliserType);
                    else
                        Fertiliser.Apply(Amount: Amount / FertiliserDates.Length, Type: FertiliserType);
                }
            }
        }
    }
}
```
        Manager Tillage on a fixed date
          TillageDate = 29-apr
          Fraction = 1
          Depth = 100
```csharp
using Models.Soils;
using System;
using Models.Core;
using Models.PMF;
using APSIM.Shared.Utilities;
using Models.Surface;

namespace Models
{
    [Serializable]
    public class Script : Model
    {
        [Link] Clock Clock;
        [Link] SurfaceOrganicMatter SOM;
        
        [Description("Tillage Date")]
        public string TillageDate { get; set; }
        
        [Description("Fraction of Residues To Incorporate (0-1)")]
        public double Fraction { get; set; }

        [Description("Depth of Tillage (mm)")]
        public double Depth { get; set; }

        [EventSubscribe("DoManagement")]
        private void OnDoManagement(object sender, EventArgs e)
        {
            if (DateUtilities.WithinDates(TillageDate, Clock.Today, TillageDate))
                SOM.Incorporate(Fraction, Depth);
        }
    }
}
```
        Manager Harvest
```csharp
using Models.Soils.Nutrients;
using System;
using Models.Core;
using Models.PMF;
using Models.Soils;
using Models.Soils.Nutrients;
using Models.Utilities;
using APSIM.Shared.Utilities;

namespace Models
{
    [Serializable]
    public class Script : Model
    {
        [Link] Plant Wheat;

        [EventSubscribe("DoManagement")]
        private void OnDoManagement(object sender, EventArgs e)
        {
            if (Wheat.IsReadyForHarvesting)
            {
               Wheat.Harvest();
               Wheat.EndCrop();    
            }
        
        }
        
    }
}
```
        Report Daily: EventNames=[Clock].EndOfDay
          VariableNames:
            [Clock].Today.Year as Year
            [Clock].Today as Date
            [Soil].Water.Volumetric
            [Soil].SoilWater.Eo as Eo
            [Soil].SoilWater.Eos as Eos
            [Soil].SoilWater.Es as Es
            [Soil].SoilWater.ESW as ESW
            [Soil].NH4.kgha
            [Soil].NO3.kgha
            Sum([Soil].Nutrient.N2Oatm[1:3])*1000 as N2Oatm20cm
            Sum([Soil].Nutrient.N2Oatm[1:5])*1000 as N2Oatm40cm
            Sum([Soil].Nutrient.Catm) as CO2atm
            [Soil].Urea.kgha
            [Soil].Temperature.Value as SoilTemperature
  Experiment APSIM_SoilTemp
    Factors
      Factor Fertiliser: Specification=[Fertilise on fixed dates].Script.Amount=0 to 200 step 200
    Simulation base_SoilTemp
      Clock: Start=2010-04-27; End=2010-06-30
      Summary SummaryFile
      Weather: FileName=canberra_c.met
      SoilArbitrator
      MicroClimate: a_interception=0; b_interception=1; c_interception=0; d_interception=0; SoilHeatFluxFraction=0.4; MinimumHeightDiffForNewLayer=0; NightInterceptionFraction=0.5; ReferenceHeight=2
      Zone Field: Area=1; Slope=0; AspectAngle=0; Altitude=50
        Soil: SoilType=Black Vertosol; LocalName=Canberra; Site=Ginninderra site; NearestTown=Canberra; Region=ACT; State=ACT; NaturalVegetation=Farm field; Latitude=0; Longitude=0; YearOfSampling=0
          Physical: same as APSIM_default.base_default.Field.Soil.Physical
          WaterBalance SoilWater: same as APSIM_default.base_default.Field.Soil.SoilWater
          Organic: same as APSIM_default.base_default.Field.Soil.Organic
          Chemical: PHUnits=Water
            Thickness  PH     EC
            50         6.858  0.26
            50         6.018  0.26
            100        6.07   0.31
            100        6.83   0.31
            100        7.296  0.26
            100        7.51   0.26
            250        7.898  0.26
            250        8.312  0.23
            500        8.312  0.23
          Water: Thickness=[50, 50, 100, 100, 100, 100, 250, 250, 500]; InitialValues=[0.16, 0.253, 0.255, 0.28, 0.25, 0.3, 0.311, 0.31, 0.31]; FilledFromTop=false
          Nutrient
          SoilTemperature
          Solute NO3: same as APSIM_default.base_default.Field.Soil.NO3
          Solute NH4: same as APSIM_default.base_default.Field.Soil.NH4
          Solute Urea: same as APSIM_default.base_default.Field.Soil.Urea
        SurfaceOrganicMatter: InitialResidueName=wheat_stubble; InitialResidueType=wheat; InitialResidueMass=4840; InitialStandingFraction=0; InitialCPR=0; InitialCNR=72.4
        Fertiliser
        Plant Wheat
        Manager Sowing Rule: same as APSIM_default.base_default.Field.Sowing Rule
        Manager Fertilise on fixed dates: same as APSIM_default.base_default.Field.Fertilise on fixed dates
        Manager Tillage on a fixed date: same as APSIM_default.base_default.Field.Tillage on a fixed date
        Manager Harvest: same as APSIM_default.base_default.Field.Harvest
        Report Daily: EventNames=[Clock].EndOfDay
          VariableNames:
            [Clock].Today.Year as Year
            [Clock].Today as Date
            [Soil].Water.Volumetric
            [Soil].SoilWater.Eo as Eo
            [Soil].SoilWater.Eos as Eos
            [Soil].SoilWater.Es as Es
            [Soil].SoilWater.ESW as ESW
            [Soil].NH4.kgha
            [Soil].NO3.kgha
            Sum([Soil].Nutrient.N2Oatm[1:3])*1000 as N2Oatm20cm
            Sum([Soil].Nutrient.N2Oatm[1:5])*1000 as N2Oatm40cm
            Sum([Soil].Nutrient.Catm) as CO2atm
            [Soil].Urea.kgha
            [Soil].SoilTemperature.Value as SoilTemperature
  Experiment APSIM_SWIM
    Factors
      Factor Fertiliser: Specification=[Fertilise on fixed dates].Script.Amount=0 to 200 step 200
    Simulation base_SWIM
      Clock: Start=2010-04-27; End=2010-06-30
      Summary SummaryFile
      Weather: FileName=canberra_c.met
      SoilArbitrator
      MicroClimate: a_interception=0; b_interception=1; c_interception=0; d_interception=0; SoilHeatFluxFraction=0.4; MinimumHeightDiffForNewLayer=0; NightInterceptionFraction=0.5; ReferenceHeight=2
      Zone Field: Area=1; Slope=0; AspectAngle=0; Altitude=50
        Manager SWIMSetLowerBC
          LowerBCType = potential
          LowerBCValue = 10000
```csharp
using Models.Climate;
using APSIM.Shared.Utilities;
using Models.Soils.Nutrients;
using Models.Soils;
using Models.PMF;
using Models.Core;
using System.Xml.Serialization;
using System;
using Models.AgPasture;
using Models.Interfaces;

namespace Models
{
    [Serializable] 
    [System.Xml.Serialization.XmlInclude(typeof(Model))]
    public class Script : Model
    {
        [Link] Clock clock;
        [Link] ISummary summary;
        [Link] private Swim3 swim;
        
        public enum LowerBCTypeOptions {gradient,seepage,potential};

        [Separator("Sets the lower boundary condition type (and value if set to 'potential' for SWIM3. The change is applied at the beginning of the first day of the simulation.")]
        [Description("What lower boundary condition is wanted?")] 
        public LowerBCTypeOptions LowerBCType { get; set; }
        
        [Description("If 'potential', then what potential? Should be negative (mm) ")]
        [Display(EnabledCallback = "IsPotential")] 
        public double LowerBCValue { get; set; }
        
        /// <summary></summary>
        public bool IsPotential => LowerBCType == LowerBCTypeOptions.potential;
        

        public double SoilWaterStart  { get; set; }
        public double SoilWaterEnd  { get; set; }

        [EventSubscribe("DoManagement")]
        private void DoDailyCalculations(object sender, EventArgs e)
        {
            if (clock.Today == clock.StartDate)
            {
                summary.WriteMessage(this, "Script is setting lower boundary condition to " + LowerBCType, MessageType.Diagnostic);
                if (LowerBCType == LowerBCTypeOptions.gradient)
                    swim.SetLowerBCForGradient(bbcGradient: 0.0);   // in cm/cm (ibbc=0) Note that this is the default setting
                else if (LowerBCType == LowerBCTypeOptions.potential)
                    swim.SetLowerBCForGivenPotential(bbcPotential: LowerBCValue /10.0 );    //  convert to cm (ibbc=1), DUL is -100 cm so values more positive will often result in inflow to the bottom of the soil profile. Input in mm so divide here.
                else if (LowerBCType == LowerBCTypeOptions.seepage)
                    swim.SetLowerBCForSeepage(bbcPotentialSeepage: 0.0);  // in cm (ibbc=3). This is for zero-tension lysimeters
                else
                    throw new Exception("Wrong lower boundary condition type");
            }
        }
    }
}
```
        Soil SWIM Soil: Latitude=0; Longitude=0; YearOfSampling=0
          Physical
            Thickness  ParticleSizeClay  BD    AirDry  LL15  DUL   SAT   KS
            50         52                1.27  0.09    0.11  0.26  0.35  300
            50         52                1.28  0.11    0.13  0.25  0.35  300
            100        62                1.35  0.15    0.21  0.31  0.36  300
            100        62                1.54  0.15    0.29  0.34  0.38  300
            100        47                1.58  0.15    0.3   0.34  0.37  300
            100        47                1.59  0.16    0.31  0.34  0.37  300
            250        54                1.64  0.16    0.21  0.32  0.35  300
            250        46                1.64  0.18    0.21  0.32  0.35  300
            500        46                1.66  0.18    0.23  0.32  0.35  300
            SoilCrop wheatSoil: LL=[0.106, 0.13, 0.21, 0.29, 0.3, 0.18, 0.18, 0.18, 0.18]; KL=[0.08, 0.08, 0.08, 0.08, 0.08, 0.07, 0.06, 0.05, 0.05]; XF=[1, 0.8, 0.8, 0.8, 0.8, 0.8, 0.8, 0.8, 0.8]
          LayerStructure: Thickness=[10, 20, 20, 50, 100, 200, 300, 300, 300, 200]
          Swim3 Swim: Salb=0.13; CN2Bare=75; CNRed=20; CNCov=0.8; KDul=0.1; PSIDul=-100; VC=true; DTMin=0; DTMax=1440; MaxWaterIncrement=10; SpaceWeightingFactor=0; SoluteSpaceWeightingFactor=0; Dis=15; Disp=1; A=1; DTHC=0; DTHP=1; Diagnostics=false
            SwimSubsurfaceDrain: DrainDepth=500; DrainSpacing=3000; DrainRadius=50; Klat=1000; ImpermDepth=900
          Chemical: PHUnits=Water
            Thickness  PH     EC
            50         6.858  0.26
            50         6.018  0.26
            100        6.07   0.31
            100        6.83   0.31
            100        7.296  0.26
            100        7.51   0.26
            250        7.898  0.26
            250        8.312  0.23
            500        8.312  0.23
          Organic: same as APSIM_default.base_default.Field.Soil.Organic
          Water: Thickness=[50, 50, 100, 100, 100, 100, 250, 250, 500]; InitialValues=[0.16, 0.253, 0.255, 0.28, 0.25, 0.3, 0.311, 0.31, 0.31]; RelativeTo=LL15; FilledFromTop=false
          Nutrient
          SoilTemperature
          Solute NO3: InitialValuesUnits=ppm; WaterTableConcentration=0; D0=0; DepthConstant=0; MaxDepthSoluteAccessible=0; RunoffEffectivenessAtMovingSolute=0; MaxEffectiveRunoff=0
            Thickness  InitialValues  Exco  FIP
            50         29.324         0     1
            50         20.631         0     1
            100        12.42          0     1
            100        12.256         0     1
            100        11.23          0     1
            100        10.889         0     1
            250        9.05           0     1
            250        6.018          0     1
            500        6.018          0     1
            500        0              0     1
            1000       0              0     1
          Solute NH4: InitialValuesUnits=ppm; WaterTableConcentration=0; D0=0; DepthConstant=0; MaxDepthSoluteAccessible=0; RunoffEffectivenessAtMovingSolute=0; MaxEffectiveRunoff=0
            Thickness  InitialValues  Exco  FIP
            50         54.562         0     1
            50         50.301         0     1
            100        24.894         0     1
            100        20.028         0     1
            100        12.651         0     1
            100        10.677         0     1
            250        7.962          0     1
            250        3.684          0     1
            500        3.684          0     1
            500        0              0     1
            1000       0              0     1
          Solute Urea: InitialValuesUnits=kg/ha; WaterTableConcentration=0; D0=0; DepthConstant=0; MaxDepthSoluteAccessible=0; RunoffEffectivenessAtMovingSolute=0; MaxEffectiveRunoff=0
            Thickness  InitialValues  Exco  FIP
            50         0              0     1
            50         0              0     1
            100        0              0     1
            100        0              0     1
            100        0              0     1
            100        0              0     1
            250        0              0     1
            250        0              0     1
            500        0              0     1
            500        0              0     1
            1000       0              0     1
        SurfaceOrganicMatter: InitialResidueName=wheat_stubble; InitialResidueType=wheat; InitialResidueMass=4840; InitialStandingFraction=0; InitialCPR=0; InitialCNR=72.4
        Fertiliser
        Plant Wheat
        Manager Sowing Rule: same as APSIM_default.base_default.Field.Sowing Rule
        Manager Fertilise on fixed dates: same as APSIM_default.base_default.Field.Fertilise on fixed dates
        Manager Tillage on a fixed date: same as APSIM_default.base_default.Field.Tillage on a fixed date
        Manager Harvest: same as APSIM_default.base_default.Field.Harvest
        Report Daily: EventNames=[Clock].EndOfDay
          VariableNames:
            [Clock].Today.Year as Year
            [Clock].Today as Date
            [Soil].Water.Volumetric
            [Soil].Swim.Eo as Eo
            [Soil].Swim.Eos as Eos
            [Soil].Swim.Es as Es
            [Soil].Swim.ESW as ESW
            [Soil].NH4.kgha
            [Soil].NO3.kgha
            [Soil].SoilTemperature.AverageSoilTemp as SoilTemperature
            Sum([Soil].Nutrient.Catm) as CO2atm
            Sum([Soil].Nutrient.N2Oatm[1:3])*1000 as N2Oatm20cm
            Sum([Soil].Nutrient.N2Oatm[1:5])*1000 as N2Oatm40cm
  DataStore
    ExcelInput: FileNames=[Observation.xlsx]; SheetNames=[Observation]
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