Simulations: Version=56
  Simulation W1
    Clock: StartDate=1994-08-05; EndDate=2000-01-23
    Summary summaryfile
    Weather: FileName=Hudson.met
    SoilArbitrator
    MicroClimate: a_interception=0; b_interception=1; c_interception=0.55; d_interception=0; soil_albedo=0.23; SoilHeatFluxFraction=0.4; NightInterceptionFraction=0.5; ReferenceHeight=2
    Zone paddock: Area=1; Slope=0
      Report: EventNames=[Clock].DoReport
        VariableNames:
          [Clock].Today
          [Soil].SoilWater.SW
          [Soil].SoilWater.Runoff
          [Soil].SoilWater.Drainage
          [Soil].SoilWater.Es
          [Soil].SoilWater.Eo
          [Wheat].Leaf.LAI
          [Wheat].AboveGround.Wt
          [Wheat].Grain.Wt
          [Weather].Rain
          sum([Soil].Nutrient.NH4.kgha) as NH4
          sum([Soil].Nutrient.NO3.kgha) as NO3
          sum([Soil].Nutrient.Natm) as dnit
          [Wheat].AboveGround.N
          [Wheat].BelowGround.N
          sum([Soil].SoilWater.SWmm[2:6]) as SW110
          sum([Soil].SoilWater.SWmm[7:11]) as SW210
          sum([Soil].SoilWater.SWmm[12:16]) as SW310
          sum([Soil].Chloride.kgha[2:6]) as Cl110
          sum([Soil].Chloride.kgha[7:11]) as Cl210
          sum([Soil].Chloride.kgha[12:16]) as Cl310
      Soil: Latitude=0; Longitude=0
        Water
          Thickness  BD   AirDry  LL15  DUL   SAT
          100        1    0.1     0.24  0.47  0.53
          200        1.1  0.1     0.28  0.49  0.54
          200        1.1  0.1     0.28  0.52  0.57
          200        1.1  0.1     0.29  0.52  0.55
          200        1.1  0.1     0.29  0.51  0.54
          200        1.2  0.1     0.29  0.5   0.53
          200        1.2  0.1     0.29  0.5   0.53
          200        1.2  0.1     0.33  0.48  0.51
          200        1.2  0.1     0.33  0.48  0.51
          200        1.2  0.1     0.35  0.48  0.51
          200        1.2  0.1     0.35  0.47  0.5
          200        1.2  0.1     0.35  0.45  0.48
          200        1.3  0.1     0.35  0.45  0.48
          200        1.3  0.1     0.35  0.45  0.48
          200        1.3  0.1     0.35  0.45  0.48
          200        1.3  0.1     0.35  0.45  0.48
          SoilCrop WheatSoil
            LL=[0.25, 0.3, 0.3, 0.33, 0.33, 0.35, 0.35, 0.4, 0.4, 0.4, 0.4, 0.4, 0.4, 0.4, 0.4, 0.4]
            KL=[0.06, 0.06, 0.06, 0.06, 0.06, 0.06, 0.06, 0.06, 0.06, 0.06, 0, 0, 0, 0, 0, 0]
            XF=[1, 1, 1, 1, 1, 1, 1, 1, 1, 1, 0, 0, 0, 0, 0, 0]
        SoilWater: SummerDate=1-Nov; SummerU=9; SummerCona=5; WinterDate=1-Apr; WinterU=9; WinterCona=5; DiffusConst=40; DiffusSlope=16; Salb=0.13; CN2Bare=72; CNRed=20; CNCov=0.8; max_pond=0; ResidueInterception=0
          Thickness=[100, 200, 200, 200, 200, 200, 200, 200, 200, 200, 200, 200, 200, 200, 200, 200]
          SWCON=[0.4, 0.4, 0.4, 0.4, 0.4, 0.4, 0.4, 0.4, 0.4, 0.4, 0.4, 0.4, 0.4, 0.4, 0.4, 0.4]
        SoilOrganicMatter: RootCN=40; EnrACoeff=7.4; EnrBCoeff=0.2; OCUnits=Total
          Thickness  OC    FBiom  FInert  SoilCN  RootWt
          100        1.4   0.2    0.32    14.5    1.84299
          200        1.4   0.03   0.5     14.5    1.51868
          200        1.4   0.02   0.6     14.5    1.25144
          200        1.35  0.015  0.7     14.5    1.03122
          200        0.95  0.01   0.85    14.5    0.849759
          200        1     0.01   0.9     14.5    0.700227
          200        0.8   0.01   0.99    14.5    0.577008
          200        0.45  0.01   0.99    14.5    0.475472
          200        0.45  0.01   0.99    14.5    0.391803
          200        0.45  0.01   0.99    14.5    0.322858
          200        0.45  0.01   0.99    14.5    0.266044
          200        0.45  0.01   0.99    14.5    0.219228
          200        0.45  0.01   0.99    14.5    0.180651
          200        0.45  0.01   0.99    14.5    0.148862
          200        0.45  0.01   0.99    14.5    0.122667
          200        0.45  0.01   0.99    14.5    0.101081
        Analysis: PHUnits=Water; BoronUnits=0
          Thickness  PH   CL
          100        6    18
          200        6.4  13
          200        6.8  11
          200        7.2  11
          200        7.6  16
          200        8    28
          200        8    66
          200        8    122
          200        8    181
          200        8    232
          200        8    270
          200        8    292
          200        8    293
          200        8    270
          200        8    292
          200        8    293
        Sample Initial nitrogen: NO3Units=ppm; NH4Units=ppm; SWUnits=Volumetric; OCUnits=Total; PHUnits=Water
          Thickness  NO3   NH4
          100        10.7  0.3
          200        9.99  0.3
          200        7.87  0.3
          200        6.2   0.3
          200        4.85  0.3
          200        3.56  0.3
          200        2.72  0.3
          200        2.34  0.3
          200        2.47  0.3
          200        3.24  0.3
          200        4.25  0.3
          200        4.94  0.3
          200        5.2   0.3
          200        4.95  0.3
          200        4.52  0.3
          200        4.24  0.3
        Sample Initial water: NO3Units=ppm; NH4Units=ppm; SWUnits=Volumetric; OCUnits=Total; PHUnits=Water
          Thickness=[100, 200, 200, 200, 200, 200, 200, 200, 200, 200, 200, 200, 200, 200, 200, 200]
          SW=[0.43, 0.43, 0.48, 0.47, 0.46, 0.46, 0.46, 0.485, 0.49, 0.474, 0.457, 0.453, 0.447, 0.465, 0.457, 0.43]
        CERESSoilTemperature
        Chloride
        Nutrient
          DirectedGraphInfo={Nodes=[{Name=Inert, OutlineColour=Black}, {Name=SurfaceResidue, OutlineColour=Black}, {Name=FOMLignin, OutlineColour=Black}, {Name=FOMCellulose, OutlineColour=Black}, {Name=FOMCarbohydrate, OutlineColour=Black}, {Name=Microbial, OutlineColour=Black}, {Name=Humic, OutlineColour=Black}, {Name=Urea, OutlineColour=Black}, {Name=NO3, OutlineColour=Black}, {Name=NH4, OutlineColour=Black}, {Name=Atmosphere, OutlineColour=White}, {Name=PlantAvailableNO3, OutlineColour=Black}, {Name=PlantAvailableNH4, OutlineColour=Black}], Arcs=[{SourceName=SurfaceResidue, DestinationName=Microbial}, {SourceName=SurfaceResidue, DestinationName=Humic}, {SourceName=FOMLignin, DestinationName=Microbial}, {SourceName=FOMLignin, DestinationName=Humic}, {SourceName=FOMCellulose, DestinationName=Microbial}, {SourceName=FOMCellulose, DestinationName=Humic}, {SourceName=FOMCarbohydrate, DestinationName=Microbial}, {SourceName=FOMCarbohydrate, DestinationName=Humic}, {SourceName=Microbial, DestinationName=Microbial}, {SourceName=Microbial, DestinationName=Humic}, {SourceName=Humic, DestinationName=Microbial}, {SourceName=Urea, DestinationName=NH4}, {SourceName=NO3, DestinationName=Atmosphere}, {SourceName=NH4, DestinationName=NO3}]}
      SurfaceOrganicMatter SurfaceOM: InitialResidueName=unknown; InitialResidueType=wheat; InitialResidueMass=0; InitialStandingFraction=1; InitialCPR=0; InitialCNR=100; FractionFaecesAdded=0.5
      MicroClimate: a_interception=0; b_interception=1; c_interception=0.55; d_interception=0; soil_albedo=0.23; SoilHeatFluxFraction=0.4; NightInterceptionFraction=0.5; ReferenceHeight=2
      Fertiliser
      Operations
        1994-08-05  [Wheat].Sow(population:26, cultivar:hartog, depth:40, rowSpacing:300);
        1994-08-05  [Fertiliser].Apply(70, Fertiliser.Types.NO3N, 50);
        1994-09-07  [Wheat].EndCrop();
        1994-10-27  [Wheat].Harvest();
        1995-06-01  [Wheat].Sow(cultivar:hartog, population:126, depth:40, rowSpacing:300);
        1995-06-01  [Fertiliser].Apply(80, Fertiliser.Types.NO3N, 50);
        1995-11-28  [Wheat].Harvest();
        1995-11-28  [Wheat].EndCrop();
        1996-07-02  [Wheat].Sow(cultivar:hartog, population:126, depth:40, rowSpacing:300);
        1996-07-02  [Fertiliser].Apply(101, Fertiliser.Types.NO3N, 50);
        1996-12-04  [Wheat].EndCrop();
        1997-06-02  [Wheat].Sow(cultivar:hartog, population:71, depth:40, rowSpacing:300);
        1997-06-02  [Fertiliser].Apply(100, Fertiliser.Types.NO3N, 50);
        1997-11-26  [Wheat].Harvest();
        1997-11-26  [Wheat].EndCrop();
        1998-06-18  [Wheat].Sow(cultivar:hartog, population:126, depth:40, rowSpacing:300);
        1998-06-18  [Fertiliser].Apply(102, Fertiliser.Types.NO3N, 50);
        1998-12-02  [Wheat].Harvest();
        1998-12-02  [Wheat].EndCrop();
        1999-06-23  [Wheat].Sow(cultivar:hartog, population:50, depth:40, rowSpacing:300);
        1999-06-23  [Fertiliser].Apply(102, Fertiliser.Types.NO3N, 50);
        1999-12-16  [Wheat].Harvest();
        1999-12-16  [Wheat].EndCrop();
      Plant Wheat: CropType=Wheat; IsEnding=false; DaysAfterEnding=0
  DataStore
    ExcelInput: FileName=observed.xlsx
      SheetNames=[ObservedCrop, ObservedPhenology, ObservedCl, ObservedResidue, ObservedRunoff, Stubble, ObservedSW, ObservedSWlayers]
      FileName source: Excel files (*.xlsx)|*.xlsx, All files (*.*)|*.*
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