Simulations: Version=162
  Simulation W1
    Clock: Start=1994-08-05; End=2000-01-23
    Summary summaryfile
    Weather: FileName=Hudson.met
    SoilArbitrator
    MicroClimate: a_interception=0; b_interception=1; c_interception=0; d_interception=0; SoilHeatFluxFraction=0.4; MinimumHeightDiffForNewLayer=0; NightInterceptionFraction=0.5; ReferenceHeight=2
    Zone paddock: Area=1; Slope=0; AspectAngle=0; Altitude=50
      Report: EventNames=[Clock].DoReport
        VariableNames:
          [Clock].Today
          [Soil].Water.Volumetric
          [Soil].Swim3.Runoff
          [Soil].Swim3.Drainage
          [Soil].Swim3.Es
          [Soil].Swim3.Eo
          [Wheat].Leaf.LAI
          [Wheat].AboveGround.Wt
          [Wheat].Grain.Wt
          [Weather].Rain
          sum([Soil].NH4.kgha) as NH4
          sum([Soil].NO3.kgha) as NO3
          sum([Soil].Nutrient.DenitrifiedN) as dnit
          [Wheat].AboveGround.N
          [Wheat].BelowGround.N
          sum([Soil].Water.MM[5:9]) as SW110
          sum([Soil].Water.MM[10:14]) as SW210
          sum([Soil].Water.MM[15:19]) as SW310
          sum([Soil].CL.kgha[1:9]) as Cl110
          sum([Soil].CL.kgha[10:14]) as Cl210
          sum([Soil].CL.kgha[15:19]) as Cl310
      Soil: Latitude=0; Longitude=0
        Physical
          Thickness  BD   AirDry  LL15  DUL   SAT   KS
          100        1    0.1     0.24  0.47  0.53  240
          200        1.1  0.1     0.28  0.49  0.54  240
          200        1.1  0.1     0.28  0.52  0.57  120
          200        1.1  0.1     0.29  0.52  0.55  120
          200        1.1  0.1     0.29  0.51  0.54  120
          200        1.2  0.1     0.29  0.5   0.53  120
          200        1.2  0.1     0.29  0.5   0.53  120
          200        1.2  0.1     0.33  0.48  0.51  120
          200        1.2  0.1     0.33  0.48  0.51  60
          200        1.2  0.1     0.35  0.48  0.51  60
          200        1.2  0.1     0.35  0.47  0.5   60
          200        1.2  0.1     0.35  0.45  0.48  60
          200        1.3  0.1     0.35  0.45  0.48  60
          200        1.3  0.1     0.35  0.45  0.48  60
          200        1.3  0.1     0.35  0.45  0.48  60
          200        1.3  0.1     0.35  0.45  0.48  60
          SoilCrop WheatSoil
            LL=[0.25, 0.3, 0.3, 0.33, 0.33, 0.35, 0.35, 0.4, 0.4, 0.4, 0.4, 0.4, 0.4, 0.4, 0.4, 0.4]
            KL=[0.06, 0.06, 0.06, 0.06, 0.06, 0.06, 0.06, 0.06, 0.06, 0.06, 0, 0, 0, 0, 0, 0]
            XF=[1, 1, 1, 1, 1, 1, 1, 1, 1, 1, 0, 0, 0, 0, 0, 0]
        Organic: FOMCNRatio=40; CarbonUnits=Total
          Thickness  Carbon  SoilCNRatio  FBiom  FInert  FOM
          100        1.4     14.5         0.2    0.32    1.84299
          200        1.4     14.5         0.03   0.5     1.51868
          200        1.4     14.5         0.02   0.6     1.25144
          200        1.35    14.5         0.015  0.7     1.03122
          200        0.95    14.5         0.01   0.85    0.849759
          200        1       14.5         0.01   0.9     0.700227
          200        0.8     14.5         0.01   0.99    0.577008
          200        0.45    14.5         0.01   0.99    0.475472
          200        0.45    14.5         0.01   0.99    0.391803
          200        0.45    14.5         0.01   0.99    0.322858
          200        0.45    14.5         0.01   0.99    0.266044
          200        0.45    14.5         0.01   0.99    0.219228
          200        0.45    14.5         0.01   0.99    0.180651
          200        0.45    14.5         0.01   0.99    0.148862
          200        0.45    14.5         0.01   0.99    0.122667
          200        0.45    14.5         0.01   0.99    0.101081
        Chemical: PH=[6, 6.4, 6.8, 7.2, 7.6, 8, 8, 8, 8, 8, 8, 8, 8, 8, 8, 8]; PHUnits=Water
          Thickness=[100, 200, 200, 200, 200, 200, 200, 200, 200, 200, 200, 200, 200, 200, 200, 200]
        Water: InitialPAWmm=437; RelativeTo=LL15; FilledFromTop=false
          Thickness=[100, 200, 200, 200, 200, 200, 200, 200, 200, 200, 200, 200, 200, 200, 200, 200]
          InitialValues=[0.434, 0.43, 0.48, 0.47, 0.46, 0.46, 0.46, 0.485, 0.49, 0.474, 0.457, 0.453, 0.447, 0.465, 0.457, 0.43]
        CERESSoilTemperature Temperature
        Swim3: Salb=0.13; CN2Bare=75; CNRed=20; CNCov=0.8; KDul=0.1; PSIDul=-100; VC=true; DTMin=0; DTMax=1440; MaxWaterIncrement=5; SpaceWeightingFactor=0; SoluteSpaceWeightingFactor=1; Dis=0; Disp=1; A=2; DTHC=0.1; DTHP=2; Diagnostics=true
        LayerStructure
          Thickness=[10, 20, 30, 40, 200, 200, 200, 200, 200, 200, 200, 200, 200, 200, 200, 200, 200, 200, 200]
        Solute CL: InitialValuesUnits=ppm; WaterTableConcentration=0; D0=0.05; DepthConstant=0; MaxDepthSoluteAccessible=0; RunoffEffectivenessAtMovingSolute=0; MaxEffectiveRunoff=0
          Thickness  InitialValues  Exco  FIP
          100        18             0     1
          200        13             0     1
          200        11             0     1
          200        11             0     1
          200        16             0     1
          200        28             0     1
          200        66             0     1
          200        122            0     1
          200        181            0     1
          200        232            0     1
          200        270            0     1
          200        292            0     1
          200        293            0     1
          200        270            0     1
          200        292            0     1
          200        293            0     1
        Nutrient
        Solute NO3: InitialValuesUnits=ppm; WaterTableConcentration=0; D0=0.05; DepthConstant=0; MaxDepthSoluteAccessible=0; RunoffEffectivenessAtMovingSolute=0; MaxEffectiveRunoff=0
          Thickness  InitialValues  Exco  FIP
          100        10.7           0     1
          200        9.99           0     1
          200        7.87           0     1
          200        6.2            0     1
          200        4.85           0     1
          200        3.56           0     1
          200        2.72           0     1
          200        2.34           0     1
          200        2.47           0     1
          200        3.24           0     1
          200        4.25           0     1
          200        4.94           0     1
          200        5.2            0     1
          200        4.95           0     1
          200        4.52           0     1
          200        4.24           0     1
        Solute NH4: InitialValuesUnits=ppm; WaterTableConcentration=0; D0=0.05; DepthConstant=0; MaxDepthSoluteAccessible=0; RunoffEffectivenessAtMovingSolute=0; MaxEffectiveRunoff=0
          Thickness  InitialValues  Exco  FIP
          100        0.3            1     1
          200        0.3            1     1
          200        0.3            1     1
          200        0.3            1     1
          200        0.3            1     1
          200        0.3            1     1
          200        0.3            1     1
          200        0.3            1     1
          200        0.3            1     1
          200        0.3            1     1
          200        0.3            1     1
          200        0.3            1     1
          200        0.3            1     1
          200        0.3            1     1
          200        0.3            1     1
          200        0.3            1     1
        Solute Urea: InitialValuesUnits=kg/ha; WaterTableConcentration=0; D0=0.05; DepthConstant=0; MaxDepthSoluteAccessible=0; RunoffEffectivenessAtMovingSolute=0; MaxEffectiveRunoff=0
          Thickness  InitialValues  Exco  FIP
          100        0              0     1
          200        0              0     1
          200        0              0     1
          200        0              0     1
          200        0              0     1
          200        0              0     1
          200        0              0     1
          200        0              0     1
          200        0              0     1
          200        0              0     1
          200        0              0     1
          200        0              0     1
          200        0              0     1
          200        0              0     1
          200        0              0     1
          200        0              0     1
      SurfaceOrganicMatter SurfaceOM: InitialResidueName=unknown; InitialResidueType=wheat; InitialResidueMass=0; InitialStandingFraction=1; InitialCPR=0; InitialCNR=100
      MicroClimate: a_interception=0; b_interception=1; c_interception=0; d_interception=0; SoilHeatFluxFraction=0.4; MinimumHeightDiffForNewLayer=0; NightInterceptionFraction=0.5; ReferenceHeight=2
      Fertiliser
      Plant Wheat
      Operations
        1994-08-05  [Wheat].Sow(population:26, cultivar:hartog, depth:40, rowSpacing:300);
        1994-08-05  [Fertiliser].Apply(70, Fertiliser.Types.NO3N, 50);
        1994-09-07  [Wheat].EndCrop();
        1995-06-01  [Wheat].Sow(cultivar:hartog, population:126, depth:40, rowSpacing:300);
        1995-06-01  [Fertiliser].Apply(80, Fertiliser.Types.NO3N, 50);
        1995-11-28  [Wheat].Harvest();
        1995-11-28  [Wheat].EndCrop();
        1996-07-02  [Wheat].Sow(cultivar:hartog, population:126, depth:40, rowSpacing:300);
        1996-07-02  [Fertiliser].Apply(101, Fertiliser.Types.NO3N, 50);
        1996-12-04  [Wheat].EndCrop();
        1997-06-02  [Wheat].Sow(cultivar:hartog, population:71, depth:40, rowSpacing:300);
        1997-06-02  [Fertiliser].Apply(100, Fertiliser.Types.NO3N, 50);
        1997-11-26  [Wheat].Harvest();
        1997-11-26  [Wheat].EndCrop();
        1998-06-18  [Wheat].Sow(cultivar:hartog, population:126, depth:40, rowSpacing:300);
        1998-06-18  [Fertiliser].Apply(102, Fertiliser.Types.NO3N, 50);
        1998-12-02  [Wheat].Harvest();
        1998-12-02  [Wheat].EndCrop();
        1999-06-23  [Wheat].Sow(cultivar:hartog, population:50, depth:40, rowSpacing:300);
        1999-06-23  [Fertiliser].Apply(102, Fertiliser.Types.NO3N, 50);
        1999-12-16  [Wheat].Harvest();
        1999-12-16  [Wheat].EndCrop();
  DataStore
    ExcelInput: FileNames=[observed.xlsx]
      SheetNames=[ObservedCrop, ObservedPhenology, ObservedCl, ObservedResidue, ObservedRunoff, Stubble, ObservedSW, ObservedSWlayers]
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