Simulations: Version=33
  Memo Introduction
    # Crop rotation

    Edmar I. Teixeira, Hamish Brown, Rob Zyskowski, Edith Khaembah, Rogerio Cichota

    The New Zealand Institute for Plant & Food Research Limited, Private Bag 4704, Christchurch, New Zealand
  Memo FIXME
    Issues to be resulved:

    (1) Soil temperature does not respond to canopy cover ... data show temperature difference in N and water treatments but simulations are identical. What's impact on N mineralisation? (eit 30 Aug 2017)
     >> One needs to use a ´proper´ soil temperature model for this. The CERES model (used to be within SoilNitrogen) is very basic and probably not capable of the  sensitivity require for this. However the SoilTemperature hasn been ported into ApsimX... (Even in Classic Apsim, tehre was not any people using it - RCichota: There were a few, at Agresearch we did use it regularly)
  Replacements
    Plant Oats: CropType=Wheat
      Memo TitlePage
        # The APSIM Wheat Model

        _Brown, H.E., Huth, N.I. and Holzworth, D.P._

        The APSIM wheat model has been developed using the Plant Modelling Framework (PMF) of [brown_plant_2014]. This new framework provides a library of plant organ and process submodels that can be coupled, at runtime, to construct a model in much the same way that models can be coupled to construct a simulation. This means that dynamic composition of lower level process and organ classes (e.g. photosynthesis, leaf) into larger constructions (e.g. maize, wheat, sorghum) can be achieved by the model developer without additional coding.

        The model consists of:

        * a phenology model to simulate development between developmental phases
        * a structure model to simulate plant morphology
        * a collection of organs to simulate the various plant parts
        * an arbitrator to allocate resources (N, biomass) to the various plant organs
      OrganArbitrator Arbitrator
        RelativeAllocation NArbitrator
        RelativeAllocation DMArbitrator
      Phenology: FractionBiomassRemoved=0; DaysAfterSowing=0
        Memo
          Wheat exhibits a range of developmental responses to environment and these are strongly influences by genotype characteristics.
          Temperature effects development increasing development rates and decreasing phase durations as temperatures increase.  Theset affects are captured by thermal time, .  However, wheat also exhibits vernalisation and photoperiod sensitivities in its Vegetative phase and further photoperiod sensitivity in the EarlyReproducivePhase.  Photoperiod responses are seen as a reduction in the length of a phase for a photoperiod sensitive genotype in response to a longer photoperiod.  Vernalisation responses are more complicated as they are driven by temperature but interact with photoperiod.  For vernalisation sensitive varieties (Winter types) exposure to cool temperatures or short photoperiods during the Vegetative phase will reduce the thermal time duration of the vegetative phase.

          We draw on the Kirby Framework to capture these vernalisation and photoperiod responses.  This framework assumes that the timing of anthesis is a result of the timing of flag leaf and an additional thermal time passage from there to anthesis.  It also assumes the timing of flag leaf is a result of the Final Leaf Number which sets a target, and leaf appearance rate, which sets the rate of progress toward this target.  Leaf appearance rate is a function of Thermal time and a genotype specific Phyllochron which changes with Haun stage as described by [Jamieson_LeafAppearance_1995].

          Final Leaf Number (FLN) is modeled as the sum of three numbers:

          FLN = MinLeafNumber + VernalLeaves + PhotoLeaves

          Where MinLeafNumber is the number of leaves that a wheat crop will produce when vernalisation is satisified early in the crops duration (before 2nd true leaf) and it is grown in a long photoperiod..  VernalLeaves are the number of leaves that are added due to vernalisation effects.  For insensitive varieties this will always be zero but this is potentially a larger number for sensitivie varieties and the number progresively decreases as the crop encounters more vernalisation.  PhotoLeaves are the number of leaves that are added to the minimum leaf number as a result of short day exposure.  For insensitive varieties this will be zero but is potential larger for more sensitivie varieties and decreases as day length increases.  More detailed explinations of the components of phenology are provided below.
        DivideFunction MeanTemp
          AddFunction TempSum
            VariableReference MaxT: VariableName=[Weather].MaxT
            VariableReference MinT: VariableName=[Weather].MinT
          Constant Two: FixedValue=2
        AirTemperatureFunction ThermalTime
          XYPairs: X=[0, 30, 40]; Y=[0, 30, 0]
          Memo
            Thermal time determines the rate of developmental progress through many of the crops phases and is used by organs to determing potential growth rates.
        MultiplyFunction DailyVernalisation
          Memo
            Vernalisation responses are based on those described by [Brown_Anthesis_2013].   Vernalisation is assumed to be related to the expression of the Vrn1 Gene.  Its experssion is accumulated daily and daily upregulation as a function of development (DeltaHaunStage) and a TempResponseProfile that declines exponentially from a maximum at 1<sup>o</sup>C to zero at 0<sup>o</sup>C and at 18<sup>o</sup>C.
          VariableReference DeltaHaunStage: VariableName=[Structure].DeltaHaunStage
          AirTemperatureFunction TempResponseProfile
            XYPairs
              X=[0, 1, 2, 3, 4, 5, 6, 7, 8, 9, 10, 11, 12, 13, 14, 15, 16, 17, 18, 19, 20, 30, 32]
              Y=[0, 1.205, 1.037, 0.893, 0.768, 0.661, 0.569, 0.49, 0.422, 0.363, 0.312, 0.269, 0.231, 0.199, 0.171, 0.148, 0.127, 0.109, 0.094, 0.081, 0, 0, -0.5]
        PhotoperiodFunction Photoperiod: Twilight=-6; DayLength=0
        PhaseLookup PerceivedPhotoPeriod
          PhaseLookupValue ApexBelowGround: Start=Germination; End=Emergence
            Constant Photoperiod: FixedValue=0; Units=h
          PhaseLookupValue ApexAboveGround: Start=Emergence; End=HarvestRipe
            VariableReference Photoperiod: VariableName=[Phenology].Photoperiod.Value()
        MinimumFunction Vrn1
          Memo
            Vrn1 accumulation begins when Vrn4 experssion is down regulated to zero and stops, assuming vernalisation saturation, at a value of 1
          Constant Saturation: FixedValue=1; Units=Relative Experssion
          AccumulateFunction CurrentExpression: StartStageName=Germination; EndStageName=TerminalSpikelet; FractionRemovedOnCut=0; FractionRemovedOnHarvest=0; FractionRemovedOnGraze=0; FractionRemovedOnPrune=0
            LessThanFunction Vernalisation
              VariableReference If_Vrn4: VariableName=[Phenology].Vrn4.Value()
              VariableReference IsLessThanLag: VariableName=[Phenology].VernLag.Value()
              Constant Return_Zero: FixedValue=0
              VariableReference elseReturn_Vernalisation: VariableName=[Phenology].DailyVernalisation.Value()
        MinimumFunction Vrn4
          VariableReference MaxExpression: VariableName=[Phenology].VernLag.Value()
          AccumulateFunction CurrentExpression: StartStageName=Germination; EndStageName=TerminalSpikelet; FractionRemovedOnCut=0; FractionRemovedOnHarvest=0; FractionRemovedOnGraze=0; FractionRemovedOnPrune=0
            VariableReference VernalisationConditioning: VariableName=[Phenology].DailyVernalisation.Value()
        Constant MinimumLeafNumber: FixedValue=7; Units=Leaves
          Memo
            Number of leaves the plant will produce when fully vernalised early and grown in long photoperiod
        Constant VrnSensitivity: FixedValue=0; Units=Leaves
          Memo
            The difference between Inherent earlyness leaf number and the number of leaves produced when the plant is unvernalised and grown in long photoperiod
        Constant VernLag: FixedValue=1; Units=Unitless
          Memo
            The amount of vernalising temperature required before vernalisation response will be evident.  Value of relative to the amount offl vernalisation temperature required from the end of the lag until vernalisation saturation.  A value of 0 means there is no lag, a value of 1 means the lag is the same (in vernal time) as the vernalisation requirement and a value of 2 means the lag is twice as long as the vernalisation response phase
        Constant PpSensitivity: FixedValue=3; Units=Leaves
          Memo
            The reduction in leaf number going from 8 to 16 h Pp
        Constant EarlyReproductivePpSensitivity: FixedValue=3
          Memo
            The phyllochrons duration for the plant to go from flag leaf ligual appearance at 16 h Pp compared to the phyllochron duration for the same phase at 8 h Pp.
        Constant EarlyReproductiveLongDayBase: FixedValue=3
          Memo
            The phyllochrons duration for the plant to go from flag leaf ligual appearance at 16 h Pp.
        GerminatingPhase Germinating: Start=Sowing; End=Germination
        EmergingPhase Emerging: ShootLag=40; ShootRate=4; Start=Germination; End=Emergence
          VariableReference ThermalTime: VariableName=[Phenology].ThermalTime.Value()
        GenericPhase Vegetative: Start=Emergence; End=TerminalSpikelet
          Memo
            The duration of the vegetative phase is set by a target Haun Stage for the occurence of Terminal Spikelet and the rate of leaf appearance.
          VariableReference ThermalTime: VariableName=[Phenology].ThermalTime.Value()
          MultiplyFunction Target
            VariableReference Phyllochron: VariableName=[Structure].MeanPhyllochron.Value()
            VariableReference HSTS: VariableName=[Structure].HaunStageTerminalSpikelet.Value()
          Memo Memo1
            HaunStageTerminalSpiklet decreases as vernalisation is accumulated and as photoperiod extends, capturing the effect of these responses on the duration of the Vegetative phase
        LeafAppearancePhase StemElongation: Start=TerminalSpikelet; End=FlagLeaf
          Memo
            The Final leaf number is fixed at Terminal Spikelet and leaves contune to appear at a rate set by thermal time and phyllochron until flag leaf liguale appears and this phase is completed.
          VariableReference ThermalTime: VariableName=[Phenology].ThermalTime.Value()
        GenericPhase EarlyReproductive: Start=FlagLeaf; End=Flowering
          VariableReference ThermalTime: VariableName=[Phenology].ThermalTime.Value()
          MultiplyFunction Target
            VariableReference Phyllochron: VariableName=[Structure].Phyllochron.BasePhyllochron.Value()
            AddFunction Phyllochrons
              VariableReference LongDayBase: VariableName=[Phenology].EarlyReproductiveLongDayBase.Value()
              MultiplyFunction IncreaseDueToShortPhotoPeriod
                LinearInterpolationFunction PhotoPeriodResponse: XProperty=[Phenology].Photoperiod.Value()
                  XYPairs: X=[11, 16]; Y=[1, 0]
                VariableReference PpSensitivity: VariableName=[Phenology].EarlyReproductivePpSensitivity.Value()
        GenericPhase GrainDevelopment: Start=Flowering; End=StartGrainFill
          Constant Target: FixedValue=20
          VariableReference ThermalTime: VariableName=[Phenology].ThermalTime.Value()
        GenericPhase GrainFilling: Start=StartGrainFill; End=EndGrainFill
          Constant Target: FixedValue=650
          VariableReference ThermalTime: VariableName=[Phenology].ThermalTime.Value()
        GenericPhase Maturing: Start=EndGrainFill; End=Maturity
          Constant Target: FixedValue=30
          VariableReference ThermalTime: VariableName=[Phenology].ThermalTime.Value()
        GenericPhase Ripening: Start=Maturity; End=HarvestRipe
          Constant Target: FixedValue=100
          VariableReference ThermalTime: VariableName=[Phenology].ThermalTime.Value()
        EndPhase ReadyForHarvesting: Start=HarvestRipe; End=Unused
          VariableReference ThermalTime: VariableName=[Phenology].ThermalTime.Value()
        ZadokPMF Zadok
        OnEventFunction FlagLeafDAS: SetEvent=FlagLeaf; ReSetEvent=never
          Memo
            A function is used to provide flowering date as days after sowing(DAS).
          Constant PreEventValue: FixedValue=0
          VariableReference PostEventValue: VariableName=[Phenology].DaysAfterSowing
        OnEventFunction FloweringDAS: SetEvent=Flowering; ReSetEvent=never
          Memo
            A function is used to provide flowering date as days after sowing(DAS).
          Constant PreEventValue: FixedValue=0
          VariableReference PostEventValue: VariableName=[Phenology].DaysAfterSowing
        OnEventFunction MaturityDAS: SetEvent=Maturity; ReSetEvent=never
          Memo
            A function is used to provide maturity date as days after sowing(DAS).
          Constant PreEventValue: FixedValue=0
          VariableReference PostEventValue: VariableName=[Phenology].DaysAfterSowing
      Structure: Initialised=false; Germinated=false; Emerged=false; CohortToInitialise=0; TipToAppear=0; ApexNum=0
        VariableReference ThermalTime: VariableName=[Phenology].ThermalTime.Value()
        MultiplyFunction Phyllochron
          Memo Rational
            This is the thermal time between the emergence of leaf tips.  The model used here is based on [Jamieson_SIRIUS_1998] where leaf appearace could be described by a base phyllochron determined between leaves 2 and 7 and a phyllochron that was 70% of base phyllochron for leaves < 2 and 130% of base phyllochron for leaves > 7
          LinearInterpolationFunction LeafStageFactor: XProperty=[Leaf].AppearedCohortNo
            XYPairs: X=[0, 2, 3, 6, 8, 11, 12]; Y=[0.75, 0.75, 1, 1, 1.4, 1.4, 1.4]
              Memo
                Changing 4th line from 7:1 to 6:1.
                Leaf appearance rate calibrated using data from Gatton 2007 for Taipan and Coolibah
          Constant BasePhyllochron: FixedValue=90; Units=oC.d
          LinearInterpolationFunction PhotoPeriodEffect: XProperty=[Phenology].Photoperiod.Value()
            XYPairs: X=[8, 12, 14]; Y=[1.6, 1, 1]
        MultiplyFunction BranchingRate
          Memo
            Potential branching rate is determined by the commonly observed pattern of tillering in wheat, in which each tiller emerges with the third leaf on its parent axis (e.g. first tiller emerges at the same time as the third leaf on the main stem, the first secondary tiller appears with the third leaf on tiller 1).  This is described as a simple function of main stem leaf number.
          PhaseLookup PotentialBranchingRate
            PhaseLookupValue Vegetative: Start=Emergence; End=TerminalSpikelet
              LinearInterpolationFunction PotentialBranchingRate: XProperty=[Structure].LeafTipsAppeared
                XYPairs: X=[1, 2, 2.99, 3, 4, 5, 6, 7, 8]; Y=[0, 0, 0, 1, 2, 4, 7, 12, 20]
            PhaseLookupValue Reproductive: Start=TerminalSpikelet; End=HarvestRipe
              Constant Zero: FixedValue=0
          MinimumFunction StressFactors
            LinearInterpolationFunction NitrogenEffect: XProperty=[Arbitrator].FN
              Memo
                Inadequate Nitrogen supply is assumed to affect tillering prior to any effect on photosynthesis or leaf size.
              XYPairs: X=[0.5, 1]; Y=[0, 1]
            LinearInterpolationFunction CoverEffect: XProperty=[Leaf].CoverTotal
              Memo
                Tillering is said to cease once a threshold fraction of incoming radiation has been achieved.  This captures shading effects on tillering described by [evers2006cessation].
              XYPairs: X=[0, 0.1, 0.5]; Y=[1, 1, 0]
            LinearInterpolationFunction WaterStressEffect: XProperty=[Root].WaterTensionFactor
              XYPairs: X=[0, 1]; Y=[0, 1]
        PhaseLookup BranchMortality
          PhaseLookupValue MortalityPhase: Start=TerminalSpikelet; End=Flowering
            MultiplyFunction Mortality
              LinearInterpolationFunction MortalityPerDegDay: XProperty=[Structure].MeanTillerGrowthRate.Value()
                XYPairs: X=[0, 0.005]; Y=[0.002, 0]
              VariableReference ThermalTime: VariableName=[Phenology].ThermalTime.Value()
        HeightFunction HeightModel
          LinearInterpolationFunction PotentialHeight: XProperty=[Phenology].Stage
            XYPairs: X=[3, 3.8, 5, 6]; Y=[20, 300, 1100, 1200]
          LinearInterpolationFunction WaterStress: XProperty=[Oats].WaterSupplyDemandRatio
            XYPairs: X=[0.3, 1]; Y=[0, 1]
          HeightFunction HeightModel
            LinearInterpolationFunction PotentialHeight: XProperty=[Phenology].Stage
              XYPairs: X=[3, 3.8, 5, 6]; Y=[20, 300, 1100, 1200]
            LinearInterpolationFunction WaterStress: same as Replacements.Oats.Structure.HeightModel.WaterStress
        MovingAverageFunction MeanTillerGrowthRate: NumberOfDays=5; StageToStartMovingAverage=Emergence
          Memo
            This is calculated to represent the supply of asslimilate to individual tillers over the past 5 days to use as an index to determine tiller mortality.  When tiller numbers are high or total crop assimilate supply is small there will not be enough assimilate to maintain all of the tillers so the model will senesce some.
          DivideFunction TillerGrowthRate
            VariableReference DailyGrowth: VariableName=[Arbitrator].DM.TotalFixationSupply
            VariableReference ThermalTime: VariableName=[Phenology].ThermalTime.Value()
            VariableReference StemPopulation: VariableName=[Structure].TotalStemPopn
        MovingAverageFunction MeanPhyllochron: NumberOfDays=300; StageToStartMovingAverage=Emergence
          VariableReference Phyllochron: VariableName=[Structure].Phyllochron.Value()
        HoldFunction FinalLeafNumber: WhenToHold=TerminalSpikelet
          AddFunction FinalNodeNumber
            VariableReference MinLeafNumber: VariableName=[Phenology].MinimumLeafNumber.Value()
            MultiplyFunction VernalLeaves
              VariableReference UnVernalisedLeaves: VariableName=[Phenology].VrnSensitivity.Value()
              SubtractFunction VernalisationReductionFactor
                Constant One: FixedValue=1
                VariableReference RelativeVrn1Expression: VariableName=[Phenology].Vrn1.Value()
            MultiplyFunction PhotoPLeaves
              VariableReference ShortPpLeaves: VariableName=[Phenology].PpSensitivity.Value()
              LinearInterpolationFunction PhotoPeriodReductionFactor: XProperty=[Phenology].Photoperiod.Value()
                XYPairs: X=[10, 16]; Y=[1, 0]
        ExpressionFunction HaunStageTerminalSpikelet: Expression=([Structure].FinalLeafNumber.Value() - 2.85)/1.1
          Memo
            The Haun stage at which Terminal Spikelet occurs is determined from final leaf number using the approach described in [Brown_Anthesis_2013].
        AddFunction HaunStage
          VariableReference AppearedLeaves: VariableName=[Leaf].ExpandedCohortNo
          VariableReference ProportionOfExpandingLeaf: VariableName=[Leaf].NextExpandingLeafProportion
        Constant StemSenescenceAge: FixedValue=0
      ReproductiveOrgan Grain: GrowthRespiration=0; MaintenanceRespiration=0; RipeStage=Ripe
        HoldFunction NumberFunction: WhenToHold=Flowering
          MultiplyFunction GrainNumber
            Constant GrainsPerGramOfStem: FixedValue=26; Units=grains
            VariableReference StemMass: VariableName=[StemPlusPanicle].Wt
        MultiplyFunction NumberFunctionxxx
          VariableReference PanaclePopulation: VariableName=[Panicle].HeadNumber.Value()
          Constant SpikletsPerPanacle: FixedValue=25; Units=grains
          LinearInterpolationFunction GrainPerSpiklet: XProperty=[Grain].AccumThermalTime.Value()
            XYPairs: X=[0, 250]; Y=[0, 1.95]
              Memo
                Changing 4th line from 7:1 to 6:1.
                Leaf appearance rate calibrated using data from Gatton 2007 for Taipan and Coolibah
        Constant InitialGrainProportion: FixedValue=0.05
          Constant InitialGrainProportion: FixedValue=0.05
        Constant MaximumPotentialGrainSize: FixedValue=0.032; Units=g
        PhaseLookup DMDemandFunction
          PhaseLookupValue InitialPhase: Start=Flowering; End=StartGrainFill
            FillingRateFunction
              VariableReference NumberFunction: VariableName=[Grain].NumberFunction.Value()
              VariableReference FillingDuration: VariableName=[Phenology].GrainDevelopment.Target.Value()
              VariableReference ThermalTime: VariableName=[Phenology].ThermalTime.Value()
              MultiplyFunction PotentialSizeIncrement
                VariableReference InitialProportion: VariableName=[Grain].InitialGrainProportion.Value()
                VariableReference MaximumSize: VariableName=[Grain].MaximumPotentialGrainSize.Value()
          PhaseLookupValue LinearPhase: Start=StartGrainFill; End=EndGrainFill
            FillingRateFunction
              VariableReference NumberFunction: VariableName=[Grain].NumberFunction.Value()
              VariableReference FillingDuration: VariableName=[Phenology].GrainFilling.Target.Value()
              VariableReference ThermalTime: VariableName=[Phenology].ThermalTime.Value()
              MultiplyFunction PotentialSizeIncrement
                SubtractFunction ProportionLinearPhase
                  Constant One: FixedValue=1
                  VariableReference InitialProportion: VariableName=[Grain].InitialGrainProportion.Value()
                VariableReference MaximumSize: VariableName=[Grain].MaximumPotentialGrainSize.Value()
        Constant MinimumNConc: FixedValue=0.0123
        Constant MaxNConcDailyGrowth: FixedValue=0.03
        Constant MaximumNConc: FixedValue=0.03
        PhaseLookup NFillingRate
          PhaseLookupValue GrainFilling: Start=FlagLeaf; End=EndGrainFill
            FillingRateFunction
              VariableReference NumberFunction: VariableName=[Grain].NumberFunction.Value()
              AddFunction FillingDuration
                VariableReference FloweringToGrainFilling: VariableName=[Phenology].GrainDevelopment.Target.Value()
                VariableReference GrainFilling: VariableName=[Phenology].GrainFilling.Target.Value()
              VariableReference ThermalTime: VariableName=[Phenology].ThermalTime.Value()
              MultiplyFunction PotentialSizeIncrement
                VariableReference MaximumSize: VariableName=[Grain].MaximumPotentialGrainSize.Value()
                VariableReference MaximumNConc: VariableName=[Grain].MaximumNConc.Value()
        Constant WaterContent: FixedValue=0.12
        AccumulateFunction AccumThermalTime: StartStageName=FlagLeaf; EndStageName=Maturity; FractionRemovedOnCut=0; FractionRemovedOnHarvest=0; FractionRemovedOnGraze=0; FractionRemovedOnPrune=0
          VariableReference DailyThermalTimeValue: VariableName=[Phenology].ThermalTime.Value()
        ExpressionFunction Protein
          Expression=([Grain].Live.N + [Grain].Dead.N)/([Grain].Live.Wt + [Grain].Dead.Wt) * 100 * 5.71
        BiomassRemoval BiomassRemovalDefaults
          OrganBiomassRemovalType Harvest: FractionLiveToRemove=1; FractionDeadToRemove=0; FractionLiveToResidue=0; FractionDeadToResidue=0
          OrganBiomassRemovalType Cut: FractionLiveToRemove=1; FractionDeadToRemove=0; FractionLiveToResidue=0; FractionDeadToResidue=0
          OrganBiomassRemovalType Prune: FractionLiveToRemove=0; FractionDeadToRemove=0; FractionLiveToResidue=0.8; FractionDeadToResidue=0
          OrganBiomassRemovalType Graze: FractionLiveToRemove=0.6; FractionDeadToRemove=0; FractionLiveToResidue=0.2; FractionDeadToResidue=0
          OrganBiomassRemovalType Thin: FractionLiveToRemove=0; FractionDeadToRemove=0; FractionLiveToResidue=0.05; FractionDeadToResidue=0
        Constant DMConversionEfficiency: FixedValue=1
        Constant RemobilisationCost: FixedValue=0
        Constant CarbonConcentration: FixedValue=0.4
        Live Biomass: DMDOfStructural=0.6
        Dead Biomass: DMDOfStructural=0.6
      Leaf: MaxCover=1; Albedo=0.25; Gsmax=0.011; R50=150; MicroClimatePresent=true; KDead=0.1; MaximumMainStemLeafNumber=30
        zero: CurrentExpandingLeaf, StartFractionExpanded, FractionNextleafExpanded, DeadNodesYesterday, GrowthRespiration, FRGR, PotentialEP, TipsAtEmergence, CohortsAtInitialisation, FractionDied
        LeafCohort InitialLeaves[1]: Rank=1; Area=200
          zero: NReallocationFactor, DMReallocationFactor, NRetranslocationFactor, DMRetranslocationFactor, ShadeInducedSenRate, SenescedFrac, DeltaPotentialArea, DeltaStressConstrainedArea, DeltaCarbonConstrainedArea, PotentialStructuralDMAllocation, PotentialMetabolicDMAllocation, MetabolicNReallocated, MetabolicWtReallocated, StorageNReallocated, StorageWtReallocated, MetabolicNRetranslocated, StorageNRetrasnlocated, DMRetranslocated, MetabolicNAllocation, StructuralDMAllocation, MetabolicDMAllocation, MaintenanceRespiration
        LeafCohort InitialLeaves[2]: Rank=2
          zero: NReallocationFactor, DMReallocationFactor, NRetranslocationFactor, DMRetranslocationFactor, ShadeInducedSenRate, SenescedFrac, DeltaPotentialArea, DeltaStressConstrainedArea, DeltaCarbonConstrainedArea, PotentialStructuralDMAllocation, PotentialMetabolicDMAllocation, MetabolicNReallocated, MetabolicWtReallocated, StorageNReallocated, StorageWtReallocated, MetabolicNRetranslocated, StorageNRetrasnlocated, DMRetranslocated, MetabolicNAllocation, StructuralDMAllocation, MetabolicDMAllocation, Area, MaintenanceRespiration
        ArrayBiomass CohortArrayLive: Propertys=[[Leaf].Live]; ArraySize=[Leaf].MaxNodeNo
        ArrayBiomass CohortArrayDead: Propertys=[[Leaf].Dead]; ArraySize=[Leaf].MaxNodeNo
        LeafCohortParameters CohortParameters: ExpansionStressValue=0
          Constant NReallocationFactor: FixedValue=1
          Constant MaintenanceRespirationFunction: FixedValue=0
          Constant NRetranslocationFactor: FixedValue=0.03
          Constant DMReallocationFactor: FixedValue=1
          Constant DMRetranslocationFactor: FixedValue=0.8
          MinimumFunction CellDivisionStress
            LinearInterpolationFunction WaterStressFactor: XProperty=[Oats].WaterSupplyDemandRatio
              XYPairs: X=[0.5, 1]; Y=[0.1, 1]
            LinearInterpolationFunction NitrogenStressFactor: XProperty=[Oats].Leaf.Fn
              XYPairs: X=[0, 0.5, 1]; Y=[0.1, 0.1, 1]
          MinimumFunction ExpansionStress
            LinearInterpolationFunction WaterStress: XProperty=[Root].WaterTensionFactor
              XYPairs: X=[0.1, 1, 1.3]; Y=[0, 1, 1]
            LinearInterpolationFunction TemperatureEffect: XProperty=[Phenology].MeanTemp.Value()
              XYPairs: X=[0, 12, 14]; Y=[0, 1, 1]
            LinearInterpolationFunction NitrogenStressFactor: XProperty=[Oats].Leaf.Fn
              XYPairs: X=[0, 0.5, 1]; Y=[0.1, 0.1, 1]
          MultiplyFunction MaxArea
            Constant AreaLargestLeaves: FixedValue=4000; Units=mm^2
              Memo
                As per NZ Lincoln data set
            LinearInterpolationFunction AgeFactor: XProperty=[Phenology].Stage
              XYPairs: X=[3, 3.45, 4]; Y=[0.1, 0.5, 1]
          MultiplyFunction GrowthDuration
            Constant Multiplier: FixedValue=1.75
            VariableReference Phyllochron: VariableName=[Structure].Phyllochron.Value()
            LinearInterpolationFunction AgeFactor: XProperty=[Phenology].Stage
              XYPairs: X=[3, 4, 5]; Y=[1, 1, 1]
          MultiplyFunction LagDuration
            LinearInterpolationFunction AgeFactor: XProperty=[Phenology].Stage
              XYPairs: X=[3, 4, 5]; Y=[0.4, 1, 1]
            SubtractFunction LastLeafDuration
              AddFunction ThermalTimeToRipe
                VariableReference EarlyReproductive: VariableName=[Phenology].EarlyReproductive.Target.Value()
                VariableReference GrainDevelopment: VariableName=[Phenology].GrainDevelopment.Target.Value()
                VariableReference GrainFilling: VariableName=[Phenology].GrainFilling.Target.Value()
                VariableReference Maturing: VariableName=[Phenology].Maturing.Target.Value()
                VariableReference Ripening: VariableName=[Phenology].Ripening.Target.Value()
              VariableReference SenescenceDuration: VariableName=[Leaf].CohortParameters.SenescenceDuration.Value()
          MultiplyFunction SenescenceDuration
            Constant Multiplier: FixedValue=6
            VariableReference Phyllochron: VariableName=[Structure].Phyllochron.Value()
          Constant DetachmentLagDuration: FixedValue=1000000
          Constant DetachmentDuration: FixedValue=1000000
          Constant RelativeBranchLeafSize: FixedValue=1
          LinearInterpolationFunction MaximumNConc: XProperty=[Phenology].Stage
            XYPairs: X=[3, 4, 6]; Y=[0.08, 0.05, 0.02]
          MultiplyFunction CriticalNConc
            LinearInterpolationFunction CriticalNConcAt350ppm: XProperty=[Phenology].Stage
              XYPairs: X=[3, 4, 6]; Y=[0.07, 0.04, 0.015]
            LinearInterpolationFunction CO2Factor: XProperty=[Weather].CO2
              XYPairs: X=[350, 700]; Y=[1, 0.93]
          LinearInterpolationFunction MinimumNConc: XProperty=[Phenology].Stage
            XYPairs: X=[3, 4, 6]; Y=[0.01, 0.005, 0.005]
          AddFunction DroughtInducedLagAcceleration
            Constant One: FixedValue=1
            MultiplyFunction Stress
              Constant StressResponseCoefficient: FixedValue=1
              LinearInterpolationFunction StressFactor: XProperty=[Oats].WaterSupplyDemandRatio
                XYPairs: X=[0, 0.5]; Y=[0.5, 0]
          AddFunction DroughtInducedSenAcceleration: same as Replacements.Oats.Leaf.CohortParameters.DroughtInducedLagAcceleration
          LinearInterpolationFunction SpecificLeafAreaMax: XProperty=[Phenology].Stage
            XYPairs: X=[2, 3, 4]; Y=[25000, 30000, 40000]
            Memo
              Initial SLA is determined as the average of max and min SLA
          LinearInterpolationFunction SpecificLeafAreaMin: XProperty=[Leaf].Fn
            XYPairs: X=[0.4, 1]; Y=[10000, 18000]
          Constant InitialNConc: FixedValue=0
          Constant StructuralFraction: FixedValue=0.3
          Constant StorageFraction: FixedValue=0
          Constant LeafSizeShapeParameter: FixedValue=0.3
          Constant SenessingLeafRelativeSize: FixedValue=1; Units=0-1
          MultiplyFunction ShadeInducedSenescenceRate
            LinearInterpolationFunction CoverEffect: XProperty=[Leaf].CohortCurrentRankCoverAbove
              XYPairs: X=[0, 0.9, 0.95, 1]; Y=[0, 0, 0.01, 0.03]
            VariableReference ThermalTime: VariableName=[Phenology].ThermalTime.Value()
          ArrayFunction LagDurationAgeMultiplier: Values=1 1 1
          ArrayFunction SenescenceDurationAgeMultiplier: Values=1 1 1
          ArrayFunction LeafSizeAgeMultiplier: Values=1 1 1 1 1 1 1 1 1 1 1 1
          Constant RemobilisationCost: FixedValue=0
          Constant CarbonConcentration: FixedValue=0.4
        RUEModel Photosynthesis
          Constant RUE: FixedValue=1.6
            Memo
              WHOLE PLANT RUE = bigger than RUE calculated using above ground biomass.
              1.35 measured for Oats at Gatton 2007 (Above ground biomass only) so assume 20% more for root biomass.
          WeightedTemperatureFunction FT: MaximumTemperatureWeighting=0.75
            XYPairs: X=[0, 15, 25, 35]; Y=[0, 1, 1, 0]
          LinearInterpolationFunction FN: XProperty=[Leaf].Fn
            XYPairs: X=[0, 1, 1.5]; Y=[0, 1, 1]
          LinearInterpolationFunction FW: XProperty=[Leaf].Fw
            XYPairs: X=[0, 1, 1]; Y=[0, 1, 1]
          LinearInterpolationFunction FVPD: XProperty=[Photosynthesis].VPD
            XYPairs: X=[0, 10, 40]; Y=[1, 1, 0]
          RUECO2Function FCO2: PhotosyntheticPathway=C3
          VariableReference RadnInt: VariableName=[Leaf].RadIntTot
        Constant FrostFraction: FixedValue=0
        VariableReference ThermalTime: VariableName=[Phenology].ThermalTime.Value()
        MinimumFunction FRGRFunction
          VariableReference RUE_FT: VariableName=[Leaf].Photosynthesis.FT.Value()
          MinimumFunction Others
            VariableReference RUE_FN: VariableName=[Leaf].Photosynthesis.FN.Value()
            VariableReference RUE_FVPD: VariableName=[Leaf].Photosynthesis.FVPD.Value()
        BiomassRemoval BiomassRemovalDefaults
          OrganBiomassRemovalType Harvest: FractionLiveToRemove=0; FractionDeadToRemove=0; FractionLiveToResidue=0.3; FractionDeadToResidue=0.3
          OrganBiomassRemovalType Cut: FractionLiveToRemove=0.8; FractionDeadToRemove=0.8; FractionLiveToResidue=0; FractionDeadToResidue=0
          OrganBiomassRemovalType Prune: FractionLiveToRemove=0; FractionDeadToRemove=0; FractionLiveToResidue=0.6; FractionDeadToResidue=0.6
          OrganBiomassRemovalType Graze: FractionLiveToRemove=0.6; FractionDeadToRemove=0.6; FractionLiveToResidue=0.1; FractionDeadToResidue=0.1
          OrganBiomassRemovalType Thin: FractionLiveToRemove=0; FractionDeadToRemove=0; FractionLiveToResidue=0.05; FractionDeadToResidue=0.05
        Constant ExtinctionCoeff: FixedValue=0.45
          Memo
            Experimenting with extinction coeff as per measured in Gatton 2007 (0.45). Orig value = wheat = 0.5
        Constant StructuralFraction: FixedValue=0.5
        Constant DMConversionEfficiency: FixedValue=1
        ApexStandard
        Constant RemobilisationCost: FixedValue=0
        Constant CarbonConcentration: FixedValue=0.4
      GenericOrgan Stem
        PhaseLookup StructuralFraction
          PhaseLookupValue VegetativeGrowth: Start=Sowing; End=Flowering
            Constant Fraction: FixedValue=0.7
          PhaseLookupValue ReproductiveGrowth: Start=Flowering; End=HarvestRipe
            Constant Fraction: FixedValue=0.5
        Constant SenescenceRate: FixedValue=0; Units=/d
        LinearInterpolationFunction MaximumNConc: XProperty=[Phenology].Stage
          XYPairs: X=[3, 4, 4.5, 6]; Y=[0.05, 0.04, 0.015, 0.012]
        Constant MinimumNConc: FixedValue=0.0018
        PhaseBasedSwitch NitrogenDemandSwitch: Start=Emergence; End=StartGrainFill
        Constant NReallocationFactor: FixedValue=0
        PhaseLookup NRetranslocationFactor
          PhaseLookupValue VegetativeGrowth: Start=Sowing; End=Flowering
            Constant Fraction: FixedValue=0
          PhaseLookupValue ReproductiveGrowth: Start=Flowering; End=HarvestRipe
            Constant Fraction: FixedValue=0.5
        PhaseLookup DMRetranslocationFactor
          PhaseLookupValue VegetativeGrowth: Start=Emergence; End=StartGrainFill
            Constant DMRetranslocationFactor: FixedValue=0
          PhaseLookupValue ReproductiveGrowth: Start=StartGrainFill; End=EndGrainFill
            Constant DMRetranslocationFactor: FixedValue=0
        PartitionFractionDemandFunction DMDemandFunction
          PhaseLookup PartitionFraction
            PhaseLookupValue PreStemElongation: Start=Emergence; End=TerminalSpikelet
              Constant StemFraction: FixedValue=0.4
            PhaseLookupValue StemElongation: Start=TerminalSpikelet; End=FlagLeaf
              Constant StemFraction: FixedValue=0.7
            PhaseLookupValue EarEmergence: Start=FlagLeaf; End=Flowering
              Constant StemFraction: FixedValue=0.7
        BiomassRemoval BiomassRemovalDefaults
          OrganBiomassRemovalType Harvest: FractionLiveToRemove=0.5; FractionDeadToRemove=0; FractionLiveToResidue=0.1; FractionDeadToResidue=0
          OrganBiomassRemovalType Cut: FractionLiveToRemove=0.8; FractionDeadToRemove=0; FractionLiveToResidue=0; FractionDeadToResidue=0
          OrganBiomassRemovalType Prune: FractionLiveToRemove=0; FractionDeadToRemove=0; FractionLiveToResidue=0.6; FractionDeadToResidue=0
          OrganBiomassRemovalType Graze: FractionLiveToRemove=0.6; FractionDeadToRemove=0; FractionLiveToResidue=0.2; FractionDeadToResidue=0
          OrganBiomassRemovalType Thin: FractionLiveToRemove=0; FractionDeadToRemove=0; FractionLiveToResidue=0.05; FractionDeadToResidue=0
        DivideFunction PercentWSC
          VariableReference WSC: VariableName=[Stem].Live.StorageWt
          VariableReference StemWt: VariableName=[Stem].Live.Wt
        Constant InitialWtFunction: FixedValue=0; Units=g/m^2
        Constant DetachmentRateFunction: FixedValue=0; Units=/d
        Constant MaintenanceRespirationFunction: FixedValue=0; Units=0-1
        Constant DMConversionEfficiency: FixedValue=1; Units=0-1
        Constant DMReallocationFactor: FixedValue=0
        VariableReference CriticalNConc: VariableName=[Stem].MinimumNConc.Value()
        Constant RemobilisationCost: FixedValue=0
        Constant CarbonConcentration: FixedValue=0.4
      Root: GrowthRespiration=0; MaintenanceRespiration=0
        Constant KLModifier: FixedValue=1
        Constant SoilWaterEffect: FixedValue=1
        Constant MaxDailyNUptake: FixedValue=20
        Constant SenescenceRate: FixedValue=0.005
        Constant StructuralFraction: FixedValue=1
        Constant MaximumRootDepth: FixedValue=1000000
        Constant MaximumNConc: FixedValue=0.01
        Constant MinimumNConc: FixedValue=0.01
        PhaseBasedSwitch NitrogenDemandSwitch: Start=Germination; End=Maturity
        BiomassRemoval BiomassRemovalDefaults
          OrganBiomassRemovalType Harvest: FractionLiveToRemove=0; FractionDeadToRemove=0; FractionLiveToResidue=0.2; FractionDeadToResidue=0
          OrganBiomassRemovalType Cut: FractionLiveToRemove=0; FractionDeadToRemove=0; FractionLiveToResidue=0.3; FractionDeadToResidue=0
          OrganBiomassRemovalType Prune: FractionLiveToRemove=0; FractionDeadToRemove=0; FractionLiveToResidue=0.1; FractionDeadToResidue=0
          OrganBiomassRemovalType Graze: FractionLiveToRemove=0; FractionDeadToRemove=0; FractionLiveToResidue=0.15; FractionDeadToResidue=0
          OrganBiomassRemovalType Thin: FractionLiveToRemove=0; FractionDeadToRemove=0; FractionLiveToResidue=0.05; FractionDeadToResidue=0
        Constant KNO3: FixedValue=0.02
        Constant KNH4: FixedValue=0.01
        Constant InitialDM: FixedValue=0.005; Units=g/plant
        Constant SpecificRootLength: FixedValue=105; Units=m/g
        MultiplyFunction RootFrontVelocity
          PhaseLookup PotentialRootFrontVelocity
            PhaseLookupValue PreEmergence: Start=Germination; End=Emergence
              Constant Value: FixedValue=5; Units=mm/d
            PhaseLookupValue PostEmergence: Start=Emergence; End=Maturity
              Constant Value: FixedValue=20; Units=mm/d
          WeightedTemperatureFunction TemperatureFactor: MaximumTemperatureWeighting=0.5
            XYPairs: X=[0, 15, 25, 35]; Y=[0, 1, 1, 0]
          LinearInterpolationFunction WaterFactor: XProperty=[SoilWaterScale]
            SoilWaterScale
            XYPairs: X=[0, 0.25, 1]; Y=[0, 1, 1]
        LinearInterpolationFunction NUptakeSWFactor: XProperty=[SoilWaterScale]
          SoilWaterScale
          XYPairs: X=[0, 1]; Y=[0, 1]
          Memo
            This is modelled in the same way as the old wheat model where potential N uptake is decreased as the soil dries as described by NUptakeSWFactor
        PartitionFractionDemandFunction DMDemandFunction
          PhaseLookup PartitionFraction
            PhaseLookupValue PreEmergence: Start=Germination; End=Emergence
              Constant Value: FixedValue=0
            PhaseLookupValue PreFlowering: Start=Emergence; End=Flowering
              LinearInterpolationFunction AgeFactor: XProperty=[Phenology].Stage
                XYPairs: X=[3, 4]; Y=[0.5, 0.2]
            PhaseLookupValue PostFlowering: Start=Flowering; End=EndGrainFill
              Constant Value: FixedValue=0.2
        Constant DMConversionEfficiency: FixedValue=1
        Constant MaintenanceRespirationFunction: FixedValue=1
        Constant RemobilisationCost: FixedValue=0
        Constant CarbonConcentration: FixedValue=0.4
      GenericOrgan Panicle
        PopulationBasedDemandFunction DMDemandFunction
          VariableReference ThermalTime: VariableName=[Phenology].ThermalTime.Value()
          Constant ExpansionStressXXXX: FixedValue=1
          MinimumFunction ExpansionStress
            LinearInterpolationFunction WaterStress: XProperty=[Root].WaterTensionFactor
              XYPairs: X=[0.1, 1, 1.3]; Y=[0, 1, 1]
            LinearInterpolationFunction TemperatureEffect: XProperty=[Phenology].MeanTemp.Value()
              XYPairs: X=[0, 12, 14]; Y=[0, 1, 1]
            LinearInterpolationFunction NitrogenStressFactor: XProperty=[Oats].Leaf.Fn
              XYPairs: X=[0, 0.5, 1]; Y=[0.1, 0.1, 1]
          VariableReference OrganPopulation: VariableName=[Panicle].HeadNumber.Value()
          Constant StartStage: FixedValue=4.8
          Constant MaximumOrganWt: FixedValue=0.4; Units=g
          AddFunction GrowthDuration
            VariableReference EarlyReproductive: VariableName=[Phenology].EarlyReproductive.Target.Value()
            VariableReference GrainDevelopment: VariableName=[Phenology].GrainDevelopment.Target.Value()
        Constant NReallocationFactor: FixedValue=0
        Constant NRetranslocationFactor: FixedValue=0.3
        Constant MaximumNConc: FixedValue=0.025
        Constant StructuralFraction: FixedValue=0.9
        Constant SenescenceRate: FixedValue=0; Units=/d
        Constant MinimumNConc: FixedValue=0.02
        BiomassRemoval BiomassRemovalDefaults: same as Replacements.Oats.Stem.BiomassRemovalDefaults
        PhaseBasedSwitch NitrogenDemandSwitch: Start=Emergence; End=StartGrainFill
        PhaseLookup DMRetranslocationFactor
          PhaseLookupValue VegetativeGrowth: Start=Emergence; End=StartGrainFill
            Constant DMRetranslocationFactor: FixedValue=0
          PhaseLookupValue ReproductiveGrowth: Start=StartGrainFill; End=EndGrainFill
            Constant DMRetranslocationFactor: FixedValue=0.5
        Constant InitialWtFunction: FixedValue=0; Units=g/m^2
        Constant DetachmentRateFunction: FixedValue=0; Units=/d
        Constant MaintenanceRespirationFunction: FixedValue=0; Units=0-1
        Constant DMConversionEfficiency: FixedValue=1; Units=0-1
        MultiplyFunction HeadNumber
          VariableReference StemNumber: VariableName=[Structure].TotalStemPopn
          Constant PaniclesPerStem: FixedValue=0.83; Units=0-1
        Constant DMReallocationFactor: FixedValue=0
        VariableReference CriticalNConc: VariableName=[Panicle].MinimumNConc.Value()
        Constant RemobilisationCost: FixedValue=0
        Constant CarbonConcentration: FixedValue=0.4
      CompositeBiomass AboveGround: DMDOfStructural=0.6
        Propertys=[[Leaf].Live, [Leaf].Dead, [Stem].Live, [Stem].Dead, [Panicle].Live, [Panicle].Dead, [Grain].Live, [Grain].Dead]
      CompositeBiomass AboveGroundLive: DMDOfStructural=0.6; Propertys=[[Leaf].Live, [Stem].Live, [Panicle].Live, [Grain].Live]
      CompositeBiomass AboveGroundDead: DMDOfStructural=0.6; Propertys=[[Leaf].Dead, [Stem].Dead, [Panicle].Dead, [Grain].Dead]
      CompositeBiomass BelowGround: DMDOfStructural=0.6; Propertys=[[Root].Live, [Root].Dead]
      CompositeBiomass Total: DMDOfStructural=0.6
        Propertys=[[Leaf].Live, [Leaf].Dead, [Stem].Live, [Stem].Dead, [Root].Live, [Root].Dead, [Panicle].Live, [Panicle].Dead, [Grain].Live, [Grain].Dead]
      CompositeBiomass TotalLive: DMDOfStructural=0.6
        Propertys=[[Leaf].Live, [Stem].Live, [Root].Live, [Panicle].Live, [Grain].Live]
      CompositeBiomass TotalDead: DMDOfStructural=0.6
        Propertys=[[Leaf].Dead, [Stem].Dead, [Root].Dead, [Panicle].Dead, [Grain].Dead]
      CompositeBiomass Ear: DMDOfStructural=0.6
        Propertys=[[Panicle].Live, [Grain].Live, [Panicle].Dead, [Grain].Dead]
        Memo
          The Ear composite biomass object includes the Live and dead pools of all organs within the Ear to allow output for total dry matter and Nutrient contents, including total structural, non-structural and metabolic pools.
      CompositeBiomass StemPlusPanicle: DMDOfStructural=0.6; Propertys=[[Stem].Live, [Panicle].Live, [Stem].Dead, [Panicle].Dead]
      CultivarFolder Cultivars
        Cultivar Drummond
          Command:
            [Phenology].MinimumLeafNumber.FixedValue = 8.5
            [Phenology].VrnSensitivity.FixedValue = 7
            [Phenology].PpSensitivity.FixedValue = 3
            [Phenology].EarlyReproductiveLongDayBase.FixedValue = 3
            [Phenology].EarlyReproductivePpSensitivity.FixedValue = 2
            [Structure].Phyllochron.BasePhyllochron.FixedValue = 75
            [Structure].BranchingRate.StressFactors.CoverEffect.XYPairs.X = 0,0.2,0.35
            [Leaf].CohortParameters.MaxArea.AreaLargestLeaves.FixedValue = 4000
            [Structure].BranchingRate.PotentialBranchingRate.Vegetative.PotentialBranchingRate.XYPairs.X = 1,2,3.99,4,5,6,7,8,9
            [Leaf].CohortParameters.GrowthDuration.AgeFactor.XYPairs.Y = 1,1,0.1
            [Grain].MaximumPotentialGrainSize.FixedValue = 0.05
            [Grain].NumberFunction.GrainNumber.GrainsPerGramOfStem.FixedValue = 40
        Cultivar Drummond_orig
          Command:
            [Phenology].MinimumLeafNumber.FixedValue = 9
            [Phenology].VrnSensitivity.FixedValue = 0
            [Phenology].PpSensitivity.FixedValue = 10
            [Structure].Phyllochron.BasePhyllochron.FixedValue = 80
            [Structure].BranchingRate.StressFactors.CoverEffect.XYPairs.X = 0,0.2,0.35
            [Leaf].CohortParameters.MaxArea.AreaLargestLeaves.FixedValue = 4000
            [Structure].BranchingRate.PotentialBranchingRate.Vegetative.PotentialBranchingRate.XYPairs.X = 1,2,3.99,4,5,6,7,8,9
        Cultivar Milton
          Command:
            [Phenology].MinimumLeafNumber.FixedValue = 8.5
            [Phenology].VrnSensitivity.FixedValue = 7
            [Phenology].PpSensitivity.FixedValue = 3
            [Phenology].EarlyReproductiveLongDayBase.FixedValue = 2
            [Phenology].EarlyReproductivePpSensitivity.FixedValue = 0
            [Structure].Phyllochron.BasePhyllochron.FixedValue = 105
            [Leaf].CohortParameters.MaxArea.AreaLargestLeaves.FixedValue = 4000
            [Leaf].CohortParameters.SenescenceDuration.Multiplier.FixedValue = 3
            [Leaf].CohortParameters.GrowthDuration.AgeFactor.XYPairs.Y = 1,1,0.1
            [Grain].MaximumPotentialGrainSize.FixedValue = 0.05
            [Grain].NumberFunction.GrainNumber.GrainsPerGramOfStem.FixedValue = 50
            [Leaf].ExtinctionCoeff.FixedValue = 0.6
        Cultivar Hokonui
          Command:
            [Phenology].MinimumLeafNumber.FixedValue = 9
            [Phenology].VrnSensitivity.FixedValue = 0
            [Phenology].PpSensitivity.FixedValue = 10
            [Structure].Phyllochron.BasePhyllochron.FixedValue = 90
            [Leaf].CohortParameters.GrowthDuration.AgeFactor.XYPairs.Y = 1,1,0.1
        Cultivar Stampede
          Command:
            [Phenology].MinimumLeafNumber.FixedValue = 9
            [Phenology].VrnSensitivity.FixedValue = 0
            [Phenology].PpSensitivity.FixedValue = 10
            [Structure].Phyllochron.BasePhyllochron.FixedValue = 80
            [Leaf].CohortParameters.GrowthDuration.AgeFactor.XYPairs.Y = 1,1,0.1
        Cultivar Coolibah
          Command:
            [Phenology].MinimumLeafNumber.FixedValue = 9
            [Phenology].VrnSensitivity.FixedValue = 5.3
            [Phenology].PpSensitivity.FixedValue = 3.0
            [Structure].Phyllochron.BasePhyllochron.FixedValue = 90
            [Leaf].CohortParameters.MaxArea.AreaLargestLeaves.FixedValue = 5000
            [Phenology].EarlyReproductivePpSensitivity.FixedValue = 0
            [Phenology].EarlyReproductiveLongDayBase.FixedValue = 2
            [Structure].BranchingRate.StressFactors.CoverEffect.XYPairs.X = 0,0.25,0.5
          Memo
            Leaf appearance rate calibrated using data from Gatton 2007 for Taipan and Coolibah
        Cultivar Taipan
          Command:
            [Phenology].MinimumLeafNumber.FixedValue = 9
            [Phenology].VrnSensitivity.FixedValue = 10
            [Phenology].PpSensitivity.FixedValue = 7.5
            [Phenology].EarlyReproductivePpSensitivity.FixedValue = 3
            [Phenology].EarlyReproductiveLongDayBase.FixedValue = 3
            [Structure].Phyllochron.BasePhyllochron.FixedValue = 90
            [Leaf].CohortParameters.MaxArea.AreaLargestLeaves.FixedValue = 8000
          Memo
            Leaf appearance rate calibrated using data from Gatton 2007 for Taipan and Coolibah
        Cultivar Wintaroo
          Command:
            [Phenology].MinimumLeafNumber.FixedValue = 7
            [Phenology].VrnSensitivity.FixedValue = 2
            [Phenology].PpSensitivity.FixedValue = 2
            [Phenology].EarlyReproductivePpSensitivity.FixedValue = 0
            [Phenology].EarlyReproductiveLongDayBase.FixedValue = 2
            [Structure].Phyllochron.BasePhyllochron.FixedValue = 90
            [Structure].BranchingRate.PotentialBranchingRate.Vegetative.PotentialBranchingRate.XYPairs.X = 1,2,3.99,4,5,6,7,8,9
            [Leaf].CohortParameters.MaxArea.AreaLargestLeaves.FixedValue = 5000
            [Panicle].HeadNumber.PaniclesPerStem.FixedValue = 0.6
        Cultivar Kangaroo
          Command:
            [Phenology].MinimumLeafNumber.FixedValue = 7
            [Phenology].VrnSensitivity.FixedValue = 4
            [Phenology].PpSensitivity.FixedValue = 4
            [Phenology].EarlyReproductivePpSensitivity.FixedValue = 0
            [Phenology].EarlyReproductiveLongDayBase.FixedValue = 2
            [Structure].Phyllochron.BasePhyllochron.FixedValue = 90
            [Leaf].CohortParameters.MaxArea.AreaLargestLeaves.FixedValue = 7000
            [Leaf].CohortParameters.SpecificLeafAreaMax.XYPairs.Y = 20000,30000,30000
            [Structure].BranchingRate.PotentialBranchingRate.Vegetative.PotentialBranchingRate.XYPairs.X = 1,2,3.99,4,5,6,7,8,9
        Cultivar Brusher
          Command:
            [Phenology].MinimumLeafNumber.FixedValue = 7
            [Phenology].VrnSensitivity.FixedValue = 1
            [Phenology].PpSensitivity.FixedValue = 1
            [Phenology].EarlyReproductivePpSensitivity.FixedValue = 0
            [Phenology].EarlyReproductiveLongDayBase.FixedValue = 2
            [Structure].Phyllochron.BasePhyllochron.FixedValue = 80
            [Leaf].CohortParameters.MaxArea.AreaLargestLeaves.FixedValue = 8000
            [Leaf].CohortParameters.SpecificLeafAreaMax.XYPairs.Y = 20000,30000,30000
            [Structure].BranchingRate.PotentialBranchingRate.Vegetative.PotentialBranchingRate.XYPairs.X = 1,2,3.99,4,5,6,7,8,9
        Cultivar Algerian
          Command:
            [Phenology].MinimumLeafNumber.FixedValue = 9
            [Phenology].VrnSensitivity.FixedValue = 12
            [Phenology].PpSensitivity.FixedValue = 6
            [Phenology].EarlyReproductivePpSensitivity.FixedValue = 4
            [Phenology].EarlyReproductiveLongDayBase.FixedValue = 3
            [Structure].Phyllochron.BasePhyllochron.FixedValue = 105
        Cultivar Nugene
          Command:
            [Phenology].MinimumLeafNumber.FixedValue = 9
            [Phenology].VrnSensitivity.FixedValue = 10
            [Phenology].PpSensitivity.FixedValue = 7.5
            [Phenology].EarlyReproductivePpSensitivity.FixedValue = 3
            [Phenology].EarlyReproductiveLongDayBase.FixedValue = 3
            [Structure].Phyllochron.BasePhyllochron.FixedValue = 90
            [Leaf].CohortParameters.MaxArea.AreaLargestLeaves.FixedValue = 8000
        Cultivar Drover
          Command:
            [Phenology].MinimumLeafNumber.FixedValue = 9
            [Phenology].VrnSensitivity.FixedValue = 4
            [Phenology].PpSensitivity.FixedValue = 9
            [Phenology].EarlyReproductivePpSensitivity.FixedValue = 6
            [Phenology].EarlyReproductiveLongDayBase.FixedValue = 3
            [Structure].Phyllochron.BasePhyllochron.FixedValue = 80
            [Leaf].CohortParameters.MaxArea.AreaLargestLeaves.FixedValue = 8000
        Cultivar Genie: same as Replacements.Oats.Cultivars.Nugene
        Cultivar Aladdin: same as Replacements.Oats.Cultivars.Nugene
        Cultivar Comet: same as Replacements.Oats.Cultivars.Nugene
        Cultivar Wizard: same as Replacements.Oats.Cultivars.Nugene
        Cultivar Bond: same as Replacements.Oats.Cultivars.Nugene
    Plant FodderBeet: CropType=FodderBeet
      OrganArbitrator Arbitrator
        Memo
          The partitioning of biomass to fodder beet organs follows a "Relative Allocation" routine (see Arbitrator module documentation) guided by coefficients derived from the October sowing date data of the test dataset
        PriorityAllocation NArbitrator
        PriorityAllocation DMArbitrator
      Phenology: FractionBiomassRemoved=0; DaysAfterSowing=0
        Memo
          The fodder beet model is described for growth and dry matter production using solar radiation and temperature
          as driving functions. The effect of temperature is quantified using a thermal-time accumulation function.
          Thermal-time is calculated in degree days for ambient temperature above a base temperature (Tbase). Tbase is
          assumed to be 0°C ([Chakwizira_etal_2016a]).
        MultiplyFunction ThermalTime
          PhaseLookup
            PhaseLookupValue SoilTemperature: Start=Sowing; End=Germination
              SoilTemperatureFunction ThermalTime: maxt_soil_surface=20; mint_soil_surface=10
                XYPairs: X=[0, 25, 30, 45]; Y=[0, 25, 25, 0]
              Memo
                The effect of soil temperature can go beyond germination as has been demonstrated in previous studies
                ([Stone_etal_1998]).
            PhaseLookupValue AirTemperature: Start=Germination; End=Maturity
              AirTemperatureFunction ThermalTime
                XYPairs: X=[0, 25, 30, 45]; Y=[0, 25, 25, 0]
              Memo
                Temperature is extrapolated to 3-hourly values from daily maximum and minimum using a sinusoidal function, and thermal-time accumulation is calculated for each period and combined to give daily values ([Jones_etal_1986]). The optimum temperature was set at 25–30°C with a maximum of 45°C, targets assumed similar to those of sugar beet reported by ([Ober_Rajabi_2010]) and ([Sanghera_etal_2016]).
          AddFunction DroughtPhenologyAcelleration
            Constant One: FixedValue=1
            MultiplyFunction Stress
              Constant StressResponseCoefficient: FixedValue=2
              LinearInterpolationFunction StressFactor: XProperty=[FodderBeet].WaterSupplyDemandRatio
                XYPairs: X=[0, 1]; Y=[0, 0]
        GerminatingPhase Planted: Start=Sowing; End=Germination
        EmergingPhase Germinating: ShootLag=0; ShootRate=12.5; Start=Germination; End=PreEmerge
          VariableReference ThermalTime: VariableName=[Phenology].ThermalTime.Value()
          Memo
            This is an empirical fit where 12.5°Cd per mm sowing depth is assumed based on the 2014 sowing date trial results ([Khaembah_etal_2017]).
        GenericPhase Emerging: Start=PreEmerge; End=Established
          Constant Target: FixedValue=400; Units=oCd
          VariableReference ThermalTime: VariableName=[Phenology].ThermalTime.Value()
          Memo
            This an empirical fit of 400°Cd estimated from the October data of the 2014 sowing date trial ([Khaembah_etal_2017]).
        GenericPhase Vegetative: Start=Established; End=InitRepro
          VariableReference ThermalTime: VariableName=[Phenology].ThermalTime.Value()
          MultiplyFunction Target
            LinearInterpolationFunction PhotoPeriodResponse: XProperty=[Phenology].Photoperiod.Value()
              XYPairs: X=[13, 16]; Y=[1, 1]
            Constant MaxThermalTimeToBolt: FixedValue=2700; Units=oCd
            Memo
              The effect of photoperiod on the vegetative phase is assumed neglible. The maximum TT of 3200°Cd based on the 2014 October sowing date data([Khaembah_etal_2017]) is used here.
        GenericPhase EarlyReproductive: Start=InitRepro; End=PreBolt
          Constant Target: FixedValue=1; Units=oCd
          Memo
            This an empirical fit - 400°Cd estimated from the 2014 sowing date trial ([Khaembah_etal_2017]).
          LinearInterpolationFunction ThermalTime: XProperty=[Phenology].Photoperiod.Value()
            XYPairs: X=[13, 14]; Y=[0, 1]
        GenericPhase Bolt: Start=PreBolt; End=StartBolt
          VariableReference ThermalTime: VariableName=[Phenology].ThermalTime.Value()
          Constant Target: FixedValue=800
          Memo
            The 800°Cd is is an empirical fit based on the 2014 sowing date trial ([Khaembah_etal_2017]).
        EndPhase Maturity: Start=Bolting; End=Maturity
          Constant Target: FixedValue=15000
          VariableReference ThermalTime: VariableName=[Phenology].ThermalTime.Value()
          Memo
            This is estimated to be 3600°Cd
            A value of 3600°Cd (i.e. sum of °Cd from crop emergence to the end of the vegetative phase) is assumed for the duration of the “Maturity” phase. Accumulated thermal time (TTsum) for each phase (planted–vegetative) was empirically derived from the 2014 sowing date data ([Khaembah_etal_2017]).
        AccumulateFunction AccumulatedThermalTime: StartStageName=PreEmerge; EndStageName=Maturity; FractionRemovedOnCut=0; FractionRemovedOnHarvest=0; FractionRemovedOnGraze=0; FractionRemovedOnPrune=0
          VariableReference: VariableName=[Phenology].ThermalTime.Value()
        PhotoperiodFunction Photoperiod: Twilight=-6; DayLength=0
      Structure: Initialised=false; Germinated=false; Emerged=false; CohortToInitialise=0; TipToAppear=0; ApexNum=0
        VariableReference ThermalTime: VariableName=[Phenology].ThermalTime.Value()
        LinearInterpolationFunction HeightModel: XProperty=[Structure].LeafTipsAppeared
          XYPairs: X=[0, 24]; Y=[20, 500]
          Memo
            The maximum height of 500 mm was estimated from the 2014 sowing date trial ([Khaembah_etal_2017]).
        PhaseLookupValue MainStemPrimordiaInitiationRate: Start=PreEmerge; End=Maturity
          DivideFunction NodeInitiationRateFunction
            VariableReference Phyllochron: VariableName=[Structure].Phyllochron.Phyllochron.Value()
            Constant PrimordiaPerMainstemNode: FixedValue=2
          Memo
            Assumes that leaf primordia is produced at two times faster than the leaves (i.e. half of phyllochron values) following findings for other species such as maize ([Padilla_and_Otegui_2005]).
        PhaseLookupValue Phyllochron: Start=PreEmerge; End=Maturity
          LinearInterpolationFunction Phyllochron: XProperty=[FodderBeet].Structure.LeafTipsAppeared
            XYPairs: X=[1, 3, 3.1]; Y=[100, 100, 50]
          Memo
            A two stage phyllochron (i.e. 100–50°Cd) is an empirical fit to get faster leaf appearance of the first 3 leaves. The
            50°Cd for the fourth and later-formed leaves is estimated from measured values of the 2014-2015 October sowing date treatment ([Khaembah_etal_2017]).
        Constant FinalLeafNumber: FixedValue=80
        Constant DroughtInducedBranchMortality: FixedValue=0
        Constant BranchingRate: FixedValue=0
        Constant BranchMortality: FixedValue=0
        Constant StemSenescenceAge: FixedValue=0
      GenericOrgan StorageRoot
        Constant StructuralFraction: FixedValue=0.95
        Constant SenescenceRate: FixedValue=0; Units=/d
        Constant KMaximumNConc: FixedValue=0.012
        LinearInterpolationFunction MaximumNConc: XProperty=[Structure].LeafTipsAppeared
          XYPairs: X=[1, 12, 20]; Y=[0.024, 0.024, 0.012]
        Constant MinimumNConc: FixedValue=0.006
        Constant NReallocationFactor: FixedValue=0.05
        PhaseBasedSwitch NitrogenDemandSwitch: Start=Germination; End=Maturity
        Constant NRetranslocationFactor: FixedValue=0.05
        Constant DMRetranslocationFactor: FixedValue=0.05
        Constant DMSinkCapacity: FixedValue=1
        PartitionFractionDemandFunction DMDemandFunction
          PhaseLookup PartitionFraction
            PhaseLookupValue NonReproductive: Start=PreEmerge; End=InitRepro
              LinearInterpolationFunction PartitionFraction: XProperty=[Structure].LeafTipsAppeared
                XYPairs: X=[1, 6, 16, 25]; Y=[0, 0, 0.7, 0.8]
                Memo
                  Allocation determined by node number - partitioning coefficients have been determined using the 2014 sowing date October data ([Khaembah_etal_2017]).
            PhaseLookupValue Reproductive: Start=InitRepro; End=Maturity
              Constant InitialWtFunction: FixedValue=0; Units=g/m^2
        Constant InitialWtFunction: FixedValue=0; Units=g/m^2
        Constant DetachmentRateFunction: FixedValue=0; Units=/d
        Constant MaintenanceRespirationFunction: FixedValue=0; Units=0-1
        Constant DMConversionEfficiency: FixedValue=1; Units=0-1
        BiomassRemoval BiomassRemovalDefaults
          OrganBiomassRemovalType Harvest: FractionLiveToRemove=0.5; FractionDeadToRemove=0; FractionLiveToResidue=0.1; FractionDeadToResidue=0
          OrganBiomassRemovalType Cut: FractionLiveToRemove=0.8; FractionDeadToRemove=0; FractionLiveToResidue=0; FractionDeadToResidue=0
          OrganBiomassRemovalType Prune: FractionLiveToRemove=0; FractionDeadToRemove=0; FractionLiveToResidue=0.6; FractionDeadToResidue=0
          OrganBiomassRemovalType Graze: FractionLiveToRemove=0.6; FractionDeadToRemove=0; FractionLiveToResidue=0.2; FractionDeadToResidue=0
        Constant DMReallocationFactor: FixedValue=0.8
        VariableReference CriticalNConc: VariableName=[StorageRoot].MinimumNConc.Value()
        Constant RemobilisationCost: FixedValue=0
        Constant CarbonConcentration: FixedValue=0.4
      Leaf: MaxCover=1; Albedo=0.2; Gsmax=0.015; R50=150; MicroClimatePresent=true; KDead=0.2
        zero: CurrentExpandingLeaf, StartFractionExpanded, FractionNextleafExpanded, DeadNodesYesterday, GrowthRespiration, FRGR, PotentialEP, MaximumMainStemLeafNumber, TipsAtEmergence, CohortsAtInitialisation, FractionDied
        LeafCohort InitialLeaves[1]: Rank=1; Area=50
          zero: NReallocationFactor, DMReallocationFactor, NRetranslocationFactor, DMRetranslocationFactor, ShadeInducedSenRate, SenescedFrac, DeltaPotentialArea, DeltaStressConstrainedArea, DeltaCarbonConstrainedArea, PotentialStructuralDMAllocation, PotentialMetabolicDMAllocation, MetabolicNReallocated, MetabolicWtReallocated, StorageNReallocated, StorageWtReallocated, MetabolicNRetranslocated, StorageNRetrasnlocated, DMRetranslocated, MetabolicNAllocation, StructuralDMAllocation, MetabolicDMAllocation, MaintenanceRespiration
        CompositeBiomass Total: DMDOfStructural=0.6; Propertys=[[Leaf].Live, [Leaf].Dead]
        ArrayBiomass CohortArrayLive: Propertys=[[Leaf].Live]; ArraySize=[Leaf].MaxNodeNo
        ArrayBiomass CohortArrayDead: Propertys=[[Leaf].Dead]; ArraySize=[Leaf].MaxNodeNo
        VariableReference ThermalTime: VariableName=[Phenology].ThermalTime.Value()
        RUEModel Photosynthesis
          Constant RUE: FixedValue=1.8
          Constant FN: FixedValue=1
          Constant FVPD: FixedValue=1
          LinearInterpolationFunction FW: XProperty=[Leaf].Fw
            XYPairs: X=[0, 1, 1.5]; Y=[0, 1, 1]
          WeightedTemperatureFunction FT: MaximumTemperatureWeighting=0.75
            XYPairs: X=[0, 18, 26, 45]; Y=[0.1, 1, 1, 0.1]
          RUECO2Function FCO2: PhotosyntheticPathway=C3
          VariableReference RadnInt: VariableName=[Leaf].RadIntTot
        MultiplyFunction ExtinctionCoeff
          Constant PotentialExtinctionCoeff: FixedValue=0.74
            Memo
              The extinction coefficient value of 0.74 ([Chakwizira_etal_2016a]) was used.
          LinearInterpolationFunction WaterStress: XProperty=[FodderBeet].WaterSupplyDemandRatio
            XYPairs: X=[0, 1]; Y=[0.5, 1]
        LeafCohortParameters CohortParameters: ExpansionStressValue=0
          Constant SenessingLeafRelativeSize: FixedValue=1; Units=0-1
          LinearInterpolationFunction MaxAreaPlateau: XProperty=[Structure].LeafTipsAppeared
            Memo
              Data of expansion of  laminae at three leaf positions (12th, 16th and 20th) on six plants  from the sowing date  experiment were used to give indication of ontogenic increase in maximum leaf area. The pattern of maximum leaf area for sugar beet ([Milford_etal_1985]) was assumed.
            XYPairs: X=[1, 6, 11, 15, 21, 35, 45, 50]; Y=[8000, 10000, 40000, 50000, 50000, 50000, 50000, 50000]
          MultiplyFunction MaxArea
            Constant AreaLargestLeaf: FixedValue=30000; Units=mm^2
            LinearInterpolationFunction AgeFactor: XProperty=[Structure].LeafTipsAppeared
              XYPairs: X=[1, 6, 11, 15, 21, 35, 45, 50]; Y=[0.16, 0.2, 0.8, 1, 1, 0.6, 0.4, 0.3]
            Memo
              The pattern is assumed to be similar to that of maize ([Teixeira_etal_2011]).
          LinearInterpolationFunction GrowthDuration: XProperty=[Structure].LeafTipsAppeared
            XYPairs: X=[1, 6, 11, 15, 21, 35, 45, 50]; Y=[200, 300, 500, 500, 500, 500, 500, 500]
            Memo
              The pattern is assumed to be similar to that of maize ([Teixeira_etal_2011]).
          MultiplyFunction LagDuration
            LinearInterpolationFunction PhotoperiodMultiplier: XProperty=[Phenology].Photoperiod.Value()
              XYPairs: X=[1, 10, 13, 24]; Y=[1, 1, 1, 1]
            Memo
              The pattern is assumed to be similar to that of maize ([Teixeira_etal_2011]).
            LinearInterpolationFunction LagDurationBase: XProperty=[Structure].LeafTipsAppeared
              XYPairs: X=[1, 6, 11]; Y=[100, 300, 300]
          MultiplyFunction SenescenceDuration
            LinearInterpolationFunction PhotoperiodMultiplier: XProperty=[Phenology].Photoperiod.Value()
              XYPairs: X=[1, 10, 13, 24]; Y=[1, 1, 1, 1]
            Constant BaseValue: FixedValue=1200; Units=oCd
          Constant DetachmentLagDuration: FixedValue=1000000
          Constant DetachmentDuration: FixedValue=1
          Constant StructuralFraction: FixedValue=0.5
          Constant SpecificLeafAreaMin: FixedValue=10000
          Constant SpecificLeafAreaMax: FixedValue=16000
            Memo
              Maximum leaf specific leaf area was estimated from the 2014 sowing date trial ([Khaembah_etal_2017]).
          LinearInterpolationFunction ExpansionStress: XProperty=[FodderBeet].WaterSupplyDemandRatio
            XYPairs: X=[0.5, 1]; Y=[0, 1]
          Constant MinimumNConc: FixedValue=0.025
            Memo
              The minimum, maximum and critical nitrogen concentration were determined in a previous study ([Chakwizira_etal_2016b]).
          Constant CriticalNConc: FixedValue=0.025
          Constant KMaximumNConc: FixedValue=0.04
          LinearInterpolationFunction MaximumNConc: XProperty=[Structure].LeafTipsAppeared
            XYPairs: X=[1, 6, 12]; Y=[0.06, 0.05, 0.04]
          Constant NReallocationFactor: FixedValue=0.95
          Constant NRetranslocationFactor: FixedValue=0
          Constant DMRetranslocationFactor: FixedValue=0
          Constant DMReallocationFactor: FixedValue=0.95
          Constant StorageFraction: FixedValue=0.05
          LinearInterpolationFunction ShadeInducedSenescenceRate: XProperty=[Leaf].CohortCurrentRankCoverAbove
            XYPairs: X=[0, 0.5, 0.95, 1]; Y=[0, 0, 0, 0.1]
          Constant InitialNConc: FixedValue=0
          Constant LeafSizeShapeParameter: FixedValue=0.01
          Constant MaintenanceRespirationFunction: FixedValue=0
          Constant CellDivisionStress: FixedValue=1; Units=0-1
          AddFunction DroughtInducedLagAcceleration
            Constant One: FixedValue=1
            MultiplyFunction Stress
              Constant StressResponseCoefficient: FixedValue=1
              LinearInterpolationFunction StressFactor: XProperty=[FodderBeet].WaterSupplyDemandRatio
                XYPairs: X=[0, 0.5]; Y=[0.5, 0]
          AddFunction DroughtInducedSenAcceleration: same as Replacements.FodderBeet.Leaf.CohortParameters.DroughtInducedLagAcceleration
          ArrayFunction LagDurationAgeMultiplier: Values=1 1 1
          ArrayFunction SenescenceDurationAgeMultiplier: Values=1 1 1
          ArrayFunction LeafSizeAgeMultiplier: Values=1 1 1 1 1 1 1 1 1 1 1 1
          Constant RemobilisationCost: FixedValue=0
          Constant CarbonConcentration: FixedValue=0.4
        MinimumFunction FRGRFunction: same as Replacements.Oats.Leaf.FRGRFunction
        BiomassRemoval BiomassRemovalDefaults: same as Replacements.FodderBeet.StorageRoot.BiomassRemovalDefaults
        Constant StructuralFraction: FixedValue=0.5
        Constant DMConversionEfficiency: FixedValue=1
        ApexStandard
        Constant RemobilisationCost: FixedValue=0
        Constant CarbonConcentration: FixedValue=0.4
        Constant FrostFraction: FixedValue=0
      GenericOrgan Petiole
        Constant StructuralFraction: FixedValue=0.5
        Constant KMaximumNConc: FixedValue=0.02
        LinearInterpolationFunction MaximumNConc: XProperty=[Structure].LeafTipsAppeared
          XYPairs: X=[1, 6, 17, 30]; Y=[0.04, 0.04, 0.012, 0.02]
        Constant kMinimumNConc: FixedValue=0.01
        LinearInterpolationFunction MinimumNConc: XProperty=[Structure].LeafTipsAppeared
          XYPairs: X=[1, 6, 17, 30]; Y=[0.015, 0.015, 0.012, 0.015]
        PhaseBasedSwitch NitrogenDemandSwitch: Start=Germination; End=Maturity
        Constant NRetranslocationFactor: FixedValue=0
        Constant DMRetranslocationFactor: FixedValue=0
        MaximumFunction DMDemandFunction
          Constant MinDemand: FixedValue=0
          MultiplyFunction PotentialDemand
            Constant Ratio: FixedValue=1.2
            SubtractFunction
              VariableReference leafwt: VariableName=[FodderBeet].Leaf.Live.Wt
              VariableReference Petiolewt: VariableName=[FodderBeet].Petiole.Wt
          Constant DMRetranslocationFactor: FixedValue=0
        MaximumFunction SenescenceRate
          VariableReference SenescenceRate: VariableName=[Leaf].FractionDied
          Constant Zero: FixedValue=0
        Constant DMReallocationFactor: FixedValue=0.8
        Constant NReallocationFactor: FixedValue=0.94
        Constant InitialWtFunction: FixedValue=0; Units=g/m^2
        Constant DetachmentRateFunction: FixedValue=0; Units=/d
        Constant MaintenanceRespirationFunction: FixedValue=0; Units=0-1
        Constant DMConversionEfficiency: FixedValue=1; Units=0-1
        BiomassRemoval BiomassRemovalDefaults: same as Replacements.FodderBeet.StorageRoot.BiomassRemovalDefaults
        VariableReference CriticalNConc: VariableName=[Petiole].MinimumNConc.Value()
        Constant RemobilisationCost: FixedValue=0
        Constant CarbonConcentration: FixedValue=0.4
      Root: GrowthRespiration=0; MaintenanceRespiration=0
        LinearInterpolationFunction KLModifier: XProperty=[Root].LengthDensity
          XYPairs: X=[0, 1]; Y=[1, 1]
        Constant SoilWaterEffect: FixedValue=1
        Constant MaximumRootDepth: FixedValue=1800
        PhaseLookup RootFrontVelocity
          PhaseLookupValue: Start=Germination; End=Maturity
            Constant: FixedValue=10
        Constant MaximumNConc: FixedValue=0.01
        Constant MinimumNConc: FixedValue=0.005
        PhaseBasedSwitch NitrogenDemandSwitch: Start=PreEmerge; End=Maturity
        LinearInterpolationFunction SenescenceRate: XProperty=[Leaf].FractionDied
          XYPairs: X=[0, 1]; Y=[0, 0.001]
        Constant StructuralFraction: FixedValue=1
        BiomassRemoval BiomassRemovalDefaults: same as Replacements.FodderBeet.StorageRoot.BiomassRemovalDefaults
        Constant KNO3: FixedValue=0.02; Units=g/plant
        Constant KNH4: FixedValue=0.01; Units=g/plant
        LinearInterpolationFunction NUptakeSWFactor: XProperty=[Root].RWC
          XYPairs: X=[0, 1]; Y=[0.1, 1]
        Constant InitialDM: FixedValue=5; Units=g/plant
        Constant SpecificRootLength: FixedValue=40; Units=m/g
        LinearInterpolationFunction MaxDailyNUptake: XProperty=[Root].Depth
          XYPairs: X=[0, 100, 150]; Y=[0.1, 1, 6]
          Memo
            Early growth N uptake is assumed to be 0.1 kg N/ha/day, and this increases with root growth reaching a maximumof 5.8 kg N/ha/day. The maximum N uptake per day is assumed from sugar beet data (Armstrong et al., 1986).
        PartitionFractionDemandFunction DMDemandFunction
          LinearInterpolationFunction PartitionFraction: XProperty=[Root].Depth
            XYPairs: X=[0, 1200, 2000]; Y=[0.05, 0, 0]
            Memo
              The roots were assumed to account for 5% of dry matter.
        Constant DMConversionEfficiency: FixedValue=1
        Constant MaintenanceRespirationFunction: FixedValue=1
        Constant RemobilisationCost: FixedValue=0
        Constant CarbonConcentration: FixedValue=0.4
      CompositeBiomass AboveGround: DMDOfStructural=0.6
        Propertys=[[Leaf].Live, [Leaf].Dead, [StorageRoot].Live, [StorageRoot].Dead, [Petiole].Live, [Petiole].Dead]
      CompositeBiomass AboveGroundLive: DMDOfStructural=0.6; Propertys=[[Leaf].Live, [StorageRoot].Live, [Petiole].Live]
      CompositeBiomass AboveGroundDead: DMDOfStructural=0.6; Propertys=[[Leaf].Dead, [StorageRoot].Dead, [Petiole].Dead]
      CompositeBiomass BelowGround: DMDOfStructural=0.6; Propertys=[[Root].Live, [Root].Dead]
      CompositeBiomass Total: DMDOfStructural=0.6
        Propertys=[[Leaf].Live, [Leaf].Dead, [StorageRoot].Live, [StorageRoot].Dead, [Petiole].Live, [Petiole].Dead, [Root].Live, [Root].Dead]
      CompositeBiomass TotalLive: DMDOfStructural=0.6
        Propertys=[[Leaf].Live, [Petiole].Live, [StorageRoot].Live, [Root].Live]
      CompositeBiomass TotalDead: DMDOfStructural=0.6
        Propertys=[[Leaf].Dead, [Petiole].Dead, [StorageRoot].Dead, [Root].Dead]
      LinearInterpolationFunction MortalityRate: XProperty=[Leaf].CoverGreen
        XYPairs: X=[0.98, 1]; Y=[0, 1]
      CultivarFolder Cultivars
        Cultivar Brigadier
        Cultivar Rivage
        Cultivar Jamon
  DataStore
    Input OBS: ErrorMessage=The specified file does not exist.; FileName=OBS.txt
      Memo Note
        Where:
         - n: The number of PO (predicted-observed) pairs for the given variable;
         - Slope: The slope of the straight line linear regression. A perfect fit would have a value of 1;
         - Intercept: The intercept of the straight line linear regression. A perfect fit would have a value of 0;
         - SEslope: Standard error in the slope;
         - SEintercept: Standard error in the intercept.;
         - R2: The value for the coefficient of determination. It varies between 0 and 1, where 1 is a perfect fit;
         - RMSE: Root Mean Squared Error. 0 is a perfect fit. Values less than half the standard deviation of the observed data are acceptable;
         - NSE: Nash-Sutcliffe Efficiency. Indicates how well the PO data fits the 1:1 line. Ranges from -∞ to 1 with 1 being the optimal value while values  between 0 and 1 are generally viewed as acceptable. Values < 0 indicate unacceptable model performance;
         - ME: Mean Error between predicted and observed values. 0 is a perfect fit;
         - MAE: Mean Absolute Error. 0 is a perfect fit. Values less than half the standard deviation of the observed data are acceptable;
         - RSR: Ratio between the RMSE and the standard deviation of observations. 0 is a perfect fit;
    PredictedObserved: PredictedTableName=FRNLReport; ObservedTableName=OBS; FieldNameUsedForMatch=Clock.Today
      Tests: POName=PredictedObserved
        AcceptedStats:
          Name                            n    Slope     Intercept   SEslope    SEintercept  R2        RMSE        NSE       ME           MAE         RSR
          FodderBeet.AboveGround.Live.Wt  36   0.893019  126.341     0.0359002  55.7142      0.947914  203.072     0.944551  -11.6916     172.73      0.232182
          FodderBeet.Leaf.CoverTotal      120  0.817875  0.161016    0.0342925  0.0240741    0.828194  0.0934633   0.7924    0.0387392    0.0706352   0.453729
          FodderBeet.Leaf.LAI             36   0.744769  0.357577    0.0590957  0.139496     0.823679  0.595834    0.805988  -0.136158    0.402735    0.434308
          FodderBeet.Leaf.Live.NConc      36   0.887663  0.00518141  0.115351   0.00372802   0.635264  0.00482196  0.475104  0.00162863   0.00349276  0.714364
          FodderBeet.Leaf.Live.Wt         36   1.12013   -0.251049   0.0937215  12.7442      0.807738  39.3961     0.641337  14.0451      30.3954     0.590508
          FodderBeet.Petiole.Live.Wt      36   0.494527  70.8557     0.0816921  9.40034      0.518723  62.4015     0.386157  28.8753      54.7523     0.772523
          FodderBeet.Petiole.NConc        36   0.353924  0.00855584  0.105583   0.00181316   0.248396  0.00559826  0.104762  -0.00185979  0.00443853  0.932936
          FodderBeet.Phenology.Stage      8    0.264057  2.5905      0.0554578  0.144921     0.790729  0.760991    -2.25979  0.69254      0.69254     1.68888
          FodderBeet.StorageRoot.Live.Wt  36   0.983586  46.8308     0.0432652  52.8109      0.938275  178.395     0.93418   30.3641      147.49      0.252966
          FodderBeet.StorageRoot.NConc    36   0.909168  0.00126604  0.0506158  0.000553169  0.904665  0.0014896   0.898419  0.000368709  0.00114258  0.314259
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        AcceptedStatsName=Name n Slope Intercept SEslope SEintercept R2 RMSE NSE ME MAE RSR
  Experiment RS_Rotation
    Memo Experiment Description
      #Experiment description

      ## Introduction
      This is a simulation of a crop rotation consisting of a forage species, fodder beet, grown over spring/summer and harvested in autumn, followed by a catch crop, oats. The actual experiment was done in two parts in the rain shelter facility of Plant and Food Research, Lincoln, NZ.  The experiments were designed to help develop the model for the respective plants and here they are used to further demonstrate that ApsimX can simulate water and nitrogen cycling in the field and then to examine whether catch crops are a good option for mitigating N leaching from forages.

       Part 1: Co-limitation of water and nitrogen on fodder beet physiology
       - Irrigation: 2 treatments, nil or full irrigation (to match PET)
       - Nitrogen: 3 treatments, 0 kg N/ha, 50 kg N/ha & 300 kg N/ha applied as dissolved urea with fertigator
        - 25 or 100 kg N/ha applied after emergence
        - 25 or 100 kg N/ha applied when canopy nearly reached full cover
        - 100 kg N/ha applied a month after full cover

       Part 2: Ability of oats to act as catch-crops over winter/spring
       - Irrigation: 2 treatments, low (enough to keep plants growing) or full irrigation (to match PET)
       - Nitrogen: 3 treatments, 80 kg N/ha, 125 kg N/ha & 320 kg N/ha at sowing (residual plus urea applied at sowing)

      ## Management
      Pre-experiment actions:
        23/08/2016 - Oats harvested
        02/09/2016 - Site irrigated with 25mm
        05/09/2016 - Site ploughed
        06/09/2016 - Site cambridge rolled
        17/10/2016 - Site power harrowed
        17/10/2016 - Rainshelter was rolled in
        18/10/2016 - Fertiliser application (200kg/ha of KCl, 250kg/ha of Triple Super, 200kg/ha of NaCl and 30kg/ha of Boronate 15%)
        18/10/2016 - Site cambridge rolled and harrowed

      Experiment:
       1) Fodder beet:
           - Cultivar: Rivage
           - Sowing density: 11 plants/m2
                row spacing: 45 cm
                      depth: 15 mm

          General actions:
              18/10/2016 - Sowing
              25/10/2016 - Irrigation of 5mm to all plots
              27/10/2016 - Plants started to emerge
              28/10/2016 - Irrigation of 5mm to all plots
              28/10/2016 - First fertiliser application, 25kgN/ha of urea_N to the 50kg/ha plots and 100kgN/ha o the 300kg/ha plots
              23/11/2016 - Irrigation treatments started
              18/01/2017 - Second fertiliser application, 25Nkg/ha of liquid urea_N to the 50kg/ha plots and 100kgN/ha to the 300kg/ha plots
              15/02/2017 - Final fertiliser application, 100Nkg/ha of liquid urea_N to the 300kg/ha plots
              17/05/2017 - Plots harvested

       Intercrop actions:
              19/05/2017 - All crop residues removed
              25/05/2017 - Dryland plots irrigated with 100mm, over two days
              29/05/2017 - Dryland 300N plot irrigated with 64.0mm
              30/05/2017 - Dryland 0N and 50N plots irrigated with 30.3 and 51.0mm
              22/06/2017 - Site topped with maxitell
              30/06/2017 - Site cambridge rolled
              30/06/2017 - Rainshelter was rolled off (but it was put on in a few occasions)

       2) Oats:
           - Cultivar: Milton
           - Sowing density: 300 plants/m2
                row spacing: 15 cm
                      depth: 45 mm

          General actions:
              05/07/2017 - Sowing
              05/07/2017 - Fertiliser application (400kg/ha Potash, Urea: treat4=40kgN/ha, treat5=85kgN/ha, treat6=270kgN/ha)
              24/07/2017 - Plants started to emerge
              11/09/2017 - Irrigation started in treatements 4, 5, and 6
              06/11/2017 - Irrigation extended to all plots
              04-09/01/2018 - Plots harvested
    Factors
      Factor Nit
        Factor 0
          Specifications:
            [FertiliserSchedule]
            [AdditionalActions].Script.NitFactor = 0
            [CropOperations].Script.FertFactor = 0
          Operations 0
        Factor 50
          Specifications:
            [FertiliserSchedule]
            [AdditionalActions].Script.NitFactor = 50
            [CropOperations].Script.FertFactor = 50
          Operations 50
            2016-10-28  [Fertiliser].Apply(25, Fertiliser.Types.UreaN, 10);
            2017-01-18  [Fertiliser].Apply(25, Fertiliser.Types.UreaN, 10);
        Factor 300
          Specifications:
            [FertiliserSchedule]
            [AdditionalActions].Script.NitFactor = 300
            [CropOperations].Script.FertFactor = 300
          Operations 300
            2016-10-28  [Fertiliser].Apply(100, Fertiliser.Types.UreaN, 10);
            2017-01-18  [Fertiliser].Apply(100, Fertiliser.Types.UreaN, 10);
            2017-02-15  [Fertiliser].Apply(100, Fertiliser.Types.UreaN, 10);
      Factor Irr
        Factor Full
          Specifications:
            [IrrigationSchedule]
            [AdditionalActions].Script.IrrFactor = true
            [CropOperations].Script.IrrgFactor = true
          Operations Full
            2016-11-23  [Irrigation].Apply(30.0)
            2016-11-30  [Irrigation].Apply(25.0)
            2016-12-07  [Irrigation].Apply(25.0)
            2016-12-21  [Irrigation].Apply(25.2)
            2016-12-29  [Irrigation].Apply(30.0)
            2017-01-04  [Irrigation].Apply(40.0)
            2017-01-11  [Irrigation].Apply(32.9)
            2017-01-18  [Irrigation].Apply(25.4)
            2017-01-25  [Irrigation].Apply(31.3)
            2017-02-08  [Irrigation].Apply(33.0)
            2017-02-15  [Irrigation].Apply(35.0)
            2017-02-22  [Irrigation].Apply(29.0)
            2017-03-08  [Irrigation].Apply(34.0)
            2017-03-22  [Irrigation].Apply(50.1)
            2017-04-12  [Irrigation].Apply(30.9)
            2017-04-27  [Irrigation].Apply(18.9)
            2017-09-11  [Irrigation].Apply(20.9)
            2017-09-12  [Irrigation].Apply(21.1)
            2017-09-13  [Irrigation].Apply(21.4)
            2017-10-10  [Irrigation].Apply(22.2)
            2017-10-11  [Irrigation].Apply(22.5)
            2017-10-12  [Irrigation].Apply(22.5)
            Memo
              Have added an extra irrigation, on 22 Oct,

              Data indcates water applied but no notes of it RFZ

              In Statefactors have donethe irrigations for
                17/12  21/1 19/11 14/1
        Factor Nil
          Specifications:
            [IrrigationSchedule]
            [AdditionalActions].Script.IrrFactor = false
            [CropOperations].Script.IrrgFactor = false
          Operations Nil
            Memo
              Have added an extra irrigation, on 3 Nov,

              Data indcates water applied but no notes of it RFZ
    Simulation Rainshelter
      Clock: StartDate=2016-09-28; EndDate=2018-01-27
      Summary summaryfile
      Weather: FileName=lincoln.met
      SoilArbitrator Soil Arbitrator
      Zone paddock: Area=1; Slope=0
        Folder Manager folder
          Operations GeneralIrrigation
            2016-09-02  [Irrigation].Apply(25.0)
            2016-10-25  [Irrigation].Apply(5.0)
            2016-10-28  [Irrigation].Apply(5.0)
            2016-11-17  [Irrigation].Apply(2.0)
            2017-01-18  [Irrigation].Apply(10.0)
            2017-02-15  [Irrigation].Apply(10.0)
            2017-11-06  [Irrigation].Apply(45.0)
            2017-11-15  [Irrigation].Apply(30.0)
            2017-11-22  [Irrigation].Apply(29.7)
            2017-11-29  [Irrigation].Apply(35.0)
            2017-12-06  [Irrigation].Apply(46.7)
          Operations IrrigationSchedule
          Operations FertiliserSchedule
          Manager CropOperations
            FodderBeetPlantingDate = 2016-10-18
            FodderBeetHarvestingDate = 2017-05-30
            OatsPlantingDate = 2017-07-05
            OatsHarvestingDate1 = 2018-01-05
            OatsHarvestingDate2 = 2018-01-10
```csharp
using System;
using Models.Core;
using Models.PMF;
using APSIM.Shared.Utilities;
using System.Xml.Serialization;
        
namespace Models
{
    [Serializable] 
    [System.Xml.Serialization.XmlInclude(typeof(Model))]
    public class Script : Model
    {
        [ScopedLinkByName] Plant FodderBeet;
        [ScopedLinkByName] Plant Oats;
        [Link] Clock Clock;
        [Link] SurfaceOM.SurfaceOrganicMatter mySurfOM;

        [Description("FodderBeet planting date: ")]
        public DateTime FodderBeetPlantingDate { get; set; }
        [Description("FodderBeet harvesting date: ")]
        public DateTime FodderBeetHarvestingDate { get; set; }
        [Description("Oats planting date: ")]
        public DateTime OatsPlantingDate { get; set; }
        [Description("Oats harvesting date 1: ")]
        public DateTime OatsHarvestingDate1 { get; set; }
        [Description("Oats harvesting date 2: ")]
        public DateTime OatsHarvestingDate2 { get; set; }
        
        [XmlIgnore] public string CropSown { get; set; }
        [XmlIgnore] public string CropAction { get; set; }

        [XmlIgnore] public bool IrrgFactor { get; set; }
        [XmlIgnore] public double FertFactor { get; set; }

        private RemovalFractions removalFractions;
        
        [EventSubscribe("Commencing")]
        private void OnSimulationCommencing(object sender, EventArgs e)
        {
            CropSown = "Fallow";
            CropAction = "-";
            //mySurfOM.ReportAdditions = "yes";

            // set removal fractions for FodderBeet(these overrides the default removals in the plant)
            removalFractions = new RemovalFractions();
            removalFractions.SetFractionToRemove("Leaf", 0.95, "Live");
            removalFractions.SetFractionToResidue("Leaf", 0.05, "Live");
            removalFractions.SetFractionToRemove("Leaf", 0.8, "Dead");
            removalFractions.SetFractionToResidue("Leaf", 0.2, "Dead");
            removalFractions.SetFractionToRemove("Petiole", 1.0, "Live");
            removalFractions.SetFractionToResidue("Petiole", 0.0, "Live");
            removalFractions.SetFractionToRemove("Petiole", 0.9, "Dead");
            removalFractions.SetFractionToResidue("Petiole", 0.1, "Dead");
            removalFractions.SetFractionToRemove("StorageRoot", 1.0, "Live");
            removalFractions.SetFractionToResidue("StorageRoot", 0.0, "Live");
            removalFractions.SetFractionToRemove("StorageRoot", 1.0, "Dead");
            removalFractions.SetFractionToResidue("StorageRoot", 0.0, "Dead");
            //complement for oats
            removalFractions.SetFractionToRemove("Stem", 0.9, "Live");
            removalFractions.SetFractionToResidue("Stem", 0.1, "Live");
            removalFractions.SetFractionToRemove("Stem", 0.8, "Dead");
            removalFractions.SetFractionToResidue("Stem", 0.2, "Dead");
            removalFractions.SetFractionToRemove("Panicle", 0.9, "Live");
            removalFractions.SetFractionToResidue("Panicle", 0.1, "Live");
            removalFractions.SetFractionToRemove("Panicle", 0.8, "Dead");
            removalFractions.SetFractionToResidue("Panicle", 0.2, "Dead");
            removalFractions.SetFractionToRemove("Grain", 1.0, "Live");
            removalFractions.SetFractionToResidue("Grain", 0.0, "Live");
            removalFractions.SetFractionToRemove("Grain", 1.0, "Dead");
            removalFractions.SetFractionToResidue("Grain", 0.0, "Dead");

        }
        
        [EventSubscribe("DoManagement")]
        private void OnDoManagement(object sender, EventArgs e)
        {
            CropAction = "-";

            if (Clock.Today.Date == FodderBeetPlantingDate)
            {
                FodderBeet.Sow(population: 9, cultivar: "Rivage", depth: 5, rowSpacing: 500);
                CropSown = "FodderBeet";
                CropAction = "Sowing";
            }
            
            if (Clock.Today.Date == OatsPlantingDate)
            {
                Oats.Sow(population: 400, cultivar: "Milton", depth: 45, rowSpacing: 45);
                CropSown = "Oats";
                CropAction = "Sowing";
            }
            
            
            if (Clock.Today.Date == FodderBeetHarvestingDate)
            {
                FodderBeet.Harvest(removalFractions);
                //FodderBeet.EndCrop();
                //CropSown = "Fallow";
                CropAction = "Harvesting";
            }
            if (Clock.Today.Date == FodderBeetHarvestingDate.AddDays(1))
            {
                //FodderBeet.Harvest(removalFractions);
                FodderBeet.EndCrop();
                CropSown = "Fallow";
            }

            if (Clock.Today.Date == OatsHarvestingDate1)
            {
               if((FertFactor == 0) || ((IrrgFactor == false) && (FertFactor == 50)))
               {
                   Oats.Harvest(removalFractions);
                   CropAction = "Harvesting";
               }
            }

            if (Clock.Today.Date == OatsHarvestingDate2)
            {
               if((FertFactor == 300) || ((IrrgFactor == true) && (FertFactor == 50)))
               {
                   Oats.Harvest(removalFractions);
                   CropAction = "Harvesting";
               }
            }

            if (Clock.Today.Date == OatsHarvestingDate1.AddDays(1))
            {
               if((FertFactor == 0) || ((IrrgFactor == false) && (FertFactor == 50)))
               {
                   Oats.EndCrop();
                   CropSown = "Fallow";
               }
            }

            if (Clock.Today.Date == OatsHarvestingDate2.AddDays(1))
            {
               if((FertFactor == 300) || ((IrrgFactor == true) && (FertFactor == 50)))
               {
                   Oats.EndCrop();
                   CropSown = "Fallow";
               }
            }
        }
        
    }
}
```
          Manager ClimateControl
            StartDate = 2016-10-17
            EndDate = 2017-06-30
            OtherDateString = 27/07/2017 28/07/2017 29/07/2017 30/07/2017 31/07/2017 08/08/2017 09/08/2017 10/08/2017 11/08/2017 12/08/2017 13/08/2017 14/08/2017 15/08/2017 16/08/2017 17/08/2017 18/08/2017 28/08/2017 29/08/2017 30/08/2017 31/08/2017
```csharp
using System;
using Models.Core;
using APSIM.Shared.Utilities;
using System.Collections.Generic;
using System.Text;
using Models.PMF;
using Models;
using System.Xml.Serialization;

// This script simulates a rainshelter, it controls the amount of rainfall (=0.0) and radiation (=95% of weather)
// It does that for a period between two dates, as well as at sporadic dates

namespace Models
{
    [Serializable] 
    [System.Xml.Serialization.XmlInclude(typeof(Model))]
    public class Script : Model
    {
        [Link] Weather Met;
        [Link] Clock Clock;
    
        [Description("Start date: ")]
        public DateTime StartDate { get; set; }
        [Description("End date: ")]
        public DateTime EndDate { get; set; }
         [Description("Other dates: ")]
         public string OtherDateString  { get; set; }

         [XmlIgnore] public string RainshelterCover  { get; set; }

         private DateTime[] OtherDates;
         private double todaysRain;

        [EventSubscribe("Commencing")]
        private void OnSimulationCommencing(object sender, EventArgs e)
        {
            //gather the dates the variables will be controlled
            string[] auxDates = OtherDateString.Split(new Char []{' ',','});
            OtherDates = new DateTime[auxDates.Length];
            for (int i = 0; i < auxDates.Length; i++)
                OtherDates[i] = DateTime.Parse(auxDates[i]);

            RainshelterCover = "Off";
        }

        [EventSubscribe("PreparingNewWeatherData")]
        private void OnPreparingNewWeatherData(object sender, EventArgs e)
        {
            RainshelterCover = "Off";

            if ((Clock.Today.Date >= StartDate.Date) && (Clock.Today.Date <= EndDate.Date))
            {
                todaysRain = Met.Rain;
                changeMetData();
            }
            else
            {
                for (int i = 0; i < OtherDates.Length; i++)
                    if (Clock.Today.Date == OtherDates[0].Date)
                        changeMetData();
            }

            // rain shelter partial day cover
            if (Clock.Today.Date == DateTime.Parse("01/09/2017").Date)
                Met.Rain -= 2.0;
            if (Clock.Today.Date == DateTime.Parse("08/11/2017").Date)
                Met.Rain -= 0.3;

            // rain shelter cover removed for weekend
            if ((Clock.Today.Date == DateTime.Parse("03/06/2017").Date)||(Clock.Today.Date == DateTime.Parse("04/06/2017").Date))
            {
                Met.Rain = todaysRain;
                //Met.Radn /= 0.95;
                RainshelterCover = "Off";
            }
        }

        private void changeMetData()
        {
            Met.Rain *= 0.0;
            //Met.Radn *= 0.95;
            RainshelterCover = "On";
        }
    }
}
```
          Manager AdditionalActions
            IrrFactor = False
            NitFactor = 0
```csharp
using System;
using Models.Core;
using System.Collections.Generic;
using System.Text;
using Models.Soils;
using Models.PMF;
using Models;
using System.Xml.Serialization;
using APSIM.Shared.Utilities;

// This script performs management actions that are not common to all treatments

namespace Models
{
    [Serializable] 
    public class Script : Model
    {
        [Link] Clock Clock;
        [Link] Irrigation Irrigation;
        [Link] Fertiliser Fert;
        [Link] Soil ThisSoil;

        [Description("Allow irrigation to be applied?")]
        public bool IrrFactor { get; set; }
        [Description("Amount of fertiliser to be applied (kg/ha)")]
        public double NitFactor { get; set; }

        [EventSubscribe("Commencing")]
        private void OnSimulationCommencing(object sender, EventArgs e)
        {
            //    SetSoilLayers();
        }
        
        [EventSubscribe("DoManagement")]
        private void OnDoManagement(object sender, EventArgs e)
        {
            // Fodderbeet - irrigation on high fert plots only
            if ((IrrFactor == true) && (NitFactor == 300))
            {
                if (Clock.Today.Date == DateTime.Parse("01-Feb-2017"))
                    Irrigation.Apply(40.0);
                if (Clock.Today.Date == DateTime.Parse("01-Mar-2017"))
                    Irrigation.Apply(32.6);
            }
        
            // Oats - Irrigation on dryland plots only, after harvest
            if (IrrFactor == false)
            {
                if ((Clock.Today.Date == DateTime.Parse("25-May-2017")) || (Clock.Today.Date == DateTime.Parse("26-May-2017")))
                    Irrigation.Apply(50.0);

                if (Clock.Today.Date == DateTime.Parse("29-May-2017"))
                if (NitFactor == 300)
                    Irrigation.Apply(64.0);

                if (Clock.Today.Date == DateTime.Parse("30-May-2017"))
                {
                    if (NitFactor == 0)
                        Irrigation.Apply(30.3);
                    if (NitFactor == 50)
                        Irrigation.Apply(51.0);
                }
            }

            // Oats - Irrigation on all 300N plots plus dryland 50N plots
            if (Clock.Today.Date == DateTime.Parse("13-Dec-2017"))
            {
                if (NitFactor == 300)
                    Irrigation.Apply(50.0);
                if ((NitFactor == 50) && (IrrFactor == false))
                    Irrigation.Apply(50.0);
            }

            // Oats - Fertiliser for irrigated plots only, on sowing
            if (Clock.Today.Date == DateTime.Parse("05-Jul-2017"))
            if (IrrFactor == true)
            {
                if (NitFactor == 0)
                    Fert.Apply(40, Models.Fertiliser.Types.UreaN, 10);
                if (NitFactor == 50)
                    Fert.Apply(85, Models.Fertiliser.Types.UreaN, 10);
                if (NitFactor == 300)
                    Fert.Apply(270, Models.Fertiliser.Types.UreaN, 10);
            }
        }
    }
}
```
        MicroClimate: a_interception=0; b_interception=1; c_interception=0; d_interception=0; soil_albedo=0.3; sun_angle=15; soil_heat_flux_fraction=0.4; night_interception_fraction=0.5; refheight=2; albedo=0.293662; emissivity=0.96; RadIntTotal=0
        Irrigation
        Fertiliser
        SoluteManager
        SurfaceOrganicMatter Surface Organic Matter: PoolName=oat_stubble; type=oats; mass=1500; standing_fraction=0.5; cnr=20; CriticalResidueWeight=2000; OptimumDecompTemp=20; MaxCumulativeEOS=20; CNRatioDecompCoeff=0.277; CNRatioDecompThreshold=25; TotalLeachRain=25; MinRainToLeach=10; CriticalMinimumOrganicC=0.004; DefaultCPRatio=0; DefaultStandingFraction=0; StandingExtinctCoeff=0.5; FractionFaecesAdded=0.5
          Pools:
            {PoolName=oat_stubble, ResidueType=oats, Mass=1500, CNRatio=20, StandingFraction=0.5}
          ResidueTypes: LoadFromResource=ResidueTypes
        Soil: SoilType=Silt loam over sand; LocalName=Templeton; Site=RainShelter; NearestTown=Lincoln; Region=Plains; State=Canterbury; Country=New Zealand; Latitude=37.15; Longitude=172.28; Comments=TEMPLETON-RS
          Memo Info
            # Soil Profile Description

            Templeton Silt Loam over sand, Typic Immature Pallic soil

             Horizon  Depth (cm) Description
             Ah         0-28     Very dark grayish brown (10YR 3/2); silt loam; no stones; moderately developed fine to medium blocky structure
             Bw(f)     28-55     Dark yellowish brown (10YR 4/4); silt loam; no stones; weakly developed coarse to very coarse blocky structure
             Bw(g)     55-95     Olive brown (2.5Y 4/4); fine sandy loam; no stones; apedal massive
             2BC(g)    95-145    Olive brown (2.5Y 4/4); loamy sand;no stones; apedal single-grain
             3BCg     145-153    Light yellowish brown (2.5Y 6/3); silt loam; no stones; apedal massive
             4BCg     153-200+   Light yellowish brown (2.5Y 6/3); medium sand; no stones; apedal single-grain
             ** 2BC(g) horizon contains a band of massive silt loam material between 115-130 cm

            Sampling layers:
            Layer  Depth (cm)
             1	  0-15
             2	 15-30
             3	 30-60
             4	 60-90
             5	 90-120
             6	120-150
             7	150-180 -- Only for water

            Soil parameterisation was based on the two description of the soil at the Rainshelter, with most data being a combination of "templeton-2" description (SWAMP survey) and the vbalues estimated based on the monitoring of the site.
          Analysis: PHUnits=Water; BoronUnits=HotWater
            Thickness  Rocks  PH   ParticleSizeSand  ParticleSizeSilt  ParticleSizeClay
            150        0      6.1  15.9              60.1              24
            150        0      6.1  14.3              62.5              23.2
            300        0      6    16.1              66                17.9
            350        0      6    45.5              41.2              13.3
            200        0      6    42                46                12
            150        0      6    11.4              71.9              16.7
            150        0      6    27.4              59.9              12.7
            100        0      6    35.1              52                12.8
            200        0      6    40.7              50.9              11.5
            250        0      6    37.9              50.3              11.8
          Water
            Thickness  BD     AirDry  LL15   DUL    SAT    KS
            150        1.116  0.063   0.126  0.359  0.534  3472.3
            150        1.177  0.124   0.127  0.352  0.521  1374.7
            300        1.272  0.117   0.117  0.346  0.494  539.5
            350        1.337  0.12    0.12   0.344  0.47   3985.6
            200        1.404  0.143   0.143  0.358  0.446  2582.8
            150        1.47   0.147   0.147  0.366  0.424  111
            150        1.434  0.13    0.13   0.3    0.436  516.8
            100        1.459  0.118   0.118  0.276  0.429  1457.9
            200        1.453  0.099   0.099  0.24   0.433  4616.8
            250        1.482  0.089   0.089  0.227  0.428  4841.5
            SoilCrop FodderBeetSoil
              LL=[0.126, 0.127, 0.117, 0.12, 0.143, 0.147, 0.13, 0.118, 0.099, 0.089]
              KL=[0.093, 0.066, 0.059, 0.047, 0.028, 0.014, 0.008, 0.007, 0.003, 0]
              XF=[1, 1, 1, 1, 1, 1, 1, 1, 1, 1]
            SoilCrop OatsSoil
              LL=[0.126, 0.127, 0.117, 0.12, 0.143, 0.147, 0.13, 0.118, 0.099, 0.089]
              KL=[0.083, 0.066, 0.053, 0.043, 0.022, 0.007, 0.008, 0.005, 0.004, 0.002]
              XF=[1, 1, 1, 1, 1, 1, 1, 1, 1, 1]
          SoilWater: SummerDate=1-Oct; SummerU=9; SummerCona=4; WinterDate=1-Apr; WinterU=6; WinterCona=3; DiffusConst=88; DiffusSlope=35; Salb=0.15; CN2Bare=60; CNRed=10; CNCov=0.8; slope=0; discharge_width=0; catchment_area=0; max_pond=0; ResidueInterception=0
            Thickness  SWCON  KLAT
            150        0.553  0
            150        0.521  0
            300        0.456  0
            350        0.511  0
            200        0.524  0
            150        0.451  0
            150        0.494  0
            100        0.546  0
            200        0.538  0
            250        0.532  0
          SoilNitrogen: fom_type=[default, manure, mucuna, lablab, shemp, stable]; fract_carb=[0.2, 0.3, 0.54, 0.57, 0.45, 0]; fract_cell=[0.7, 0.3, 0.37, 0.37, 0.47, 0.1]; fract_lign=[0.1, 0.4, 0.09, 0.06, 0.08, 0.9]
          SoilOrganicMatter: RootCN=30; RootWt=1000; SoilCN=11; EnrACoeff=7.4; EnrBCoeff=0.2; OCUnits=Total
            Thickness  OC    FBiom  FInert
            150        2.55  0.08   0.2
            150        2.09  0.04   0.325
            300        0.52  0.018  0.6
            350        0.23  0.01   0.85
            200        0.18  0.008  0.95
            150        0.15  0.008  0.98
            150        0.15  0.008  0.99
            100        0.12  0.008  0.992
            200        0.11  0.005  0.995
            250        0.1   0.005  0.995
          CERESSoilTemperature
          Sample Initial Soil Settings: NO3Units=kgha; NH4Units=kgha; SWUnits=Volumetric; OCUnits=Total; PHUnits=Water
            Thickness  NO3  NH4  SW
            150        15   2    0.3
            150        14   2.5  0.28
            300        3.5  4.5  0.27
            300        3.5  2    0.3
            300        3    1.5  0.28
            300        3    2    0.26
            300        2    1    0.22
            200        1    0.5  0.22
          LayerStructure: Thickness=[150, 150, 300, 300, 300, 300, 300, 200]
        Plant FodderBeet
        Plant Oats: CropType=Oats
        Report EnviroReport: EventNames=[Clock].DoReport
          VariableNames:
            [Clock].Today
            [Weather].MeanT
            [Weather].Radn
            [Weather].Rain
            [Irrigation].IrrigationApplied
            [FodderBeet].WaterSupplyDemandRatio
            [Oats].WaterSupplyDemandRatio
            ([FodderBeet].Leaf.Transpiration + [Oats].Leaf.Transpiration + [Soil].SoilWater.Es + [MicroClimate].interception) as ET
            [MicroClimate].interception as Interception
            [Soil].SoilWater.Es as Evaporation
            ([FodderBeet].Leaf.Transpiration + [Oats].Leaf.Transpiration) as Transpiration
            [Soil].SoilWater.Drainage as Drainage
            [Soil].SoilWater.Runoff as Runoff
            sum([Soil].SoilWater.SWmm) as TotalSoilWater
            sum([Soil].SATmm) as TotalSoilSAT
            sum([Soil].DULmm) as TotalSoilDUL
            sum([Soil].LL15mm) as TotalSoilLL
            sum([Soil].SoilNitrogen.dlt_n_min_res) as SurfOMMineralisedN
            sum([Soil].SoilNitrogen.MineralisedN) as MineralisedN
            [Fertiliser].NitrogenApplied as FertiliserN
            sum([Soil].SoilNitrogen.Denitrification) as DenitrifiedN
            (-[FodderBeet].Root.NUptake - [Oats].Root.NUptake) as UptakeN
            ([Soil].SoilWater.LeachUrea+[Soil].SoilWater.LeachNH4+[Soil].SoilWater.LeachNO3) as NLeached
            [SurfaceOrganicMatter].N as TotalSurfOMN
            sum([Soil].SoilNitrogen.FOMN) as TotalFOMN
            sum([Soil].SoilNitrogen.MicrobialN) as TotalMicrobialN
            sum([Soil].SoilNitrogen.HumicN) as TotalHumicN
            (sum([Soil].SoilNitrogen.NH4) + sum([Soil].SoilNitrogen.NO3)) as TotalSoilN
            sum([Soil].SoilNitrogen.urea) as TotalUrea
            sum([Soil].SoilNitrogen.NH4) as TotalNH4
            sum([Soil].SoilNitrogen.NO3) as TotalNO3
            [Soil].SoilNitrogen.oc
        Report DailyReport: EventNames=[Clock].DoReport
          VariableNames:
            [Clock].Today
            [Weather].MeanT
            [Soil].SoilWater.SW
            [Soil].SoilWater.SWmm
            sum([Soil].SoilWater.SWmm) as ProfileWater
            [FodderBeet].AboveGround.N
            [FodderBeet].AboveGround.Wt
            [FodderBeet].AboveGroundLive.N
            [FodderBeet].AboveGroundLive.Wt
            [FodderBeet].AboveGroundDead.N
            [FodderBeet].AboveGroundDead.Wt
            [FodderBeet].Arbitrator.DMDemand
            [FodderBeet].Arbitrator.DM.TotalFixationSupply
            [FodderBeet].Leaf.AppearedCohortNo
            [FodderBeet].Leaf.CoverDead
            [FodderBeet].Leaf.CoverGreen
            [FodderBeet].Leaf.CoverTotal
            [FodderBeet].Leaf.Dead.N
            [FodderBeet].Leaf.Dead.NConc
            [FodderBeet].Leaf.Dead.Wt
            [FodderBeet].Leaf.GreenCohortNo
            [FodderBeet].Leaf.DeadCohortNo
            [FodderBeet].Leaf.SenescingCohortNo
            [FodderBeet].Leaf.ExpandedCohortNo
            [FodderBeet].Leaf.Fn
            [FodderBeet].Leaf.Fw
            [FodderBeet].Leaf.Height
            [FodderBeet].Leaf.InitialisedCohortNo
            [FodderBeet].Leaf.LAI
            [FodderBeet].Leaf.Live.N
            [FodderBeet].Leaf.Live.NConc
            [FodderBeet].Leaf.Live.Wt
            [FodderBeet].Leaf.SpecificArea
            [FodderBeet].Leaf.Transpiration
            [FodderBeet].Phenology.CurrentPhaseName
            [FodderBeet].Phenology.CurrentStageName
            [FodderBeet].Phenology.DailyVernalisation.Value()
            [FodderBeet].Phenology.MeanTemp.Value()
            [FodderBeet].Phenology.Photoperiod.Value()
            [FodderBeet].Phenology.Stage
            [FodderBeet].Phenology.ThermalTime.Value()
            [FodderBeet].Phenology.ThermalTime.Value()
            [FodderBeet].Phenology.Vrn1.Value()
            [FodderBeet].Phenology.Vrn2.Value()
            [FodderBeet].Phenology.Vrn4.Value()
            [FodderBeet].Phenology.Zadok.Stage
            [FodderBeet].Root.Depth
            [FodderBeet].Root.N
            [FodderBeet].Root.Wt
            [FodderBeet].Root.Nconc
            [FodderBeet].Root.WaterUptake
            [FodderBeet].StorageRoot.N
            [FodderBeet].StorageRoot.NConc
            [FodderBeet].StorageRoot.Wt
            [FodderBeet].StorageRoot.Live.StorageWt
            [FodderBeet].Petiole.N
            [FodderBeet].Petiole.NConc
            [FodderBeet].Petiole.Wt
            [FodderBeet].Petiole.PercentWSC
            [FodderBeet].Petiole.Live.StorageWt
            [FodderBeet].SowingData.Cultivar
            [FodderBeet].Structure.Height
            [FodderBeet].Structure.LeafTipsAppeared
            [FodderBeet].Leaf.PlantAppearedGreenLeafNo
            [FodderBeet].Structure.MainStemPopn
            [FodderBeet].Structure.TotalStemPopn
            [FodderBeet].Total.N
            [FodderBeet].Total.Wt
            [SurfaceOrganicMatter].Wt
            sum([Soil].SoilNitrogen.NO3) as TotalSoilNitrogen
            [FodderBeet].Phenology.FlagLeafDAS
            [FodderBeet].Phenology.FloweringDAS
            [FodderBeet].Phenology.MaturityDAS
            [FodderBeet].Phenology.PhotoPeriod
            [FodderBeet].Phenology.PhotoPeriodDeltaFunction
            [FodderBeet].Phenology.Stage
            [FodderBeet].Phenology.SoilTemperatureFunction.Value()
            [Oats].AboveGround.N
            [Oats].AboveGround.Wt
            [Oats].AboveGroundLive.N
            [Oats].AboveGroundLive.Wt
            [Oats].AboveGroundDead.N
            [Oats].AboveGroundDead.Wt
            [Oats].Arbitrator.DMDemand
            [Oats].Arbitrator.DM.TotalFixationSupply
            [Oats].Ear.N
            [Oats].Ear.Nconc
            [Oats].Ear.Wt
            [Oats].Grain.N
            [Oats].Grain.NConc
            [Oats].Grain.Number
            [Oats].Grain.Size
            [Oats].Grain.Wt
            [Oats].Grain.Live.Wt
            [Oats].Leaf.AppearedCohortNo
            [Oats].Leaf.CoverDead
            [Oats].Leaf.CoverGreen
            [Oats].Leaf.CoverTotal
            [Oats].Leaf.Dead.N
            [Oats].Leaf.Dead.NConc
            [Oats].Leaf.Dead.Wt
            [Oats].Leaf.GreenCohortNo
            [Oats].Leaf.DeadCohortNo
            [Oats].Leaf.SenescingCohortNo
            [Oats].Leaf.ExpandedCohortNo
            [Oats].Leaf.Fn
            [Oats].Leaf.Fw
            [Oats].Leaf.Height
            [Oats].Leaf.InitialisedCohortNo
            [Oats].Leaf.LAI
            [Oats].Leaf.Live.N
            [Oats].Leaf.Live.NConc
            [Oats].Leaf.Live.Wt
            [Oats].Leaf.SpecificArea
            [Oats].Leaf.Transpiration
            [Oats].Phenology.CurrentPhaseName
            [Oats].Phenology.CurrentStageName
            [Oats].Phenology.DailyVernalisation.Value()
            [Oats].Phenology.MeanTemp.Value()
            [Oats].Phenology.Photoperiod.Value()
            [Oats].Phenology.Stage
            [Oats].Phenology.ThermalTime.Value()
            [Oats].Phenology.ThermalTime.Value()
            [Oats].Phenology.Vrn1.Value()
            [Oats].Phenology.Vrn2.Value()
            [Oats].Phenology.Vrn4.Value()
            [Oats].Phenology.Zadok.Stage
            [Oats].Root.Depth
            [Oats].Root.N
            [Oats].Root.Wt
            [Oats].Root.Nconc
            [Oats].Root.WaterUptake
            [Oats].Panicle.N
            [Oats].Panicle.NConc
            [Oats].Panicle.Wt
            [Oats].Panicle.Live.StorageWt
            [Oats].Stem.N
            [Oats].Stem.NConc
            [Oats].Stem.Wt
            [Oats].Stem.PercentWSC
            [Oats].Stem.Live.StorageWt
            [Oats].StemPlusPanicle.Wt
            [Oats].StemPlusPanicle.N
            [Oats].SowingData.Cultivar
            [Oats].Structure.HaunStage.Value()TerminalSpikelet.Value()
            [Oats].Structure.HaunStage.Value()
            [Oats].Structure.Height
            [Oats].Structure.LeafTipsAppeared
            [Oats].Structure.FinalLeafNumber.Value()
            [Oats].Structure.FinalLeafNumber.ValueToHold.PhotoPLeaves.Value()
            [Oats].Structure.MainStemPopn
            [Oats].Structure.MeanTillerGrowthRate.Value()
            [Oats].Structure.TotalStemPopn
            [Oats].Total.N
            [Oats].Total.Wt
            [SurfaceOrganicMatter].Wt
            ([Oats].Leaf.Transpiration + [Soil].SoilWater.Es + [MicroClimate].interception) as ET
            sum([Soil].SoilNitrogen.NO3) as TotalSoilNitrogen
            [Oats].Phenology.FlagLeafDAS
            [Oats].Phenology.FloweringDAS
            [Oats].Phenology.MaturityDAS
            [Oats].Phenology.PhotoPeriod
            [Oats].Phenology.PhotoPeriodDeltaFunction
            [Oats].Phenology.Stage
            [Oats].Phenology.SoilTemperatureFunction.Value()
        Report FRNLReport: EventNames=[Clock].DoReport
          VariableNames:
            [Clock].Today
            [CropOperations].Script.CropSown
            [CropOperations].Script.CropAction
            [ClimateControl].Script.RainshelterCover
            [FodderBeet].Structure.MainStemPopn
            [Oats].Structure.MainStemPopn
            [Irrigation].IrrigationApplied
            [Fertiliser].NitrogenApplied
            [FodderBeet].Phenology.Stage
            [Oats].Phenology.Stage
            [FodderBeet].Structure.LeafTipsAppeared
            [FodderBeet].Leaf.Live.Wt
            [FodderBeet].Petiole.Live.Wt
            [FodderBeet].Root.Live.Wt
            [FodderBeet].StorageRoot.Live.Wt
            [FodderBeet].Senesced.Live.Wt
            [Oats].Leaf.Live.Wt
            [Oats].Stem.Live.Wt
            [Oats].Panicle.Live.Wt
            [Oats].Grain.Live.Wt
            [Oats].Root.Live.Wt
            [Oats].Leaf.Dead.Wt
            [Oats].Ear.Wt
            [Oats].Panicle.Wt
            [FodderBeet].AboveGroundLive.Wt as FodderBeet.AboveGround.Live.Wt
            [FodderBeet].AboveGround.NConc
            [FodderBeet].Leaf.Live.NConc
            [FodderBeet].Petiole.NConc
            [FodderBeet].Root.NConc
            [FodderBeet].StorageRoot.NConc
            [FodderBeet].Senesced.NConc
            [Oats].Structure.LeafTipsAppeared
            [Oats].Leaf.ExpandedCohortNo
            [Oats].Leaf.SenescingCohortNo
            [Oats].Leaf.DeadCohortNo
            [Oats].AboveGroundLive.Wt as Oats.AboveGround.Live.Wt
            [Oats].AboveGround.NConc
            [Oats].Leaf.Live.NConc
            [Oats].Stem.Live.NConc
            [Oats].Leaf.Dead.Nconc
            [Oats].Stem.NConc
            [Oats].Spike.NConc
            [Oats].Grain.NConc
            [Oats].Root.NConc
            [Oats].Ear.NConc
            [Oats].Grain.Live.NConc
            [Oats].Panicle.Live.NConc
            [Oats].Total.NConc
            [FodderBeet].Leaf.LAI
            [FodderBeet].Leaf.CoverTotal
            [Oats].Leaf.LAI
            [Oats].Leaf.CoverTotal
            [Oats].Leaf.GreenCohortNo
            ([FodderBeet].Leaf.Transpiration + [Soil].SoilWater.Es + [MicroClimate].interception) as FodderBeet_ET
            ([Oats].Leaf.Transpiration + [Soil].SoilWater.Es + [MicroClimate].interception) as Oats_ET
            [Soil].Temperature
            sum([Soil].SoilWater.SWmm[1:7]) as Soil.SoilWater.ProfileWater
            [Soil].SoilWater.SW
            [Soil].Thickness
            [Soil].SoilWater.SWmm
            [Soil].SoilWater.Drainage
            sum([Soil].SoilNitrogen.MineralisedN)
            sum([Soil].SoilNitrogen.Denitrification)
            ([Soil].SoilWater.LeachNO3 + [Soil].SoilWater.LeachNH4) as Soil.SoilNitrogen.NLeaching
            ([Soil].SoilWater.FlowNO3[3] + [Soil].SoilWater.FlowNH4[3]) as Soil.SoilNitrogen.NLeach60cm
            sum([Soil].SoilNitrogen.NH4[1:6]) as Soil.SoilNitrogen.ProfileNH4
            sum([Soil].SoilNitrogen.NO3[1:6]) as Soil.SoilNitrogen.ProfileNO3
            sum([Soil].SoilNitrogen.NH4[1:6]+[Soil].SoilNitrogen.NO3[1:6]) as Soil.SoilNitrogen.ProfileMineralN
            [Soil].SoilNitrogen.NH4
            [Soil].SoilNitrogen.NO3
            ([Soil].SoilNitrogen.NH4+[Soil].SoilNitrogen.NO3) as Soil.SoilNitrogen.mineral_n
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