Simulations: Version=155
  Memo TitlePage
    ### Base simulation for simulating N leaching risk from a urine patch across New Zealand

    _Rogerio Cichota, Plant and Food Research, New Zealand_

    For the Whitiwhiti Ora / Land use opportunities programme, funded by Our Land and Water National Science Challenge
    In partnership with the Risk Index Tool team from the Ministry for the Environment, NZ

     This simulation is intended to help on developing and testing the basic setup for simulating the fate of N from a 'standard' urine patch deposited in a mixed-species pasture sward.  This will then be used as the template for a series of simulation runs conducted in PowerPlant (PFR's HPC - high performance computer system) to obtain relative N losses across New Zealand.
     For each run, the template will be modified by replacing the soil node and the link to the weather data file, their combinations are defined in a txt file based on analysis of the VCSN grid and a soil map (combination of s-map and FSL) in GIS; the results are therefore geo-referenced and can be mapped later on.
     This simulation contains several reports and graphs that are useful for checking the setup and for verification of 'outliers' simulations; these extra graphs and reports should be deleted when the simulation becomes the actual template to improve computing performance.

     The simulation uses standard APSIM NextGen models. In particular, the AgPRyegrass and AgPWhiteClover models are used to simulate a mixed sward with variable clover content.
     The pasture is managed mimicking rotational grazing, with defoliations triggered by rules based on aboveground biomass with some restrictions for the interval between defoliations.  A simplified approach is used to return dung and for urine depositions.  Based on its digestibility, a certain fraction (around 20%) of the biomass harvested (i.e. of its carbon) is returned to the soil homogeneously as dung; a C:N ratio of 17.5 is used to define the amount of N returned as dung.  No urine depositions are considered after each grazing to reduce its potential impact on the fate of N leaching of the 'main' urine patch.
     The weather data comes from the virtual climate station network (VCSN) of NIWA.  Soil information is provided by Manaaki Whenua - Landcare based on Smap.  A small sample of Smap soils (about 110) was mapped based of their correspondence with FSL in the areas not covered by Smap.  These were selected by Trevor Webb.  Estimates of the curve number for each Smap soil was added in August 2022.
     General rules are also used to control irrigation applications, when this management is enabled.  N fertiliser is not considered.
     A single urine deposition is set to occur a few months after the simulation begins, this is simulated as an urea application distributied over the top soil.

    Note: the average slope of each location to simulate has been considered as another potentially important factor, particularly for the computation of runoff.  However, the available functions,found in the literature, that could be used to adjust the values of the curve number in APSIM have shown to be quite insensitive and thus were disregarded (to reduce the number of runs needed).

    +-+-+-+-+-+-+-+-+-+-+-+-+-+-+-+-+-+-+-+-+-+-+-+-+-+-+-+-+-+-+-+-+-+-+-+-+-+-+-+-+-+-+-+-+-+-+-+-+-+-+-+-+-+-+-+-+-+-+-+-+-+-+-+-+-+-+-+-+-+-+-+-+
  DataStore
  Experiment SimulationExp
    Factors
      Permutation
        Factor VCSNAgent
          Memo Notes
            ### Notes about this factor

            _Rogerio Cichota_

            Selection of sites/agents for running tests:
            Agent 20661 is located approximately in Kaitaia, Northland
            Agent 28720 is located approximately in Ruakura, Waikato
            Agent 29813 is located approximately in Taurewa, National Park, Central Plateau
            Agent 28426 is located approximately in Maraekakaho, Hawkes Bay
            Agent 28276 is located approximately in Palmerston North, Manawatu
            Agent 19487 is located approximately in Kowhitirangi, West Coast
            Agent 20993 is located approximately in Lincoln, Canterbury
            Agent 13223 is located approximately in Poolburn, Otago
            Agent 9938 is located approximately in Woodlands, Southland

            Agent 18727 is located approximately in Winchmore, Canterbury

            ==========================================================================================

            **Summaries, long term means**
            _**Sites mostly for pasture land**_:

            | Site         | Agent | Rainfall |    PET | MinTemp | MaxTemp | Radiation | WindSpeed |
            |:------------ |:----- | --------:| ------:| -------:| -------:| ---------:| ---------:|
            |              |       |     (mm) |   (mm) |   (°C)  |   (°C)  |  (MJ/m²)  |    (m/s)  |
            | Kaitaia      | 20661 |   1422.6 | 1029.1 |   11.9  |   20.0  |     14.8  |     4.20  |
            | Ruakura      | 28720 |   1146.2 |  875.5 |    9.0  |   19.2  |     14.1  |     2.72  |
            | Taurewa      | 29813 |   2432.9 |  639.4 |    4.1  |   13.7  |     13.7  |     2.97  |
            | Maraekakaho  | 28426 |    795.4 |  944.9 |    8.1  |   18.4  |     14.3  |     2.65  |
            | Palmerston N.| 28276 |    979.0 |  886.6 |    8.7  |   17.8  |     13.8  |     4.05  |
            | Kowhitirangi | 19487 |   3223.9 |  806.0 |    7.5  |   16.3  |     12.8  |     2.33  |
            | Lincoln      | 20993 |    728.9 |  834.8 |    5.6  |   16.7  |     13.3  |     3.16  |
            | Poolburn     | 13223 |    555.9 |  801.2 |    2.8  |   15.2  |     13.7  |     2.13  |
            | Woodlands    |  9938 |   1067.3 |  782.6 |    5.6  |   14.6  |     12.1  |     4.29  |
            | Winchmore    | 18727 |    625.8 |  928.8 |    7.0  |   17.1  |     13.5  |     3.91  |
          CompositeFactor Kaitaia: Specifications=[Weather]
            Weather: FileName=C:\RCTempData\Weather\VCSN\VCSN1\20661.met
          CompositeFactor Ruakura (disabled): Specifications=[Weather]
            Weather: FileName=C:\RCTempData\Weather\VCSN\VCSN1\28720.met
          CompositeFactor Taurewa (disabled): Specifications=[Weather]
            Weather: FileName=C:\RCTempData\Weather\VCSN\VCSN1\29813.met
          CompositeFactor Maraekakaho (disabled): Specifications=[Weather]
            Weather: FileName=C:\RCTempData\Weather\VCSN\VCSN1\28426.met
          CompositeFactor PalmyNorth (disabled): Specifications=[Weather]
            Weather: FileName=C:\RCTempData\Weather\VCSN\VCSN1\28276.met
          CompositeFactor Kowhitirangi (disabled): Specifications=[Weather]
            Weather: FileName=C:\RCTempData\Weather\VCSN\VCSN1\19487.met
          CompositeFactor Lincoln (disabled): Specifications=[Weather]
            Weather: FileName=C:\RCTempData\Weather\VCSN\VCSN1\20993.met
          CompositeFactor Poolburn (disabled): Specifications=[Weather]
            Weather: FileName=C:\RCTempData\Weather\VCSN\VCSN1\13223.met
          CompositeFactor Woodlands (disabled): Specifications=[Weather]
            Weather: FileName=C:\RCTempData\Weather\VCSN\VCSN1\9938.met
        Factor SoilType_Old (disabled)
          CompositeFactor Eyre_23a3: Specifications=[Soil]
            Soil Eyre_23a3: SoilType=Weathered Orthic Recent Soils; LocalName=Eyre_23a3; Latitude=-41; Longitude=174
              DataSource=Profile descriptions provided by Smap based on the work done by Trevor Webb.
              Chemical: Thickness=[160, 250, 300, 1290]; PH=[7, 7, 7, 7]; PHUnits=Water
              Physical
                Thickness  ParticleSizeClay  ParticleSizeSand  ParticleSizeSilt  BD     AirDry  LL15   DUL    SAT    KS
                160        19                25                56                0.841  0.027   0.053  0.172  0.286  1440
                250        17.5              35                47.5              0.587  0.021   0.029  0.097  0.189  1440
                300        3.5               87.5              9                 0.454  0.011   0.011  0.044  0.143  2400
                322.5      1.5               90                8.5               0.369  0.014   0.014  0.04   0.08   3600
                322.5      1.5               90                8.5               0.369  0.014   0.014  0.04   0.08   3600
                322.5      1.5               90                8.5               0.369  0.014   0.014  0.04   0.08   3600
                322.5      1.5               90                8.5               0.369  0.014   0.014  0.04   0.08   3600
                SoilCrop BarleySoil: LL=[0.053, 0.029, 0.011, 0.014, 0.014, 0.014, 0.014]; KL=[0.118716, 0.0739697, 0.04575, 0, 0, 0, 0]; XF=[1, 1, 1, 0, 0, 0, 0]
                SoilCrop CanolaSoil: LL=[0.053, 0.029, 0.011, 0.014, 0.014, 0.014, 0.014]; KL=[0.11624, 0.0647116, 0.034411, 0, 0, 0, 0]; XF=[1, 0.81, 0.64, 0, 0, 0, 0]
                SoilCrop ChickpeaSoil: LL=[0.053, 0.029, 0.011, 0.014, 0.014, 0.014, 0.014]; KL=[0.125433, 0.052102, 0.0187048, 0, 0, 0, 0]; XF=[1, 1, 1, 0, 0, 0, 0]
                SoilCrop ChicorySoil: LL=[0.053, 0.029, 0.011, 0.014, 0.014, 0.014, 0.014]; KL=[0.0877077, 0.0671292, 0.0547115, 0, 0, 0, 0]; XF=[1, 1, 1, 0, 0, 0, 0]
                SoilCrop FababeanSoil: LL=[0.053, 0.029, 0.011, 0.014, 0.014, 0.014, 0.014]; KL=[0.150325, 0.053936, 0.01591, 0, 0, 0, 0]; XF=[1, 0.81, 0.64, 0, 0, 0, 0]
                SoilCrop FieldpeaSoil: LL=[0.053, 0.029, 0.011, 0.014, 0.014, 0.014, 0.014]; KL=[0.150325, 0.053936, 0.01591, 0, 0, 0, 0]; XF=[1, 0.49, 0.36, 0, 0, 0, 0]
                SoilCrop FodderBeetSoil: LL=[0.053, 0.029, 0.011, 0.014, 0.014, 0.014, 0.014]; KL=[0.0953437, 0.0632749, 0.0425908, 0, 0, 0, 0]; XF=[1, 1, 0.81, 0, 0, 0, 0]
                SoilCrop GrapevineSoil: LL=[0.053, 0.029, 0.011, 0.014, 0.014, 0.014, 0.014]; KL=[0.0689111, 0.0557428, 0.0489312, 0, 0, 0, 0]; XF=[1, 0.716, 0.592, 0, 0, 0, 0]
                SoilCrop ItalianRyegrassSoil: LL=[0.053, 0.029, 0.011, 0.014, 0.014, 0.014, 0.014]; KL=[0.184899, 0.0540446, 0.0121091, 0, 0, 0, 0]; XF=[1, 0.81, 0.64, 0, 0, 0, 0]
                SoilCrop KaleSoil: LL=[0.053, 0.029, 0.011, 0.014, 0.014, 0.014, 0.014]; KL=[0.108823, 0.0678056, 0.0419375, 0, 0, 0, 0]; XF=[1, 1, 0.81, 0, 0, 0, 0]
                SoilCrop LucerneSoil: LL=[0.053, 0.029, 0.011, 0.014, 0.014, 0.014, 0.014]; KL=[0.0871376, 0.06744, 0.0557925, 0, 0, 0, 0]; XF=[1, 1, 1, 0, 0, 0, 0]
                SoilCrop MaizeSoil: LL=[0.053, 0.029, 0.011, 0.014, 0.014, 0.014, 0.014]; KL=[0.104878, 0.0696023, 0.0468499, 0, 0, 0, 0]; XF=[1, 1, 0.81, 0, 0, 0, 0]
                SoilCrop OatsSoil: LL=[0.053, 0.029, 0.011, 0.014, 0.014, 0.014, 0.014]; KL=[0.108823, 0.0678056, 0.0419375, 0, 0, 0, 0]; XF=[1, 1, 1, 0, 0, 0, 0]
                SoilCrop PlantainSoil: LL=[0.053, 0.029, 0.011, 0.014, 0.014, 0.014, 0.014]; KL=[0.108823, 0.0678056, 0.0419375, 0, 0, 0, 0]; XF=[1, 1, 1, 0, 0, 0, 0]
                SoilCrop PotatoSoil: LL=[0.053, 0.029, 0.011, 0.014, 0.014, 0.014, 0.014]; KL=[0.120858, 0.0395053, 0.010284, 0, 0, 0, 0]; XF=[1, 0.49, 0.36, 0, 0, 0, 0]
                SoilCrop RedCloverSoil: LL=[0.053, 0.029, 0.011, 0.014, 0.014, 0.014, 0.014]; KL=[0.0916052, 0.0650933, 0.048021, 0, 0, 0, 0]; XF=[1, 1, 1, 0, 0, 0, 0]
                SoilCrop AGPRyegrassSoil: LL=[0.053, 0.029, 0.011, 0.014, 0.014, 0.014, 0.014]; KL=[0.119082, 0.0524473, 0.0203679, 0, 0, 0, 0]; XF=[1, 0.81, 0.64, 0, 0, 0, 0]
                SoilCrop SoybeanSoil: LL=[0.053, 0.029, 0.011, 0.014, 0.014, 0.014, 0.014]; KL=[0.111887, 0.0564951, 0.0263545, 0, 0, 0, 0]; XF=[1, 0.81, 0.64, 0, 0, 0, 0]
                SoilCrop TriticaleSoil: LL=[0.053, 0.029, 0.011, 0.014, 0.014, 0.014, 0.014]; KL=[0.108823, 0.0678056, 0.0419375, 0, 0, 0, 0]; XF=[1, 1, 1, 0, 0, 0, 0]
                SoilCrop WheatSoil: LL=[0.053, 0.029, 0.011, 0.014, 0.014, 0.014, 0.014]; KL=[0.116391, 0.0750134, 0.048547, 0, 0, 0, 0]; XF=[1, 1, 0.81, 0, 0, 0, 0]
                SoilCrop WhitecloverSoil: LL=[0.053, 0.029, 0.011, 0.014, 0.014, 0.014, 0.014]; KL=[0.13156, 0.033542, 0.00625647, 0, 0, 0, 0]; XF=[1, 0.529, 0.405, 0, 0, 0, 0]
                SoilCrop AgPRyegrassSoil: LL=[0.053, 0.029, 0.011, 0.014, 0.014, 0.014, 0.014]; KL=[0.109158, 0.0480767, 0.0186706, 0, 0, 0, 0]; XF=[1, 0.81, 0.64, 0, 0, 0, 0]
                SoilCrop AgPWhiteCloverSoil: LL=[0.053, 0.029, 0.011, 0.014, 0.014, 0.014, 0.014]; KL=[0.150325, 0.0259366, 0.0051822, 0, 0, 0, 0]; XF=[1, 0.766, 0.562, 0, 0, 0, 0]
                SoilCrop AgPPaspalumSoil: LL=[0.053, 0.029, 0.011, 0.014, 0.014, 0.014, 0.014]; KL=[0.0916052, 0.0509974, 0.0271183, 0, 0, 0, 0]; XF=[1, 1, 1, 0, 0, 0, 0]
                SoilCrop SCRUMSoil: LL=[0.053, 0.029, 0.011, 0.014, 0.014, 0.014, 0.014]; KL=[0.0778063, 0.0778063, 0.0778063, 0, 0, 0, 0]; XF=[1, 1, 1, 0, 0, 0, 0]
              WaterBalance SoilWater: SummerDate=1-oct; SummerU=9; SummerCona=4.4; WinterDate=1-apr; WinterU=4; WinterCona=2; DiffusConst=88; DiffusSlope=35; Salb=0.13; CN2Bare=99; CNRed=39; CNCov=0.8; DischargeWidth=0; CatchmentArea=0; PSIDul=-100
                Thickness  SWCON  KLAT
                160        0.5    0
                250        0.35   0
                300        0.5    0
                1290       0.5    0
              SoilNitrogen: fom_types=[default, manure, mucuna, lablab, shemp, stable]; fract_carb=[0.2, 0.3, 0.54, 0.57, 0.45, 0]; fract_cell=[0.7, 0.3, 0.37, 0.37, 0.47, 0.1]; fract_lign=[0.1, 0.4, 0.09, 0.06, 0.08, 0.9]; NPartitionApproach=0
              Organic: FOMCNRatio=40; CarbonUnits=Total
                Thickness  Carbon    SoilCNRatio  FBiom      FInert    FOM
                50         3         10.4         0.0788566  0.254814  124.07
                50         3         10.4         0.0610103  0.314843  115.105
                50         3         10.4         0.0477893  0.365656  106.788
                50         2.49245   10.4         0.037995   0.430797  99.0722
                50         1.73667   10.4         0.0307392  0.510097  91.9135
                50         1.23006   10.4         0.025364   0.582298  85.2722
                50         0.890471  10.4         0.0213819  0.648343  79.1107
                50         0.662837  10.4         0.0184319  0.70861   73.3945
                50         0.510249  10.4         0.0162465  0.762893  68.0912
                50         0.407966  10.4         0.0146275  0.810591  63.1712
                250        0.262638  10.4         0.0118814  0.910194  43.4169
                250        0.208477  10.4         0.0104198  0.975936  29.84
                500        0.200422  10.4         0.0100442  0.990828  14.0954
                500        0.200008  10.4         0.0100022  0.996255  6.6582
              CERESSoilTemperature Temperature
              Water: Thickness=[160, 250, 300, 322.5, 322.5, 322.5, 322.5]; InitialValues=[0.1601, 0.0902, 0.0407, 0.0374, 0.0374, 0.0374, 0.0374]; RelativeTo=LL15; FilledFromTop=false
              LayerStructure: Thickness=[160, 250, 300, 322.5, 322.5, 322.5, 322.5]
              SoilNitrogenNO3 NO3: Thickness=[160, 250, 300, 1290]; InitialValues=[7.53072, 6.08611, 0.129567, 0.159413]; InitialValuesUnits=ppm; WaterTableConcentration=0; D0=0
              SoilNitrogenNH4 NH4: Thickness=[160, 250, 300, 1290]; InitialValues=[1.12961, 0.912917, 0.0194351, 0.023912]; InitialValuesUnits=ppm; WaterTableConcentration=0; D0=0
              SoilNitrogenUrea Urea: Thickness=[160, 250, 300, 1290]; InitialValues=[0, 0, 0, 0]; InitialValuesUnits=kg/ha; WaterTableConcentration=0; D0=0
          CompositeFactor Darnley_4a2: Specifications=[Soil]
            Soil Darnley_4a2: SoilType=Typic Argillic Pallic Soils; LocalName=Darnley_4a2; Latitude=-41; Longitude=174
              DataSource=Profile descriptions provided by Smap based on the work done by Trevor Webb.
              Chemical: Thickness=[175, 150, 375, 1300]; PH=[7, 7, 7, 7]; PHUnits=Water
              Physical
                Thickness  ParticleSizeClay  ParticleSizeSand  ParticleSizeSilt  BD     AirDry  LL15   DUL    SAT    KS
                175        24                12.5              63.5              1.254  0.082   0.165  0.349  0.455  1440
                150        24                12.5              63.5              1.388  0.103   0.177  0.306  0.385  480
                375        15                40                45                0.89   0.075   0.075  0.163  0.246  48
                325        8.5               72.5              19                0.634  0.03    0.03   0.088  0.15   1.2
                325        8.5               72.5              19                0.634  0.03    0.03   0.088  0.15   1.2
                325        8.5               72.5              19                0.634  0.03    0.03   0.088  0.15   1.2
                325        8.5               72.5              19                0.634  0.03    0.03   0.088  0.15   1.2
                SoilCrop BarleySoil: LL=[0.165, 0.177, 0.075, 0.03, 0.03, 0.03, 0.03]; KL=[0.116679, 0.0668268, 0.0291715, 0, 0, 0, 0]; XF=[1, 1, 1, 0, 0, 0, 0]
                SoilCrop CanolaSoil: LL=[0.165, 0.177, 0.075, 0.03, 0.03, 0.03, 0.03]; KL=[0.113775, 0.0595979, 0.0225216, 0, 0, 0, 0]; XF=[1, 0.81, 0.49, 0, 0, 0, 0]
                SoilCrop ChickpeaSoil: LL=[0.165, 0.177, 0.075, 0.03, 0.03, 0.03, 0.03]; KL=[0.121466, 0.0504449, 0.0131016, 0, 0, 0, 0]; XF=[1, 1, 1, 0, 0, 0, 0]
                SoilCrop ChicorySoil: LL=[0.165, 0.177, 0.075, 0.03, 0.03, 0.03, 0.03]; KL=[0.0868539, 0.058554, 0.033262, 0, 0, 0, 0]; XF=[1, 1, 1, 0, 0, 0, 0]
                SoilCrop FababeanSoil: LL=[0.165, 0.177, 0.075, 0.03, 0.03, 0.03, 0.03]; KL=[0.144792, 0.0535426, 0.0115286, 0, 0, 0, 0]; XF=[1, 0.81, 0.49, 0, 0, 0, 0]
                SoilCrop FieldpeaSoil: LL=[0.165, 0.177, 0.075, 0.03, 0.03, 0.03, 0.03]; KL=[0.144792, 0.0535426, 0.0115286, 0, 0, 0, 0]; XF=[1, 0.49, 0.25, 0, 0, 0, 0]
                SoilCrop FodderBeetSoil: LL=[0.165, 0.177, 0.075, 0.03, 0.03, 0.03, 0.03]; KL=[0.0939242, 0.0565523, 0.0267631, 0, 0, 0, 0]; XF=[1, 1, 0.64, 0, 0, 0, 0]
                SoilCrop GrapevineSoil: LL=[0.165, 0.177, 0.075, 0.03, 0.03, 0.03, 0.03]; KL=[0.0683785, 0.048165, 0.029369, 0, 0, 0, 0]; XF=[1, 0.716, 0.479, 0, 0, 0, 0]
                SoilCrop ItalianRyegrassSoil: LL=[0.165, 0.177, 0.075, 0.03, 0.03, 0.03, 0.03]; KL=[0.176763, 0.0555614, 0.0092013, 0, 0, 0, 0]; XF=[1, 0.81, 0.49, 0, 0, 0, 0]
                SoilCrop KaleSoil: LL=[0.165, 0.177, 0.075, 0.03, 0.03, 0.03, 0.03]; KL=[0.106956, 0.0612579, 0.0267405, 0, 0, 0, 0]; XF=[1, 1, 0.64, 0, 0, 0, 0]
                SoilCrop LucerneSoil: LL=[0.165, 0.177, 0.075, 0.03, 0.03, 0.03, 0.03]; KL=[0.0863245, 0.0587133, 0.0338317, 0, 0, 0, 0]; XF=[1, 1, 1, 0, 0, 0, 0]
                SoilCrop MaizeSoil: LL=[0.165, 0.177, 0.075, 0.03, 0.03, 0.03, 0.03]; KL=[0.103317, 0.0622076, 0.0294394, 0, 0, 0, 0]; XF=[1, 1, 0.64, 0, 0, 0, 0]
                SoilCrop OatsSoil: LL=[0.165, 0.177, 0.075, 0.03, 0.03, 0.03, 0.03]; KL=[0.106956, 0.0612579, 0.0267405, 0, 0, 0, 0]; XF=[1, 1, 0.79, 0, 0, 0, 0]
                SoilCrop PlantainSoil: LL=[0.165, 0.177, 0.075, 0.03, 0.03, 0.03, 0.03]; KL=[0.106956, 0.0612579, 0.0267405, 0, 0, 0, 0]; XF=[1, 1, 1, 0, 0, 0, 0]
                SoilCrop PotatoSoil: LL=[0.165, 0.177, 0.075, 0.03, 0.03, 0.03, 0.03]; KL=[0.116014, 0.039846, 0.00761455, 0, 0, 0, 0]; XF=[1, 0.49, 0.25, 0, 0, 0, 0]
                SoilCrop RedCloverSoil: LL=[0.165, 0.177, 0.075, 0.03, 0.03, 0.03, 0.03]; KL=[0.0904673, 0.0575028, 0.0297013, 0, 0, 0, 0]; XF=[1, 1, 1, 0, 0, 0, 0]
                SoilCrop AGPRyegrassSoil: LL=[0.165, 0.177, 0.075, 0.03, 0.03, 0.03, 0.03]; KL=[0.115562, 0.050274, 0.0140742, 0, 0, 0, 0]; XF=[1, 0.81, 0.49, 0, 0, 0, 0]
                SoilCrop SoybeanSoil: LL=[0.165, 0.177, 0.075, 0.03, 0.03, 0.03, 0.03]; KL=[0.109124, 0.0529051, 0.0176433, 0, 0, 0, 0]; XF=[1, 0.81, 0.49, 0, 0, 0, 0]
                SoilCrop TriticaleSoil: LL=[0.165, 0.177, 0.075, 0.03, 0.03, 0.03, 0.03]; KL=[0.106956, 0.0612579, 0.0267405, 0, 0, 0, 0]; XF=[1, 1, 0.79, 0, 0, 0, 0]
                SoilCrop WheatSoil: LL=[0.165, 0.177, 0.075, 0.03, 0.03, 0.03, 0.03]; KL=[0.114535, 0.0673798, 0.0307135, 0, 0, 0, 0]; XF=[1, 1, 0.64, 0, 0, 0, 0]
                SoilCrop WhitecloverSoil: LL=[0.165, 0.177, 0.075, 0.03, 0.03, 0.03, 0.03]; KL=[0.125144, 0.0352974, 0.00490702, 0, 0, 0, 0]; XF=[1, 0.529, 0.298, 0, 0, 0, 0]
                SoilCrop AgPRyegrassSoil: LL=[0.165, 0.177, 0.075, 0.03, 0.03, 0.03, 0.03]; KL=[0.105932, 0.0460845, 0.0129014, 0, 0, 0, 0]; XF=[1, 0.81, 0.49, 0, 0, 0, 0]
                SoilCrop AgPWhiteCloverSoil: LL=[0.165, 0.177, 0.075, 0.03, 0.03, 0.03, 0.03]; KL=[0.140965, 0.0291756, 0.00613608, 0, 0, 0, 0]; XF=[1, 0.766, 0.391, 0, 0, 0, 0]
                SoilCrop AgPPaspalumSoil: LL=[0.165, 0.177, 0.075, 0.03, 0.03, 0.03, 0.03]; KL=[0.0896631, 0.0469673, 0.0177486, 0, 0, 0, 0]; XF=[1, 1, 0.766, 0, 0, 0, 0]
                SoilCrop SCRUMSoil: LL=[0.165, 0.177, 0.075, 0.03, 0.03, 0.03, 0.03]; KL=[0.0776279, 0.0776279, 0.0776279, 0, 0, 0, 0]; XF=[1, 1, 0.79, 0, 0, 0, 0]
              WaterBalance SoilWater: SummerDate=1-oct; SummerU=9; SummerCona=4.4; WinterDate=1-apr; WinterU=4; WinterCona=2; DiffusConst=88; DiffusSlope=35; Salb=0.13; CN2Bare=89; CNRed=20; CNCov=0.8; DischargeWidth=0; CatchmentArea=0; PSIDul=-100
                Thickness  SWCON  KLAT
                175        0.5    0
                150        0.3    0
                375        0.2    0
                1300       0.15   0
              SoilNitrogen: fom_types=[default, manure, mucuna, lablab, shemp, stable]; fract_carb=[0.2, 0.3, 0.54, 0.57, 0.45, 0]; fract_cell=[0.7, 0.3, 0.37, 0.37, 0.47, 0.1]; fract_lign=[0.1, 0.4, 0.09, 0.06, 0.08, 0.9]; NPartitionApproach=0
              Organic: FOMCNRatio=40; CarbonUnits=Total
                Thickness  Carbon    SoilCNRatio  FBiom      FInert    FOM
                50         4         11           0.0788566  0.343356  124.07
                50         4         11           0.0610103  0.403385  115.105
                50         4         11           0.0477893  0.454198  106.788
                50         3.31118   11           0.037995   0.512898  99.0722
                50         2.28548   11           0.0307392  0.57953   91.9135
                50         1.59794   11           0.025364   0.639339  85.2722
                50         1.13707   11           0.0213819  0.693411  79.1107
                50         0.828136  11           0.0184319  0.742468  73.3945
                50         0.621052  11           0.0162465  0.786807  68.0912
                50         0.48224   11           0.0146275  0.826326  63.1712
                250        0.285009  11           0.0118814  0.913089  43.4169
                250        0.211505  11           0.0104198  0.97628   29.84
                500        0.200573  11           0.0100442  0.99083   14.0954
                500        0.20001   11           0.0100022  0.996255  6.6582
              CERESSoilTemperature Temperature
              Water: Thickness=[175, 150, 375, 325, 325, 325, 325]; InitialValues=[0.3306, 0.2931, 0.1542, 0.0822, 0.0822, 0.0822, 0.0822]; RelativeTo=LL15; FilledFromTop=false
              LayerStructure: Thickness=[175, 150, 375, 325, 325, 325, 325]
              SoilNitrogenNO3 NO3: Thickness=[175, 150, 375, 1300]; InitialValues=[5.05051, 3.8095, 0.0660939, 0.0927816]; InitialValuesUnits=ppm; WaterTableConcentration=0; D0=0
              SoilNitrogenNH4 NH4: Thickness=[175, 150, 375, 1300]; InitialValues=[0.757576, 0.571425, 0.00991408, 0.0139172]; InitialValuesUnits=ppm; WaterTableConcentration=0; D0=0
              SoilNitrogenUrea Urea: Thickness=[175, 150, 375, 1300]; InitialValues=[0, 0, 0, 0]; InitialValuesUnits=kg/ha; WaterTableConcentration=0; D0=0
          CompositeFactor Templeton_1a1: Specifications=[Soil]
            Soil Templeton_1a1: SoilType=Typic Immature Pallic Soils; LocalName=Templeton_1a1; Latitude=-41; Longitude=174
              DataSource=Profile descriptions provided by Smap based on the work done by Trevor Webb.
              Chemical: Thickness=[240, 300, 325, 1135]; PH=[7, 7, 7, 7]; PHUnits=Water
              Physical
                Thickness  ParticleSizeClay  ParticleSizeSand  ParticleSizeSilt  BD     AirDry  LL15   DUL    SAT    KS
                240        22.5              17.5              60                1.356  0.078   0.156  0.353  0.454  1440
                300        20                17.5              62.5              1.555  0.139   0.154  0.304  0.385  480
                325        22.5              17.5              60                1.674  0.172   0.172  0.312  0.343  24
                378.3      17.5              32.5              50                1.698  0.139   0.139  0.28   0.334  192
                378.3      17.5              32.5              50                1.698  0.139   0.139  0.28   0.334  192
                378.3      17.5              32.5              50                1.698  0.139   0.139  0.28   0.334  192
                SoilCrop BarleySoil: LL=[0.156, 0.154, 0.172, 0.139, 0.139, 0.139]; KL=[0.108248, 0.0483771, 0.0141123, 0.0104476, 0.00436393, 0]; XF=[1, 1, 0.198, 1, 1, 1]
                SoilCrop CanolaSoil
                  LL=[0.156, 0.154, 0.172, 0.139, 0.139, 0.139]
                  KL=[0.103686, 0.0399496, 0.00981525, 0.00598974, 0.00174451, 0]
                  XF=[1, 0.81, 0.01, 0.49, 0.49, 0.49]
                SoilCrop ChickpeaSoil: LL=[0.156, 0.154, 0.172, 0.139, 0.139, 0.139]; KL=[0.105673, 0.0276847, 0.00435258, 0.00180764, 0, 0]; XF=[1, 1, 0.063, 1, 1, 1]
                SoilCrop ChicorySoil
                  LL=[0.156, 0.154, 0.172, 0.139, 0.139, 0.139]
                  KL=[0.083249, 0.048781, 0.0194706, 0.020513, 0.0125237, 0.00764604]
                  XF=[1, 1, 0.16, 1, 1, 1]
                SoilCrop FababeanSoil: LL=[0.156, 0.154, 0.172, 0.139, 0.139, 0.139]; KL=[0.123076, 0.0265884, 0.00334394, 0, 0, 0]; XF=[1, 0.81, 0.01, 0, 0, 0]
                SoilCrop FieldpeaSoil: LL=[0.156, 0.154, 0.172, 0.139, 0.139, 0.139]; KL=[0.123076, 0.0265884, 0.00334394, 0, 0, 0]; XF=[1, 0.49, 0, 0, 0, 0]
                SoilCrop FodderBeetSoil
                  LL=[0.156, 0.154, 0.172, 0.139, 0.139, 0.139]
                  KL=[0.0880133, 0.0427413, 0.0137267, 0.0113233, 0.00531358, 0.00181997]
                  XF=[1, 1, 0.04, 0.64, 0.64, 0.64]
                SoilCrop GrapevineSoil
                  LL=[0.156, 0.154, 0.172, 0.139, 0.139, 0.139]
                  KL=[0.0661178, 0.041671, 0.0180962, 0.0209629, 0.014174, 0.00958371]
                  XF=[1, 0.716, 0.053, 0.479, 0.479, 0.479]
                SoilCrop ItalianRyegrassSoil: LL=[0.156, 0.154, 0.172, 0.139, 0.139, 0.139]; KL=[0.145447, 0.0239864, 0.00292565, 0, 0, 0]; XF=[1, 0.81, 0.01, 0, 0, 0]
                SoilCrop KaleSoil
                  LL=[0.156, 0.154, 0.172, 0.139, 0.139, 0.139]
                  KL=[0.0992273, 0.0443457, 0.0129363, 0.00957697, 0.00400027, 0]
                  XF=[1, 1, 0.04, 0.64, 0.64, 0.64]
                SoilCrop LucerneSoil
                  LL=[0.156, 0.154, 0.172, 0.139, 0.139, 0.139]
                  KL=[0.0828878, 0.0492873, 0.0200097, 0.0214877, 0.0133913, 0.00834555]
                  XF=[1, 1, 0.36, 1, 1, 1]
                SoilCrop MaizeSoil
                  LL=[0.156, 0.154, 0.172, 0.139, 0.139, 0.139]
                  KL=[0.0968146, 0.0470155, 0.0150993, 0.0124557, 0.00584494, 0.00200197]
                  XF=[1, 1, 0.04, 0.64, 0.64, 0.64]
                SoilCrop OatsSoil
                  LL=[0.156, 0.154, 0.172, 0.139, 0.139, 0.139]
                  KL=[0.0992273, 0.0443457, 0.0129363, 0.00957697, 0.00400027, 0]
                  XF=[1, 1, 0.049, 0.79, 0.79, 0.79]
                SoilCrop PlantainSoil
                  LL=[0.156, 0.154, 0.172, 0.139, 0.139, 0.139]
                  KL=[0.0992273, 0.0443457, 0.0129363, 0.00957697, 0.00400027, 0]
                  XF=[1, 1, 0.16, 1, 1, 1]
                SoilCrop PotatoSoil: LL=[0.156, 0.154, 0.172, 0.139, 0.139, 0.139]; KL=[0.0971673, 0.018567, 0.00245771, 0, 0, 0]; XF=[1, 0.49, 0, 0, 0, 0]
                SoilCrop RedCloverSoil
                  LL=[0.156, 0.154, 0.172, 0.139, 0.139, 0.139]
                  KL=[0.0856973, 0.0455358, 0.0162297, 0.0150531, 0.00801314, 0.0042656]
                  XF=[1, 1, 0.198, 1, 1, 1]
                SoilCrop AGPRyegrassSoil: LL=[0.156, 0.154, 0.172, 0.139, 0.139, 0.139]; KL=[0.101475, 0.028717, 0.00493653, 0.00214758, 0, 0]; XF=[1, 0.81, 0.01, 0.49, 0.49, 0.49]
                SoilCrop SoybeanSoil: LL=[0.156, 0.154, 0.172, 0.139, 0.139, 0.139]; KL=[0.0979204, 0.0331762, 0.00702406, 0.00362553, 0, 0]; XF=[1, 0.81, 0.01, 0.49, 0.49, 0.49]
                SoilCrop TriticaleSoil
                  LL=[0.156, 0.154, 0.172, 0.139, 0.139, 0.139]
                  KL=[0.0992273, 0.0443457, 0.0129363, 0.00957697, 0.00400027, 0]
                  XF=[1, 1, 0.049, 0.79, 0.79, 0.79]
                SoilCrop WheatSoil: LL=[0.156, 0.154, 0.172, 0.139, 0.139, 0.139]; KL=[0.10683, 0.0499162, 0.015331, 0.0120272, 0.00534694, 0]; XF=[1, 1, 0.04, 0.64, 0.64, 0.64]
                SoilCrop WhitecloverSoil: LL=[0.156, 0.154, 0.172, 0.139, 0.139, 0.139]; KL=[0.100766, 0.0138804, 0.00153189, 0, 0, 0]; XF=[1, 0.529, 0, 0, 0, 0]
                SoilCrop AgPRyegrassSoil: LL=[0.156, 0.154, 0.172, 0.139, 0.139, 0.139]; KL=[0.0930185, 0.0263239, 0.00452515, 0.00196861, 0, 0]; XF=[1, 0.81, 0.01, 0.49, 0.49, 0.49]
                SoilCrop AgPWhiteCloverSoil: LL=[0.156, 0.154, 0.172, 0.139, 0.139, 0.139]; KL=[0.106691, 0.00878753, 0, 0, 0, 0]; XF=[1, 0.766, 0, 0, 0, 0]
                SoilCrop AgPPaspalumSoil: LL=[0.156, 0.154, 0.172, 0.139, 0.139, 0.139]; KL=[0.0817121, 0.0314831, 0.00773511, 0.00472034, 0, 0]; XF=[1, 1, 0.016, 0.766, 0.766, 0.766]
                SoilCrop SCRUMSoil
                  LL=[0.156, 0.154, 0.172, 0.139, 0.139, 0.139]
                  KL=[0.0768594, 0.0768594, 0.0768594, 0.0768594, 0.0768594, 0.0768594]
                  XF=[1, 1, 0.049, 0.79, 0.79, 0.79]
              WaterBalance SoilWater: SummerDate=1-oct; SummerU=9; SummerCona=4.4; WinterDate=1-apr; WinterU=4; WinterCona=2; DiffusConst=88; DiffusSlope=35; Salb=0.13; CN2Bare=88; CNRed=20; CNCov=0.8; DischargeWidth=0; CatchmentArea=0; PSIDul=-100
                Thickness  SWCON  KLAT
                240        0.5    0
                300        0.3    0
                325        0.15   0
                1135       0.2    0
              SoilNitrogen: fom_types=[default, manure, mucuna, lablab, shemp, stable]; fract_carb=[0.2, 0.3, 0.54, 0.57, 0.45, 0]; fract_cell=[0.7, 0.3, 0.37, 0.37, 0.47, 0.1]; fract_lign=[0.1, 0.4, 0.09, 0.06, 0.08, 0.9]; NPartitionApproach=0
              Organic: same as SimulationExp.Factors.Permutation.SoilType_Old.Darnley_4a2.Darnley_4a2.Organic
              CERESSoilTemperature Temperature
              Water: Thickness=[240, 300, 325, 378.3, 378.3, 378.3]; InitialValues=[0.3333, 0.289, 0.298, 0.2659, 0.2659, 0.2659]; RelativeTo=LL15; FilledFromTop=false
              LayerStructure: Thickness=[240, 300, 325, 378.3, 378.3, 378.3]
              SoilNitrogenNO3 NO3: Thickness=[240, 300, 325, 1135]; InitialValues=[4.6706, 0.84484, 0.0351395, 0.0347279]; InitialValuesUnits=ppm; WaterTableConcentration=0; D0=0
              SoilNitrogenNH4 NH4: Thickness=[240, 300, 325, 1135]; InitialValues=[0.70059, 0.126726, 0.00527093, 0.00521359]; InitialValuesUnits=ppm; WaterTableConcentration=0; D0=0
              SoilNitrogenUrea Urea: Thickness=[240, 300, 325, 1135]; InitialValues=[0, 0, 0, 0]; InitialValuesUnits=kg/ha; WaterTableConcentration=0; D0=0
          CompositeFactor Waikiwi_33a2: Specifications=[Soil]
            Soil Waikiwi_33a2: SoilType=Typic Firm Brown Soils; LocalName=Waikiwi_33a2; Latitude=-41; Longitude=174
              DataSource=Profile descriptions provided by Smap based on the work done by Trevor Webb.
              Chemical: Thickness=[200, 100, 250, 1450]; PH=[7, 7, 7, 7]; PHUnits=Water
              Physical
                Thickness  ParticleSizeClay  ParticleSizeSand  ParticleSizeSilt  BD     AirDry  LL15   DUL    SAT    KS
                200        30                12.5              57.5              1.189  0.107   0.214  0.418  0.513  1440
                100        30                12.5              57.5              1.253  0.112   0.224  0.395  0.491  1440
                250        30                12.5              57.5              1.356  0.226   0.226  0.37   0.454  960
                362.5      30                12.5              57.5              1.441  0.254   0.254  0.393  0.425  192
                362.5      30                12.5              57.5              1.441  0.254   0.254  0.393  0.425  192
                362.5      30                12.5              57.5              1.441  0.254   0.254  0.393  0.425  192
                362.5      30                12.5              57.5              1.441  0.254   0.254  0.393  0.425  192
                SoilCrop BarleySoil
                  LL=[0.214, 0.224, 0.226, 0.254, 0.254, 0.254, 0.254]
                  KL=[0.113361, 0.0801921, 0.053548, 0.0220107, 0.00953518, 0.00413071, 0]
                  XF=[1, 1, 1, 1, 1, 1, 1]
                SoilCrop CanolaSoil
                  LL=[0.214, 0.224, 0.226, 0.254, 0.254, 0.254, 0.254]
                  KL=[0.109784, 0.0715174, 0.0433775, 0.0150687, 0.00534898, 0, 0]
                  XF=[1, 1, 1, 0.49, 0.49, 0.49, 0.49]
                SoilCrop ChickpeaSoil: LL=[0.214, 0.224, 0.226, 0.254, 0.254, 0.254, 0.254]; KL=[0.11513, 0.0605338, 0.0285942, 0.00641334, 0, 0, 0]; XF=[1, 1, 1, 1, 1, 1, 1]
                SoilCrop ChicorySoil
                  LL=[0.214, 0.224, 0.226, 0.254, 0.254, 0.254, 0.254]
                  KL=[0.0854493, 0.0702648, 0.0559249, 0.0312566, 0.0194803, 0.0121409, 0.00756667]
                  XF=[1, 1, 1, 1, 1, 1, 1]
                SoilCrop FababeanSoil: LL=[0.214, 0.224, 0.226, 0.254, 0.254, 0.254, 0.254]; KL=[0.13602, 0.0642511, 0.0267838, 0.00482701, 0, 0, 0]; XF=[1, 1, 1, 0.49, 0.49, 0.49, 0.49]
                SoilCrop FieldpeaSoil: LL=[0.214, 0.224, 0.226, 0.254, 0.254, 0.254, 0.254]; KL=[0.13602, 0.0642511, 0.0267838, 0.00482701, 0, 0, 0]; XF=[1, 1, 1, 0.25, 0.25, 0.25, 0.25]
                SoilCrop FodderBeetSoil
                  LL=[0.214, 0.224, 0.226, 0.254, 0.254, 0.254, 0.254]
                  KL=[0.0916052, 0.0678628, 0.0478221, 0.0215994, 0.0104611, 0.00506658, 0.001763]
                  XF=[1, 1, 1, 0.64, 0.64, 0.64, 0.64]
                SoilCrop GrapevineSoil
                  LL=[0.214, 0.224, 0.226, 0.254, 0.254, 0.254, 0.254]
                  KL=[0.0675, 0.0577981, 0.0482271, 0.0292766, 0.0201215, 0.0138293, 0.00950472]
                  XF=[1, 1, 1, 0.479, 0.479, 0.479, 0.479]
                SoilCrop ItalianRyegrassSoil: LL=[0.214, 0.224, 0.226, 0.254, 0.254, 0.254, 0.254]; KL=[0.163991, 0.0666736, 0.0233316, 0.00459212, 0, 0, 0]; XF=[1, 1, 1, 0.49, 0.49, 0.49, 0.49]
                SoilCrop KaleSoil
                  LL=[0.214, 0.224, 0.226, 0.254, 0.254, 0.254, 0.254]
                  KL=[0.103914, 0.0735094, 0.0490857, 0.0201764, 0.00874058, 0.00378649, 0]
                  XF=[1, 1, 1, 0.64, 0.64, 0.64, 0.64]
                SoilCrop LucerneSoil
                  LL=[0.214, 0.224, 0.226, 0.254, 0.254, 0.254, 0.254]
                  KL=[0.0849861, 0.070456, 0.056613, 0.0321722, 0.0204499, 0.0129988, 0.00826252]
                  XF=[1, 1, 1, 1, 1, 1, 1]
                SoilCrop MaizeSoil
                  LL=[0.214, 0.224, 0.226, 0.254, 0.254, 0.254, 0.254]
                  KL=[0.100766, 0.0746491, 0.0526043, 0.0237594, 0.0115072, 0.00557324, 0.0019393]
                  XF=[1, 1, 1, 0.64, 0.64, 0.64, 0.64]
                SoilCrop OatsSoil
                  LL=[0.214, 0.224, 0.226, 0.254, 0.254, 0.254, 0.254]
                  KL=[0.103914, 0.0735094, 0.0490857, 0.0201764, 0.00874058, 0.00378649, 0]
                  XF=[1, 1, 1, 0.79, 0.79, 0.79, 0.79]
                SoilCrop PlantainSoil
                  LL=[0.214, 0.224, 0.226, 0.254, 0.254, 0.254, 0.254]
                  KL=[0.103914, 0.0735094, 0.0490857, 0.0201764, 0.00874058, 0.00378649, 0]
                  XF=[1, 1, 1, 1, 1, 1, 1]
                SoilCrop PotatoSoil: LL=[0.214, 0.224, 0.226, 0.254, 0.254, 0.254, 0.254]; KL=[0.108367, 0.0478152, 0.0184082, 0.00387874, 0, 0, 0]; XF=[1, 1, 1, 0.25, 0.25, 0.25, 0.25]
                SoilCrop RedCloverSoil
                  LL=[0.214, 0.224, 0.226, 0.254, 0.254, 0.254, 0.254]
                  KL=[0.088602, 0.0690033, 0.0515467, 0.0257839, 0.0140917, 0.00770151, 0.0042091]
                  XF=[1, 1, 1, 1, 1, 1, 1]
                SoilCrop AGPRyegrassSoil: LL=[0.214, 0.224, 0.226, 0.254, 0.254, 0.254, 0.254]; KL=[0.109926, 0.0603288, 0.0299584, 0.00733376, 0, 0, 0]; XF=[1, 1, 1, 0.49, 0.49, 0.49, 0.49]
                SoilCrop SoybeanSoil
                  LL=[0.214, 0.224, 0.226, 0.254, 0.254, 0.254, 0.254]
                  KL=[0.104671, 0.0634861, 0.0354275, 0.0106369, 0.0031772, 0, 0]
                  XF=[1, 1, 1, 0.49, 0.49, 0.49, 0.49]
                SoilCrop TriticaleSoil
                  LL=[0.214, 0.224, 0.226, 0.254, 0.254, 0.254, 0.254]
                  KL=[0.103914, 0.0735094, 0.0490857, 0.0201764, 0.00874058, 0.00378649, 0]
                  XF=[1, 1, 1, 0.79, 0.79, 0.79, 0.79]
                SoilCrop WheatSoil
                  LL=[0.214, 0.224, 0.226, 0.254, 0.254, 0.254, 0.254]
                  KL=[0.111508, 0.0808558, 0.0555713, 0.024025, 0.0110487, 0.00508108, 0]
                  XF=[1, 1, 1, 0.64, 0.64, 0.64, 0.64]
                SoilCrop WhitecloverSoil: LL=[0.214, 0.224, 0.226, 0.254, 0.254, 0.254, 0.254]; KL=[0.115138, 0.0423569, 0.0131901, 0.00238849, 0, 0, 0]; XF=[1, 1, 1, 0.298, 0.298, 0.298, 0.298]
                SoilCrop AgPRyegrassSoil: LL=[0.214, 0.224, 0.226, 0.254, 0.254, 0.254, 0.254]; KL=[0.100766, 0.0553014, 0.0274619, 0.00672261, 0, 0, 0]; XF=[1, 1, 1, 0.49, 0.49, 0.49, 0.49]
                SoilCrop AgPWhiteCloverSoil: LL=[0.214, 0.224, 0.226, 0.254, 0.254, 0.254, 0.254]; KL=[0.126643, 0.0350108, 0.00781196, 0, 0, 0, 0]; XF=[1, 1, 1, 0, 0, 0, 0]
                SoilCrop AgPPaspalumSoil
                  LL=[0.214, 0.224, 0.226, 0.254, 0.254, 0.254, 0.254]
                  KL=[0.0865174, 0.0563608, 0.0341846, 0.0118752, 0.00421537, 0, 0]
                  XF=[1, 1, 1, 0.766, 0.766, 0.766, 0.766]
                SoilCrop SCRUMSoil
                  LL=[0.214, 0.224, 0.226, 0.254, 0.254, 0.254, 0.254]
                  KL=[0.0773314, 0.0773314, 0.0773314, 0.0773314, 0.0773314, 0.0773314, 0.0773314]
                  XF=[1, 1, 1, 0.79, 0.79, 0.79, 0.79]
              WaterBalance SoilWater: SummerDate=1-oct; SummerU=9; SummerCona=4.4; WinterDate=1-apr; WinterU=4; WinterCona=2; DiffusConst=88; DiffusSlope=35; Salb=0.13; CN2Bare=88; CNRed=20; CNCov=0.8; DischargeWidth=0; CatchmentArea=0; PSIDul=-100
                Thickness  SWCON  KLAT
                200        0.5    0
                100        0.5    0
                250        0.3    0
                1450       0.2    0
              SoilNitrogen: fom_types=[default, manure, mucuna, lablab, shemp, stable]; fract_carb=[0.2, 0.3, 0.54, 0.57, 0.45, 0]; fract_cell=[0.7, 0.3, 0.37, 0.37, 0.47, 0.1]; fract_lign=[0.1, 0.4, 0.09, 0.06, 0.08, 0.9]; NPartitionApproach=0
              Organic: FOMCNRatio=40; CarbonUnits=Total
                Thickness  Carbon    SoilCNRatio  FBiom      FInert    FOM
                50         5         11.1         0.0788566  0.396481  124.07
                50         5         11.1         0.0610103  0.45651   115.105
                50         5         11.1         0.0477893  0.507323  106.788
                50         4.12991   11.1         0.037995   0.562446  99.0722
                50         2.8343    11.1         0.0307392  0.622074  91.9135
                50         1.96582   11.1         0.025364   0.67503   85.2722
                50         1.38367   11.1         0.0213819  0.722415  79.1107
                50         0.993435  11.1         0.0184319  0.765058  73.3945
                50         0.731855  11.1         0.0162465  0.803479  68.0912
                50         0.556513  11.1         0.0146275  0.83786   63.1712
                250        0.30738   11.1         0.0118814  0.915563  43.4169
                250        0.214532  11.1         0.0104198  0.976615  29.84
                500        0.200724  11.1         0.0100442  0.990832  14.0954
                500        0.200013  11.1         0.0100022  0.996255  6.6582
              CERESSoilTemperature Temperature
              Water: Thickness=[200, 100, 250, 362.5, 362.5, 362.5, 362.5]; InitialValues=[0.3976, 0.3779, 0.3556, 0.3791, 0.3791, 0.3791, 0.3791]; RelativeTo=LL15; FilledFromTop=false
              LayerStructure: Thickness=[200, 100, 250, 362.5, 362.5, 362.5, 362.5]
              SoilNitrogenNO3 NO3: Thickness=[200, 100, 250, 1450]; InitialValues=[5.3266, 5.05454, 0.0433802, 0.0408213]; InitialValuesUnits=ppm; WaterTableConcentration=0; D0=0
              SoilNitrogenNH4 NH4: Thickness=[200, 100, 250, 1450]; InitialValues=[0.798991, 0.75818, 0.00650703, 0.0061232]; InitialValuesUnits=ppm; WaterTableConcentration=0; D0=0
              SoilNitrogenUrea Urea: Thickness=[200, 100, 250, 1450]; InitialValues=[0, 0, 0, 0]; InitialValuesUnits=kg/ha; WaterTableConcentration=0; D0=0
          CompositeFactor Windermere_16a1: Specifications=[Soil]
            Soil Windermere_16a1: SoilType=Mellow Humic Organic Soils; LocalName=Windermere_16a1; Latitude=-41; Longitude=174
              DataSource=Profile descriptions provided by Smap based on the work done by Trevor Webb.
              Chemical: Thickness=[200, 110, 1690]; PH=[7, 7, 7]; PHUnits=Water
              Physical
                Thickness  ParticleSizeClay  ParticleSizeSand  ParticleSizeSilt  BD     AirDry  LL15   DUL    SAT    KS
                200        10                10                80                0.3    0.093   0.186  0.636  0.804  960
                110        30                3                 67                0.3    0.101   0.186  0.636  0.804  720
                338        27                45                28                1.476  0.208   0.208  0.357  0.412  192
                338        27                45                28                1.476  0.208   0.208  0.357  0.412  192
                338        27                45                28                1.476  0.208   0.208  0.357  0.412  192
                338        27                45                28                1.476  0.208   0.208  0.357  0.412  192
                338        27                45                28                1.476  0.208   0.208  0.357  0.412  192
                SoilCrop BarleySoil
                  LL=[0.186, 0.186, 0.208, 0.208, 0.208, 0.208, 0.208]
                  KL=[0.151148, 0.105696, 0.0393951, 0.018059, 0.00827834, 0.00379484, 0]
                  XF=[1, 1, 1, 1, 1, 1, 1]
                SoilCrop CanolaSoil
                  LL=[0.186, 0.186, 0.208, 0.208, 0.208, 0.208, 0.208]
                  KL=[0.146378, 0.094004, 0.0309798, 0.0117943, 0.00449024, 0, 0]
                  XF=[1, 1, 0.49, 0.49, 0.49, 0.49, 0.49]
                SoilCrop ChickpeaSoil: LL=[0.186, 0.186, 0.208, 0.208, 0.208, 0.208, 0.208]; KL=[0.153506, 0.0790006, 0.0189055, 0.00444101, 0, 0, 0]; XF=[1, 1, 1, 1, 1, 1, 1]
                SoilCrop ChicorySoil
                  LL=[0.186, 0.186, 0.208, 0.208, 0.208, 0.208, 0.208]
                  KL=[0.113932, 0.0930774, 0.0434345, 0.0279491, 0.0179846, 0.0115727, 0.00744673]
                  XF=[1, 1, 1, 1, 1, 1, 1]
                SoilCrop FababeanSoil: LL=[0.186, 0.186, 0.208, 0.208, 0.208, 0.208, 0.208]; KL=[0.181359, 0.0835529, 0.0170385, 0.00365951, 0, 0, 0]; XF=[1, 1, 0.49, 0.49, 0.49, 0.49, 0.49]
                SoilCrop FieldpeaSoil: LL=[0.186, 0.186, 0.208, 0.208, 0.208, 0.208, 0.208]; KL=[0.181359, 0.0835529, 0.0170385, 0.00365951, 0, 0, 0]; XF=[0.81, 0.81, 0.25, 0.25, 0.25, 0.25, 0.25]
                SoilCrop FodderBeetSoil
                  LL=[0.186, 0.186, 0.208, 0.208, 0.208, 0.208, 0.208]
                  KL=[0.12214, 0.0895834, 0.035772, 0.0181954, 0.00925502, 0.00470755, 0.0016787]
                  XF=[1, 1, 0.64, 0.64, 0.64, 0.64, 0.64]
                SoilCrop GrapevineSoil
                  LL=[0.186, 0.186, 0.208, 0.208, 0.208, 0.208, 0.208]
                  KL=[0.09, 0.0766665, 0.0380057, 0.0267914, 0.0188861, 0.0133134, 0.00938503]
                  XF=[1, 1, 0.479, 0.479, 0.479, 0.479, 0.479]
                SoilCrop ItalianRyegrassSoil: LL=[0.186, 0.186, 0.208, 0.208, 0.208, 0.208, 0.208]; KL=[0.218654, 0.0862708, 0.0140622, 0.00255063, 0, 0, 0]; XF=[1, 1, 0.49, 0.49, 0.49, 0.49, 0.49]
                SoilCrop KaleSoil
                  LL=[0.186, 0.186, 0.208, 0.208, 0.208, 0.208, 0.208]
                  KL=[0.138553, 0.0968882, 0.0361122, 0.016554, 0.00758847, 0.0034786, 0]
                  XF=[1, 1, 0.64, 0.64, 0.64, 0.64, 0.64]
                SoilCrop LucerneSoil
                  LL=[0.186, 0.186, 0.208, 0.208, 0.208, 0.208, 0.208]
                  KL=[0.113315, 0.093356, 0.0440981, 0.0289022, 0.0189427, 0.0124151, 0.00813696]
                  XF=[1, 1, 1, 1, 1, 1, 1]
                SoilCrop MaizeSoil
                  LL=[0.186, 0.186, 0.208, 0.208, 0.208, 0.208, 0.208]
                  KL=[0.134354, 0.0985418, 0.0393492, 0.0200149, 0.0101805, 0.0051783, 0.00184657]
                  XF=[1, 1, 0.64, 0.64, 0.64, 0.64, 0.64]
                SoilCrop OatsSoil
                  LL=[0.186, 0.186, 0.208, 0.208, 0.208, 0.208, 0.208]
                  KL=[0.138553, 0.0968882, 0.0361122, 0.016554, 0.00758847, 0.0034786, 0]
                  XF=[1, 1, 0.79, 0.79, 0.79, 0.79, 0.79]
                SoilCrop PlantainSoil
                  LL=[0.186, 0.186, 0.208, 0.208, 0.208, 0.208, 0.208]
                  KL=[0.138553, 0.0968882, 0.0361122, 0.016554, 0.00758847, 0.0034786, 0]
                  XF=[1, 1, 1, 1, 1, 1, 1]
                SoilCrop PotatoSoil: LL=[0.186, 0.186, 0.208, 0.208, 0.208, 0.208, 0.208]; KL=[0.14449, 0.0620384, 0.0114265, 0.00227269, 0, 0, 0]; XF=[0.81, 0.81, 0.25, 0.25, 0.25, 0.25, 0.25]
                SoilCrop RedCloverSoil
                  LL=[0.186, 0.186, 0.208, 0.208, 0.208, 0.208, 0.208]
                  KL=[0.118136, 0.0912409, 0.0392584, 0.0223502, 0.0127241, 0.00724395, 0.00412404]
                  XF=[1, 1, 1, 1, 1, 1, 1]
                SoilCrop AGPRyegrassSoil: LL=[0.186, 0.186, 0.208, 0.208, 0.208, 0.208, 0.208]; KL=[0.146568, 0.0788456, 0.0201154, 0.00520432, 0, 0, 0]; XF=[1, 1, 0.49, 0.49, 0.49, 0.49, 0.49]
                SoilCrop SoybeanSoil
                  LL=[0.186, 0.186, 0.208, 0.208, 0.208, 0.208, 0.208]
                  KL=[0.139561, 0.0832491, 0.0246596, 0.00799247, 0.00227509, 0, 0]
                  XF=[1, 1, 0.49, 0.49, 0.49, 0.49, 0.49]
                SoilCrop TriticaleSoil
                  LL=[0.186, 0.186, 0.208, 0.208, 0.208, 0.208, 0.208]
                  KL=[0.138553, 0.0968882, 0.0361122, 0.016554, 0.00758847, 0.0034786, 0]
                  XF=[1, 1, 0.79, 0.79, 0.79, 0.79, 0.79]
                SoilCrop WheatSoil
                  LL=[0.186, 0.186, 0.208, 0.208, 0.208, 0.208, 0.208]
                  KL=[0.148677, 0.106659, 0.0412492, 0.0199923, 0.00968966, 0.00469629, 0]
                  XF=[1, 1, 0.64, 0.64, 0.64, 0.64, 0.64]
                SoilCrop WhitecloverSoil: LL=[0.186, 0.186, 0.208, 0.208, 0.208, 0.208, 0.208]; KL=[0.153517, 0.0546244, 0.00766867, 0, 0, 0, 0]; XF=[0.826, 0.826, 0.298, 0.298, 0.298, 0.298, 0.298]
                SoilCrop AgPRyegrassSoil: LL=[0.186, 0.186, 0.208, 0.208, 0.208, 0.208, 0.208]; KL=[0.134354, 0.0722752, 0.0184392, 0.00477062, 0, 0, 0]; XF=[1, 1, 0.49, 0.49, 0.49, 0.49, 0.49]
                SoilCrop AgPWhiteCloverSoil: LL=[0.186, 0.186, 0.208, 0.208, 0.208, 0.208, 0.208]; KL=[0.168857, 0.0447227, 0.00409791, 0, 0, 0, 0]; XF=[1, 1, 0.391, 0.391, 0.391, 0.391, 0.391]
                SoilCrop AgPPaspalumSoil
                  LL=[0.186, 0.186, 0.208, 0.208, 0.208, 0.208, 0.208]
                  KL=[0.115356, 0.0740818, 0.0244142, 0.00929477, 0.00353862, 0, 0]
                  XF=[1, 1, 0.766, 0.766, 0.766, 0.766, 0.766]
                SoilCrop SCRUMSoil
                  LL=[0.186, 0.186, 0.208, 0.208, 0.208, 0.208, 0.208]
                  KL=[0.103109, 0.103109, 0.103109, 0.103109, 0.103109, 0.103109, 0.103109]
                  XF=[1, 1, 0.79, 0.79, 0.79, 0.79, 0.79]
              WaterBalance SoilWater: SummerDate=1-oct; SummerU=9; SummerCona=4.4; WinterDate=1-apr; WinterU=4; WinterCona=2; DiffusConst=88; DiffusSlope=35; Salb=0.13; CN2Bare=90; CNRed=16; CNCov=0.8; DischargeWidth=0; CatchmentArea=0; PSIDul=-100
                Thickness  SWCON  KLAT
                200        0.3    0
                110        0.2    0
                1690       0.2    0
              SoilNitrogen: fom_types=[default, manure, mucuna, lablab, shemp, stable]; fract_carb=[0.2, 0.3, 0.54, 0.57, 0.45, 0]; fract_cell=[0.7, 0.3, 0.37, 0.37, 0.47, 0.1]; fract_lign=[0.1, 0.4, 0.09, 0.06, 0.08, 0.9]; NPartitionApproach=0
              Organic: FOMCNRatio=40; CarbonUnits=Total
                Thickness  Carbon    SoilCNRatio  FBiom      FInert    FOM
                50         30        12.3         0.0788566  0.858333  124.07
                50         30        12.3         0.0610103  0.858333  115.105
                50         30        12.3         0.0477893  0.858333  106.788
                50         24.5982   12.3         0.037995   0.865423  99.0722
                50         16.5546   12.3         0.0307392  0.878667  91.9135
                50         11.1628   12.3         0.025364   0.890792  85.2722
                50         7.54859   12.3         0.0213819  0.901943  79.1107
                50         5.12591   12.3         0.0184319  0.912262  73.3945
                50         3.50193   12.3         0.0162465  0.921882  68.0912
                50         2.41335   12.3         0.0146275  0.930921  63.1712
                250        0.866649  12.3         0.0118814  0.955285  43.4169
                250        0.290221  12.3         0.0104198  0.982714  29.84
                500        0.204492  12.3         0.0100442  0.990879  14.0954
                500        0.200082  12.3         0.0100022  0.996256  6.6582
              CERESSoilTemperature Temperature
              Water: Thickness=[200, 110, 338, 338, 338, 338, 338]; InitialValues=[0.591, 0.591, 0.3421, 0.3421, 0.3421, 0.3421, 0.3421]; RelativeTo=LL15; FilledFromTop=false
              LayerStructure: Thickness=[200, 110, 338, 338, 338, 338, 338]
              SoilNitrogenNO3 NO3: Thickness=[200, 110, 1690]; InitialValues=[21.1111, 19.2097, 0.0398533]; InitialValuesUnits=ppm; WaterTableConcentration=0; D0=0
              SoilNitrogenNH4 NH4: Thickness=[200, 110, 1690]; InitialValues=[3.16667, 2.88146, 0.005978]; InitialValuesUnits=ppm; WaterTableConcentration=0; D0=0
              SoilNitrogenUrea Urea: Thickness=[200, 110, 1690]; InitialValues=[0, 0, 0]; InitialValuesUnits=kg/ha; WaterTableConcentration=0; D0=0
          CompositeFactor Erodgrav_1a2: Specifications=[Soil]
            Soil Erodgrav_1a2: SoilType=Orthic Raw Soils; LocalName=Erodgrav_1a2; Latitude=-41; Longitude=174
              DataSource=Profile descriptions provided by Smap based on the work done by Trevor Webb.
              Chemical: Thickness=[225, 1775]; PH=[7, 7]; PHUnits=Water
              Physical
                Thickness  ParticleSizeClay  ParticleSizeSand  ParticleSizeSilt  BD     AirDry  LL15   DUL    SAT    KS
                225        4                 90                6                 1.168  0.029   0.058  0.14   0.335  1920
                355        1.5               90                8.5               0.557  0.011   0.013  0.055  0.177  2400
                355        1.5               90                8.5               0.557  0.013   0.013  0.055  0.177  2400
                355        1.5               90                8.5               0.557  0.013   0.013  0.055  0.177  2400
                355        1.5               90                8.5               0.557  0.013   0.013  0.055  0.177  2400
                355        1.5               90                8.5               0.557  0.013   0.013  0.055  0.177  2400
                SoilCrop BarleySoil: LL=[0.058, 0.013, 0.013, 0.013, 0.013, 0.013]; KL=[0.128, 0, 0, 0, 0, 0]; XF=[1, 0, 0, 0, 0, 0]
                SoilCrop CanolaSoil: LL=[0.058, 0.013, 0.013, 0.013, 0.013, 0.013]; KL=[0.124, 0, 0, 0, 0, 0]; XF=[1, 0, 0, 0, 0, 0]
                SoilCrop ChickpeaSoil: LL=[0.058, 0.013, 0.013, 0.013, 0.013, 0.013]; KL=[0.127, 0, 0, 0, 0, 0]; XF=[1, 0, 0, 0, 0, 0]
                SoilCrop ChicorySoil: LL=[0.058, 0.013, 0.013, 0.013, 0.013, 0.013]; KL=[0.098, 0, 0, 0, 0, 0]; XF=[1, 0, 0, 0, 0, 0]
                SoilCrop FababeanSoil: LL=[0.058, 0.013, 0.013, 0.013, 0.013, 0.013]; KL=[0.149, 0, 0, 0, 0, 0]; XF=[1, 0, 0, 0, 0, 0]
                SoilCrop FieldpeaSoil: LL=[0.058, 0.013, 0.013, 0.013, 0.013, 0.013]; KL=[0.149, 0, 0, 0, 0, 0]; XF=[0.81, 0, 0, 0, 0, 0]
                SoilCrop FodderBeetSoil: LL=[0.058, 0.013, 0.013, 0.013, 0.013, 0.013]; KL=[0.104, 0, 0, 0, 0, 0]; XF=[1, 0, 0, 0, 0, 0]
                SoilCrop GrapevineSoil: LL=[0.058, 0.013, 0.013, 0.013, 0.013, 0.013]; KL=[0.078, 0, 0, 0, 0, 0]; XF=[1, 0, 0, 0, 0, 0]
                SoilCrop ItalianRyegrassSoil: LL=[0.058, 0.013, 0.013, 0.013, 0.013, 0.013]; KL=[0.177, 0, 0, 0, 0, 0]; XF=[1, 0, 0, 0, 0, 0]
                SoilCrop KaleSoil: LL=[0.058, 0.013, 0.013, 0.013, 0.013, 0.013]; KL=[0.118, 0, 0, 0, 0, 0]; XF=[1, 0, 0, 0, 0, 0]
                SoilCrop LucerneSoil: LL=[0.058, 0.013, 0.013, 0.013, 0.013, 0.013]; KL=[0.098, 0, 0, 0, 0, 0]; XF=[1, 0, 0, 0, 0, 0]
                SoilCrop MaizeSoil: LL=[0.058, 0.013, 0.013, 0.013, 0.013, 0.013]; KL=[0.115, 0, 0, 0, 0, 0]; XF=[1, 0, 0, 0, 0, 0]
                SoilCrop OatsSoil: LL=[0.058, 0.013, 0.013, 0.013, 0.013, 0.013]; KL=[0.118, 0, 0, 0, 0, 0]; XF=[1, 0, 0, 0, 0, 0]
                SoilCrop PlantainSoil: LL=[0.058, 0.013, 0.013, 0.013, 0.013, 0.013]; KL=[0.118, 0, 0, 0, 0, 0]; XF=[1, 0, 0, 0, 0, 0]
                SoilCrop PotatoSoil: LL=[0.058, 0.013, 0.013, 0.013, 0.013, 0.013]; KL=[0.118, 0, 0, 0, 0, 0]; XF=[0.81, 0, 0, 0, 0, 0]
                SoilCrop RedCloverSoil: LL=[0.058, 0.013, 0.013, 0.013, 0.013, 0.013]; KL=[0.101, 0, 0, 0, 0, 0]; XF=[1, 0, 0, 0, 0, 0]
                SoilCrop AGPRyegrassSoil: LL=[0.058, 0.013, 0.013, 0.013, 0.013, 0.013]; KL=[0.122, 0, 0, 0, 0, 0]; XF=[1, 0, 0, 0, 0, 0]
                SoilCrop SoybeanSoil: LL=[0.058, 0.013, 0.013, 0.013, 0.013, 0.013]; KL=[0.117, 0, 0, 0, 0, 0]; XF=[1, 0, 0, 0, 0, 0]
                SoilCrop TriticaleSoil: LL=[0.058, 0.013, 0.013, 0.013, 0.013, 0.013]; KL=[0.118, 0, 0, 0, 0, 0]; XF=[1, 0, 0, 0, 0, 0]
                SoilCrop WheatSoil: LL=[0.058, 0.013, 0.013, 0.013, 0.013, 0.013]; KL=[0.127, 0, 0, 0, 0, 0]; XF=[1, 0, 0, 0, 0, 0]
                SoilCrop WhitecloverSoil: LL=[0.058, 0.013, 0.013, 0.013, 0.013, 0.013]; KL=[0.124, 0, 0, 0, 0, 0]; XF=[0.826, 0, 0, 0, 0, 0]
                SoilCrop AgPRyegrassSoil: LL=[0.058, 0.013, 0.013, 0.013, 0.013, 0.013]; KL=[0.112, 0, 0, 0, 0, 0]; XF=[1, 0, 0, 0, 0, 0]
                SoilCrop AgPWhiteCloverSoil: LL=[0.058, 0.013, 0.013, 0.013, 0.013, 0.013]; KL=[0.133, 0, 0, 0, 0, 0]; XF=[1, 0, 0, 0, 0, 0]
                SoilCrop AgPPaspalumSoil: LL=[0.058, 0.013, 0.013, 0.013, 0.013, 0.013]; KL=[0.097, 0, 0, 0, 0, 0]; XF=[1, 0, 0, 0, 0, 0]
                SoilCrop SCRUMSoil: LL=[0.058, 0.013, 0.013, 0.013, 0.013, 0.013]; KL=[0.09, 0, 0, 0, 0, 0]; XF=[1, 0, 0, 0, 0, 0]
              WaterBalance SoilWater: SummerDate=1-oct; SummerU=9; SummerCona=4.4; WinterDate=1-apr; WinterU=4; WinterCona=2; DiffusConst=88; DiffusSlope=35; Salb=0.13; CN2Bare=87; CNRed=47; CNCov=0.8; DischargeWidth=0; CatchmentArea=0; PSIDul=-100
                Thickness  SWCON  KLAT
                225        0.45   0
                1775       0.5    0
              SoilNitrogen: fom_types=[default, manure, mucuna, lablab, shemp, stable]; fract_carb=[0.2, 0.3, 0.54, 0.57, 0.45, 0]; fract_cell=[0.7, 0.3, 0.37, 0.37, 0.47, 0.1]; fract_lign=[0.1, 0.4, 0.09, 0.06, 0.08, 0.9]; NPartitionApproach=0
              Organic: FOMCNRatio=40; CarbonUnits=Total
                Thickness  Carbon    SoilCNRatio  FBiom      FInert    FOM
                50         1         11           0.0788566  0.158981  124.07
                50         1         11           0.0610103  0.21901   115.105
                50         1         11           0.0477893  0.269823  106.788
                50         0.854985  11           0.037995   0.312835  99.0722
                50         0.639049  11           0.0307392  0.349244  91.9135
                50         0.494304  11           0.025364   0.380064  85.2722
                50         0.397278  11           0.0213819  0.406152  79.1107
                50         0.332239  11           0.0184319  0.539823  73.3945
                50         0.288643  11           0.0162465  0.659987  68.0912
                50         0.259419  11           0.0146275  0.752092  63.1712
                250        0.217897  11           0.0118814  0.902619  43.4169
                250        0.202422  11           0.0104198  0.975216  29.84
                500        0.200121  11           0.0100442  0.990824  14.0954
                500        0.200002  11           0.0100022  0.996255  6.6582
              CERESSoilTemperature Temperature
              Water: Thickness=[225, 355, 355, 355, 355, 355]; InitialValues=[0.1318, 0.0508, 0.0508, 0.0508, 0.0508, 0.0508]; RelativeTo=LL15; FilledFromTop=false
              LayerStructure: Thickness=[225, 355, 355, 355, 355, 355]
              SoilNitrogenNO3 NO3: Thickness=[225, 1775]; InitialValues=[5.42237, 0.581586]; InitialValuesUnits=ppm; WaterTableConcentration=0; D0=0
              SoilNitrogenNH4 NH4: Thickness=[225, 1775]; InitialValues=[0.813356, 0.087238]; InitialValuesUnits=ppm; WaterTableConcentration=0; D0=0
              SoilNitrogenUrea Urea: Thickness=[225, 1775]; InitialValues=[0, 0]; InitialValuesUnits=kg/ha; WaterTableConcentration=0; D0=0
          CompositeFactor Taupo_86a1: Specifications=[Soil]
            Soil Taupo_86a1: SoilType=Immature Orthic Pumice Soils; LocalName=Taupo_86a1; Latitude=-41; Longitude=174
              DataSource=Profile descriptions provided by Smap based on the work done by Trevor Webb.
              Chemical: Thickness=[125, 100, 1775]; PH=[7, 7, 7]; PHUnits=Water
              Physical
                Thickness  ParticleSizeClay  ParticleSizeSand  ParticleSizeSilt  BD     AirDry  LL15   DUL    SAT    KS
                125        22.5              65                12.5              0.872  0.134   0.269  0.413  0.599  1920
                100        4                 85                11                1.144  0.011   0.023  0.124  0.496  2400
                355        4                 85                11                1.391  0.036   0.04   0.171  0.402  960
                355        4                 85                11                1.391  0.04    0.04   0.171  0.402  960
                355        4                 85                11                1.391  0.04    0.04   0.171  0.402  960
                355        4                 85                11                1.391  0.04    0.04   0.171  0.402  960
                355        4                 85                11                1.391  0.04    0.04   0.171  0.402  960
                SoilCrop BarleySoil: LL=[0.269, 0.023, 0.04, 0.04, 0.04, 0.04, 0.04]; KL=[0.123608, 0.111236, 0, 0, 0, 0, 0]; XF=[1, 1, 0, 0, 0, 0, 0]
                SoilCrop CanolaSoil: LL=[0.269, 0.023, 0.04, 0.04, 0.04, 0.04, 0.04]; KL=[0.1222, 0.103376, 0, 0, 0, 0, 0]; XF=[1, 1, 0, 0, 0, 0, 0]
                SoilCrop ChickpeaSoil: LL=[0.269, 0.023, 0.04, 0.04, 0.04, 0.04, 0.04]; KL=[0.135203, 0.0973957, 0, 0, 0, 0, 0]; XF=[1, 1, 0, 0, 0, 0, 0]
                SoilCrop ChicorySoil: LL=[0.269, 0.023, 0.04, 0.04, 0.04, 0.04, 0.04]; KL=[0.0897328, 0.0904003, 0, 0, 0, 0, 0]; XF=[1, 1, 0, 0, 0, 0, 0]
                SoilCrop FababeanSoil: LL=[0.269, 0.023, 0.04, 0.04, 0.04, 0.04, 0.04]; KL=[0.164071, 0.109066, 0, 0, 0, 0, 0]; XF=[1, 1, 0, 0, 0, 0, 0]
                SoilCrop FieldpeaSoil: LL=[0.269, 0.023, 0.04, 0.04, 0.04, 0.04, 0.04]; KL=[0.164071, 0.109066, 0, 0, 0, 0, 0]; XF=[1, 1, 0, 0, 0, 0, 0]
                SoilCrop FodderBeetSoil: LL=[0.269, 0.023, 0.04, 0.04, 0.04, 0.04, 0.04]; KL=[0.0987398, 0.0919862, 0, 0, 0, 0, 0]; XF=[1, 1, 0, 0, 0, 0, 0]
                SoilCrop GrapevineSoil: LL=[0.269, 0.023, 0.04, 0.04, 0.04, 0.04, 0.04]; KL=[0.07017, 0.0728711, 0, 0, 0, 0, 0]; XF=[1, 1, 0, 0, 0, 0, 0]
                SoilCrop ItalianRyegrassSoil: LL=[0.269, 0.023, 0.04, 0.04, 0.04, 0.04, 0.04]; KL=[0.205369, 0.121993, 0, 0, 0, 0, 0]; XF=[1, 1, 0, 0, 0, 0, 0]
                SoilCrop KaleSoil: LL=[0.269, 0.023, 0.04, 0.04, 0.04, 0.04, 0.04]; KL=[0.113308, 0.101966, 0, 0, 0, 0, 0]; XF=[1, 1, 0, 0, 0, 0, 0]
                SoilCrop LucerneSoil: LL=[0.269, 0.023, 0.04, 0.04, 0.04, 0.04, 0.04]; KL=[0.0890647, 0.0902775, 0, 0, 0, 0, 0]; XF=[1, 1, 0, 0, 0, 0, 0]
                SoilCrop MaizeSoil: LL=[0.269, 0.023, 0.04, 0.04, 0.04, 0.04, 0.04]; KL=[0.108614, 0.101185, 0, 0, 0, 0, 0]; XF=[1, 1, 0, 0, 0, 0, 0]
                SoilCrop OatsSoil: LL=[0.269, 0.023, 0.04, 0.04, 0.04, 0.04, 0.04]; KL=[0.113308, 0.101966, 0, 0, 0, 0, 0]; XF=[1, 1, 0, 0, 0, 0, 0]
                SoilCrop PlantainSoil: LL=[0.269, 0.023, 0.04, 0.04, 0.04, 0.04, 0.04]; KL=[0.113308, 0.101966, 0, 0, 0, 0, 0]; XF=[1, 1, 0, 0, 0, 0, 0]
                SoilCrop PotatoSoil: LL=[0.269, 0.023, 0.04, 0.04, 0.04, 0.04, 0.04]; KL=[0.132963, 0.0839806, 0, 0, 0, 0, 0]; XF=[1, 1, 0, 0, 0, 0, 0]
                SoilCrop RedCloverSoil: LL=[0.269, 0.023, 0.04, 0.04, 0.04, 0.04, 0.04]; KL=[0.0943164, 0.0912229, 0, 0, 0, 0, 0]; XF=[1, 1, 0, 0, 0, 0, 0]
                SoilCrop AGPRyegrassSoil: LL=[0.269, 0.023, 0.04, 0.04, 0.04, 0.04, 0.04]; KL=[0.127716, 0.0950079, 0, 0, 0, 0, 0]; XF=[1, 1, 0, 0, 0, 0, 0]
                SoilCrop SoybeanSoil: LL=[0.269, 0.023, 0.04, 0.04, 0.04, 0.04, 0.04]; KL=[0.118608, 0.0951041, 0, 0, 0, 0, 0]; XF=[1, 1, 0, 0, 0, 0, 0]
                SoilCrop TriticaleSoil: LL=[0.269, 0.023, 0.04, 0.04, 0.04, 0.04, 0.04]; KL=[0.113308, 0.101966, 0, 0, 0, 0, 0]; XF=[1, 1, 0, 0, 0, 0, 0]
                SoilCrop WheatSoil: LL=[0.269, 0.023, 0.04, 0.04, 0.04, 0.04, 0.04]; KL=[0.120838, 0.110778, 0, 0, 0, 0, 0]; XF=[1, 1, 0, 0, 0, 0, 0]
                SoilCrop WhitecloverSoil: LL=[0.269, 0.023, 0.04, 0.04, 0.04, 0.04, 0.04]; KL=[0.14784, 0.0814739, 0, 0, 0, 0, 0]; XF=[1, 1, 0, 0, 0, 0, 0]
                SoilCrop AgPRyegrassSoil: LL=[0.269, 0.023, 0.04, 0.04, 0.04, 0.04, 0.04]; KL=[0.117073, 0.0870906, 0, 0, 0, 0, 0]; XF=[1, 1, 0, 0, 0, 0, 0]
                SoilCrop AgPWhiteCloverSoil: LL=[0.269, 0.023, 0.04, 0.04, 0.04, 0.04, 0.04]; KL=[0.174653, 0.0776851, 0, 0, 0, 0, 0]; XF=[1, 1, 0, 0, 0, 0, 0]
                SoilCrop AgPPaspalumSoil: LL=[0.269, 0.023, 0.04, 0.04, 0.04, 0.04, 0.04]; KL=[0.0963019, 0.081468, 0, 0, 0, 0, 0]; XF=[1, 1, 0, 0, 0, 0, 0]
                SoilCrop SCRUMSoil: LL=[0.269, 0.023, 0.04, 0.04, 0.04, 0.04, 0.04]; KL=[0.0782243, 0.0782243, 0, 0, 0, 0, 0]; XF=[1, 1, 0, 0, 0, 0, 0]
              WaterBalance SoilWater: SummerDate=1-oct; SummerU=9; SummerCona=4.4; WinterDate=1-apr; WinterU=4; WinterCona=2; DiffusConst=88; DiffusSlope=35; Salb=0.13; CN2Bare=99; CNRed=34; CNCov=0.8; DischargeWidth=0; CatchmentArea=0; PSIDul=-100
                Thickness  SWCON  KLAT
                125        0.4    0
                100        0.5    0
                1775       0.3    0
              SoilNitrogen: fom_types=[default, manure, mucuna, lablab, shemp, stable]; fract_carb=[0.2, 0.3, 0.54, 0.57, 0.45, 0]; fract_cell=[0.7, 0.3, 0.37, 0.37, 0.47, 0.1]; fract_lign=[0.1, 0.4, 0.09, 0.06, 0.08, 0.9]; NPartitionApproach=0
              Organic: FOMCNRatio=40; CarbonUnits=Total
                Thickness  Carbon    SoilCNRatio  FBiom      FInert    FOM
                50         6         11           0.0788566  0.431898  124.07
                50         6         11           0.0610103  0.491926  115.105
                50         6         11           0.0477893  0.542739  106.788
                50         4.94864   11           0.037995   0.5956    99.0722
                50         3.38311   11           0.0307392  0.650815  91.9135
                50         2.3337    11           0.025364   0.69947   85.2722
                50         1.63026   11           0.0213819  0.742644  79.1107
                50         1.15873   11           0.0184319  0.781204  73.3945
                50         0.842658  11           0.0162465  0.815767  68.0912
                50         0.630787  11           0.0146275  0.846679  63.1712
                250        0.32975   11           0.0118814  0.917701  43.4169
                250        0.21756   11           0.0104198  0.97694   29.84
                500        0.200874  11           0.0100442  0.990833  14.0954
                500        0.200016  11           0.0100022  0.996255  6.6582
              CERESSoilTemperature Temperature
              Water: Thickness=[125, 100, 355, 355, 355, 355, 355]; InitialValues=[0.3986, 0.1139, 0.1579, 0.1579, 0.1579, 0.1579, 0.1579]; RelativeTo=LL15; FilledFromTop=false
              LayerStructure: Thickness=[125, 100, 355, 355, 355, 355, 355]
              SoilNitrogenNO3 NO3: Thickness=[125, 100, 1775]; InitialValues=[7.263, 5.53613, 0.232885]; InitialValuesUnits=ppm; WaterTableConcentration=0; D0=0
              SoilNitrogenNH4 NH4: Thickness=[125, 100, 1775]; InitialValues=[1.08945, 0.83042, 0.0349328]; InitialValuesUnits=ppm; WaterTableConcentration=0; D0=0
              SoilNitrogenUrea Urea: Thickness=[125, 100, 1775]; InitialValues=[0, 0, 0]; InitialValuesUnits=kg/ha; WaterTableConcentration=0; D0=0
        Factor SoilType
          CompositeFactor Eyre_23a3: Specifications=[Soil]
            Soil Eyre_23a3: SoilType=Weathered Orthic Recent Soils; LocalName=Eyre_23a3; Latitude=-41; Longitude=174
              DataSource=Profile descriptions provided by Smap based on the work done by Trevor Webb.
              Chemical: Thickness=[160, 250, 300, 1290]; PH=[7, 7, 7, 7]; PHUnits=Water
              Physical
                Thickness  ParticleSizeClay  ParticleSizeSand  ParticleSizeSilt  BD     AirDry  LL15   DUL    SAT    KS
                160        19                25                56                0.841  0.027   0.053  0.172  0.286  1440
                250        17.5              35                47.5              0.587  0.021   0.029  0.097  0.189  1440
                300        3.5               87.5              9                 0.454  0.011   0.011  0.044  0.143  2400
                322.5      1.5               90                8.5               0.369  0.014   0.014  0.04   0.08   3600
                322.5      1.5               90                8.5               0.369  0.014   0.014  0.04   0.08   3600
                322.5      1.5               90                8.5               0.369  0.014   0.014  0.04   0.08   3600
                322.5      1.5               90                8.5               0.369  0.014   0.014  0.04   0.08   3600
                SoilCrop BarleySoil: LL=[0.053, 0.029, 0.011, 0.014, 0.014, 0.014, 0.014]; KL=[0.119, 0.074, 0.046, 0, 0, 0, 0]; XF=[1, 1, 1, 0, 0, 0, 0]
                SoilCrop CanolaSoil: LL=[0.053, 0.029, 0.011, 0.014, 0.014, 0.014, 0.014]; KL=[0.116, 0.065, 0.034, 0, 0, 0, 0]; XF=[1, 0.81, 0.64, 0, 0, 0, 0]
                SoilCrop ChickpeaSoil: LL=[0.053, 0.029, 0.011, 0.014, 0.014, 0.014, 0.014]; KL=[0.125, 0.052, 0.019, 0, 0, 0, 0]; XF=[1, 1, 1, 0, 0, 0, 0]
                SoilCrop ChicorySoil: LL=[0.053, 0.029, 0.011, 0.014, 0.014, 0.014, 0.014]; KL=[0.088, 0.067, 0.055, 0, 0, 0, 0]; XF=[1, 1, 1, 0, 0, 0, 0]
                SoilCrop FababeanSoil: LL=[0.053, 0.029, 0.011, 0.014, 0.014, 0.014, 0.014]; KL=[0.15, 0.054, 0.016, 0, 0, 0, 0]; XF=[1, 0.81, 0.64, 0, 0, 0, 0]
                SoilCrop FieldpeaSoil: LL=[0.053, 0.029, 0.011, 0.014, 0.014, 0.014, 0.014]; KL=[0.15, 0.054, 0.016, 0, 0, 0, 0]; XF=[1, 0.49, 0.36, 0, 0, 0, 0]
                SoilCrop FodderBeetSoil: LL=[0.053, 0.029, 0.011, 0.014, 0.014, 0.014, 0.014]; KL=[0.095, 0.063, 0.043, 0, 0, 0, 0]; XF=[1, 1, 0.81, 0, 0, 0, 0]
                SoilCrop GrapevineSoil: LL=[0.053, 0.029, 0.011, 0.014, 0.014, 0.014, 0.014]; KL=[0.069, 0.056, 0.049, 0, 0, 0, 0]; XF=[1, 0.716, 0.592, 0, 0, 0, 0]
                SoilCrop ItalianRyegrassSoil: LL=[0.053, 0.029, 0.011, 0.014, 0.014, 0.014, 0.014]; KL=[0.185, 0.054, 0.012, 0, 0, 0, 0]; XF=[1, 0.81, 0.64, 0, 0, 0, 0]
                SoilCrop KaleSoil: LL=[0.053, 0.029, 0.011, 0.014, 0.014, 0.014, 0.014]; KL=[0.109, 0.068, 0.042, 0, 0, 0, 0]; XF=[1, 1, 0.81, 0, 0, 0, 0]
                SoilCrop LucerneSoil: LL=[0.053, 0.029, 0.011, 0.014, 0.014, 0.014, 0.014]; KL=[0.087, 0.067, 0.056, 0, 0, 0, 0]; XF=[1, 1, 1, 0, 0, 0, 0]
                SoilCrop MaizeSoil: LL=[0.053, 0.029, 0.011, 0.014, 0.014, 0.014, 0.014]; KL=[0.105, 0.07, 0.047, 0, 0, 0, 0]; XF=[1, 1, 0.81, 0, 0, 0, 0]
                SoilCrop OatsSoil: LL=[0.053, 0.029, 0.011, 0.014, 0.014, 0.014, 0.014]; KL=[0.109, 0.068, 0.042, 0, 0, 0, 0]; XF=[1, 1, 1, 0, 0, 0, 0]
                SoilCrop PlantainSoil: LL=[0.053, 0.029, 0.011, 0.014, 0.014, 0.014, 0.014]; KL=[0.109, 0.068, 0.042, 0, 0, 0, 0]; XF=[1, 1, 1, 0, 0, 0, 0]
                SoilCrop PotatoSoil: LL=[0.053, 0.029, 0.011, 0.014, 0.014, 0.014, 0.014]; KL=[0.121, 0.04, 0.01, 0, 0, 0, 0]; XF=[1, 0.49, 0.36, 0, 0, 0, 0]
                SoilCrop RedCloverSoil: LL=[0.053, 0.029, 0.011, 0.014, 0.014, 0.014, 0.014]; KL=[0.092, 0.065, 0.048, 0, 0, 0, 0]; XF=[1, 1, 1, 0, 0, 0, 0]
                SoilCrop RyegrassSoil: LL=[0.053, 0.029, 0.011, 0.014, 0.014, 0.014, 0.014]; KL=[0.119, 0.052, 0.02, 0, 0, 0, 0]; XF=[1, 0.81, 0.64, 0, 0, 0, 0]
                SoilCrop SoybeanSoil: LL=[0.053, 0.029, 0.011, 0.014, 0.014, 0.014, 0.014]; KL=[0.112, 0.056, 0.026, 0, 0, 0, 0]; XF=[1, 0.81, 0.64, 0, 0, 0, 0]
                SoilCrop TriticaleSoil: LL=[0.053, 0.029, 0.011, 0.014, 0.014, 0.014, 0.014]; KL=[0.109, 0.068, 0.042, 0, 0, 0, 0]; XF=[1, 1, 1, 0, 0, 0, 0]
                SoilCrop WheatSoil: LL=[0.053, 0.029, 0.011, 0.014, 0.014, 0.014, 0.014]; KL=[0.116, 0.075, 0.049, 0, 0, 0, 0]; XF=[1, 1, 0.81, 0, 0, 0, 0]
                SoilCrop WhitecloverSoil: LL=[0.053, 0.029, 0.011, 0.014, 0.014, 0.014, 0.014]; KL=[0.132, 0.034, 0.006, 0, 0, 0, 0]; XF=[1, 0.529, 0.405, 0, 0, 0, 0]
                SoilCrop AgPRyegrassSoil: LL=[0.053, 0.029, 0.011, 0.014, 0.014, 0.014, 0.014]; KL=[0.109, 0.048, 0.019, 0, 0, 0, 0]; XF=[1, 0.81, 0.64, 0, 0, 0, 0]
                SoilCrop AgPWhiteCloverSoil: LL=[0.053, 0.029, 0.011, 0.014, 0.014, 0.014, 0.014]; KL=[0.15, 0.026, 0.005, 0, 0, 0, 0]; XF=[1, 0.766, 0.562, 0, 0, 0, 0]
                SoilCrop AgPPaspalumSoil: LL=[0.053, 0.029, 0.011, 0.014, 0.014, 0.014, 0.014]; KL=[0.092, 0.051, 0.027, 0, 0, 0, 0]; XF=[1, 1, 1, 0, 0, 0, 0]
                SoilCrop SCRUMSoil: LL=[0.053, 0.029, 0.011, 0.014, 0.014, 0.014, 0.014]; KL=[0.078, 0.078, 0.078, 0, 0, 0, 0]; XF=[1, 1, 1, 0, 0, 0, 0]
              WaterBalance SoilWater: SummerDate=1-oct; SummerU=9; SummerCona=4.4; WinterDate=1-apr; WinterU=4; WinterCona=2; DiffusConst=88; DiffusSlope=35; Salb=0.13; CN2Bare=86; CNRed=26; CNCov=0.8; DischargeWidth=0; CatchmentArea=0; PSIDul=-100
                Thickness  SWCON  KLAT
                160        0.5    0
                250        0.35   0
                300        0.5    0
                1290       0.5    0
              SoilNitrogen: fom_types=[default, manure, mucuna, lablab, shemp, stable]; fract_carb=[0.2, 0.3, 0.54, 0.57, 0.45, 0]; fract_cell=[0.7, 0.3, 0.37, 0.37, 0.47, 0.1]; fract_lign=[0.1, 0.4, 0.09, 0.06, 0.08, 0.9]; NPartitionApproach=0
              Organic: same as SimulationExp.Factors.Permutation.SoilType_Old.Eyre_23a3.Eyre_23a3.Organic
              CERESSoilTemperature Temperature
              Water: Thickness=[160, 250, 300, 322.5, 322.5, 322.5, 322.5]; InitialValues=[0.1601, 0.0902, 0.0407, 0.0374, 0.0374, 0.0374, 0.0374]; RelativeTo=LL15; FilledFromTop=false
              LayerStructure: Thickness=[160, 250, 300, 322.5, 322.5, 322.5, 322.5]
              SoilNitrogenNO3 NO3: Thickness=[160, 250, 300, 1290]; InitialValues=[7.53072, 6.08611, 0.129567, 0.159413]; InitialValuesUnits=ppm; WaterTableConcentration=0; D0=0
              SoilNitrogenNH4 NH4: Thickness=[160, 250, 300, 1290]; InitialValues=[1.12961, 0.912917, 0.0194351, 0.023912]; InitialValuesUnits=ppm; WaterTableConcentration=0; D0=0
              SoilNitrogenUrea Urea: Thickness=[160, 250, 300, 1290]; InitialValues=[0, 0, 0, 0]; InitialValuesUnits=kg/ha; WaterTableConcentration=0; D0=0
          CompositeFactor Darnley_4a2: Specifications=[Soil]
            Soil Darnley_4a2: SoilType=Typic Argillic Pallic Soils; LocalName=Darnley_4a2; Latitude=-41; Longitude=174
              DataSource=Profile descriptions provided by Smap based on the work done by Trevor Webb.
              Chemical: Thickness=[175, 150, 375, 1300]; PH=[7, 7, 7, 7]; PHUnits=Water
              Physical
                Thickness  ParticleSizeClay  ParticleSizeSand  ParticleSizeSilt  BD     AirDry  LL15   DUL    SAT    KS
                175        24                12.5              63.5              1.254  0.082   0.165  0.349  0.455  1440
                150        24                12.5              63.5              1.388  0.103   0.177  0.306  0.385  480
                375        15                40                45                0.89   0.075   0.075  0.163  0.246  48
                325        8.5               72.5              19                0.634  0.03    0.03   0.088  0.15   1.2
                325        8.5               72.5              19                0.634  0.03    0.03   0.088  0.15   1.2
                325        8.5               72.5              19                0.634  0.03    0.03   0.088  0.15   1.2
                325        8.5               72.5              19                0.634  0.03    0.03   0.088  0.15   1.2
                SoilCrop BarleySoil: LL=[0.165, 0.177, 0.075, 0.03, 0.03, 0.03, 0.03]; KL=[0.116679, 0.0668268, 0.0291715, 0, 0, 0, 0]; XF=[1, 1, 1, 0, 0, 0, 0]
                SoilCrop CanolaSoil: LL=[0.165, 0.177, 0.075, 0.03, 0.03, 0.03, 0.03]; KL=[0.113775, 0.0595979, 0.0225216, 0, 0, 0, 0]; XF=[1, 0.81, 0.49, 0, 0, 0, 0]
                SoilCrop ChickpeaSoil: LL=[0.165, 0.177, 0.075, 0.03, 0.03, 0.03, 0.03]; KL=[0.121466, 0.0504449, 0.0131016, 0, 0, 0, 0]; XF=[1, 1, 1, 0, 0, 0, 0]
                SoilCrop ChicorySoil: LL=[0.165, 0.177, 0.075, 0.03, 0.03, 0.03, 0.03]; KL=[0.0868539, 0.058554, 0.033262, 0, 0, 0, 0]; XF=[1, 1, 1, 0, 0, 0, 0]
                SoilCrop FababeanSoil: LL=[0.165, 0.177, 0.075, 0.03, 0.03, 0.03, 0.03]; KL=[0.144792, 0.0535426, 0.0115286, 0, 0, 0, 0]; XF=[1, 0.81, 0.49, 0, 0, 0, 0]
                SoilCrop FieldpeaSoil: LL=[0.165, 0.177, 0.075, 0.03, 0.03, 0.03, 0.03]; KL=[0.144792, 0.0535426, 0.0115286, 0, 0, 0, 0]; XF=[1, 0.49, 0.25, 0, 0, 0, 0]
                SoilCrop FodderBeetSoil: LL=[0.165, 0.177, 0.075, 0.03, 0.03, 0.03, 0.03]; KL=[0.0939242, 0.0565523, 0.0267631, 0, 0, 0, 0]; XF=[1, 1, 0.64, 0, 0, 0, 0]
                SoilCrop GrapevineSoil: LL=[0.165, 0.177, 0.075, 0.03, 0.03, 0.03, 0.03]; KL=[0.0683785, 0.048165, 0.029369, 0, 0, 0, 0]; XF=[1, 0.716, 0.479, 0, 0, 0, 0]
                SoilCrop ItalianRyegrassSoil: LL=[0.165, 0.177, 0.075, 0.03, 0.03, 0.03, 0.03]; KL=[0.176763, 0.0555614, 0.0092013, 0, 0, 0, 0]; XF=[1, 0.81, 0.49, 0, 0, 0, 0]
                SoilCrop KaleSoil: LL=[0.165, 0.177, 0.075, 0.03, 0.03, 0.03, 0.03]; KL=[0.106956, 0.0612579, 0.0267405, 0, 0, 0, 0]; XF=[1, 1, 0.64, 0, 0, 0, 0]
                SoilCrop LucerneSoil: LL=[0.165, 0.177, 0.075, 0.03, 0.03, 0.03, 0.03]; KL=[0.0863245, 0.0587133, 0.0338317, 0, 0, 0, 0]; XF=[1, 1, 1, 0, 0, 0, 0]
                SoilCrop MaizeSoil: LL=[0.165, 0.177, 0.075, 0.03, 0.03, 0.03, 0.03]; KL=[0.103317, 0.0622076, 0.0294394, 0, 0, 0, 0]; XF=[1, 1, 0.64, 0, 0, 0, 0]
                SoilCrop OatsSoil: LL=[0.165, 0.177, 0.075, 0.03, 0.03, 0.03, 0.03]; KL=[0.106956, 0.0612579, 0.0267405, 0, 0, 0, 0]; XF=[1, 1, 0.79, 0, 0, 0, 0]
                SoilCrop PlantainSoil: LL=[0.165, 0.177, 0.075, 0.03, 0.03, 0.03, 0.03]; KL=[0.106956, 0.0612579, 0.0267405, 0, 0, 0, 0]; XF=[1, 1, 1, 0, 0, 0, 0]
                SoilCrop PotatoSoil: LL=[0.165, 0.177, 0.075, 0.03, 0.03, 0.03, 0.03]; KL=[0.116014, 0.039846, 0.00761455, 0, 0, 0, 0]; XF=[1, 0.49, 0.25, 0, 0, 0, 0]
                SoilCrop RedCloverSoil: LL=[0.165, 0.177, 0.075, 0.03, 0.03, 0.03, 0.03]; KL=[0.0904673, 0.0575028, 0.0297013, 0, 0, 0, 0]; XF=[1, 1, 1, 0, 0, 0, 0]
                SoilCrop RyegrassSoil: LL=[0.165, 0.177, 0.075, 0.03, 0.03, 0.03, 0.03]; KL=[0.115562, 0.050274, 0.0140742, 0, 0, 0, 0]; XF=[1, 0.81, 0.49, 0, 0, 0, 0]
                SoilCrop SoybeanSoil: LL=[0.165, 0.177, 0.075, 0.03, 0.03, 0.03, 0.03]; KL=[0.109124, 0.0529051, 0.0176433, 0, 0, 0, 0]; XF=[1, 0.81, 0.49, 0, 0, 0, 0]
                SoilCrop TriticaleSoil: LL=[0.165, 0.177, 0.075, 0.03, 0.03, 0.03, 0.03]; KL=[0.106956, 0.0612579, 0.0267405, 0, 0, 0, 0]; XF=[1, 1, 0.79, 0, 0, 0, 0]
                SoilCrop WheatSoil: LL=[0.165, 0.177, 0.075, 0.03, 0.03, 0.03, 0.03]; KL=[0.114535, 0.0673798, 0.0307135, 0, 0, 0, 0]; XF=[1, 1, 0.64, 0, 0, 0, 0]
                SoilCrop WhitecloverSoil: LL=[0.165, 0.177, 0.075, 0.03, 0.03, 0.03, 0.03]; KL=[0.125144, 0.0352974, 0.00490702, 0, 0, 0, 0]; XF=[1, 0.529, 0.298, 0, 0, 0, 0]
                SoilCrop AgPRyegrassSoil: LL=[0.165, 0.177, 0.075, 0.03, 0.03, 0.03, 0.03]; KL=[0.105932, 0.0460845, 0.0129014, 0, 0, 0, 0]; XF=[1, 0.81, 0.49, 0, 0, 0, 0]
                SoilCrop AgPWhiteCloverSoil: LL=[0.165, 0.177, 0.075, 0.03, 0.03, 0.03, 0.03]; KL=[0.140965, 0.0291756, 0.00613608, 0, 0, 0, 0]; XF=[1, 0.766, 0.391, 0, 0, 0, 0]
                SoilCrop AgPPaspalumSoil: LL=[0.165, 0.177, 0.075, 0.03, 0.03, 0.03, 0.03]; KL=[0.0896631, 0.0469673, 0.0177486, 0, 0, 0, 0]; XF=[1, 1, 0.766, 0, 0, 0, 0]
                SoilCrop SCRUMSoil: LL=[0.165, 0.177, 0.075, 0.03, 0.03, 0.03, 0.03]; KL=[0.0776279, 0.0776279, 0.0776279, 0, 0, 0, 0]; XF=[1, 1, 0.79, 0, 0, 0, 0]
              WaterBalance SoilWater: SummerDate=1-oct; SummerU=9; SummerCona=4.4; WinterDate=1-apr; WinterU=4; WinterCona=2; DiffusConst=88; DiffusSlope=35; Salb=0.13; CN2Bare=90; CNRed=21; CNCov=0.8; DischargeWidth=0; CatchmentArea=0; PSIDul=-100
                Thickness  SWCON  KLAT
                175        0.5    0
                150        0.3    0
                375        0.2    0
                1300       0.15   0
              SoilNitrogen: fom_types=[default, manure, mucuna, lablab, shemp, stable]; fract_carb=[0.2, 0.3, 0.54, 0.57, 0.45, 0]; fract_cell=[0.7, 0.3, 0.37, 0.37, 0.47, 0.1]; fract_lign=[0.1, 0.4, 0.09, 0.06, 0.08, 0.9]; NPartitionApproach=0
              Organic: same as SimulationExp.Factors.Permutation.SoilType_Old.Darnley_4a2.Darnley_4a2.Organic
              CERESSoilTemperature Temperature
              Water: Thickness=[175, 150, 375, 325, 325, 325, 325]; InitialValues=[0.3306, 0.2931, 0.1542, 0.0822, 0.0822, 0.0822, 0.0822]; RelativeTo=LL15; FilledFromTop=false
              LayerStructure: Thickness=[175, 150, 375, 325, 325, 325, 325]
              SoilNitrogenNO3 NO3: Thickness=[175, 150, 375, 1300]; InitialValues=[5.05051, 3.8095, 0.0660939, 0.0927816]; InitialValuesUnits=ppm; WaterTableConcentration=0; D0=0
              SoilNitrogenNH4 NH4: Thickness=[175, 150, 375, 1300]; InitialValues=[0.757576, 0.571425, 0.00991408, 0.0139172]; InitialValuesUnits=ppm; WaterTableConcentration=0; D0=0
              SoilNitrogenUrea Urea: Thickness=[175, 150, 375, 1300]; InitialValues=[0, 0, 0, 0]; InitialValuesUnits=kg/ha; WaterTableConcentration=0; D0=0
          CompositeFactor Waikiwi_33a2: Specifications=[Soil]
            Soil Waikiwi_33a2: SoilType=Typic Firm Brown Soils; LocalName=Waikiwi_33a2; Latitude=-41; Longitude=174
              DataSource=Profile descriptions provided by Smap based on the work done by Trevor Webb.
              Chemical: Thickness=[200, 100, 250, 1450]; PH=[7, 7, 7, 7]; PHUnits=Water
              Physical
                Thickness  ParticleSizeClay  ParticleSizeSand  ParticleSizeSilt  BD     AirDry  LL15   DUL    SAT    KS
                200        30                12.5              57.5              1.189  0.107   0.214  0.418  0.513  1440
                100        30                12.5              57.5              1.253  0.112   0.224  0.395  0.491  1440
                250        30                12.5              57.5              1.356  0.226   0.226  0.37   0.454  960
                362.5      30                12.5              57.5              1.441  0.254   0.254  0.393  0.425  192
                362.5      30                12.5              57.5              1.441  0.254   0.254  0.393  0.425  192
                362.5      30                12.5              57.5              1.441  0.254   0.254  0.393  0.425  192
                362.5      30                12.5              57.5              1.441  0.254   0.254  0.393  0.425  192
                SoilCrop BarleySoil
                  LL=[0.214, 0.224, 0.226, 0.254, 0.254, 0.254, 0.254]
                  KL=[0.113361, 0.0801921, 0.053548, 0.0220107, 0.00953518, 0.00413071, 0]
                  XF=[1, 1, 1, 1, 1, 1, 1]
                SoilCrop CanolaSoil
                  LL=[0.214, 0.224, 0.226, 0.254, 0.254, 0.254, 0.254]
                  KL=[0.109784, 0.0715174, 0.0433775, 0.0150687, 0.00534898, 0, 0]
                  XF=[1, 1, 1, 0.49, 0.49, 0.49, 0.49]
                SoilCrop ChickpeaSoil: LL=[0.214, 0.224, 0.226, 0.254, 0.254, 0.254, 0.254]; KL=[0.11513, 0.0605338, 0.0285942, 0.00641334, 0, 0, 0]; XF=[1, 1, 1, 1, 1, 1, 1]
                SoilCrop ChicorySoil
                  LL=[0.214, 0.224, 0.226, 0.254, 0.254, 0.254, 0.254]
                  KL=[0.0854493, 0.0702648, 0.0559249, 0.0312566, 0.0194803, 0.0121409, 0.00756667]
                  XF=[1, 1, 1, 1, 1, 1, 1]
                SoilCrop FababeanSoil: LL=[0.214, 0.224, 0.226, 0.254, 0.254, 0.254, 0.254]; KL=[0.13602, 0.0642511, 0.0267838, 0.00482701, 0, 0, 0]; XF=[1, 1, 1, 0.49, 0.49, 0.49, 0.49]
                SoilCrop FieldpeaSoil: LL=[0.214, 0.224, 0.226, 0.254, 0.254, 0.254, 0.254]; KL=[0.13602, 0.0642511, 0.0267838, 0.00482701, 0, 0, 0]; XF=[1, 1, 1, 0.25, 0.25, 0.25, 0.25]
                SoilCrop FodderBeetSoil
                  LL=[0.214, 0.224, 0.226, 0.254, 0.254, 0.254, 0.254]
                  KL=[0.0916052, 0.0678628, 0.0478221, 0.0215994, 0.0104611, 0.00506658, 0.001763]
                  XF=[1, 1, 1, 0.64, 0.64, 0.64, 0.64]
                SoilCrop GrapevineSoil
                  LL=[0.214, 0.224, 0.226, 0.254, 0.254, 0.254, 0.254]
                  KL=[0.0675, 0.0577981, 0.0482271, 0.0292766, 0.0201215, 0.0138293, 0.00950472]
                  XF=[1, 1, 1, 0.479, 0.479, 0.479, 0.479]
                SoilCrop ItalianRyegrassSoil: LL=[0.214, 0.224, 0.226, 0.254, 0.254, 0.254, 0.254]; KL=[0.163991, 0.0666736, 0.0233316, 0.00459212, 0, 0, 0]; XF=[1, 1, 1, 0.49, 0.49, 0.49, 0.49]
                SoilCrop KaleSoil
                  LL=[0.214, 0.224, 0.226, 0.254, 0.254, 0.254, 0.254]
                  KL=[0.103914, 0.0735094, 0.0490857, 0.0201764, 0.00874058, 0.00378649, 0]
                  XF=[1, 1, 1, 0.64, 0.64, 0.64, 0.64]
                SoilCrop LucerneSoil
                  LL=[0.214, 0.224, 0.226, 0.254, 0.254, 0.254, 0.254]
                  KL=[0.0849861, 0.070456, 0.056613, 0.0321722, 0.0204499, 0.0129988, 0.00826252]
                  XF=[1, 1, 1, 1, 1, 1, 1]
                SoilCrop MaizeSoil
                  LL=[0.214, 0.224, 0.226, 0.254, 0.254, 0.254, 0.254]
                  KL=[0.100766, 0.0746491, 0.0526043, 0.0237594, 0.0115072, 0.00557324, 0.0019393]
                  XF=[1, 1, 1, 0.64, 0.64, 0.64, 0.64]
                SoilCrop OatsSoil
                  LL=[0.214, 0.224, 0.226, 0.254, 0.254, 0.254, 0.254]
                  KL=[0.103914, 0.0735094, 0.0490857, 0.0201764, 0.00874058, 0.00378649, 0]
                  XF=[1, 1, 1, 0.79, 0.79, 0.79, 0.79]
                SoilCrop PlantainSoil
                  LL=[0.214, 0.224, 0.226, 0.254, 0.254, 0.254, 0.254]
                  KL=[0.103914, 0.0735094, 0.0490857, 0.0201764, 0.00874058, 0.00378649, 0]
                  XF=[1, 1, 1, 1, 1, 1, 1]
                SoilCrop PotatoSoil: LL=[0.214, 0.224, 0.226, 0.254, 0.254, 0.254, 0.254]; KL=[0.108367, 0.0478152, 0.0184082, 0.00387874, 0, 0, 0]; XF=[1, 1, 1, 0.25, 0.25, 0.25, 0.25]
                SoilCrop RedCloverSoil
                  LL=[0.214, 0.224, 0.226, 0.254, 0.254, 0.254, 0.254]
                  KL=[0.088602, 0.0690033, 0.0515467, 0.0257839, 0.0140917, 0.00770151, 0.0042091]
                  XF=[1, 1, 1, 1, 1, 1, 1]
                SoilCrop RyegrassSoil: LL=[0.214, 0.224, 0.226, 0.254, 0.254, 0.254, 0.254]; KL=[0.109926, 0.0603288, 0.0299584, 0.00733376, 0, 0, 0]; XF=[1, 1, 1, 0.49, 0.49, 0.49, 0.49]
                SoilCrop SoybeanSoil
                  LL=[0.214, 0.224, 0.226, 0.254, 0.254, 0.254, 0.254]
                  KL=[0.104671, 0.0634861, 0.0354275, 0.0106369, 0.0031772, 0, 0]
                  XF=[1, 1, 1, 0.49, 0.49, 0.49, 0.49]
                SoilCrop TriticaleSoil
                  LL=[0.214, 0.224, 0.226, 0.254, 0.254, 0.254, 0.254]
                  KL=[0.103914, 0.0735094, 0.0490857, 0.0201764, 0.00874058, 0.00378649, 0]
                  XF=[1, 1, 1, 0.79, 0.79, 0.79, 0.79]
                SoilCrop WheatSoil
                  LL=[0.214, 0.224, 0.226, 0.254, 0.254, 0.254, 0.254]
                  KL=[0.111508, 0.0808558, 0.0555713, 0.024025, 0.0110487, 0.00508108, 0]
                  XF=[1, 1, 1, 0.64, 0.64, 0.64, 0.64]
                SoilCrop WhitecloverSoil: LL=[0.214, 0.224, 0.226, 0.254, 0.254, 0.254, 0.254]; KL=[0.115138, 0.0423569, 0.0131901, 0.00238849, 0, 0, 0]; XF=[1, 1, 1, 0.298, 0.298, 0.298, 0.298]
                SoilCrop AgPRyegrassSoil: LL=[0.214, 0.224, 0.226, 0.254, 0.254, 0.254, 0.254]; KL=[0.100766, 0.0553014, 0.0274619, 0.00672261, 0, 0, 0]; XF=[1, 1, 1, 0.49, 0.49, 0.49, 0.49]
                SoilCrop AgPWhiteCloverSoil: LL=[0.214, 0.224, 0.226, 0.254, 0.254, 0.254, 0.254]; KL=[0.126643, 0.0350108, 0.00781196, 0, 0, 0, 0]; XF=[1, 1, 1, 0, 0, 0, 0]
                SoilCrop AgPPaspalumSoil
                  LL=[0.214, 0.224, 0.226, 0.254, 0.254, 0.254, 0.254]
                  KL=[0.0865174, 0.0563608, 0.0341846, 0.0118752, 0.00421537, 0, 0]
                  XF=[1, 1, 1, 0.766, 0.766, 0.766, 0.766]
                SoilCrop SCRUMSoil
                  LL=[0.214, 0.224, 0.226, 0.254, 0.254, 0.254, 0.254]
                  KL=[0.0773314, 0.0773314, 0.0773314, 0.0773314, 0.0773314, 0.0773314, 0.0773314]
                  XF=[1, 1, 1, 0.79, 0.79, 0.79, 0.79]
              WaterBalance SoilWater: SummerDate=1-oct; SummerU=9; SummerCona=4.4; WinterDate=1-apr; WinterU=4; WinterCona=2; DiffusConst=88; DiffusSlope=35; Salb=0.13; CN2Bare=90; CNRed=21; CNCov=0.8; DischargeWidth=0; CatchmentArea=0; PSIDul=-100
                Thickness  SWCON  KLAT
                200        0.5    0
                100        0.5    0
                250        0.3    0
                1450       0.2    0
              SoilNitrogen: fom_types=[default, manure, mucuna, lablab, shemp, stable]; fract_carb=[0.2, 0.3, 0.54, 0.57, 0.45, 0]; fract_cell=[0.7, 0.3, 0.37, 0.37, 0.47, 0.1]; fract_lign=[0.1, 0.4, 0.09, 0.06, 0.08, 0.9]; NPartitionApproach=0
              Organic: same as SimulationExp.Factors.Permutation.SoilType_Old.Waikiwi_33a2.Waikiwi_33a2.Organic
              CERESSoilTemperature Temperature
              Water: Thickness=[200, 100, 250, 362.5, 362.5, 362.5, 362.5]; InitialValues=[0.3976, 0.3779, 0.3556, 0.3791, 0.3791, 0.3791, 0.3791]; RelativeTo=LL15; FilledFromTop=false
              LayerStructure: Thickness=[200, 100, 250, 362.5, 362.5, 362.5, 362.5]
              SoilNitrogenNO3 NO3: Thickness=[200, 100, 250, 1450]; InitialValues=[5.3266, 5.05454, 0.0433802, 0.0408213]; InitialValuesUnits=ppm; WaterTableConcentration=0; D0=0
              SoilNitrogenNH4 NH4: Thickness=[200, 100, 250, 1450]; InitialValues=[0.798991, 0.75818, 0.00650703, 0.0061232]; InitialValuesUnits=ppm; WaterTableConcentration=0; D0=0
              SoilNitrogenUrea Urea: Thickness=[200, 100, 250, 1450]; InitialValues=[0, 0, 0, 0]; InitialValuesUnits=kg/ha; WaterTableConcentration=0; D0=0
          CompositeFactor Templeton_1a1: Specifications=[Soil]
            Soil Templeton_1a1: SoilType=Typic Immature Pallic Soils; LocalName=Templeton_1a1; Latitude=-41; Longitude=174
              DataSource=Profile descriptions provided by Smap based on the work done by Trevor Webb.
              Chemical: Thickness=[240, 300, 325, 1135]; PH=[7, 7, 7, 7]; PHUnits=Water
              Physical
                Thickness  ParticleSizeClay  ParticleSizeSand  ParticleSizeSilt  BD     AirDry  LL15   DUL    SAT    KS
                240        22.5              17.5              60                1.356  0.078   0.156  0.353  0.454  1440
                300        20                17.5              62.5              1.555  0.139   0.154  0.304  0.385  480
                325        22.5              17.5              60                1.674  0.172   0.172  0.312  0.343  24
                378.3      17.5              32.5              50                1.698  0.139   0.139  0.28   0.334  192
                378.3      17.5              32.5              50                1.698  0.139   0.139  0.28   0.334  192
                378.3      17.5              32.5              50                1.698  0.139   0.139  0.28   0.334  192
                SoilCrop BarleySoil: LL=[0.156, 0.154, 0.172, 0.139, 0.139, 0.139]; KL=[0.108248, 0.0483771, 0.0141123, 0.0104476, 0.00436393, 0]; XF=[1, 1, 0.198, 1, 1, 1]
                SoilCrop CanolaSoil
                  LL=[0.156, 0.154, 0.172, 0.139, 0.139, 0.139]
                  KL=[0.103686, 0.0399496, 0.00981525, 0.00598974, 0.00174451, 0]
                  XF=[1, 0.81, 0.01, 0.49, 0.49, 0.49]
                SoilCrop ChickpeaSoil: LL=[0.156, 0.154, 0.172, 0.139, 0.139, 0.139]; KL=[0.105673, 0.0276847, 0.00435258, 0.00180764, 0, 0]; XF=[1, 1, 0.063, 1, 1, 1]
                SoilCrop ChicorySoil
                  LL=[0.156, 0.154, 0.172, 0.139, 0.139, 0.139]
                  KL=[0.083249, 0.048781, 0.0194706, 0.020513, 0.0125237, 0.00764604]
                  XF=[1, 1, 0.16, 1, 1, 1]
                SoilCrop FababeanSoil: LL=[0.156, 0.154, 0.172, 0.139, 0.139, 0.139]; KL=[0.123076, 0.0265884, 0.00334394, 0, 0, 0]; XF=[1, 0.81, 0.01, 0, 0, 0]
                SoilCrop FieldpeaSoil: LL=[0.156, 0.154, 0.172, 0.139, 0.139, 0.139]; KL=[0.123076, 0.0265884, 0.00334394, 0, 0, 0]; XF=[1, 0.49, 0, 0, 0, 0]
                SoilCrop FodderBeetSoil
                  LL=[0.156, 0.154, 0.172, 0.139, 0.139, 0.139]
                  KL=[0.0880133, 0.0427413, 0.0137267, 0.0113233, 0.00531358, 0.00181997]
                  XF=[1, 1, 0.04, 0.64, 0.64, 0.64]
                SoilCrop GrapevineSoil
                  LL=[0.156, 0.154, 0.172, 0.139, 0.139, 0.139]
                  KL=[0.0661178, 0.041671, 0.0180962, 0.0209629, 0.014174, 0.00958371]
                  XF=[1, 0.716, 0.053, 0.479, 0.479, 0.479]
                SoilCrop ItalianRyegrassSoil: LL=[0.156, 0.154, 0.172, 0.139, 0.139, 0.139]; KL=[0.145447, 0.0239864, 0.00292565, 0, 0, 0]; XF=[1, 0.81, 0.01, 0, 0, 0]
                SoilCrop KaleSoil
                  LL=[0.156, 0.154, 0.172, 0.139, 0.139, 0.139]
                  KL=[0.0992273, 0.0443457, 0.0129363, 0.00957697, 0.00400027, 0]
                  XF=[1, 1, 0.04, 0.64, 0.64, 0.64]
                SoilCrop LucerneSoil
                  LL=[0.156, 0.154, 0.172, 0.139, 0.139, 0.139]
                  KL=[0.0828878, 0.0492873, 0.0200097, 0.0214877, 0.0133913, 0.00834555]
                  XF=[1, 1, 0.36, 1, 1, 1]
                SoilCrop MaizeSoil
                  LL=[0.156, 0.154, 0.172, 0.139, 0.139, 0.139]
                  KL=[0.0968146, 0.0470155, 0.0150993, 0.0124557, 0.00584494, 0.00200197]
                  XF=[1, 1, 0.04, 0.64, 0.64, 0.64]
                SoilCrop OatsSoil
                  LL=[0.156, 0.154, 0.172, 0.139, 0.139, 0.139]
                  KL=[0.0992273, 0.0443457, 0.0129363, 0.00957697, 0.00400027, 0]
                  XF=[1, 1, 0.049, 0.79, 0.79, 0.79]
                SoilCrop PlantainSoil
                  LL=[0.156, 0.154, 0.172, 0.139, 0.139, 0.139]
                  KL=[0.0992273, 0.0443457, 0.0129363, 0.00957697, 0.00400027, 0]
                  XF=[1, 1, 0.16, 1, 1, 1]
                SoilCrop PotatoSoil: LL=[0.156, 0.154, 0.172, 0.139, 0.139, 0.139]; KL=[0.0971673, 0.018567, 0.00245771, 0, 0, 0]; XF=[1, 0.49, 0, 0, 0, 0]
                SoilCrop RedCloverSoil
                  LL=[0.156, 0.154, 0.172, 0.139, 0.139, 0.139]
                  KL=[0.0856973, 0.0455358, 0.0162297, 0.0150531, 0.00801314, 0.0042656]
                  XF=[1, 1, 0.198, 1, 1, 1]
                SoilCrop RyegrassSoil: LL=[0.156, 0.154, 0.172, 0.139, 0.139, 0.139]; KL=[0.101475, 0.028717, 0.00493653, 0.00214758, 0, 0]; XF=[1, 0.81, 0.01, 0.49, 0.49, 0.49]
                SoilCrop SoybeanSoil: LL=[0.156, 0.154, 0.172, 0.139, 0.139, 0.139]; KL=[0.0979204, 0.0331762, 0.00702406, 0.00362553, 0, 0]; XF=[1, 0.81, 0.01, 0.49, 0.49, 0.49]
                SoilCrop TriticaleSoil
                  LL=[0.156, 0.154, 0.172, 0.139, 0.139, 0.139]
                  KL=[0.0992273, 0.0443457, 0.0129363, 0.00957697, 0.00400027, 0]
                  XF=[1, 1, 0.049, 0.79, 0.79, 0.79]
                SoilCrop WheatSoil: LL=[0.156, 0.154, 0.172, 0.139, 0.139, 0.139]; KL=[0.10683, 0.0499162, 0.015331, 0.0120272, 0.00534694, 0]; XF=[1, 1, 0.04, 0.64, 0.64, 0.64]
                SoilCrop WhitecloverSoil: LL=[0.156, 0.154, 0.172, 0.139, 0.139, 0.139]; KL=[0.100766, 0.0138804, 0.00153189, 0, 0, 0]; XF=[1, 0.529, 0, 0, 0, 0]
                SoilCrop AgPRyegrassSoil: LL=[0.156, 0.154, 0.172, 0.139, 0.139, 0.139]; KL=[0.0930185, 0.0263239, 0.00452515, 0.00196861, 0, 0]; XF=[1, 0.81, 0.01, 0.49, 0.49, 0.49]
                SoilCrop AgPWhiteCloverSoil: LL=[0.156, 0.154, 0.172, 0.139, 0.139, 0.139]; KL=[0.106691, 0.00878753, 0, 0, 0, 0]; XF=[1, 0.766, 0, 0, 0, 0]
                SoilCrop AgPPaspalumSoil: LL=[0.156, 0.154, 0.172, 0.139, 0.139, 0.139]; KL=[0.0817121, 0.0314831, 0.00773511, 0.00472034, 0, 0]; XF=[1, 1, 0.016, 0.766, 0.766, 0.766]
                SoilCrop SCRUMSoil
                  LL=[0.156, 0.154, 0.172, 0.139, 0.139, 0.139]
                  KL=[0.0768594, 0.0768594, 0.0768594, 0.0768594, 0.0768594, 0.0768594]
                  XF=[1, 1, 0.049, 0.79, 0.79, 0.79]
              WaterBalance SoilWater: SummerDate=1-oct; SummerU=9; SummerCona=4.4; WinterDate=1-apr; WinterU=4; WinterCona=2; DiffusConst=88; DiffusSlope=35; Salb=0.13; CN2Bare=90; CNRed=21; CNCov=0.8; DischargeWidth=0; CatchmentArea=0; PSIDul=-100
                Thickness  SWCON  KLAT
                240        0.5    0
                300        0.3    0
                325        0.15   0
                1135       0.2    0
              SoilNitrogen: fom_types=[default, manure, mucuna, lablab, shemp, stable]; fract_carb=[0.2, 0.3, 0.54, 0.57, 0.45, 0]; fract_cell=[0.7, 0.3, 0.37, 0.37, 0.47, 0.1]; fract_lign=[0.1, 0.4, 0.09, 0.06, 0.08, 0.9]; NPartitionApproach=0
              Organic: same as SimulationExp.Factors.Permutation.SoilType_Old.Darnley_4a2.Darnley_4a2.Organic
              CERESSoilTemperature Temperature
              Water: Thickness=[240, 300, 325, 378.3, 378.3, 378.3]; InitialValues=[0.3333, 0.289, 0.298, 0.2659, 0.2659, 0.2659]; RelativeTo=LL15; FilledFromTop=false
              LayerStructure: Thickness=[240, 300, 325, 378.3, 378.3, 378.3]
              SoilNitrogenNO3 NO3: Thickness=[240, 300, 325, 1135]; InitialValues=[4.6706, 0.84484, 0.0351395, 0.0347279]; InitialValuesUnits=ppm; WaterTableConcentration=0; D0=0
              SoilNitrogenNH4 NH4: Thickness=[240, 300, 325, 1135]; InitialValues=[0.70059, 0.126726, 0.00527093, 0.00521359]; InitialValuesUnits=ppm; WaterTableConcentration=0; D0=0
              SoilNitrogenUrea Urea: Thickness=[240, 300, 325, 1135]; InitialValues=[0, 0, 0, 0]; InitialValuesUnits=kg/ha; WaterTableConcentration=0; D0=0
          CompositeFactor Windermere_16a1: Specifications=[Soil]
            Soil Windermere_16a1: SoilType=Mellow Humic Organic Soils; LocalName=Windermere_16a1; Latitude=-41; Longitude=174
              DataSource=Profile descriptions provided by Smap based on the work done by Trevor Webb.
              Chemical: Thickness=[200, 110, 1690]; PH=[7, 7, 7]; PHUnits=Water
              Physical
                Thickness  ParticleSizeClay  ParticleSizeSand  ParticleSizeSilt  BD     AirDry  LL15   DUL    SAT    KS
                200        10                10                80                0.3    0.093   0.186  0.636  0.804  960
                110        30                3                 67                0.3    0.101   0.186  0.636  0.804  720
                338        27                45                28                1.476  0.208   0.208  0.357  0.412  192
                338        27                45                28                1.476  0.208   0.208  0.357  0.412  192
                338        27                45                28                1.476  0.208   0.208  0.357  0.412  192
                338        27                45                28                1.476  0.208   0.208  0.357  0.412  192
                338        27                45                28                1.476  0.208   0.208  0.357  0.412  192
                SoilCrop BarleySoil
                  LL=[0.186, 0.186, 0.208, 0.208, 0.208, 0.208, 0.208]
                  KL=[0.151148, 0.105696, 0.0393951, 0.018059, 0.00827834, 0.00379484, 0]
                  XF=[1, 1, 1, 1, 1, 1, 1]
                SoilCrop CanolaSoil
                  LL=[0.186, 0.186, 0.208, 0.208, 0.208, 0.208, 0.208]
                  KL=[0.146378, 0.094004, 0.0309798, 0.0117943, 0.00449024, 0, 0]
                  XF=[1, 1, 0.49, 0.49, 0.49, 0.49, 0.49]
                SoilCrop ChickpeaSoil: LL=[0.186, 0.186, 0.208, 0.208, 0.208, 0.208, 0.208]; KL=[0.153506, 0.0790006, 0.0189055, 0.00444101, 0, 0, 0]; XF=[1, 1, 1, 1, 1, 1, 1]
                SoilCrop ChicorySoil
                  LL=[0.186, 0.186, 0.208, 0.208, 0.208, 0.208, 0.208]
                  KL=[0.113932, 0.0930774, 0.0434345, 0.0279491, 0.0179846, 0.0115727, 0.00744673]
                  XF=[1, 1, 1, 1, 1, 1, 1]
                SoilCrop FababeanSoil: LL=[0.186, 0.186, 0.208, 0.208, 0.208, 0.208, 0.208]; KL=[0.181359, 0.0835529, 0.0170385, 0.00365951, 0, 0, 0]; XF=[1, 1, 0.49, 0.49, 0.49, 0.49, 0.49]
                SoilCrop FieldpeaSoil: LL=[0.186, 0.186, 0.208, 0.208, 0.208, 0.208, 0.208]; KL=[0.181359, 0.0835529, 0.0170385, 0.00365951, 0, 0, 0]; XF=[0.81, 0.81, 0.25, 0.25, 0.25, 0.25, 0.25]
                SoilCrop FodderBeetSoil
                  LL=[0.186, 0.186, 0.208, 0.208, 0.208, 0.208, 0.208]
                  KL=[0.12214, 0.0895834, 0.035772, 0.0181954, 0.00925502, 0.00470755, 0.0016787]
                  XF=[1, 1, 0.64, 0.64, 0.64, 0.64, 0.64]
                SoilCrop GrapevineSoil
                  LL=[0.186, 0.186, 0.208, 0.208, 0.208, 0.208, 0.208]
                  KL=[0.09, 0.0766665, 0.0380057, 0.0267914, 0.0188861, 0.0133134, 0.00938503]
                  XF=[1, 1, 0.479, 0.479, 0.479, 0.479, 0.479]
                SoilCrop ItalianRyegrassSoil: LL=[0.186, 0.186, 0.208, 0.208, 0.208, 0.208, 0.208]; KL=[0.218654, 0.0862708, 0.0140622, 0.00255063, 0, 0, 0]; XF=[1, 1, 0.49, 0.49, 0.49, 0.49, 0.49]
                SoilCrop KaleSoil
                  LL=[0.186, 0.186, 0.208, 0.208, 0.208, 0.208, 0.208]
                  KL=[0.138553, 0.0968882, 0.0361122, 0.016554, 0.00758847, 0.0034786, 0]
                  XF=[1, 1, 0.64, 0.64, 0.64, 0.64, 0.64]
                SoilCrop LucerneSoil
                  LL=[0.186, 0.186, 0.208, 0.208, 0.208, 0.208, 0.208]
                  KL=[0.113315, 0.093356, 0.0440981, 0.0289022, 0.0189427, 0.0124151, 0.00813696]
                  XF=[1, 1, 1, 1, 1, 1, 1]
                SoilCrop MaizeSoil
                  LL=[0.186, 0.186, 0.208, 0.208, 0.208, 0.208, 0.208]
                  KL=[0.134354, 0.0985418, 0.0393492, 0.0200149, 0.0101805, 0.0051783, 0.00184657]
                  XF=[1, 1, 0.64, 0.64, 0.64, 0.64, 0.64]
                SoilCrop OatsSoil
                  LL=[0.186, 0.186, 0.208, 0.208, 0.208, 0.208, 0.208]
                  KL=[0.138553, 0.0968882, 0.0361122, 0.016554, 0.00758847, 0.0034786, 0]
                  XF=[1, 1, 0.79, 0.79, 0.79, 0.79, 0.79]
                SoilCrop PlantainSoil
                  LL=[0.186, 0.186, 0.208, 0.208, 0.208, 0.208, 0.208]
                  KL=[0.138553, 0.0968882, 0.0361122, 0.016554, 0.00758847, 0.0034786, 0]
                  XF=[1, 1, 1, 1, 1, 1, 1]
                SoilCrop PotatoSoil: LL=[0.186, 0.186, 0.208, 0.208, 0.208, 0.208, 0.208]; KL=[0.14449, 0.0620384, 0.0114265, 0.00227269, 0, 0, 0]; XF=[0.81, 0.81, 0.25, 0.25, 0.25, 0.25, 0.25]
                SoilCrop RedCloverSoil
                  LL=[0.186, 0.186, 0.208, 0.208, 0.208, 0.208, 0.208]
                  KL=[0.118136, 0.0912409, 0.0392584, 0.0223502, 0.0127241, 0.00724395, 0.00412404]
                  XF=[1, 1, 1, 1, 1, 1, 1]
                SoilCrop RyegrassSoil: LL=[0.186, 0.186, 0.208, 0.208, 0.208, 0.208, 0.208]; KL=[0.146568, 0.0788456, 0.0201154, 0.00520432, 0, 0, 0]; XF=[1, 1, 0.49, 0.49, 0.49, 0.49, 0.49]
                SoilCrop SoybeanSoil
                  LL=[0.186, 0.186, 0.208, 0.208, 0.208, 0.208, 0.208]
                  KL=[0.139561, 0.0832491, 0.0246596, 0.00799247, 0.00227509, 0, 0]
                  XF=[1, 1, 0.49, 0.49, 0.49, 0.49, 0.49]
                SoilCrop TriticaleSoil
                  LL=[0.186, 0.186, 0.208, 0.208, 0.208, 0.208, 0.208]
                  KL=[0.138553, 0.0968882, 0.0361122, 0.016554, 0.00758847, 0.0034786, 0]
                  XF=[1, 1, 0.79, 0.79, 0.79, 0.79, 0.79]
                SoilCrop WheatSoil
                  LL=[0.186, 0.186, 0.208, 0.208, 0.208, 0.208, 0.208]
                  KL=[0.148677, 0.106659, 0.0412492, 0.0199923, 0.00968966, 0.00469629, 0]
                  XF=[1, 1, 0.64, 0.64, 0.64, 0.64, 0.64]
                SoilCrop WhitecloverSoil: LL=[0.186, 0.186, 0.208, 0.208, 0.208, 0.208, 0.208]; KL=[0.153517, 0.0546244, 0.00766867, 0, 0, 0, 0]; XF=[0.826, 0.826, 0.298, 0.298, 0.298, 0.298, 0.298]
                SoilCrop AgPRyegrassSoil: LL=[0.186, 0.186, 0.208, 0.208, 0.208, 0.208, 0.208]; KL=[0.134354, 0.0722752, 0.0184392, 0.00477062, 0, 0, 0]; XF=[1, 1, 0.49, 0.49, 0.49, 0.49, 0.49]
                SoilCrop AgPWhiteCloverSoil: LL=[0.186, 0.186, 0.208, 0.208, 0.208, 0.208, 0.208]; KL=[0.168857, 0.0447227, 0.00409791, 0, 0, 0, 0]; XF=[1, 1, 0.391, 0.391, 0.391, 0.391, 0.391]
                SoilCrop AgPPaspalumSoil
                  LL=[0.186, 0.186, 0.208, 0.208, 0.208, 0.208, 0.208]
                  KL=[0.115356, 0.0740818, 0.0244142, 0.00929477, 0.00353862, 0, 0]
                  XF=[1, 1, 0.766, 0.766, 0.766, 0.766, 0.766]
                SoilCrop SCRUMSoil
                  LL=[0.186, 0.186, 0.208, 0.208, 0.208, 0.208, 0.208]
                  KL=[0.103109, 0.103109, 0.103109, 0.103109, 0.103109, 0.103109, 0.103109]
                  XF=[1, 1, 0.79, 0.79, 0.79, 0.79, 0.79]
              WaterBalance SoilWater: SummerDate=1-oct; SummerU=9; SummerCona=4.4; WinterDate=1-apr; WinterU=4; WinterCona=2; DiffusConst=88; DiffusSlope=35; Salb=0.13; CN2Bare=91; CNRed=17; CNCov=0.8; DischargeWidth=0; CatchmentArea=0; PSIDul=-100
                Thickness  SWCON  KLAT
                200        0.3    0
                110        0.2    0
                1690       0.2    0
              SoilNitrogen: fom_types=[default, manure, mucuna, lablab, shemp, stable]; fract_carb=[0.2, 0.3, 0.54, 0.57, 0.45, 0]; fract_cell=[0.7, 0.3, 0.37, 0.37, 0.47, 0.1]; fract_lign=[0.1, 0.4, 0.09, 0.06, 0.08, 0.9]; NPartitionApproach=0
              Organic: same as SimulationExp.Factors.Permutation.SoilType_Old.Windermere_16a1.Windermere_16a1.Organic
              CERESSoilTemperature Temperature
              Water: Thickness=[200, 110, 338, 338, 338, 338, 338]; InitialValues=[0.591, 0.591, 0.3421, 0.3421, 0.3421, 0.3421, 0.3421]; RelativeTo=LL15; FilledFromTop=false
              LayerStructure: Thickness=[200, 110, 338, 338, 338, 338, 338]
              SoilNitrogenNO3 NO3: Thickness=[200, 110, 1690]; InitialValues=[21.1111, 19.2097, 0.0398533]; InitialValuesUnits=ppm; WaterTableConcentration=0; D0=0
              SoilNitrogenNH4 NH4: Thickness=[200, 110, 1690]; InitialValues=[3.16667, 2.88146, 0.005978]; InitialValuesUnits=ppm; WaterTableConcentration=0; D0=0
              SoilNitrogenUrea Urea: Thickness=[200, 110, 1690]; InitialValues=[0, 0, 0]; InitialValuesUnits=kg/ha; WaterTableConcentration=0; D0=0
          CompositeFactor Erodgrav_1a2: Specifications=[Soil]
            Soil Erodgrav_1a2: SoilType=Orthic Raw Soils; LocalName=Erodgrav_1a2; Latitude=-41; Longitude=174
              DataSource=Profile descriptions provided by Smap based on the work done by Trevor Webb.
              Chemical: Thickness=[225, 1775]; PH=[7, 7]; PHUnits=Water
              Physical
                Thickness  ParticleSizeClay  ParticleSizeSand  ParticleSizeSilt  BD     AirDry  LL15   DUL    SAT    KS
                225        4                 90                6                 1.168  0.029   0.058  0.14   0.335  1920
                355        1.5               90                8.5               0.557  0.011   0.013  0.055  0.177  2400
                355        1.5               90                8.5               0.557  0.013   0.013  0.055  0.177  2400
                355        1.5               90                8.5               0.557  0.013   0.013  0.055  0.177  2400
                355        1.5               90                8.5               0.557  0.013   0.013  0.055  0.177  2400
                355        1.5               90                8.5               0.557  0.013   0.013  0.055  0.177  2400
                SoilCrop BarleySoil: LL=[0.058, 0.013, 0.013, 0.013, 0.013, 0.013]; KL=[0.128, 0, 0, 0, 0, 0]; XF=[1, 0, 0, 0, 0, 0]
                SoilCrop CanolaSoil: LL=[0.058, 0.013, 0.013, 0.013, 0.013, 0.013]; KL=[0.124, 0, 0, 0, 0, 0]; XF=[1, 0, 0, 0, 0, 0]
                SoilCrop ChickpeaSoil: LL=[0.058, 0.013, 0.013, 0.013, 0.013, 0.013]; KL=[0.127, 0, 0, 0, 0, 0]; XF=[1, 0, 0, 0, 0, 0]
                SoilCrop ChicorySoil: LL=[0.058, 0.013, 0.013, 0.013, 0.013, 0.013]; KL=[0.098, 0, 0, 0, 0, 0]; XF=[1, 0, 0, 0, 0, 0]
                SoilCrop FababeanSoil: LL=[0.058, 0.013, 0.013, 0.013, 0.013, 0.013]; KL=[0.149, 0, 0, 0, 0, 0]; XF=[1, 0, 0, 0, 0, 0]
                SoilCrop FieldpeaSoil: LL=[0.058, 0.013, 0.013, 0.013, 0.013, 0.013]; KL=[0.149, 0, 0, 0, 0, 0]; XF=[0.81, 0, 0, 0, 0, 0]
                SoilCrop FodderBeetSoil: LL=[0.058, 0.013, 0.013, 0.013, 0.013, 0.013]; KL=[0.104, 0, 0, 0, 0, 0]; XF=[1, 0, 0, 0, 0, 0]
                SoilCrop GrapevineSoil: LL=[0.058, 0.013, 0.013, 0.013, 0.013, 0.013]; KL=[0.078, 0, 0, 0, 0, 0]; XF=[1, 0, 0, 0, 0, 0]
                SoilCrop ItalianRyegrassSoil: LL=[0.058, 0.013, 0.013, 0.013, 0.013, 0.013]; KL=[0.177, 0, 0, 0, 0, 0]; XF=[1, 0, 0, 0, 0, 0]
                SoilCrop KaleSoil: LL=[0.058, 0.013, 0.013, 0.013, 0.013, 0.013]; KL=[0.118, 0, 0, 0, 0, 0]; XF=[1, 0, 0, 0, 0, 0]
                SoilCrop LucerneSoil: LL=[0.058, 0.013, 0.013, 0.013, 0.013, 0.013]; KL=[0.098, 0, 0, 0, 0, 0]; XF=[1, 0, 0, 0, 0, 0]
                SoilCrop MaizeSoil: LL=[0.058, 0.013, 0.013, 0.013, 0.013, 0.013]; KL=[0.115, 0, 0, 0, 0, 0]; XF=[1, 0, 0, 0, 0, 0]
                SoilCrop OatsSoil: LL=[0.058, 0.013, 0.013, 0.013, 0.013, 0.013]; KL=[0.118, 0, 0, 0, 0, 0]; XF=[1, 0, 0, 0, 0, 0]
                SoilCrop PlantainSoil: LL=[0.058, 0.013, 0.013, 0.013, 0.013, 0.013]; KL=[0.118, 0, 0, 0, 0, 0]; XF=[1, 0, 0, 0, 0, 0]
                SoilCrop PotatoSoil: LL=[0.058, 0.013, 0.013, 0.013, 0.013, 0.013]; KL=[0.118, 0, 0, 0, 0, 0]; XF=[0.81, 0, 0, 0, 0, 0]
                SoilCrop RedCloverSoil: LL=[0.058, 0.013, 0.013, 0.013, 0.013, 0.013]; KL=[0.101, 0, 0, 0, 0, 0]; XF=[1, 0, 0, 0, 0, 0]
                SoilCrop RyegrassSoil: LL=[0.058, 0.013, 0.013, 0.013, 0.013, 0.013]; KL=[0.122, 0, 0, 0, 0, 0]; XF=[1, 0, 0, 0, 0, 0]
                SoilCrop SoybeanSoil: LL=[0.058, 0.013, 0.013, 0.013, 0.013, 0.013]; KL=[0.117, 0, 0, 0, 0, 0]; XF=[1, 0, 0, 0, 0, 0]
                SoilCrop TriticaleSoil: LL=[0.058, 0.013, 0.013, 0.013, 0.013, 0.013]; KL=[0.118, 0, 0, 0, 0, 0]; XF=[1, 0, 0, 0, 0, 0]
                SoilCrop WheatSoil: LL=[0.058, 0.013, 0.013, 0.013, 0.013, 0.013]; KL=[0.127, 0, 0, 0, 0, 0]; XF=[1, 0, 0, 0, 0, 0]
                SoilCrop WhitecloverSoil: LL=[0.058, 0.013, 0.013, 0.013, 0.013, 0.013]; KL=[0.124, 0, 0, 0, 0, 0]; XF=[0.826, 0, 0, 0, 0, 0]
                SoilCrop AgPRyegrassSoil: LL=[0.058, 0.013, 0.013, 0.013, 0.013, 0.013]; KL=[0.112, 0, 0, 0, 0, 0]; XF=[1, 0, 0, 0, 0, 0]
                SoilCrop AgPWhiteCloverSoil: LL=[0.058, 0.013, 0.013, 0.013, 0.013, 0.013]; KL=[0.133, 0, 0, 0, 0, 0]; XF=[1, 0, 0, 0, 0, 0]
                SoilCrop AgPPaspalumSoil: LL=[0.058, 0.013, 0.013, 0.013, 0.013, 0.013]; KL=[0.097, 0, 0, 0, 0, 0]; XF=[1, 0, 0, 0, 0, 0]
                SoilCrop SCRUMSoil: LL=[0.058, 0.013, 0.013, 0.013, 0.013, 0.013]; KL=[0.09, 0, 0, 0, 0, 0]; XF=[1, 0, 0, 0, 0, 0]
              WaterBalance SoilWater: SummerDate=1-oct; SummerU=9; SummerCona=4.4; WinterDate=1-apr; WinterU=4; WinterCona=2; DiffusConst=88; DiffusSlope=35; Salb=0.13; CN2Bare=88; CNRed=23; CNCov=0.8; DischargeWidth=0; CatchmentArea=0; PSIDul=-100
                Thickness  SWCON  KLAT
                225        0.45   0
                1775       0.5    0
              SoilNitrogen: fom_types=[default, manure, mucuna, lablab, shemp, stable]; fract_carb=[0.2, 0.3, 0.54, 0.57, 0.45, 0]; fract_cell=[0.7, 0.3, 0.37, 0.37, 0.47, 0.1]; fract_lign=[0.1, 0.4, 0.09, 0.06, 0.08, 0.9]; NPartitionApproach=0
              Organic: same as SimulationExp.Factors.Permutation.SoilType_Old.Erodgrav_1a2.Erodgrav_1a2.Organic
              CERESSoilTemperature Temperature
              Water: Thickness=[225, 355, 355, 355, 355, 355]; InitialValues=[0.1318, 0.0508, 0.0508, 0.0508, 0.0508, 0.0508]; RelativeTo=LL15; FilledFromTop=false
              LayerStructure: Thickness=[225, 355, 355, 355, 355, 355]
              SoilNitrogenNO3 NO3: Thickness=[225, 1775]; InitialValues=[5.42237, 0.581586]; InitialValuesUnits=ppm; WaterTableConcentration=0; D0=0
              SoilNitrogenNH4 NH4: Thickness=[225, 1775]; InitialValues=[0.813356, 0.087238]; InitialValuesUnits=ppm; WaterTableConcentration=0; D0=0
              SoilNitrogenUrea Urea: Thickness=[225, 1775]; InitialValues=[0, 0]; InitialValuesUnits=kg/ha; WaterTableConcentration=0; D0=0
          CompositeFactor Taupo_86a1: Specifications=[Soil]
            Soil Taupo_86a1: SoilType=Immature Orthic Pumice Soils; LocalName=Taupo_86a1; Latitude=-41; Longitude=174
              DataSource=Profile descriptions provided by Smap based on the work done by Trevor Webb.
              Chemical: Thickness=[125, 100, 1775]; PH=[7, 7, 7]; PHUnits=Water
              Physical
                Thickness  ParticleSizeClay  ParticleSizeSand  ParticleSizeSilt  BD     AirDry  LL15   DUL    SAT    KS
                125        22.5              65                12.5              0.872  0.134   0.269  0.413  0.599  1920
                100        4                 85                11                1.144  0.011   0.023  0.124  0.496  2400
                355        4                 85                11                1.391  0.036   0.04   0.171  0.402  960
                355        4                 85                11                1.391  0.04    0.04   0.171  0.402  960
                355        4                 85                11                1.391  0.04    0.04   0.171  0.402  960
                355        4                 85                11                1.391  0.04    0.04   0.171  0.402  960
                355        4                 85                11                1.391  0.04    0.04   0.171  0.402  960
                SoilCrop BarleySoil: LL=[0.269, 0.023, 0.04, 0.04, 0.04, 0.04, 0.04]; KL=[0.123608, 0.111236, 0, 0, 0, 0, 0]; XF=[1, 1, 0, 0, 0, 0, 0]
                SoilCrop CanolaSoil: LL=[0.269, 0.023, 0.04, 0.04, 0.04, 0.04, 0.04]; KL=[0.1222, 0.103376, 0, 0, 0, 0, 0]; XF=[1, 1, 0, 0, 0, 0, 0]
                SoilCrop ChickpeaSoil: LL=[0.269, 0.023, 0.04, 0.04, 0.04, 0.04, 0.04]; KL=[0.135203, 0.0973957, 0, 0, 0, 0, 0]; XF=[1, 1, 0, 0, 0, 0, 0]
                SoilCrop ChicorySoil: LL=[0.269, 0.023, 0.04, 0.04, 0.04, 0.04, 0.04]; KL=[0.0897328, 0.0904003, 0, 0, 0, 0, 0]; XF=[1, 1, 0, 0, 0, 0, 0]
                SoilCrop FababeanSoil: LL=[0.269, 0.023, 0.04, 0.04, 0.04, 0.04, 0.04]; KL=[0.164071, 0.109066, 0, 0, 0, 0, 0]; XF=[1, 1, 0, 0, 0, 0, 0]
                SoilCrop FieldpeaSoil: LL=[0.269, 0.023, 0.04, 0.04, 0.04, 0.04, 0.04]; KL=[0.164071, 0.109066, 0, 0, 0, 0, 0]; XF=[1, 1, 0, 0, 0, 0, 0]
                SoilCrop FodderBeetSoil: LL=[0.269, 0.023, 0.04, 0.04, 0.04, 0.04, 0.04]; KL=[0.0987398, 0.0919862, 0, 0, 0, 0, 0]; XF=[1, 1, 0, 0, 0, 0, 0]
                SoilCrop GrapevineSoil: LL=[0.269, 0.023, 0.04, 0.04, 0.04, 0.04, 0.04]; KL=[0.07017, 0.0728711, 0, 0, 0, 0, 0]; XF=[1, 1, 0, 0, 0, 0, 0]
                SoilCrop ItalianRyegrassSoil: LL=[0.269, 0.023, 0.04, 0.04, 0.04, 0.04, 0.04]; KL=[0.205369, 0.121993, 0, 0, 0, 0, 0]; XF=[1, 1, 0, 0, 0, 0, 0]
                SoilCrop KaleSoil: LL=[0.269, 0.023, 0.04, 0.04, 0.04, 0.04, 0.04]; KL=[0.113308, 0.101966, 0, 0, 0, 0, 0]; XF=[1, 1, 0, 0, 0, 0, 0]
                SoilCrop LucerneSoil: LL=[0.269, 0.023, 0.04, 0.04, 0.04, 0.04, 0.04]; KL=[0.0890647, 0.0902775, 0, 0, 0, 0, 0]; XF=[1, 1, 0, 0, 0, 0, 0]
                SoilCrop MaizeSoil: LL=[0.269, 0.023, 0.04, 0.04, 0.04, 0.04, 0.04]; KL=[0.108614, 0.101185, 0, 0, 0, 0, 0]; XF=[1, 1, 0, 0, 0, 0, 0]
                SoilCrop OatsSoil: LL=[0.269, 0.023, 0.04, 0.04, 0.04, 0.04, 0.04]; KL=[0.113308, 0.101966, 0, 0, 0, 0, 0]; XF=[1, 1, 0, 0, 0, 0, 0]
                SoilCrop PlantainSoil: LL=[0.269, 0.023, 0.04, 0.04, 0.04, 0.04, 0.04]; KL=[0.113308, 0.101966, 0, 0, 0, 0, 0]; XF=[1, 1, 0, 0, 0, 0, 0]
                SoilCrop PotatoSoil: LL=[0.269, 0.023, 0.04, 0.04, 0.04, 0.04, 0.04]; KL=[0.132963, 0.0839806, 0, 0, 0, 0, 0]; XF=[1, 1, 0, 0, 0, 0, 0]
                SoilCrop RedCloverSoil: LL=[0.269, 0.023, 0.04, 0.04, 0.04, 0.04, 0.04]; KL=[0.0943164, 0.0912229, 0, 0, 0, 0, 0]; XF=[1, 1, 0, 0, 0, 0, 0]
                SoilCrop RyegrassSoil: LL=[0.269, 0.023, 0.04, 0.04, 0.04, 0.04, 0.04]; KL=[0.127716, 0.0950079, 0, 0, 0, 0, 0]; XF=[1, 1, 0, 0, 0, 0, 0]
                SoilCrop SoybeanSoil: LL=[0.269, 0.023, 0.04, 0.04, 0.04, 0.04, 0.04]; KL=[0.118608, 0.0951041, 0, 0, 0, 0, 0]; XF=[1, 1, 0, 0, 0, 0, 0]
                SoilCrop TriticaleSoil: LL=[0.269, 0.023, 0.04, 0.04, 0.04, 0.04, 0.04]; KL=[0.113308, 0.101966, 0, 0, 0, 0, 0]; XF=[1, 1, 0, 0, 0, 0, 0]
                SoilCrop WheatSoil: LL=[0.269, 0.023, 0.04, 0.04, 0.04, 0.04, 0.04]; KL=[0.120838, 0.110778, 0, 0, 0, 0, 0]; XF=[1, 1, 0, 0, 0, 0, 0]
                SoilCrop WhitecloverSoil: LL=[0.269, 0.023, 0.04, 0.04, 0.04, 0.04, 0.04]; KL=[0.14784, 0.0814739, 0, 0, 0, 0, 0]; XF=[1, 1, 0, 0, 0, 0, 0]
                SoilCrop AgPRyegrassSoil: LL=[0.269, 0.023, 0.04, 0.04, 0.04, 0.04, 0.04]; KL=[0.117073, 0.0870906, 0, 0, 0, 0, 0]; XF=[1, 1, 0, 0, 0, 0, 0]
                SoilCrop AgPWhiteCloverSoil: LL=[0.269, 0.023, 0.04, 0.04, 0.04, 0.04, 0.04]; KL=[0.174653, 0.0776851, 0, 0, 0, 0, 0]; XF=[1, 1, 0, 0, 0, 0, 0]
                SoilCrop AgPPaspalumSoil: LL=[0.269, 0.023, 0.04, 0.04, 0.04, 0.04, 0.04]; KL=[0.0963019, 0.081468, 0, 0, 0, 0, 0]; XF=[1, 1, 0, 0, 0, 0, 0]
                SoilCrop SCRUMSoil: LL=[0.269, 0.023, 0.04, 0.04, 0.04, 0.04, 0.04]; KL=[0.0782243, 0.0782243, 0, 0, 0, 0, 0]; XF=[1, 1, 0, 0, 0, 0, 0]
              WaterBalance SoilWater: SummerDate=1-oct; SummerU=9; SummerCona=4.4; WinterDate=1-apr; WinterU=4; WinterCona=2; DiffusConst=88; DiffusSlope=35; Salb=0.13; CN2Bare=77; CNRed=37; CNCov=0.8; DischargeWidth=0; CatchmentArea=0; PSIDul=-100
                Thickness  SWCON  KLAT
                125        0.4    0
                100        0.5    0
                1775       0.3    0
              SoilNitrogen: fom_types=[default, manure, mucuna, lablab, shemp, stable]; fract_carb=[0.2, 0.3, 0.54, 0.57, 0.45, 0]; fract_cell=[0.7, 0.3, 0.37, 0.37, 0.47, 0.1]; fract_lign=[0.1, 0.4, 0.09, 0.06, 0.08, 0.9]; NPartitionApproach=0
              Organic: same as SimulationExp.Factors.Permutation.SoilType_Old.Taupo_86a1.Taupo_86a1.Organic
              CERESSoilTemperature Temperature
              Water: Thickness=[125, 100, 355, 355, 355, 355, 355]; InitialValues=[0.3986, 0.1139, 0.1579, 0.1579, 0.1579, 0.1579, 0.1579]; RelativeTo=LL15; FilledFromTop=false
              LayerStructure: Thickness=[125, 100, 355, 355, 355, 355, 355]
              SoilNitrogenNO3 NO3: Thickness=[125, 100, 1775]; InitialValues=[7.263, 5.53613, 0.232885]; InitialValuesUnits=ppm; WaterTableConcentration=0; D0=0
              SoilNitrogenNH4 NH4: Thickness=[125, 100, 1775]; InitialValues=[1.08945, 0.83042, 0.0349328]; InitialValuesUnits=ppm; WaterTableConcentration=0; D0=0
              SoilNitrogenUrea Urea: Thickness=[125, 100, 1775]; InitialValues=[0, 0, 0]; InitialValuesUnits=kg/ha; WaterTableConcentration=0; D0=0
        Factor WaterManagement
          CompositeFactor Rainfed: Specifications=[AutomaticIrrigation].Script.AllowIrrigation = No
          CompositeFactor Irrigated (disabled): Specifications=[AutomaticIrrigation].Script.AllowIrrigation = Yes
        Factor FertManagement
          CompositeFactor 0N
            Specifications:
              [FertiliseAfterDefoliation].Script.AutomaticManagementIsEnabled = false
              [SoilInitialisationAndReset].Script.AllowChangingSoilN = true
              [SoilInitialisationAndReset].Script.NewInitNH4 = 1.300, 1.000, 0.900, 0.800
              [SoilInitialisationAndReset].Script.NewInitNO3 = 5.000, 4.000, 3.000, 3.000
          CompositeFactor 20N (disabled)
            Specifications:
              [FertiliseAfterDefoliation].Script.AutomaticManagementIsEnabled = true
              [FertiliseAfterDefoliation].Script.FertiliserNAmount = 20.0
              [SoilInitialisationAndReset].Script.AllowChangingSoilN = true
              [SoilInitialisationAndReset].Script.NewInitNH4 = 2.500, 2.000, 1.500, 1.500
              [SoilInitialisationAndReset].Script.NewInitNO3 = 10.000, 8.500, 6.500, 6.000
        Factor UrineAmount
          CompositeFactor 0N (disabled): Specifications=[ApplyUrineOnGivenDate].Script.UrineNAmount = 0
          CompositeFactor 450N: Specifications=[ApplyUrineOnGivenDate].Script.UrineNAmount = 450
        Factor DepositionDate
          CompositeFactor 1980_Jan
            Specifications:
              [Clock].StartDate = 1979-10-01
              [Clock].EndDate = 1982-01-16
              [ApplyUrineOnGivenDate].Script.UrineDepositionDate = 1980-01-15
              [ExtraSums].Script.AccumulateStartDate = 1980-01-15
              [ExtraVars].Script.ResetDate = 15-Jan
          CompositeFactor 1980_Feb (disabled)
            Specifications:
              [Clock].StartDate = 1979-11-01
              [Clock].EndDate = 1982-02-16
              [ApplyUrineOnGivenDate].Script.UrineDepositionDate = 1980-02-15
              [ExtraSums].Script.AccumulateStartDate = 1980-02-15
              [ExtraVars].Script.ResetDate = 15-Feb
          CompositeFactor 1980_Mar (disabled)
            Specifications:
              [Clock].StartDate = 1979-12-01
              [Clock].EndDate = 1982-03-16
              [ApplyUrineOnGivenDate].Script.UrineDepositionDate = 1980-03-15
              [ExtraSums].Script.AccumulateStartDate = 1980-03-15
              [ExtraVars].Script.ResetDate = 15-Mar
          CompositeFactor 1980_Apr (disabled)
            Specifications:
              [Clock].StartDate = 1980-01-01
              [Clock].EndDate = 1982-04-16
              [ApplyUrineOnGivenDate].Script.UrineDepositionDate = 1980-04-15
              [ExtraSums].Script.AccumulateStartDate = 1980-04-15
              [ExtraVars].Script.ResetDate = 15-Apr
    Simulation Rotation
      Memo Description
        ### Base simulation for simulating N leaching risk from a urine patch across New Zealand

        _Rogerio Cichota, Plant and Food Research, New Zealand_

         The simulation is set up using standard APSIM NextGen models, with:
          - SoilWater as the water balance and leaching model, with all soils defined down to two meters;
          - SoilNitrogen as the C and N cycling model;
          - AgPRyegrass and AgPWhiteClover models as the plant models. These are used to simulate a mixed sward with variable clover content.

         Initial conditions:
          - the sward starts with aboveground biomass totalling 1750 kgDM/ha;
          - initial clover content is set to 28.5%;
          - surface residues amount to 1000 kgDM/ha, with C:N ratio of 25;
          - soil moisture is initialised at 90% of PAW;
          - soil mineral N is set to either 19 or 38.5 kgN/ha, depending on fertiliser management (80% of which is in NO3 form);
          - soil organic matter varies with soil type (by order), including FOM (set with a C:N ratio of 40);

         Defoliation management:
          - triggered every time biomass is greater than 2500 kgDM/ha;
          - this is overruled to ensure that the number of days between defoliations is greater than 15 days and not longer than 60 days;
          - biomass is harvested to a residual amount of 1250 kgDM/ha;
          - fraction of carbon returned (as dung) is defined using pasture digestibility;
          - fraction of nitrogen returned to the field is set to 100% of the harvested amount, however not all is actually deposited (see below);
          - the amount of N returned in dung is defined based on a C:N ratio for dung of 17.5;
          - urine depositions after defoliations are not done (effectively it means extra N is removed); only one deposition per simulation is made (see urine patch management);

         Irrigation management:
          - triggered when soil moisture falls below 60% of PAW;
          - amount applied aims to bring the soil up to 90% of PAW, but limited to 50 mm/day;
          - soil water deficit is computed to a depth of 50 cm;
          - irrigation season goes from 01-Sep to 30-Apr;

         Fertiliser:
          - no fertiliser is applied in these simulations;

         Urine patch management
          - urine depositions are mimicked by applying 450 kgN/ha, as urea, distributed over the top 200mm of the soil;
          - the depositions happen on the 15th day of each month, each on different simulations (one per deposition month, and year);

         Additional notes:
          - all simulations start on the first day of the month, three months prior the urine deposition and run for 2 years after the deposition;
          - the simulation will be repeated varying the start and deposition dates to encompass the 12 months and 40 years (1978 to 2018, thus ending at up to 2020);
          - variables are summed up over two periods:
            \- the water balance variables, and particularly runoff and drainage below 10cm, are summed up over the 30 days following the urine deposition;
            \- remaining variables, and particularly runoff, drainage, and N leaching below 100cm, are summed up from the deposition to the end of the simulation;
          - the date over the three and a half months prior to the urine deposition are discarded;
      Clock: Start=1980-01-01; End=1982-04-16
      Weather
        FileName=\\LIN-FILE\HOME$\hrarxc\My Documents\RCichota\Projects\SFFF-Plantain\UpdatingAgPasture\Simulations\Ruakura.met
      Summary SummaryFile
      SoilArbitrator
      Zone Block: Area=1; Slope=0; AspectAngle=0; Altitude=0
        Folder ManagerFolder
          Manager DefoliationManager
            AutomaticManagementIsEnabled = True
            DefoliationRotationStartDate = 01/01/1900 00:00:00
            DefoliationRotationEndDate = 12/31/2100 00:00:00
            DefoliateType = Cut
            DefoliationTriggerType = TargetStandingBiomass
            IntervalBetweenDefoliations = 21
            TargetStandingBiomass = 250
            DurationOfEachDefoliation = 1
            RemoveAmountType = ResidualDM
            AmountForEachDefoliation = 125
            RemoveAllBiomassIsEnabled = False
            MinimumIntervalIsEnforced = True
            MinimumInterval = 15
            MaximumIntervalIsEnforced = True
            MaximumInterval = 60
            DMRemoveType = BasedOnDigestibility
            FractionDMToRemove = 1
            NRemoveType = UserDefinedFraction
            FractionNToRemove = 0
            ReturnType = AsDungUrine
            NDungType = DefineCNratio
            ProportionOfNToDung = 0.4
            CNRatioDung = 17.5
            UrineDepth = 250
            UrineDepositionIsCancelled = True
```csharp
// This script will perform defoliations, i.e remove biomass, from any existing plant (PMF and/or AgPasture) that is alive.
// General rules for when and how much to defoliate, as well as how to handle the material harvested, are given in the UI.
// Defoliations can be triggered automatically by this manager, based on given rules, or by calling the 'Defoliate()' method
//  from another Script or a Schedule model. Note that some rules are overriden based on the parameters given in Defoliate().
// Developed by RCichota, last updated in 15/Jun/2022

using System;
using System.Linq;
using System.Xml.Serialization;
using System.Collections.Generic;
using APSIM.Shared.Utilities;
using Models.Core;
using Models.PMF;
using Models.Soils;
using Models.Soils.Nutrients;
using Models.PMF.Interfaces;
using Models.Interfaces;
using Newtonsoft.Json;

namespace Models
{
    [Serializable]
    public class DefoliationManagerScript : Model
    {
        //> Links to other Apsim models
        [Link] private Clock clock;
        [Link] private Zone myZone;
        [Link(ByName = true)] private ISolute Urea;
        [Link] private IPhysical soilPhysical;
        [Link] private ISummary summary;
        //Auxiliary 'links'
        private List<Plant> PMFSpecies = new List<Plant>();
        private List<AgPasture.PastureSpecies> AgPSpecies = new List<AgPasture.PastureSpecies>();

        //> Events raised by this manager
        public event BiomassRemovedDelegate BiomassRemoved;
        public event EventHandler DefoliationHappenedToday;
        private EventArgs args = new EventArgs();

        //> User inputs from properties tab
        [Separator("Generic defoliation management - removes biomass from PMF and AgPasture species, plus residue management")]
        [Description("Allow this manager to control defoliations? ")]
        public bool AutomaticManagementIsEnabled { get; set; }
        [Description("Date to start the defoliation management (dd/mm/yyyy): ")]
        public DateTime DefoliationRotationStartDate { get; set; }
        [Description("Date to end the defoliation management (dd/mm/yyyy): ")]
        public DateTime DefoliationRotationEndDate { get; set; }

        [Separator("Parameters defining how the defoliation is managed")]
        [Description("What type of defoliation should be triggered? ")]
        public DefoliationTypes DefoliateType { get; set; }
        [Description("How the defoliations should be triggered? ")]
        public DefoliationTriggerTypes DefoliationTriggerType { get; set; }
        [Description("  Minimum number of days between defoliations, used if trigger is an interval: ")]
        public int IntervalBetweenDefoliations { get; set; }
        [Description("  Minimum standing biomass to start defoliations, used if trigger is DM target(g/m2): ")]
        public int TargetStandingBiomass { get; set; }
        [Description("Duration of each defoliation event (days): ")]
        public int DurationOfEachDefoliation { get; set; }
        [Description("Which amount is being defined? ")]
        public DefoliateAmountTypes RemoveAmountType { get; set; }
        [Description("DM amount to use (g/m2): ")]
        public double AmountForEachDefoliation { get; set; }
        [Description("For PMF species, allow all biomass to be removed? ")]
        public bool RemoveAllBiomassIsEnabled { get; set; }

        [Description("Enforce minimum interval between defoliations, if triggered by biomass? ")]
        public bool MinimumIntervalIsEnforced { get; set; }
        [Description("  Minimum number of days between defoliations, when trigged by biomass: ")]
        public int MinimumInterval { get; set; }
        [Description("Enforce maximum interval between defoliations, if triggered by biomass? ")]
        public bool MaximumIntervalIsEnforced { get; set; }
        [Description("  Maximum number of days between defoliations, when trigged by biomass: ")]
        public int MaximumInterval { get; set; }

        [Separator("Parameters defining the management of the defoliated biomass")]
        [Description("How much of the DM defoliated is to be removed from the field? ")]
        public DMRemovalTypes DMRemoveType { get; set; }
        [Description("  Fraction of DM to remove off field, if using UserDefinedFraction (0-1): ")]
        public double FractionDMToRemove { get; set; }
        [Description("How much of the N defoliated is to be removed from the field? ")]
        public NRemovalTypes NRemoveType { get; set; }
        [Description("  Fraction of N to remove off field, if using UserDefinedFraction (0-1): ")]
        public double FractionNToRemove { get; set; }
        [Description("How the non-removed material is returned to the field? ")]
        public ReturnAsTypes ReturnType { get; set; }

        [Separator("Parameters for partitioning non-removed N into urine and dung")]
        [Description("How the partition of N to dung and urine is defined? ")]
        public DungNContentTypes NDungType { get; set; }
        [Description("  Proportion of N returned in dung, if using DefineProportion (0-1): ")]
        public double ProportionOfNToDung { get; set; }
        [Description("  The C:N of dung, if using DefineCNratio (typically around 20): ")]
        public double CNRatioDung { get; set; }
        [Description("Soil depth down to which urine should be applied (mm): ")]
        public double UrineDepth { get; set; }

        [Separator("Additional management parameter to control N returns")]
        [Description(" Cancel all urine depositions? ")]
        public bool UrineDepositionIsCancelled { get; set; }

        //> Outputs from this manager
        [JsonIgnore][Units("g/m2")] // Pasture DM defoliated (removed from plants) today
        public double DefoliatedWt{ get; set; }
        [JsonIgnore][Units("g/m2")] // N in the pasture material defoliated today
        public double DefoliatedN{ get; set; }
        [JsonIgnore][Units("g/m2")] // Pasture DM harvested (removed from plants minus direct residue) today
        public double HarvestedWt{ get; set; }
        [JsonIgnore][Units("g/m2")] // N in the pasture material harvested today
        public double HarvestedN{ get; set; }
        [JsonIgnore][Units("g/m2")] // Pasture DM actually removed from the field
        public double RemovedWt{ get; set; }
        [JsonIgnore][Units("g/m2")] // N in the pasture material removed from the field
        public double RemovedN{ get; set; }
        [JsonIgnore][Units("g/m2")] // Pasture DM returned by this manager to the field
        public double ReturnedWt{ get; set; }
        [JsonIgnore][Units("g/m2")] // N in the pasture material returned by this manager to the field
        public double ReturnedN{ get; set; }
        [JsonIgnore][Units("g/m2")] // Non-removed N returned as dung (to SurfaceOM)
        public double NReturnedInDung{ get; set; }
        [JsonIgnore][Units("g/m2")] // Non-removed N returned as urine (soil urea)
        public double NReturnedInUrine{ get; set; }
        [JsonIgnore][Units("days")] // Number of days since the end of last defoliation event
        public int DaysSinceLastDefoliation{ get; set; }
        [JsonIgnore][Units("g/m2")] // Total standing aboveground DM before a defoliation
        public double PreHarvestDM{ get; set; }
        [JsonIgnore][Units("g/m2")] // Total standing aboveground DM after a defoliation
        public double PostHarvestDM{ get; set; }
        [JsonIgnore][Units("g/m2")] // Total pasture DM harvested over a complete defoliation event
        public double RotationHarvestedDM{ get; set; }

        //> Internal variables
        private double[] urineFraction;                 // fraction of urine to be applied in each soil layer
        private string baseDefoliationType;             // record of the defoliation type given in the UI
        private string typeOfDefoliation;               // string for the type of defoliation (Cut, Graze, or Harvest)
        private string baseAmountType;                  // record of the amount given in the UI
        private string typeOfAmount;                    // string for the type of amount given (DMToRemove, ResidualDM, or UseDefoliationFractions)
        private double amountGiven;                     // an amount given
        private double herbageToRemove;                 // amount of DM herbage to remove
        private RemovalFractions defoliationFractions;  // fraction to remove from each organ (for PMF)
        private int durationOfThisDefoliation;          // duration in days for a given defoliation
        private int daysDefoliating;                    // number of days over which the defoliation is going
        private double cumAmountHarvested;              // cumulative amount defoliated during an ongoing defoliation
        private double currentPostHarvest;              // DM amount after each day's defoliation
        // auxiliary boolean
        private bool aDefoliationHasHappened = false;   // flag whether a defoliation has happened in this simulation run

        // auxiliary - lists of species and removal fractions
        private string[] swardSpeciesName;              // name of each species in the sward
        private string[] swardSpeciesType;              // type of each species in the sward (PMF or AgPasture)
        private double[] speciesFraction;               // biomass fraction of harvestable material of each species

        [EventSubscribe("StartOfSimulation")]
        private void OnSimulationCommencing(object sender, EventArgs e)
        {
            // check the type of defoliation given
            if (DefoliateType == DefoliationTypes.Cut)
            {
                baseDefoliationType = "Cut";
            }
            else if (DefoliateType == DefoliationTypes.Graze)
            {
                baseDefoliationType = "Graze";
            }
            else
            {
                baseDefoliationType = "Harvest";
            }

            // check the type of amount given
            if (RemoveAmountType == DefoliateAmountTypes.DMToRemove)
            {
                baseAmountType = "DMToRemove";
            }
            else if (RemoveAmountType == DefoliateAmountTypes.ResidualDM)
            {
                baseAmountType = "ResidualDM";
            }
            else
            {
                baseAmountType = "UseDefoliationFractions";
            }

            // check the interval between events
            if (IntervalBetweenDefoliations < 1)
            {
                throw new Exception("The interval between defoliation events must be at least one day");
            }

            // check the duration for each defoliation
            if(DurationOfEachDefoliation <= 0)
            {
                throw new Exception("The duration of defoliations cannot be zero or negative!");
            }

            // check the fraction of defoliated material to remove from the field
            if (DMRemoveType == DMRemovalTypes.RemoveAll)
            {
                FractionDMToRemove = 1.0;
            }
            else if (DMRemoveType == DMRemovalTypes.RemoveNone)
            {
                FractionDMToRemove = 0.0;
            }
            else if (DMRemoveType == DMRemovalTypes.BasedOnDigestibility)
            {
                FractionDMToRemove = -1.0;  // will be calculated dynamically
            }
            else // DMRemoveType == DMRemovalTypes.UserDefinedFraction
            {
                if (FractionDMToRemove < 0.0)
                {
                    throw new Exception("The fraction of DM defoliated to remove from the field cannot be negative!");
                }
            }

            // check the fraction of defoliated N to remove from the field
            if (NRemoveType == NRemovalTypes.RemoveAll)
            {
                FractionNToRemove = 1.0;
            }
            else if (NRemoveType == NRemovalTypes.RemoveNone)
            {
                FractionNToRemove = 0.0;
            }
            else if (NRemoveType == NRemovalTypes.ProportionalToDM)
            {
                FractionNToRemove = FractionDMToRemove;
            }
            else // NRemoveType == NRemovalTypes.UserDefinedFraction
            {
                if (FractionNToRemove < 0.0)
                {
                    throw new Exception("The fraction of defoliated N to remove from the field cannot be negative!");
                }
            }

            // set up the links to all plant species
            foreach (Plant species in myZone.FindAllChildren<Plant>().OfType<IModel>().ToList())
            {
                PMFSpecies.Add(species);
            }

            foreach (AgPasture.PastureSpecies species in myZone.FindAllChildren<AgPasture.PastureSpecies>().OfType<IModel>().ToList())
            {
                AgPSpecies.Add(species);
            }

            int numPlants = PMFSpecies.Count + AgPSpecies.Count;
            swardSpeciesName = new string[numPlants];
            swardSpeciesType = new string[numPlants];
            int i = 0;
            foreach (Plant species in myZone.FindAllChildren<Plant>().OfType<IModel>().ToList())
            {
                swardSpeciesName[i] = species.Name;
                swardSpeciesType[i] = "PMF";
                i += 1;
            }
            foreach (AgPasture.PastureSpecies species in myZone.FindAllChildren<AgPasture.PastureSpecies>().OfType<IModel>().ToList())
            {
                swardSpeciesName[i] = species.Name;
                swardSpeciesType[i] = "AgPasture";
                i += 1;
            }

            // make sure that management starts when RotationStartDate < simulationStartDay
            if ((clock.Today > DefoliationRotationStartDate) && (clock.Today < DefoliationRotationEndDate))
            {
                DefoliationRotationStartDate = clock.Today;
            }

            // initialise some variables
            speciesFraction = new double[numPlants];
            defoliationFractions = new RemovalFractions();
            DaysSinceLastDefoliation = 0;
            durationOfThisDefoliation = -1;
            daysDefoliating = 0;
            resetMyOutputs();

            // set the fraction of urine for each layer
            if (ReturnType == ReturnAsTypes.AsDungUrine)
            {
                double depthFromSurface = 0.0;
                double propAtZ0;
                double propAtZ1;
                for (int layer = 0; layer < soilPhysical.Thickness.Length; layer++)
                {
                    depthFromSurface += soilPhysical.Thickness[layer];
                    if (depthFromSurface >= UrineDepth)
                    { // bottom layer found
                        urineFraction = new double[layer + 1];
                        double distFactor = 1.5;
                        double totalProp = UrineDepth * Math.Pow(1.0, distFactor) / (distFactor + 1.0);
                        depthFromSurface = 0.0;
                        propAtZ1 = (UrineDepth - depthFromSurface) * Math.Pow(1.0 - depthFromSurface / UrineDepth, distFactor) / (distFactor + 1.0);
                        for (int z = 0; z < layer+1; z++)
                        {
                            propAtZ0 = propAtZ1;
                            depthFromSurface += soilPhysical.Thickness[z];
                            propAtZ1 = (UrineDepth - depthFromSurface) * Math.Pow(1.0 - depthFromSurface / UrineDepth, distFactor) / (distFactor + 1);
                            if (1.0 - (depthFromSurface / UrineDepth) < 0.0)
                            {
                                propAtZ1 = 0;
                            }
                            urineFraction[z] = (propAtZ0 - propAtZ1) / totalProp;
                        }
                        layer = soilPhysical.Thickness.Length;
                    }
                }
            }

            // write message in summary
            summary.WriteMessage(this," Automatic defoliation manager initialised", MessageType.Diagnostic);
            if (AutomaticManagementIsEnabled)
            {
                summary.WriteMessage(this, "   Defoliations will happen between " + DefoliationRotationStartDate.ToShortDateString()
                                          + " and " + DefoliationRotationEndDate.ToShortDateString() + ".", MessageType.Diagnostic);
                summary.WriteMessage(this, "   Biomass from the sward will be defoliated simulating a \"" + baseDefoliationType + "\" rotation.", MessageType.Diagnostic);
                if (DefoliationTriggerType == DefoliationTriggerTypes.TargetStandingBiomass)
                {
                    summary.WriteMessage(this, "   Events will happen whenever aboveground biomass surpasses " + TargetStandingBiomass.ToString("#0.0") + " g/m2.", MessageType.Diagnostic);
                    if(MinimumIntervalIsEnforced)
                    {
                        summary.WriteMessage(this, "     With a minimum of " + MinimumInterval + " days between defoliations", MessageType.Diagnostic);
                    }
                    if(MaximumIntervalIsEnforced)
                    {
                        summary.WriteMessage(this, "     With a maximum of " + MaximumInterval + " days between defoliations", MessageType.Diagnostic);
                    }
                }
                else
                {
                    summary.WriteMessage(this, "   Events will happen every " + IntervalBetweenDefoliations + " days, if there is enough biomass.", MessageType.Diagnostic);
                }
                if(baseAmountType == "ResidualDM")
                {
                    summary.WriteMessage(this, "   Removing biomass down to a residual amount of " + AmountForEachDefoliation.ToString("#.0") + " g/m2 over "
                                             + DurationOfEachDefoliation + " days.", MessageType.Diagnostic);
                }
                else
                {
                    summary.WriteMessage(this, "   Removing " + AmountForEachDefoliation.ToString("#.0") + " g/m2 of biomass per day over "
                                             + DurationOfEachDefoliation + " days.", MessageType.Diagnostic);
                }
            }
            else
            {
                summary.WriteMessage(this,"   Automatic defoliations are currently disabled, though defoliations can be triggered by another manager", MessageType.Diagnostic);
            }

            if(ReturnType == ReturnAsTypes.AsDungUrine)
            {
                summary.WriteMessage(this,"   Non-removed material will be returned as dung and urine. Urine added to soil according to proportions: "
                                         + string.Join(", ",urineFraction), MessageType.Diagnostic);
            }
            else
            {
                summary.WriteMessage(this,"   Non-removed material will be returned as residue.", MessageType.Diagnostic);
            }
        }

        [EventSubscribe("DoManagement")]
        private void OnDoManagement(object sender, EventArgs e)
        {
            // check whether we need to continue defoliationg, i.e. within a multi-day defoliation event (need to check this first in the day)
            if ((daysDefoliating > 0) && (daysDefoliating < durationOfThisDefoliation))
            {
                // reset outputs
                resetMyOutputs();

                // re-check the amount to defoliate
                double harvestableBiomass = harvestableSwardBiomass("All", "Harvestable");
                if (typeOfAmount == "DMToRemove")
                {
                    if(harvestableBiomass > 0.001)
                    {
                        herbageToRemove = Math.Min(harvestableBiomass, (amountGiven - cumAmountHarvested) / (durationOfThisDefoliation - daysDefoliating));
                    }
                }
                else if (typeOfAmount == "ResidualDM")
                {
                    double currentDM = standingSwardBiomassWt;
                    if (currentDM > amountGiven)
                    {
                        herbageToRemove = Math.Min(harvestableBiomass, (currentDM - amountGiven) / (durationOfThisDefoliation - daysDefoliating));
                    }
                }

                // remove plant biomass and return residue
                if (Math.Abs(herbageToRemove) >= 0.001)
                {
                    // set biomass removal
                    defoliateSward(herbageToRemove, typeOfDefoliation);

                    // return residue or excreta
                    if(ReturnedWt + ReturnedN > 0.0)
                    {
                        if (ReturnType == ReturnAsTypes.AsResidue)
                        {
                            returnResidues();
                        }
                        else
                        {
                            returnExcreta();
                        }
                    }

                    // gather amount removed this event
                    cumAmountHarvested += HarvestedWt;
                }

                daysDefoliating += 1;
            }

            // check whether a defoliation ended yesterday
            if (daysDefoliating < 0)
            { // clean up variables
                resetMyOutputs();
                daysDefoliating = 0;
            }

            // check whether automatic defoliations are enabled
            if (AutomaticManagementIsEnabled)
            {
                // check whether we are within the period in which defoliations can happen
                if ((clock.Today.Date >= DefoliationRotationStartDate.Date) && (clock.Today.Date <= DefoliationRotationEndDate.Date))
                {
                    if (clock.Today.Date == DefoliationRotationStartDate.Date)
                    {
                        if(DefoliationTriggerType != DefoliationTriggerTypes.TargetStandingBiomass)
                        {
                            DaysSinceLastDefoliation = IntervalBetweenDefoliations;
                        }
                        else
                        {
                            if(MaximumIntervalIsEnforced)
                            {
                                DaysSinceLastDefoliation = MaximumInterval;
                            }
                        }
                    }

                    // check whether we should start a defoliation event
                    if (DefoliationTriggerType == DefoliationTriggerTypes.FixedInterval)
                    {
                        if (DaysSinceLastDefoliation == IntervalBetweenDefoliations)
                        {
                            Defoliate(baseDefoliationType, AmountForEachDefoliation, baseAmountType, DurationOfEachDefoliation, "yes");
                        }
                    }
                    else if (DefoliationTriggerType == DefoliationTriggerTypes.TargetInterval)
                    {
                        if (DaysSinceLastDefoliation >= IntervalBetweenDefoliations)
                        {
                            Defoliate(baseDefoliationType, AmountForEachDefoliation, baseAmountType, DurationOfEachDefoliation, "no");
                        }
                    }
                    else  //DefoliationTriggerType == DefoliationTriggerTypes.TargetStandingBiomass
                    {
                        if (standingSwardBiomassWt >= TargetStandingBiomass)
                        {
                            if(MinimumIntervalIsEnforced)
                            { // check interval between defoliations
                                if(DaysSinceLastDefoliation >= MinimumInterval)
                                { // sufficient days passed since last defoliation
                                    Defoliate(baseDefoliationType, AmountForEachDefoliation, baseAmountType, DurationOfEachDefoliation, "no");
                                }
                                //else wait for minimum interval
                            }
                            else
                            { // no checks, just defoliate
                                Defoliate(baseDefoliationType, AmountForEachDefoliation, baseAmountType, DurationOfEachDefoliation, "no");
                            }
                        }
                        else
                        {
                            if(MaximumIntervalIsEnforced && (DaysSinceLastDefoliation >= MaximumInterval))
                            { // start a defoliation even if biomass is insufficient
                                Defoliate(baseDefoliationType, AmountForEachDefoliation, baseAmountType, DurationOfEachDefoliation, "yes");
                            }
                        }
                    }
                }
                //// Note: Only the code above, responsible for triggering automatic events, is limited by 'AutomaticManagementIsEnabled'.
                ////       The rest of the code is still available to perform one-off defoliations.
                ////       It can be called from another manager or a schedulle thingy via Defoliate().
            }
        }

        [EventSubscribe("DoManagementCalculations")]
        private void OnDoManagementCalculations(object sender, EventArgs e)
        {
            // check whether a defoliation event has just been completed
            if (daysDefoliating == durationOfThisDefoliation)
            {
                // get amount of biomass remaining and zero counters
                PostHarvestDM = currentPostHarvest;
                RotationHarvestedDM = cumAmountHarvested;
                aDefoliationHasHappened = true;
                daysDefoliating = -1;
            }

            // count the days after a defoliation
            if (aDefoliationHasHappened && (daysDefoliating == 0))
            {
                DaysSinceLastDefoliation += 1;
            }
        }

        [EventSubscribe("EndOfDay")]
        private void OnEndOfDay(object sender, EventArgs e)
        {
            // send a 'message' to let models know that a defoliation has ended today (mostly for report)
            if ((daysDefoliating < 0) && (DefoliationHappenedToday != null))
            {
                DefoliationHappenedToday.Invoke(this, args);
            }
        }

        /// <summary>Sets up a defoliation event.</summary>
        /// <param name="defoliationType">Type of defoliation (cut, graze, or harvest)</param>
        /// <param name="amountDM">Amount of biomass to use (g/m2)</param>
        /// <param name="amountType">How the DM amount is interpreted (toRemove, residual)</param>
        /// <param name="duration">Number of days to defoliate over</param>
        /// <param name="mustDo">Flag whether a defoliation must be counted as such even if there is no biomass</param>
        public void Defoliate(string defoliationType, double amountDM, string amountType, int duration = 1, string mustDo = "yes")
        {
            // check whether there are plants in the sward that can be defoliated
            if (swardHasLivingPlants)
            {
                // check the defoliation type
                if (defoliationType.ToLower() == "cut")
                {
                    typeOfDefoliation = "Cut";
                }
                else if (defoliationType.ToLower() == "graze")
                {
                    typeOfDefoliation = "Graze";
                }
                else if (defoliationType.ToLower() == "harvest")
                {
                    typeOfDefoliation = "Harvest";
                }
                else
                {
                    throw new Exception("Defoliation type should be either \"Cut\", \"Graze\", or \"Harvest\"!");
                }

                // check DM amount given
                if (amountDM < 0.0)
                {
                    throw new Exception("Amount to defoliate cannot be negative!");
                }
                else
                {
                    amountGiven = amountDM;
                }

                // check the type of amount given
                if (amountType.ToLower() == "dmtoremove")
                {
                    typeOfAmount = "DMToRemove";
                }
                else if (amountType.ToLower() == "residualdm")
                {
                    typeOfAmount = "ResidualDM";
                }
                else if (amountType.ToLower() == "usedefoliationfractions")
                {
                    typeOfAmount = "UseDefoliationFractions";
                }
                else
                {
                    throw new Exception("Amount type should be \"DMToRemove\", \"ResidualDM\", or \"UseDefoliationFractions\"!");
                }

                // check duration given
                if (duration <= 0)
                {
                    throw new Exception("Duration of defoliation cannot be zero or negative!");
                }
                else
                {
                    durationOfThisDefoliation = duration;
                }

                // check existing biomass and amount to remove
                PreHarvestDM = standingSwardBiomassWt;
                herbageToRemove = 0.0;
                double harvestableBiomass = harvestableSwardBiomass("All", "Harvestable");
                if (typeOfAmount == "UseDefoliationFractions")
                { // amount given is ignored, removal based on fractions
                    amountGiven = 0.0;
                    if (harvestableBiomass > 0.0)
                    {
                        herbageToRemove = -1.0;
                    }

                    summary.WriteMessage(this, "   Defoliation triggered, removing biomass using the removal fractions (set or default), during " + durationOfThisDefoliation + " days", MessageType.Diagnostic);
                }
                else if (typeOfAmount == "DMToRemove")
                {
                    if (amountGiven > 0.001)
                    { // a meaningful amount was given, check whether all can be removed
                        if (harvestableBiomass > 0.001)
                        {
                            herbageToRemove = Math.Min(harvestableBiomass, amountGiven / durationOfThisDefoliation);
                        }

                        summary.WriteMessage(this, "   Defoliation triggered, attempting to remove " + amountGiven.ToString("#0.0") + " g/m2 of biomass over " + durationOfThisDefoliation + " days", MessageType.Diagnostic);
                    }
                }
                else if (typeOfAmount == "ResidualDM")
                {
                    // check how much biomass will be removed
                    if (PreHarvestDM > amountGiven)
                    {
                        herbageToRemove = Math.Min(harvestableBiomass, (PreHarvestDM - amountGiven) / durationOfThisDefoliation);
                    }

                    summary.WriteMessage(this, "   Defoliation triggered, attempting to remove biomass down to " + amountGiven.ToString("#0.0") + " g/m2 over " + durationOfThisDefoliation + " days", MessageType.Diagnostic);

                }

                // can defoliation begin?
                if (Math.Abs(herbageToRemove) >= 0.001)
                {
                    // set off first defoliation
                    defoliateSward(herbageToRemove, typeOfDefoliation);

                    // return residue or excreta
                    if(ReturnedWt + ReturnedN > 0.0)
                    {
                        if (ReturnType == ReturnAsTypes.AsResidue)
                        {
                            returnResidues();
                        }
                        else
                        {
                            returnExcreta();
                        }
                    }

                    // gather values for this event
                    cumAmountHarvested = HarvestedWt;
                    currentPostHarvest = standingSwardBiomassWt;
                    daysDefoliating = 1;
                    DaysSinceLastDefoliation = 0;
                }
                else
                {
                    // abort command as there is not enough biomass, except...
                    if (mustDo.ToLower() == "yes")
                    { // count the event as if it did happen
                        cumAmountHarvested = 0.0;
                        currentPostHarvest = standingSwardBiomassWt;
                        daysDefoliating = 1;
                        DaysSinceLastDefoliation = 0;
                    }

                    summary.WriteMessage(this, "   Defoliation did not happend because current biomass (" + PreHarvestDM.ToString("#0.0") + " g/m2) is too low (total harvestable = " + harvestableBiomass.ToString("#0.0") + " g/m2)", MessageType.Diagnostic);
                }
            }
            else
            {
                summary.WriteMessage(this, "   Defoliation did not happend because there is no growing plants in the sward", MessageType.Diagnostic);
            }
        }

        /// <summary>Resets the values of outputs.</summary>
        private void resetMyOutputs()
        {
            DefoliatedWt = 0.0;
            DefoliatedN = 0.0;
            HarvestedWt = 0.0;
            HarvestedN = 0.0;
            RemovedWt = 0.0;
            RemovedN = 0.0;
            ReturnedWt = 0.0;
            ReturnedN = 0.0;
            NReturnedInDung = 0.0;
            NReturnedInUrine = 0.0;
            RotationHarvestedDM = 0.0;
        }

        /// <summary>Flags whether there is any living plant in the sward.</summary>
        private bool swardHasLivingPlants
        {
            get
            {
                bool result = false;
                foreach (Plant species in PMFSpecies)
                {
                    result |= species.IsAlive;
                }

                foreach (AgPasture.PastureSpecies species in AgPSpecies)
                {
                    result |= species.IsAlive;
                }

                return result;
            }
        }

        /// <summary>Amount of plant biomass aboveground (g/m2).</summary>
        private double standingSwardBiomassWt
        {
            get
            {
                double result = 0.0;
                foreach (Plant species in PMFSpecies)
                {
                   result += (double)myZone.Get(species.Name+".AboveGround.Wt");
                }

                foreach (AgPasture.PastureSpecies species in AgPSpecies)
                {
                    result += species.AboveGroundWt*0.1;
                }

                return result;
            }
        }

        /// <summary>Amount of N in plant's biomass aboveground (g/m2).</summary>
        private double standingSwardBiomassN
        {
            get
            {
                double result = 0.0;
                foreach (Plant species in PMFSpecies)
                {
                   result += (double)myZone.Get(species.Name+".AboveGround.N");
                }

                foreach (AgPasture.PastureSpecies species in AgPSpecies)
                {
                    result += species.AboveGroundN*0.1;
                }

                return result;
            }
        }

        /// <summary>Amount of plant biomass from all organs available for defoliation (g/m2).</summary>
        /// <remarks>Assumes that organs with a BiomassRemoval.FractionToRemove > 0 are harvestable.
        /// For AgPasture, harvestable is based on minimum DM.</remarks>
        /// <param name="plantName">The name of the plant to retrieve its biomass</param>
        /// <param name="fractionType">The type of fraction to use (harvestable or total)</param>
        private double harvestableSwardBiomass(string plantName, string fractionType)
        {
            double amountWt = 0.0;
            double fraction = 0.0;
            foreach (Plant species in PMFSpecies)
            {
                if ((plantName == "All") || (species.Name == plantName))
                {
                    if (species.AboveGround.Wt > 0.0)
                    {
                        foreach (IOrgan organ in species.FindAllChildren<IOrgan>().OfType<IModel>().ToList())
                        { // consider only amounts toRemove
                            fraction = (double)myZone.Get(species.Name + "." + organ.Name + ".BiomassRemovalDefaults." + typeOfDefoliation + ".FractionLiveToRemove");
                            if ((fractionType == "Total") && (fraction > 0.0))
                            { // to return all biomass, for any organ that has some removable fraction
                                fraction = 1.0;
                            }
                            else if (RemoveAllBiomassIsEnabled && (fraction > 0.0))
                            { // theoretical to return, and remove, all biomass, but will assume a minimum of 5% left behind
                                fraction = 0.95;
                            }

                            amountWt += (double)myZone.Get(species.Name + "." + organ.Name + ".Live.Wt") * fraction;
                            fraction = (double)myZone.Get(species.Name + "." + organ.Name + ".BiomassRemovalDefaults." + typeOfDefoliation + ".FractionDeadToRemove");
                            if ((fractionType == "Total") && (fraction > 0.0))
                            { // to return all biomass, for any organ that has some removable fraction
                                fraction = 1.0;
                            }
                            else if (RemoveAllBiomassIsEnabled && (fraction > 0.0))
                            { // theoretical to return, and remove, all biomass, but will assume a minimum of 5% left behind
                                fraction = 0.95;
                            }

                            amountWt += (double)myZone.Get(species.Name + "." + organ.Name + ".Dead.Wt") * fraction;
                        }
                    }
                }
            }

            foreach (AgPasture.PastureSpecies species in AgPSpecies)
            {
                if ((plantName == "All") || (species.Name == plantName))
                {
                    if (fractionType == "Total")
                    {
                        amountWt += species.AboveGroundWt*0.1;
                    }
                    else
                    {
                        amountWt += species.Harvestable.Wt*0.1;
                    }
                }
            }

            return amountWt;
        }

        /// <summary>Triggers the actual biomass removal and gather DM and N amounts.</summary>
        /// <param name="amountToRemove">The total DM amount to remove (g/m2)</param>
        /// <param name="removalType">The type of removal (Cut, Graze, Harvest)</param>
        private void defoliateSward(double amountToRemove, string removalType)
        {
            // get the amounts of biomass and N before today's defoliation
            double preRemovalDM = standingSwardBiomassWt;
            double preRemovalN = standingSwardBiomassN;
            double fractionToRemove = 0.0;

            // gather the actual biomass removal fractions, checking whether they need to be adjusted
            double totalHarvestableAmount = harvestableSwardBiomass("All", "Harvestable");
            if (amountToRemove > 0.0)
            { // an amount was given for defoliation, adjust removal fractions for each species in order to remove the amount specified
                fractionToRemove = amountToRemove / totalHarvestableAmount;
            }
            else if (amountToRemove < 0.0)
            { // defoliation is not based on an amount, removal is determined simply by the removal fractions
                fractionToRemove = 1.0;
            }

            for (int i = 0; i < swardSpeciesName.Length; i++)
            {
                speciesFraction[i] = harvestableSwardBiomass(swardSpeciesName[i], "Harvestable") / totalHarvestableAmount;

                if (swardSpeciesType[i] == "PMF")
                {
                    // check whether the plant is alive
                    bool speciesIsAlive = (bool)myZone.Get(swardSpeciesName[i] + ".IsEmerged");
                    if (speciesIsAlive)
                    {
                        // set removal fractions (these overrides the default removals in the plant)
                        setRemoveFraction(swardSpeciesName[i], fractionToRemove);

                        // do the actual biomass removal
                        foreach (Plant species in PMFSpecies)
                        {
                            if(species.Name == swardSpeciesName[i])
                            {
                                species.RemoveBiomass(removalType, defoliationFractions);
                                break;
                            }
                        }
                    }
                }
                else
                {
                    // check whether the plant is alive
                    bool speciesIsAlive = (bool)myZone.Get(swardSpeciesName[i] + ".IsAlive");
                    if (speciesIsAlive)
                    {
                        // set removal amount (needs to be in kg/ha)
                        double amountRequired = (double)myZone.Get(swardSpeciesName[i] + ".Harvestable.Wt");

                        if (amountToRemove > 0.0)
                        {
                            amountRequired = amountToRemove * speciesFraction[i] * 10.0;
                        }

                        // do the actual biomass removal
                        foreach (AgPasture.PastureSpecies species in AgPSpecies)
                        {
                            if(species.Name == swardSpeciesName[i])
                            {
                                species.RemoveBiomass(amount: amountRequired, type: "SetRemoveAmount");
                                break;
                            }
                        }
                    }
                }
            }

            // get the amounts of biomass and N after today's defoliation
            double postRemovalDM = standingSwardBiomassWt;
            double postRemovalN = standingSwardBiomassN;

            // get total defoliation (total plant stuff lost)
            DefoliatedWt = preRemovalDM - postRemovalDM;
            DefoliatedN = preRemovalN - postRemovalN;

            // get amounts harvested, removed, and returned
            manageDefoliatedBiomass();
        }

        /// <summary>Sets the biomass removal fractions for PMF plants.</summary>
        /// <param name="plantName">The name of PMF species</param>
        /// <param name="fractionHarvestable">The fraction of harvestable biomass to be removed (0-1)</param>
        private void setRemoveFraction(string plantName, double fractionHarvestable)
        {
            double fractionToRemove;
            double fractionToResidue;

            foreach (Plant species in PMFSpecies)
            {
                if ((species.Name == plantName) && (species.IsAlive))
                {
                    // set removal fractions (these overrides the default removals in the plant)
                    foreach (IOrgan organ in species.FindAllChildren<IOrgan>().OfType<IModel>().ToList())
                    {
                        // first get the removal for Live material
                        fractionToRemove = (double)myZone.Get(species.Name + "." + organ.Name + ".BiomassRemovalDefaults." + typeOfDefoliation + ".FractionLiveToRemove");
                        if (RemoveAllBiomassIsEnabled && (fractionToRemove > 0.0))
                        { // assuming that 5% is left behind
                            fractionToRemove = 0.95;
                        }

                        fractionToRemove = fractionHarvestable * fractionToRemove;
                        fractionToRemove = Math.Min(1.0, fractionToRemove);
                        defoliationFractions.SetFractionToRemove(organ.Name, fractionToRemove, "Live");
                        if (RemoveAllBiomassIsEnabled)
                        {
                            fractionToResidue = 0.0;
                        }
                        else
                        {
                            fractionToResidue = (double)myZone.Get(species.Name + "." + organ.Name + ".BiomassRemovalDefaults." + typeOfDefoliation + ".FractionLiveToResidue");
                        }

                        fractionToResidue = Math.Min(fractionHarvestable * fractionToResidue, 1.0 - fractionToRemove);
                        defoliationFractions.SetFractionToResidue(organ.Name, fractionToResidue, "Live");

                        // then get the removal for Dead material
                        fractionToRemove = (double)myZone.Get(species.Name + "." + organ.Name + ".BiomassRemovalDefaults." + typeOfDefoliation + ".FractionDeadToRemove");
                        if (RemoveAllBiomassIsEnabled && (fractionToRemove > 0.0))
                        { // assuming that 5% is left behind
                            fractionToRemove = 0.95;
                        }

                        fractionToRemove = fractionHarvestable * fractionToRemove;
                        fractionToRemove = Math.Min(1.0, fractionToRemove);
                        defoliationFractions.SetFractionToRemove(organ.Name, fractionToRemove, "Dead");
                        if (RemoveAllBiomassIsEnabled)
                        {
                            fractionToResidue = 0.0;
                        }
                        else
                        {
                            fractionToResidue = (double)myZone.Get(species.Name + "." + organ.Name + ".BiomassRemovalDefaults." + typeOfDefoliation + ".FractionDeadToResidue");
                        }

                        fractionToResidue = Math.Min(fractionHarvestable * fractionToResidue, 1.0 - fractionToRemove);
                        defoliationFractions.SetFractionToResidue(organ.Name, fractionToResidue, "Dead");
                    }
                }
            }
        }

        /// <summary>Gathers the DM and N amounts harvested, to be removed, and to be returned.</summary>
        private void manageDefoliatedBiomass()
        {
            double digestibilityStructural = 0.6;     //0.65
            double digestibilityNonStrucutural = 0.9; //1.00

            double speciesHarvestedWt;
            double speciesHarvestedN;
            double speciesFractionToRemove;

            if (DefoliatedWt > 0.0)
            {
                HarvestedWt = 0.0;
                HarvestedN = 0.0;
                RemovedWt = 0.0;
                RemovedN = 0.0;

                foreach (Plant species in PMFSpecies)
                {
                    if(species.AboveGround.Wt > 0.0)
                    {
                        // get the amount harvested (plant stuff removed from plants)
                        speciesHarvestedWt = 0.0;
                        speciesHarvestedN = 0.0;
                        foreach (IOrgan organ in species.FindAllChildren<IOrgan>().OfType<IModel>().ToList())
                        {
                            speciesHarvestedWt += (double)myZone.Get(species.Name + "." + organ.Name + ".Removed.Wt");
                            speciesHarvestedN += (double)myZone.Get(species.Name + "." + organ.Name + ".Removed.N");
                        }

                        HarvestedWt += speciesHarvestedWt;
                        HarvestedN += speciesHarvestedN;

                        // get the DM fraction to be removed
                        if(FractionDMToRemove >= 0.0)
                        {
                            speciesFractionToRemove = FractionDMToRemove;
                        }
                        else
                        { // use digestibility to define the fraction
                            double fracStructural = species.AboveGround.StructuralWt/species.AboveGround.Wt;
                            speciesFractionToRemove = (1.0 - fracStructural)*digestibilityNonStrucutural + fracStructural*digestibilityStructural;
                            speciesFractionToRemove = Math.Min(1.0, Math.Max(0.0, speciesFractionToRemove));
                        }

                        // get the amounts actually removed from field
                        RemovedWt += speciesHarvestedWt * speciesFractionToRemove;
                        RemovedN += speciesHarvestedN * FractionNToRemove;
                   }
                }

                foreach (AgPasture.PastureSpecies species in AgPSpecies)
                {
                    if(species.AboveGroundWt > 0.0)
                    {
                        // get the amount harvested
                        speciesHarvestedWt = species.HarvestedWt*0.1;
                        speciesHarvestedN = species.HarvestedN*0.1;
                        HarvestedWt += speciesHarvestedWt;
                        HarvestedN += speciesHarvestedN;

                        // get fraction to be removed
                        if(FractionDMToRemove>=0.0)
                        {
                            speciesFractionToRemove = FractionDMToRemove;
                        }
                        else
                        { // use digestibility to define the fraction
                            speciesFractionToRemove = species.HarvestedDigestibility;
                        }

                        // get the amounts actually removed from field
                        RemovedWt += speciesHarvestedWt * speciesFractionToRemove;
                        RemovedN += speciesHarvestedN * FractionNToRemove;
                    }
                }

                // get the amounts to be returned to the field (as residue or dung+urine)
                ReturnedWt = HarvestedWt - RemovedWt;
                ReturnedN = HarvestedN - RemovedN;
                if (ReturnType == ReturnAsTypes.AsDungUrine)
                {
                    if (NDungType == DungNContentTypes.DefineProportion)
                    {
                        NReturnedInDung = ReturnedN * ProportionOfNToDung;
                    }
                    else
                    {
                        NReturnedInDung = Math.Min(ReturnedN, ReturnedWt * 0.4 / CNRatioDung);
                    }

                    NReturnedInDung = Math.Min(NReturnedInDung, ReturnedN);
                    NReturnedInUrine = ReturnedN - NReturnedInDung;
                    if(UrineDepositionIsCancelled)
                    {
                        NReturnedInUrine = 0.0;
                    }
                }
                else
                {
                    NReturnedInDung = 0.0;
                    NReturnedInUrine = 0.0;
                }
            }
        }

        /// <summary>Returns the material not removed off field as residue.</summary>
        private void returnResidues()
        {
            if ((ReturnedWt > 0.0) || (ReturnedN > 0.0))
            {
                PMF.BiomassRemovedType BiomassResidue = new PMF.BiomassRemovedType();
                string[] type = new string[] { "Grass" };
                float[] dltdm = new float[] { (float)(10.0 * ReturnedWt) };
                float[] dltn = new float[] { (float)(10.0 * ReturnedN) };
                float[] dltp = new float[] { 0.0f };
                float[] fraction = new float[] { 1.0f };     // fraction is always 1.0 here

                BiomassResidue.crop_type = "Grass";
                BiomassResidue.dm_type = type;
                BiomassResidue.dlt_crop_dm = dltdm;
                BiomassResidue.dlt_dm_n = dltn;
                BiomassResidue.dlt_dm_p = dltp;
                BiomassResidue.fraction_to_residue = fraction;
                BiomassRemoved.Invoke(BiomassResidue);
            }
        }

        /// <summary>Returns the material not removed off field as dung and urine).</summary>
        private void returnExcreta()
        {
            if ((ReturnedWt > 0.0) || (NReturnedInDung > 0.0))
            {
                PMF.BiomassRemovedType BiomassDung = new PMF.BiomassRemovedType();
                string[] type = new string[] { "RuminantDung_PastureFed" };
                float[] dltdm = new float[] { (float)(10.0 * ReturnedWt) };
                float[] dltn = new float[] { (float)(10.0 * NReturnedInDung) };
                float[] dltp = new float[] { 0.0f };
                float[] fraction = new float[] { 1.0f };     // fraction is always 1.0 here

                BiomassDung.crop_type = "RuminantDung_PastureFed";
                BiomassDung.dm_type = type;
                BiomassDung.dlt_crop_dm = dltdm;
                BiomassDung.dlt_dm_n = dltn;
                BiomassDung.dlt_dm_p = dltp;
                BiomassDung.fraction_to_residue = fraction;
                BiomassRemoved.Invoke(BiomassDung);
            }

            if (NReturnedInUrine > 0.0)
            {
                double[] myUrineDeposition = new double[soilPhysical.Thickness.Length];
                for (int z = 0; z < urineFraction.Length; z++)
                {
                    myUrineDeposition[z] = NReturnedInUrine * 10.0 * urineFraction[z];
                }

                Urea.AddKgHaDelta(SoluteSetterType.Fertiliser, myUrineDeposition);
            }
        }

        // Auxiliary bits and pieces  - - - - - - - - - - - - - - - - - - - - - - - - - - - - - - - - -

        /// <summary>Type of defoliation to use</summary>
        public enum DefoliationTypes
        {
            /// <summary>Cut</summary>
            Cut,
            /// <summary>Graze</summary>
            Graze,
            /// <summary>Harvest</summary>
            Harvest
        }

        /// <summary>Flag how defoliations will be triggered</summary>
        public enum DefoliationTriggerTypes
        {
            /// <summary>Setting a fixed interval</summary>
            FixedInterval,
            /// <summary>Setting a target (minimum) inteval</summary>
            TargetInterval,
            /// <summary>Setting a target (maximum) standing biomass</summary>
            TargetStandingBiomass
        }

        /// <summary>How the DM amount given is interpreted</summary>
        public enum DefoliateAmountTypes
        {
            /// <summary>Setting a DM amount to remove</summary>
            DMToRemove,
            /// <summary>Setting the residual DM amount</summary>
            ResidualDM,
            /// <summary>Remove according to crop's BiomassRemovalFractions</summary>
            None_UseDefoliationFractions
        }

        /// <summary>Fraction of defoliated DM to remove from field</summary>
        public enum DMRemovalTypes
        {
            /// <summary>Remove all DM</summary>
            RemoveAll,
            /// <summary>Remove no DM</summary>
            RemoveNone,
            /// <summary>Remove a user-defined fraction</summary>
            UserDefinedFraction,
            /// <summary>Remove a fraction based on plant digestibility</summary>
            BasedOnDigestibility
        }

        /// <summary>Fraction of N in the defoliated material to remove from field</summary>
        public enum NRemovalTypes
        {
            /// <summary>Remove all N</summary>
            RemoveAll,
            /// <summary>Remove no N</summary>
            RemoveNone,
            /// <summary>Remove a user-defined fraction</summary>
            UserDefinedFraction,
            /// <summary>Remove a fraction equal to DM removed</summary>
            ProportionalToDM
        }

        /// <summary>Define how the non-removed material is returned to the field</summary>
        public enum ReturnAsTypes
        {
            /// <summary>Return plant material as residue</summary>
            AsResidue,
            /// <summary>Return meterial as dung and urine</summary>
            AsDungUrine
        }

        /// <summary>Define how the proportion of N in dung is defined</summary>
        public enum DungNContentTypes
        {
            /// <summary>Define the proportion of N returned as dung</summary>
            DefineProportion,
            /// <summary>Define the C:N of dung</summary>
            DefineCNratio
        }
    }
}
```
          Manager AutomaticIrrigation
            AllowIrrigation = Yes
            SeasonStartDate = 1-Sep
            SeasonEndDate = 30-Apr
            IrrigationTriggerType = TriggerBySoilDeficit
            IntervalBetweenIrrigations = 0
            TriggerDeficit = 60
            IrrigationAmountType = BasedOnSoilDeficit
            GivenAmount = 0
            TargetDeficit = 90
            MaximumAmount = 50
            CheckCropActive = Yes
            SkipRainDays = Yes
            ReturnDays = 3
            DepthForPAWC = 500
```csharp
// Determines when and how much irrigation is to be applied based on given instructions and/or soil condition.
// Developed by RCichota, last updated in 03/Sep/2022

using System;
using System.Xml.Serialization;
using APSIM.Shared.Utilities;
using Models.Interfaces;
using Models.Core;
using Models.PMF;
using Models.Soils;

namespace Models
{
    [Serializable]
    [System.Xml.Serialization.XmlInclude(typeof(Model))]
    public class Script : Model
    {
        //> Links to other Apsim models
        [Link] private Clock clock;
        [Link] private IWeather weather;
        [Link] private Irrigation irrigator;
        [Link] private IPhysical soilPhysical;
        [Link] private ISoilWater soilWater;
        [Link(IsOptional = true)] private IPlant existingCrop;
        [Link] private ISummary summary;

        //> User inputs from properties tab
        [Separator("Generic irrigation management")]
        [Description(" Turn automatic irrigation on?")]
        public yesNoAnswer AllowIrrigation { get; set; }
        [Description(" Start of irrigation season (dd-MMM)")]
        public string SeasonStartDate { get; set; }
        [Description(" End of irrigation season (dd-MMM)")]
        public string SeasonEndDate { get; set; }

        [Separator("Parameters defining how the irrigation is triggered")]
        [Description(" How irrigation should be triggered? ")]
        public IrrigationTriggerTypes IrrigationTriggerType { get; set; }
        [Description("  Number of days between irrigations, if using fixed interval")]
        public int IntervalBetweenIrrigations { get; set; }
        [Description("  Deficit to trigger irrigation, if using soil deficit (% PAWC)")]
        public double TriggerDeficit { get; set; }

        [Separator("Parameters defining how much irrigation is applied")]
        [Description(" How irrigation amount is determined? ")]
        public IrrigationAmountTypes IrrigationAmountType { get; set; }
        [Description("  Amount of irrigation to apply, if setting amount (mm)")]
        public double GivenAmount { get; set; }
        [Description("  Deficit to stop irrigation, if based on soil deficit (% PAWC)")]
        public double TargetDeficit { get; set; }
        [Description("  Maximum irrigation application (mm/day)")]
        public double MaximumAmount { get; set; }

        [Separator("Parameters defining extra constraint to irrigation")]
        [Description(" Only apply irrigation if there's a crop?")]
        public yesNoAnswer CheckCropActive { get; set; }
        [Description(" Skip rainy days (rain > 5mm)?")]
        public yesNoAnswer SkipRainDays { get; set; }
        [Description(" Minimum number of days between irrigations (ignored if irrigating using fixed interval")]
        public double ReturnDays { get; set; }

        [Separator("Parameters for computing soil water deficit")]
        [Description("Depth to calculate PAWC (mm)")]
        public double DepthForPAWC { get; set; }

        //> Outputs from this manager
        [XmlIgnore] public double IrrigLayerSWDeficit { get; set; }
        [XmlIgnore] public double TopSWC { get; set; }
        [XmlIgnore] public double TopDUL { get; set; }
        [XmlIgnore] public double TopLL { get; set; }
        [XmlIgnore] public double DaysSinceIrrigation { get; set; }
        [XmlIgnore] public double AmountToApply { get; set; }
        [XmlIgnore] public double SeasonAppliedAmount { get; set; }

        //> Internal variables
        private int bottomLayer;
        private double fracBottomLayer;
        private bool irrigationIsAllowed;
        private bool checkingCropActive;
        private bool skippingRainDays;
        private bool seasonIsOpen;
        private bool cropIsActive;
        private bool rainIsNotSignificant;
        private bool irrigatorIsAvailable;
        private bool soilMoistureIsLow;


        [EventSubscribe("StartOfSimulation")]
        private void OnStartOfSimulation(object sender, EventArgs e)
        {
            //Can we irrigate at all?
            irrigationIsAllowed = false;
            if (AllowIrrigation == yesNoAnswer.Yes)
            {
                irrigationIsAllowed = true;

                //Do we need to check crop?
                checkingCropActive = false;
                if (CheckCropActive == yesNoAnswer.Yes)
                {
                    checkingCropActive = true;
                    if(existingCrop == null)
                    {
                        throw new Exception(" Manager requires checking active crop, but no crop is present");
                    }
                }

                //Do we need to check rainfall?
                skippingRainDays = false;
                if (SkipRainDays == yesNoAnswer.Yes)
                {
                    skippingRainDays = true;
                }
            }

            //Calculate soil water variables
            double depthFromSurface = 0.0;
            for (int layer = 0; layer < soilPhysical.Thickness.Length; layer++)
            {
                fracBottomLayer = Math.Min(1.0, (DepthForPAWC - depthFromSurface) / soilPhysical.Thickness[layer]);
                TopLL += soilPhysical.LL15mm[layer] * fracBottomLayer;
                TopDUL += soilPhysical.DULmm[layer] * fracBottomLayer;
                depthFromSurface += soilPhysical.Thickness[layer];
                if (depthFromSurface >= DepthForPAWC)
                {
                    bottomLayer = layer;
                    layer = soilPhysical.Thickness.Length;
                }
            }

            // write message in summary
            summary.WriteMessage(this," Automatic irrigation manager initialised", MessageType.Diagnostic);
            if (irrigationIsAllowed)
            {
                summary.WriteMessage(this,"  Irrigation is enabled between " + SeasonStartDate + " and " + SeasonEndDate, MessageType.Diagnostic);
                if (IrrigationTriggerType == IrrigationTriggerTypes.FixedInterval)
                {
                    summary.WriteMessage(this,"  Irrigation will be triggered every " + IntervalBetweenIrrigations + " days", MessageType.Diagnostic);
                }
                else
                {
                    summary.WriteMessage(this,"  Irrigation will be triggered every time soil moisture is below " + TriggerDeficit.ToString("#0.0") + "% of PAWC", MessageType.Diagnostic);
                }

                if (IrrigationAmountType == IrrigationAmountTypes.GivenAmount)
                {
                    summary.WriteMessage(this,"  Amount to be applied is fixed at " + Math.Min(MaximumAmount, GivenAmount).ToString("#0.0") + "mm each application", MessageType.Diagnostic);
                }
                else
                {
                    summary.WriteMessage(this,"  Amount to be applied will aim to bring soil moisture up to " + TargetDeficit.ToString("#0.0") + "% of PAWC", MessageType.Diagnostic);
                    summary.WriteMessage(this,"   limited to " + MaximumAmount.ToString("#0.0") + "mm in each application", MessageType.Diagnostic);
                }
            }
            else
            {
                summary.WriteMessage(this,"  Irrigation is disabled", MessageType.Diagnostic);
            }
        }

        [EventSubscribe("StartOfDay")]
        private void OnStartOfDay(object sender, EventArgs e)
        {
            //Check for whether we are within the irrigation season
            if(DateUtilities.WithinDates(SeasonStartDate, clock.Today, SeasonEndDate))
            {
                seasonIsOpen = true;
            }
            else
            {
                seasonIsOpen = false;
                SeasonAppliedAmount = 0;
            }

            //Check for whether there is a crop that needs irrigation
            cropIsActive = true;
            if (checkingCropActive)
            {
                if (!existingCrop.IsAlive)
                {
                    cropIsActive = false;
                }
            }
            //if ((existingCrop.Phenology.Stage >= 3.0) && (existingCrop.Phenology.Stage < 6.0))

            //Check whether there is significant rainfall
            rainIsNotSignificant = true;
            if (skippingRainDays && weather.Rain > 5.0)
            {
                rainIsNotSignificant = false;
            }

            //Check whether the irrigator available
            irrigatorIsAvailable = false;
            DaysSinceIrrigation += 1;
            if(IrrigationTriggerType == IrrigationTriggerTypes.FixedInterval)
            {
                if (DaysSinceIrrigation >= IntervalBetweenIrrigations)
                {
                    irrigatorIsAvailable = true;
                }
            }
            else
            {
                if (DaysSinceIrrigation >= ReturnDays)
                {
                    irrigatorIsAvailable = true;
                }
            }
        }

        [EventSubscribe("DoManagement")]
        private void OnDoManagement(object sender, EventArgs e)
        {
            //Get current soil moisture at appropriate depth
            TopSWC = 0.0;
            for (int layer = 0; layer < bottomLayer; layer++)
            {
                TopSWC += soilWater.SWmm[layer];
            }
            TopSWC += soilWater.SWmm[bottomLayer] * fracBottomLayer;

            //Check whether the soil is dry enough to require irrigation
            IrrigLayerSWDeficit = TopSWC - TopDUL;
            if(IrrigationTriggerType == IrrigationTriggerTypes.TriggerBySoilDeficit)
            {
                soilMoistureIsLow = false;
                if (Math.Max(0.0, -IrrigLayerSWDeficit) >= (TopDUL - TopLL) * (100.0 - TriggerDeficit) / 100.0)
                {
                    soilMoistureIsLow = true;
                }
            }
            else
            { // moisture is not checked
                soilMoistureIsLow = true;
            }

            //Are all the conditions ratifying irrigation
            if (irrigationIsAllowed && seasonIsOpen && cropIsActive && irrigatorIsAvailable && rainIsNotSignificant && soilMoistureIsLow)
            {
                //Lets bloody well irrigate then!!!!
                if(IrrigationAmountType == IrrigationAmountTypes.GivenAmount)
                {
                    AmountToApply = Math.Min(GivenAmount, MaximumAmount);
                }
                else
                {
                    AmountToApply = TopLL + (TopDUL - TopLL) * TargetDeficit / 100.0 - TopSWC;
                    AmountToApply = Math.Max(0.0, Math.Min(AmountToApply, MaximumAmount));
                }

                irrigator.Apply(amount: AmountToApply, depth: 0.0, duration: 1440, willRunoff: true);
                DaysSinceIrrigation = 0;
                SeasonAppliedAmount += AmountToApply;
            }
        }


        /// <summary>Flag for a yes or no answer</summary>
        public enum yesNoAnswer
        {
            /// <summary>Positive answer</summary>
            Yes,
            /// <summary>Negative answer</summary>
            No
        }

        /// <summary>Flag how irrigation will be triggered</summary>
        public enum IrrigationTriggerTypes
        {
            /// <summary>Setting a fixed interval</summary>
            FixedInterval,
            /// <summary>Setting a soil deficit</summary>
            TriggerBySoilDeficit
        }

        /// <summary>Flag how much irrigation will be applied</summary>
        public enum IrrigationAmountTypes
        {
            /// <summary>Setting a fixed interval</summary>
            GivenAmount,
            /// <summary>Setting a soil deficit</summary>
            BasedOnSoilDeficit
        }
    }
}
```
          Manager FertiliseAfterDefoliation
            AutomaticManagementIsEnabled = False
            FertiliserManagementStartDate = 01/01/1900 00:00:00
            FertiliserManagementEndDate = 12/31/2100 00:00:00
            FertiliserApplicationLag = 1
            NoFertiliserPeriodIsEnabled = True
            NoFertiliserStartDate = 15-May
            NoFertiliserEndDate = 15-Aug
            FertiliserNAmount = 20
            FertiliserType = UreaN
            FertiliserDepth = 50
```csharp
using System;
using System.Linq;
using APSIM.Shared.Utilities;
using Models.Interfaces;
using Models.Core;
using Models.PMF;
using Models.Soils;
using Models.Soils.Nutrients;

namespace Models
{
    [Serializable]
    public class Script : Model
    {
        //> Links to other Apsim models
        [Link] private Clock clock;
        [Link] private Zone myZone;
        [Link] private Fertiliser fertiliser;
        [Link] private Summary summary;
        [Link(IsOptional=true)] private Nutrient nutrient;
        [Link(IsOptional=true)] private SoilNitrogen soilN;

        //> User inputs from properties tab
        [Separator("Manager fertiliser application following forage defoliation")]
        [Description(" Allow this manager to control fertilisations? ")]
        public bool AutomaticManagementIsEnabled { get; set; }
        [Description(" Date to start the fertilisation management (dd/mm/yyyy): ")]
        public DateTime FertiliserManagementStartDate { get; set; }
        [Description(" Date to end the fertilisation management (dd/mm/yyyy): ")]
        public DateTime FertiliserManagementEndDate { get; set; }

        [Separator("Parameters defining how fertiliser is applied")]
        [Description(" Days after defoliation to apply the fertiliser: ")]
        public int FertiliserApplicationLag { get; set; }
        [Description(" Enable window in which fertilisation is not allowed? ")]
        public bool NoFertiliserPeriodIsEnabled { get; set; }
        [Description(" Date to start period in which fertiliser cannot be applied (dd-mmm): ")]
        public string NoFertiliserStartDate { get; set; }
        [Description(" Date to end period in which fertiliser cannot be applied (dd-mmm): ")]
        public string NoFertiliserEndDate { get; set; }

        [Separator("Parameters defining type and amount of fertiliser")]
        [Description(" Amount of fertiliser to be applied each time (kgN/ha): ")]
        public double FertiliserNAmount { get; set; }
        [Description(" Type of fertiliser to apply (select from the list): ")]
        public Fertiliser.Types FertiliserType { get; set; }
        [Description(" Depth to apply the fertiliser: ")]
        public double FertiliserDepth { get; set; }

        //> Outputs from this manager

        //> Internal variables
        private int daysAfterDefoliation;
        private bool defoliationHasHappened;
        private bool fertiliserApplicationsArePermitted;


        [EventSubscribe("StartOfSimulation")]
        private void OnStartOfSimulation(object sender, EventArgs e)
        {
            // initialise variables
            daysAfterDefoliation = -1;
            defoliationHasHappened = false;
            fertiliserApplicationsArePermitted = true;
            if(NoFertiliserPeriodIsEnabled && DateUtilities.WithinDates(NoFertiliserStartDate, clock.Today, NoFertiliserEndDate))
            {
                fertiliserApplicationsArePermitted = false;
            }
            if(FertiliserNAmount < 0.000001)
            {
                AutomaticManagementIsEnabled = false;
            }

            summary.WriteMessage(this, " Fertiliser manager initialised", MessageType.Diagnostic);
            if (AutomaticManagementIsEnabled)
            {
                summary.WriteMessage(this, "  Applying " + FertiliserNAmount.ToString("#0.0") + "kgN/ha " + FertiliserApplicationLag + " days after each defoliation", MessageType.Diagnostic);
                if (NoFertiliserPeriodIsEnabled)
                {
                    summary.WriteMessage(this,"   Except between " + NoFertiliserStartDate + " and " + NoFertiliserEndDate, MessageType.Diagnostic);
                }
            }
            else
            {
                summary.WriteMessage(this, "  Applications are disabled", MessageType.Diagnostic);
            }
        }

        [EventSubscribe("DoManagement")]
        private void OnDoManagement(object sender, EventArgs e)
        {
            if (AutomaticManagementIsEnabled)
            {
                // check whether a defolitation has happened
                defoliationHasHappened = ((double)myZone.Get("[DefoliationManager].Script.HarvestedWt") > 0.0);
                if (defoliationHasHappened)
                {
                    daysAfterDefoliation = 0;
                }
                else
                {
                    daysAfterDefoliation += 1;
                }

                // check whether we're on a period in which fertiliser can be applied
                if(fertiliserApplicationsArePermitted)
                {
                    if(NoFertiliserPeriodIsEnabled && DateUtilities.DatesAreEqual(NoFertiliserStartDate, clock.Today))
                    { // start of restricted period
                        fertiliserApplicationsArePermitted = false;
                    }
                    else
                    {
                        // check time after defoliation
                        if (daysAfterDefoliation == FertiliserApplicationLag)
                        {
                            fertiliser.Apply(FertiliserNAmount, FertiliserType, FertiliserDepth);
                        }
                    }
                }
                else
                {
                    if(NoFertiliserPeriodIsEnabled && DateUtilities.DatesAreEqual(NoFertiliserEndDate, clock.Today))
                    { // end of restricted period
                        fertiliserApplicationsArePermitted = true;
                    }
                }
            }
        }
    }
}
```
          Manager ApplyUrineOnGivenDate
            UrineDepositionIsEnabled = False
            UrineDepositionDate = 04/15/1980 00:00:00
            UrineNAmount = 450
            UrineDepth = 200
            ExtraDefoliationIsEnabled = True
            ResidualDMBiomass = 150
```csharp
using System;
using Newtonsoft.Json;
using APSIM.Shared.Utilities;
using Models.Core;
using Models.PMF;
using Models.Soils;
using Models.Interfaces;
using Models.Soils.Nutrients;

namespace Models
{
    [Serializable]
    public class Script : Model
    {
        //> Links to other Apsim models
        [Link] private Clock clock;
        [Link] private Zone myZone;
        [Link] private ISummary summary;
        [Link(ByName = true)] private ISolute Urea;
        [Link] private IPhysical soilPhysical;
        [Link] DefoliationManagerScript defoliationManager;

        //> Events raised by this manager
        public event EventHandler UrineDepostionHappenedToday;
        private EventArgs args = new EventArgs();

        //> User inputs from properties tab
        [Separator("Generic manager to set up a urine deposition (simulated as urea added to the top soil)")]
        [Description(" Allow this manager to add urine to the soil?")]
        public bool UrineDepositionIsEnabled { get; set; }
        [Description(" Date to add the urine patch (dd/mm/yyyy):")]
        public DateTime UrineDepositionDate { get; set; }
        [Description(" Amount of N to be added in the urine patch (kgN/ha): ")]
        public double UrineNAmount { get; set; }
        [Description(" Soil depth down to which urine should be applied (mm):")]
        public double UrineDepth { get; set; }

        [Separator("Additional defoliation linked to urine deposition")]
        [Description(" Allow this manager to trigger an extra defoliation on deposition day?")]
        public bool ExtraDefoliationIsEnabled { get; set; }
        [Description(" Amount of residual biomass to be left after defoliation (gDM/m2): ")]
        public double ResidualDMBiomass { get; set; }

        //> Outputs from this manager
        [JsonIgnore][Units("kg/ha")] // N amount deposited today
        public double UrineNDeposited { get; set; }

        //> Internal variables
        private double[] urineFraction;         // fraction of urine to be applied in each soil layer


        [EventSubscribe("StartOfSimulation")]
        private void OnSimulationCommencing(object sender, EventArgs e)
        {
            // set the fraction of urine for each layer
            if (UrineNAmount >= 0.0)
            {
                double depthFromSurface = 0.0;
                double propAtZ0;
                double propAtZ1;
                for (int layer = 0; layer < soilPhysical.Thickness.Length; layer++)
                {
                    depthFromSurface += soilPhysical.Thickness[layer];
                    if (depthFromSurface >= UrineDepth)
                    { // bottom layer found
                        urineFraction = new double[layer + 1];
                        double distFactor = 1.5;
                        double totalProp = UrineDepth * Math.Pow(1.0, distFactor) / (distFactor + 1.0);
                        depthFromSurface = 0.0;
                        propAtZ1 = (UrineDepth - depthFromSurface) * Math.Pow(1.0 - depthFromSurface / UrineDepth, distFactor) / (distFactor + 1.0);
                        for (int z = 0; z < layer+1; z++)
                        {
                            propAtZ0 = propAtZ1;
                            depthFromSurface += soilPhysical.Thickness[z];
                            propAtZ1 = (UrineDepth - depthFromSurface) * Math.Pow(1.0 - depthFromSurface / UrineDepth, distFactor) / (distFactor + 1);
                            if (1.0 - (depthFromSurface / UrineDepth) < 0.0)
                            {
                                propAtZ1 = 0;
                            }
                            urineFraction[z] = (propAtZ0 - propAtZ1) / totalProp;
                        }
                        layer = soilPhysical.Thickness.Length;
                    }
                }
            }

            // write message in summary
            summary.WriteMessage(this," Manager to set up urine depositions initialised", MessageType.Diagnostic);
            if (UrineDepositionIsEnabled)
            {
                summary.WriteMessage(this, "   Urine deposition will happen on " + UrineDepositionDate.ToShortDateString() + ".", MessageType.Diagnostic);
                summary.WriteMessage(this, "   A total of " + UrineNAmount.ToString("#0.0#") + " kgN/ha will be applied to the soil", MessageType.Diagnostic);
                summary.WriteMessage(this,"   This will be distributed according to proportions: " + string.Join(", ", urineFraction), MessageType.Diagnostic);
            }
            else
            {
                summary.WriteMessage(this,"   Urine deposition is disabled.", MessageType.Diagnostic);
            }
        }

        [EventSubscribe("DoManagement")]
        private void OnDoManagement(object sender, EventArgs e)
        {
            UrineNDeposited = 0.0;
            if((clock.Today.Date == UrineDepositionDate.Date) && (UrineNAmount > 0.0))
            {
                // set an additional defoliation (ensure comparable cover in any deposition)
                if(ExtraDefoliationIsEnabled)
                {
                    defoliationManager.Defoliate(defoliationType: "Cut", amountDM: ResidualDMBiomass, amountType: "ResidualDM", duration: 1);
                }

                // get the distribution of urea down to a given depth
                double[] myUrineDeposition = new double[soilPhysical.Thickness.Length];
                for (int z = 0; z < urineFraction.Length; z++)
                {
                    myUrineDeposition[z] = UrineNAmount * urineFraction[z];
                    UrineNDeposited += myUrineDeposition[z];
                }

                // add the urea to mimic a urine deposition
                Urea.AddKgHaDelta(SoluteSetterType.Fertiliser, myUrineDeposition);

                // send a 'message' to let models know that a urine deposition has happened today (mostly for report)
                summary.WriteMessage(this, " " + UrineNDeposited.ToString("#0.0") + " kgN/ha of urea was applied minimcking a urine patch deposition", MessageType.Information);
                if(UrineDepostionHappenedToday != null)
                {
                    UrineDepostionHappenedToday.Invoke(this, args);
                }
            }
        }
    }
}
```
          Manager FactorLabels
            AGENT_NO = 999
            Lat = 999
            Lon = 999
            SoilStamp = SiltLoam
            GCM = ERA
            RCP = ERA
            TS = BaseLine
```csharp
using Models.Soils;
using Models.Core;
using System;

namespace Models
{
    [Serializable]
    public class Script : Model
    {
        //> Links to other Apsim models
        [Link] Clock Clock;
        [Link] ISummary mySummary;

        //> User inputs from properties tab
        [Separator("Tags used to defined simulation factors")]
        [Description("Agent number: ")]
        public string AGENT_NO { get; set; }
        [Description("Latitude: ")]
        public string Lat { get; set; }
        [Description("Longitude: ")]
        public string Lon { get; set; }
        [Description("SoilStamp: ")]
        public string SoilStamp { get; set; }
        [Description("GCM: ")]
        public string GCM { get; set; }
        [Description("RCP: ")]
        public string RCP { get; set; }
        [Description("Time slice: ")]
        public string TS { get; set; }

        //> Internal variables
        private string someVar;
        
        [EventSubscribe("DoManagementCalculations")]
        private void OnDoManagementCalculations(object sender, EventArgs e)
        {
            // Sort out time slice classification
            if ((Clock.Today.Date.Year <= 2005))
            {
                TS = "Baseline";
            }
            else
            {
                TS = "Future";
            }
        }
    }
}
```
        Manager SoilInitialisationAndReset
          AllowChangingSoilN = True
          NewInitThickness = 200, 300, 500, 1000
          NewInitNH4 = 0, 0, 0, 0
          NewInitNO3 = 1, 1, 1, 1
          AllowSoilReset = False
          AllowPlantReset = False
          ResetsDate = 01-Jul
          ResetInterval = 3
          AllowSetRunoff = False
          NewCNBare = 90
          NewCNRed = 20
          NewCNCov = 0.8
          AllowModifyRunoff = False
          SlopeCorrectionApproach = UseWilliams
          SlopeClassificationType = UseSimple
          SlopeClassGiven = B
          SlopeGiven = 0
```csharp
using System;
using System.Linq;
using Newtonsoft.Json;
using APSIM.Shared.Utilities;
using Models.Core;
using Models.PMF;
using Models.Soils;
using Models.Soils.Nutrients;
using Models.Surface;
using Models.Interfaces;
using Models.WaterModel;

namespace Models
{
    [Serializable]
    public class Script : Model
    {
        //> Links to other Apsim models
        [Link] private Clock clock;
        [Link] private Zone myZone;
        [Link] private Soil mySoil;
        [Link] private IPhysical soilPhysical;
        [Link] private Chemical soilChemical;
        [Link] private ISoilWater soilWater;
        [Link] private WaterBalance waterBalance;
        [Link] private SoilNitrogen soilN;
        [Link(ByName = true)] private ISolute NH4;
        [Link(ByName = true)] private ISolute NO3;
        [Link] private Models.Surface.SurfaceOrganicMatter surfaceOM;
        [Link] private AgPasture.PastureSpecies[] AgPSpecies;
        [Link] private ISummary summary;

        //> User inputs from properties tab
        [Separator("Manager script for setting up some soil parameters")]
        [Description(" Enable this manager to change soil parameters?")]
        public bool AllowChangingSoilN { get; set; }
        [Description(" Values of layer thickness to use (mm):")]
        public double[] NewInitThickness { get; set; }
        [Description(" Values for initial soil NH4 (kgN/ha):")]
        public double[] NewInitNH4 { get; set; }
        [Description(" Values for initial soil NO3 (kgN/ha):")]
        public double[] NewInitNO3 { get; set; }

        [Separator("Extra functions to reset soil and plants")]
        [Description(" Enable this manager to reset the soil and surface OM?")]
        public bool AllowSoilReset { get; set; }
        [Description(" Enable this manager to reset the plants?")]
        public bool AllowPlantReset { get; set; }
        [Description(" Date to reset the models (dd-mmm):")]
        public string ResetsDate { get; set; }
        [Description(" Number of years between each reseting (>=1):")]
        public int ResetInterval { get; set; }

        [Separator("Extra functions to set soil runoff parameters")]
        [Description(" Enable this manager to set the soil runoff parameters?")]
        public bool AllowSetRunoff { get; set; }
        [Description(" New value for the curve number of bare soil:")]
        public double NewCNBare { get; set; }
        [Description(" New value for the maximum reduction in curve number due to cover:")]
        public double NewCNRed { get; set; }
        [Description(" New value for the cover at which curve number reduction is maximum:")]
        public double NewCNCov { get; set; }
        [Description(" Enable this manager to modify soil runoff parameters based on slope?")]
        public bool AllowModifyRunoff { get; set; }
        [Description(" Which approach to modify soil runoff parameters based on slope should be used?")]
        public SlopeCorrectionApproaches SlopeCorrectionApproach { get; set; }
        [Description(" Which slope classification should be used to modify soil runoff parameters?")]
        public SlopeClassificationTypes SlopeClassificationType { get; set; }
        [Description("  - Slope class to use for modifying the curve number:")]
        public string SlopeClassGiven { get; set; }
        [Description("  - Slope to use for modifying the curve number (degrees):")]
        public double SlopeGiven { get; set; }

        //> Outputs from this manager
        [JsonIgnore] public double CurveNumberSet { get; set; }
        [JsonIgnore] public double SlopeAngleSet { get; set; }

        //> Internal variables
        private double[] newNH4;
        private double[] newNO3;
        private int yearCounter;
        // parameter for changing CurveNumber
        private string[] slopeClassesFSL = new string[] {"A", "B", "C", "D", "E", "F", "G"};
        private double[] slopeAnglesFSL = new double[] {1.5, 5.5, 11.5, 18.0, 22.5, 30.5, 39.0};
        private string[] slopeClassesSimple = new string[] {"A", "B", "C", "D"};
        private double[] slopeAnglesSimple = new double[] {4.0, 12.0, 21.0, 31.0};


        [EventSubscribe("StartOfSimulation")]
        private void OnStartOfSimulation(object sender, EventArgs e)
        {
            // start year counter (assumes counter will be updated at the beggining of the simulation)
            yearCounter = -1;

            if(AllowChangingSoilN)
            {
                // check array length
                if ((NewInitThickness.Length > NewInitNH4.Length) || (NewInitThickness.Length > NewInitNO3.Length))
                {
                    throw new Exception("The number of new values for NH4 and NO3 must be equal or larger than the number of thickness values provided");
                }

                // get layer fractions (map given layer here with actual soil)
                double[][] mapFraction = getLayerFractions();

                // compute new values, mapped to actaul soil
                int nLayers = soilPhysical.Thickness.Length;
                newNH4 = new double[nLayers];
                newNO3 = new double[nLayers];
                for (int Za = 0; Za < nLayers; Za++)
                {
                    for (int Zm = 0; Zm < NewInitThickness.Length; Zm++)
                    {
                        newNH4[Za] += NewInitNH4[Zm]*mapFraction[Za][Zm];
                        newNO3[Za] += NewInitNO3[Zm]*mapFraction[Za][Zm];
                    }
                }

                // change the initial soil N
                NH4.SetKgHa(SoluteSetterType.Fertiliser, newNH4);
                NO3.SetKgHa(SoluteSetterType.Fertiliser, newNO3);
            }
            
            if(AllowSetRunoff)
            {
                // simply pass the given values to the soil model
                waterBalance.CN2Bare = NewCNBare;
                waterBalance.CNRed = NewCNRed;
                waterBalance.CNCov = NewCNCov;
                CurveNumberSet = waterBalance.CN2Bare;
            }
            
            if(AllowModifyRunoff)
            {
                double currentCN2 = waterBalance.CN2Bare;
                double newCN2;

                // compute new values for the curve number and pass to the soil model
                if(SlopeClassificationType == SlopeClassificationTypes.UseFSL)
                { // the FSL slope classes are to be used (A-G)
                    // 1. find the index and slope angle for the given class
                    int i = Array.IndexOf(slopeClassesFSL, SlopeClassGiven);
                    SlopeAngleSet = slopeAnglesFSL[i];

                    // 2. get the adjusted curve number of the class
                    newCN2 = getCurveNumberFromSlopeClass(currentCN2, i, slopeClassesFSL, slopeAnglesFSL);
                }
                else if(SlopeClassificationType == SlopeClassificationTypes.UseSimple)
                { // the simplified slope classes are to be used (A-D)
                    // 1. find the index and slope angle for the given class
                    int i = Array.IndexOf(slopeClassesSimple, SlopeClassGiven);
                    SlopeAngleSet = slopeAnglesSimple[i];

                    // 2. get the adjusted curve number of the class
                    newCN2 = getCurveNumberFromSlopeClass(currentCN2, i, slopeClassesSimple, slopeAnglesSimple);
                }
                else
                { // a value for sope is to be used
                    // 1. set the class and slope angle
                    SlopeClassGiven = "U";
                    SlopeAngleSet = SlopeGiven;

                    // 2. get the adjusted curve number of the slope
                    newCN2 = getCurveNumberAdjustedForSlope(currentCN2, SlopeGiven);
                }

                // make sure the CN does not decrease
                newCN2 = Math.Max(currentCN2, newCN2);

                // do the actual setting
                waterBalance.CN2Bare = newCN2;
                CurveNumberSet = waterBalance.CN2Bare;
            }

            // write message in summary
            summary.WriteMessage(this," Soil initialisation and reset initialised", MessageType.Diagnostic);
            if(AllowChangingSoilN)
            {
                summary.WriteMessage(this,"   Changes to initial soil N are enabled", MessageType.Diagnostic);
                summary.WriteMessage(this,"     Initial NH4 will be " + newNH4.Sum().ToString() + " kgN/ha over the profile", MessageType.Diagnostic);
                summary.WriteMessage(this,"     Initial NO3 will be " + newNO3.Sum().ToString() + " kgN/ha over the profile", MessageType.Diagnostic);
            }
            else
            {
                summary.WriteMessage(this,"   Changes to initial soil N are disabled", MessageType.Diagnostic);
            }
            
            if(AllowSetRunoff)
            {
                summary.WriteMessage(this,"   Soil runoff parameters (CN2Bare, CNRed, CNCov) changed to " + waterBalance.CN2Bare.ToString("#0.0")
                                          + ", " + waterBalance.CNRed.ToString("#0.0") + ", " + waterBalance.CNCov.ToString("#0.00"), MessageType.Diagnostic);
            }
            if(AllowModifyRunoff)
            {
                if(SlopeClassificationType == SlopeClassificationTypes.UseSlopeGiven)
                {
                    summary.WriteMessage(this,"   Soil runoff parameter (CN2Bare) changed to " + waterBalance.CN2Bare.ToString("#0.0")
                                              + " because the slope to be simulated was set to " + SlopeAngleSet.ToString("#0.0") + " degrees"
                                              , MessageType.Diagnostic);
                }
                else
                {
                    summary.WriteMessage(this,"   Soil runoff parameter (CN2Bare) changed to " + waterBalance.CN2Bare.ToString("#0.0")
                                              + " because the slope class to be simulated was set to " + SlopeClassGiven
                                              + ", which corresponds to an average slope of " + SlopeAngleSet.ToString("#0.0") + " degrees"
                                              , MessageType.Diagnostic);
                }
            }
            
            if(AllowSoilReset)
            {
                summary.WriteMessage(this,"   Soil and surface OM will be reset every " + ResetInterval + " years on " + ResetsDate, MessageType.Diagnostic);
            }

            if(AllowPlantReset)
            {
                summary.WriteMessage(this,"   AgPasture will be reset every " + ResetInterval + " years on " + ResetsDate, MessageType.Diagnostic);
            }
        }

        [EventSubscribe("StartOfDay")]
        private void OnStartOfDay(object sender, EventArgs e)
        {
            // check whether soil and/or plant need to be reset
            if(AllowSoilReset || AllowPlantReset)
            {
                if (DateUtilities.DatesEqual(ResetsDate, clock.Today))
                {
                    yearCounter += 1;
                    if(yearCounter >= ResetInterval)
                    {
                        if(AllowSoilReset)
                        {
                            surfaceOM.Reset();
                            soilWater.Reset();
                            soilN.Reset();
                            yearCounter = 0;
                        }
                        if(AllowPlantReset)
                        {
                            foreach (AgPasture.PastureSpecies species in AgPSpecies)
                            {
                                species.Reset();
                                yearCounter = 0;
                            }
                        }
                    }
                }
            }
        }
        
        /// <summary>Computes the CurveNumber adjusted for slope, ensuring for monotonic behaviour</summary>
        private double getCurveNumberFromSlopeClass(double baseCN, int classIndex, string[] slopeClass, double[] angleByClass)
        {
            // get the first value, assumed to be smallest slope
            double newCN = getCurveNumberAdjustedForSlope(baseCN, angleByClass[0]);

            // starting from the smallest, this loop will go through the classes and get the adjusted CN value
            //  it will stop when the class given is found or when the adjusted CN value starts to decrease.
            //  This is needed because some aproaches used to modify the value of CN are not monotonic with
            //  respect to slope and thus can return smaller values of CN for steeper slopes...

            for(int i = 1; i <= classIndex; i++)
            {
                double newestCN = getCurveNumberAdjustedForSlope(baseCN, angleByClass[i]);
                if(newestCN < newCN)
                { // function started to go down, stop calculations
                    i = classIndex + 1;
                }
                else
                { // still going up, continue calculations
                    newCN = newestCN;
                }
            }
            
            return newCN;
        }
        
        /// <summary>Computes the CurveNumber adjusted for slope, links to different claculation approaches</summary>
        private double getCurveNumberAdjustedForSlope(double baseCN, double slopeAngle)
        {
            double adjustedCN = -1.0;
            if(SlopeCorrectionApproach == SlopeCorrectionApproaches.UseWilliams)
            {
                adjustedCN = adjustCurveNumberForSlope_Williams(baseCN, slopeAngle);
            }
            
            return adjustedCN;
        }
        
        /// <summary>Computes an adjusted CurveNumber based on a given slope using the Williams approach</summary>
        private double adjustCurveNumberForSlope_Williams(double baseCN, double slopeAngle)
        {
            double gradient = 100.0*Math.Tan(slopeAngle*Math.PI/180.0);
            double adjustedCN = 100.0/((100.0/baseCN - 1.0)*(1.1 - gradient/(gradient + Math.Exp(3.7 + 0.02118*gradient))) + 1.0);
            return Math.Round(adjustedCN, 1);
        }

        /// <summary>Gets the fraction that each given layer maps into actaul soil layers</summary>
        private double[][] getLayerFractions()
        {
            int nLayers = soilPhysical.Thickness.Length;
            int nToMap = NewInitThickness.Length;
            double[][] mappedLayerFrac = new double[nLayers][];
            double depthLayerTop = 0.0;
            double depthLayerBottom = soilPhysical.Thickness[0];
            for (int Za = 0; Za < nLayers; Za++)
            {
                mappedLayerFrac[Za] = new double[nToMap];
                double depthToMapTop = 0.0;
                double depthToMapBottom = NewInitThickness[0];
                for (int Zm = 0; Zm < nToMap; Zm++)
                {
                    mappedLayerFrac[Za][Zm] = (Math.Min(depthLayerBottom, depthToMapBottom) - Math.Max(depthLayerTop, depthToMapTop)) / NewInitThickness[Zm];
                    mappedLayerFrac[Za][Zm] = Math.Max(0.0, mappedLayerFrac[Za][Zm]);
                    depthToMapTop = depthToMapBottom;
                    if (Zm < nToMap - 1)
                    {
                        depthToMapBottom += NewInitThickness[Zm + 1];
                    }
                }

                depthLayerTop = depthLayerBottom;
                if (Za < nLayers - 1)
                {
                    depthLayerBottom += soilPhysical.Thickness[Za + 1];
                }
            }

            return mappedLayerFrac;
        }

        /// <summary>Flag which slope 'classification' is been used</summary>
        public enum SlopeClassificationTypes
        {
            /// <summary>Use the FSL classes (A-G)</summary>
            UseFSL,
            /// <summary>Use a simplified set (A-D)</summary>
            UseSimple,
            /// <summary>Use the slope value provided</summary>
            UseSlopeGiven
        }
        
        /// <summary>Flag which approach to modify CurveNumber due to slope is been used</summary>
        public enum SlopeCorrectionApproaches
        {
            /// <summary>Use the Williams approach</summary>
            UseWilliams
        }
    }
}
```
        Manager ExtraSums
          AccumulateStartDate = 04/15/1980 00:00:00
          LengthFirstSummPeriod = 15
          LengthSecondSummPeriod = 730
          TriggerRecordAtEndingEnabled = True
          EndingRecordTableName = SummReport
```csharp
using System;
using System.Collections.Generic;
using System.Xml.Serialization;
using APSIM.Shared.Utilities;
using Models;
using Models.Core;
using Models.Soils;
using Models.Soils.Nutrients;
using Models.Interfaces;
using Models.PMF;

namespace Models
{
    [Serializable]
    public class Script : Model
    {
        //> Links to other Apsim models
        [Link] private Clock clock;
        [Link] private Zone myZone;
        [Link] private IWeather weather;
        [Link] private Fertiliser fertiliser;
        [Link] private Irrigation irrigator;
        [Link] private IPhysical soilPhysical;
        [Link] private ISoilWater waterBalance;
        [Link(ByName = true)] private SoilNitrogen soilNitrogen;
        [Link(ByName = true)] private ISolute Urea;
        [Link(ByName = true)] private ISolute NO3;
        [Link(ByName = true)] private ISolute NH4;
        [Link] private Models.Surface.SurfaceOrganicMatter surfaceOM;
        [Link] private ISummary summary;

        //> User inputs from properties tab
        [Separator("Generic script to sum up a set of variables, taylored for RIT work (WWO+MfE)")]
        [Description(" Date to start the accumulations (dd/mm/yyyy): ")]
        public DateTime AccumulateStartDate { get; set; }
        [Description(" Number of days for the first summary period: ")]
        public int LengthFirstSummPeriod { get; set; }
        [Description(" Number of days for the second summary period: ")]
        public int LengthSecondSummPeriod { get; set; }

        [Separator("Optional trigger for recording at end of simulation")]
        [Description(" Allow this manager to trigger recordings at the end of simulation? ")]
        public bool TriggerRecordAtEndingEnabled { get; set; }
        [Description(" Name of the Report: ")]
        public string EndingRecordTableName { get; set; }

        //> Outputs from this manager
        [XmlIgnore] public string Agent { get; set; }
        [XmlIgnore] public double InitialSWC { get; set; }
        [XmlIgnore] public double InitialSurfOMN { get; set; }
        [XmlIgnore] public double InitialSoilOrgN { get; set; }
        [XmlIgnore] public double InitialSoilMinN { get; set; }
        [XmlIgnore] public double InitialPlantN { get; set; }

        // state vars, snapshots
        [XmlIgnore] public double TotalSWC { get; set; }
        [XmlIgnore] public double TotalDUL { get; set; }
        [XmlIgnore] public double TotalWaterDeficit { get; set; }

        [XmlIgnore] public double TotalFomN { get; set; }
        [XmlIgnore] public double TotalBiomN { get; set; }
        [XmlIgnore] public double TotalHumN { get; set; }
        [XmlIgnore] public double TotalOrganicN { get; set; }
        [XmlIgnore] public double TotalNO3N { get; set; }
        [XmlIgnore] public double TotalNH4N { get; set; }
        [XmlIgnore] public double TotalUreaN { get; set; }
        [XmlIgnore] public double TotalMineralN { get; set; }

        // cumulative amounts for the first period (15 days)
        [XmlIgnore] public double AccumIrrigationFirstPeriod { get; set; }
        [XmlIgnore] public double AccumRainfallFirstPeriod { get; set; }
        [XmlIgnore] public double AccumEvaporationFirstPeriod { get; set; }
        [XmlIgnore] public double AccumTranspirationFirstPeriod { get; set; }
        [XmlIgnore] public double AccumDrainageFirstPeriod { get; set; }
        [XmlIgnore] public double AccumRunoffFirstPeriod { get; set; }
        [XmlIgnore] public double AccumDownDrainage10cmFirstPeriod { get; set; }
        [XmlIgnore] public double AccumNetWaterFlow10cmFirstPeriod { get; set; }
        [XmlIgnore] public double DeltaSWCFirstPeriod { get; set; }

        // cumulative amounts for second period (urine patch life)
        [XmlIgnore] public double AccumIrrigation { get; set; }
        [XmlIgnore] public double AccumRainfall { get; set; }
        [XmlIgnore] public double AccumEO { get; set; }
        [XmlIgnore] public double AccumEvaporation { get; set; }
        [XmlIgnore] public double AccumTranspiration { get; set; }
        [XmlIgnore] public double AccumDrainage { get; set; }
        [XmlIgnore] public double AccumRunoff { get; set; }
        [XmlIgnore] public double AccumLateralOutFlow { get; set; }
        [XmlIgnore] public double AccumDownDrainage100cm { get; set; }
        [XmlIgnore] public double AccumNetWaterFlow100cm { get; set; }

        [XmlIgnore] public double AccumFertilisedN { get; set; }
        [XmlIgnore] public double AccumMineralisedN { get; set; }
        [XmlIgnore] public double AccumFixedN { get; set; }
        [XmlIgnore] public double AccumLeachedN { get; set; }
        [XmlIgnore] public double AccumDenitrifiedN { get; set; }
        [XmlIgnore] public double AccumTakenUpN { get; set; }
        [XmlIgnore] public double AccumDetachedN { get; set; }
        [XmlIgnore] public double AccumUrineN { get; set; }
        [XmlIgnore] public double AccumDungN { get; set; }
        [XmlIgnore] public double AccumDungWt { get; set; }
        [XmlIgnore] public double AccumLeachedN100cm { get; set; }

        [XmlIgnore] public double AccumDefoliatedWt { get; set; }
        [XmlIgnore] public double AccumDefoliatedN { get; set; }
        [XmlIgnore] public double AccumOffTakeWt { get; set; }
        [XmlIgnore] public double AccumOffTakeN { get; set; }
        [XmlIgnore] public int AccumNumDefoliations { get; set; }

        [XmlIgnore] public double DeltaSWC { get; set; }
        [XmlIgnore] public double DeltaSurfOMN { get; set; }
        [XmlIgnore] public double DeltaSoilOrgN { get; set; }
        [XmlIgnore] public double DeltaSoilMinN { get; set; }
        [XmlIgnore] public double DeltaPlantN { get; set; }

        //> Internal variables
        private Models.Report myReportAtEnding;
        private string endDate;
        private double iniSWC;
        private double iniSurfOMN;
        private double iniSoilOrgN;
        private double iniSoilMinN;
        private double iniPlantN;
        private int daysAfterDeposition;
        private int meterLayer;
        private bool summaryIsAllowed;


        [EventSubscribe("StartOfSimulation")]
        private void OnStartOfSimulation(object sender, EventArgs e)
        {
            // set some variables
            endDate = clock.EndDate.ToString("dd-MMM");
            daysAfterDeposition = 0;
            summaryIsAllowed = false;

            // get agent number (assuming vcsn)
            char[] separator = new char[] {'\\', '/'};
            string[] aux = (weather.FileName).Split(separator);
            Agent = aux[aux.Length-1].Replace(".met","");

            // check report table names
            myReportAtEnding = this.FindInScope(EndingRecordTableName) as Models.Report;

            // check layer that contains the 100cm depth
            meterLayer = soilPhysical.Thickness.Length - 1;
            for (int z = 0; z < soilPhysical.Thickness.Length; z++)
            {
                if (soilPhysical.ThicknessCumulative[z] > 1000)
                {
                    meterLayer = z;
                    z = soilPhysical.Thickness.Length;
                }
            }

            // write message in summary
            summary.WriteMessage(this," Extra variable summary and reporting initialised", MessageType.Diagnostic);
            summary.WriteMessage(this,"   Summary will computed from " + AccumulateStartDate.ToShortDateString(), MessageType.Diagnostic);
            summary.WriteMessage(this,"   With some variables summed up over the first " + LengthFirstSummPeriod + " days only.", MessageType.Diagnostic);
            summary.WriteMessage(this,"   The remaining variables summed up over " + LengthSecondSummPeriod + " days, or the end of simulation.", MessageType.Diagnostic);
            if(TriggerRecordAtEndingEnabled)
            {
                summary.WriteMessage(this,"   Report on " + EndingRecordTableName + " will be recorded at the end of the simulation", MessageType.Diagnostic);
            }
        }

        [EventSubscribe("StartOfDay")]
        private void OnStartOfDay(object sender, EventArgs e)
        {
            // check whether the period for summing up has began
            if (clock.Today.Date == AccumulateStartDate.Date)
            {
                summaryIsAllowed = true;
                InitialSWC = MathUtilities.Sum(waterBalance.SWmm);
                InitialSurfOMN = surfaceOM.N;
                InitialSoilOrgN = MathUtilities.Sum(soilNitrogen.FOMN) + MathUtilities.Sum(soilNitrogen.MicrobialN) + MathUtilities.Sum(soilNitrogen.HumicN);
                InitialSoilMinN = MathUtilities.Sum(Urea.kgha) + MathUtilities.Sum(NH4.kgha) + MathUtilities.Sum(NO3.kgha);
                InitialPlantN = (double)myZone.Get("[AgPRyegrass].TotalN") + (double)myZone.Get("[AgPWhiteClover].TotalN");

                // reset variables
                ClearVariables();
                daysAfterDeposition = 0;
            }
        }

        [EventSubscribe("EndOfDay")]
        private void OnEndOfDay(object sender, EventArgs e)
        {
            if (summaryIsAllowed)
            {
                // get state totals and cycle cumulative
                GetTotals();
                daysAfterDeposition += 1;

                // get the cumulatives for the first period
                if(daysAfterDeposition <= LengthFirstSummPeriod)
                {
                    GetCumulativesFirstPeriod();
                    if(daysAfterDeposition == LengthFirstSummPeriod)
                    {
                        GetDeltasFirstPeriod();
                    }
                }

                // get the cumulatives for the second period
                if(daysAfterDeposition <= LengthSecondSummPeriod)
                {
                    GetCumulatives();
                    if ((daysAfterDeposition == LengthSecondSummPeriod) || (clock.Today.Date == clock.EndDate.Date))
                    {
                        GetDeltas();
                        summaryIsAllowed = false;
                    }
                }
            }

            if(TriggerRecordAtEndingEnabled && (clock.Today.Date == clock.EndDate.Date))
            { // last day of simulation
                myReportAtEnding.DoOutput();
            }
        }

        private void ClearVariables()
        {
            // clear all accum variables
            AccumRainfallFirstPeriod = 0.0;
            AccumIrrigationFirstPeriod = 0.0;
            AccumEvaporationFirstPeriod = 0.0;
            AccumTranspirationFirstPeriod = 0.0;
            AccumDrainageFirstPeriod = 0.0;
            AccumRunoffFirstPeriod = 0.0;
            AccumDownDrainage10cmFirstPeriod = 0.0;
            AccumNetWaterFlow10cmFirstPeriod = 0.0;

            AccumRainfall = 0.0;
            AccumIrrigation = 0.0;
            AccumEO = 0.0;
            AccumEvaporation = 0.0;
            AccumTranspiration = 0.0;
            AccumDrainage = 0.0;
            AccumRunoff = 0.0;
            AccumLateralOutFlow = 0.0;
            AccumDownDrainage100cm = 0.0;
            AccumNetWaterFlow100cm = 0.0;

            AccumFertilisedN = 0.0;
            AccumMineralisedN = 0.0;
            AccumFixedN = 0.0;
            AccumLeachedN = 0.0;
            AccumDenitrifiedN = 0.0;
            AccumTakenUpN = 0.0;
            AccumDetachedN = 0.0;
            AccumUrineN = 0.0;
            AccumDungN = 0.0;
            AccumDungWt = 0.0;
            AccumLeachedN100cm = 0.0;

            AccumDefoliatedWt = 0.0;
            AccumDefoliatedN = 0.0;
            AccumOffTakeWt = 0.0;
            AccumOffTakeN = 0.0;
            AccumNumDefoliations = 0;

            DeltaSWCFirstPeriod = 0.0;
            DeltaSWC = 0.0;
            DeltaSurfOMN = 0.0;
            DeltaSoilOrgN = 0.0;
            DeltaSoilMinN = 0.0;
            DeltaPlantN = 0.0;

            // get initial values for this summ cycle
            iniSWC = MathUtilities.Sum(waterBalance.SWmm);
            iniSurfOMN = surfaceOM.N;
            iniSoilOrgN = MathUtilities.Sum(soilNitrogen.FOMN) + MathUtilities.Sum(soilNitrogen.MicrobialN) + MathUtilities.Sum(soilNitrogen.HumicN);
            iniSoilMinN = MathUtilities.Sum(Urea.kgha) + MathUtilities.Sum(NH4.kgha) + MathUtilities.Sum(NO3.kgha);
            iniPlantN = (double)myZone.Get("[AgPRyegrass].TotalN") + (double)myZone.Get("[AgPWhiteClover].TotalN");
        }

        private void GetTotals()
        {
            TotalSWC = MathUtilities.Sum(waterBalance.SWmm);
            TotalDUL = MathUtilities.Sum(soilPhysical.DULmm);
            TotalWaterDeficit = (TotalSWC - TotalDUL);

            TotalFomN = MathUtilities.Sum(soilNitrogen.FOMN);
            TotalHumN = MathUtilities.Sum(soilNitrogen.HumicN);
            TotalBiomN = MathUtilities.Sum(soilNitrogen.MicrobialN);
            TotalOrganicN = TotalFomN + TotalBiomN + TotalHumN;
            TotalNO3N = MathUtilities.Sum(NO3.kgha);
            TotalNH4N = MathUtilities.Sum(NH4.kgha);
            TotalUreaN = MathUtilities.Sum(Urea.kgha);
            TotalMineralN = TotalUreaN + TotalNH4N + TotalNO3N;
        }

        private void GetCumulatives()
        {
            // accumulate the values of several outputs
            AccumRainfall += weather.Rain;
            AccumIrrigation += irrigator.IrrigationApplied;
            AccumEO += waterBalance.Eo;
            AccumEvaporation += waterBalance.Es;
            double[] auxE = (double[])myZone.Get("[AgPRyegrass].WaterUptake");
            AccumTranspiration += MathUtilities.Sum(auxE);
            auxE = (double[])myZone.Get("[AgPWhiteClover].WaterUptake");
            AccumTranspiration += MathUtilities.Sum(auxE);
            AccumDrainage += waterBalance.Drainage;
            AccumRunoff += waterBalance.Runoff;
            double auxLatFlow = MathUtilities.Sum(waterBalance.LateralOutflow);
            AccumLateralOutFlow += auxLatFlow;
            AccumDownDrainage100cm += waterBalance.Flux[meterLayer];
            AccumNetWaterFlow100cm += (waterBalance.Flow[meterLayer] + waterBalance.Flux[meterLayer]);

            AccumFertilisedN += fertiliser.NitrogenApplied;
            AccumMineralisedN += MathUtilities.Sum(soilNitrogen.dlt_n_min_tot);
            AccumFixedN += (double)myZone.Get("[AgPWhiteClover].FixedN");
            AccumLeachedN += (waterBalance.LeachNO3 + waterBalance.LeachNH4 + waterBalance.LeachUrea);
            AccumDenitrifiedN += MathUtilities.Sum(soilNitrogen.Denitrification);
            AccumTakenUpN += ((double)myZone.Get("[AgPRyegrass].SoilUptakeN") + (double)myZone.Get("[AgPWhiteClover].SoilUptakeN"));
            AccumDetachedN += ((double)myZone.Get("[AgPRyegrass].LitterDepositionN")+(double)myZone.Get("[AgPRyegrass].RootDetachedN")+(double)myZone.Get("[AgPWhiteClover].LitterDepositionN")+(double)myZone.Get("[AgPWhiteClover].RootDetachedN"));
            AccumUrineN += (double)myZone.Get("[DefoliationManager].DefoliationManagerScript.NReturnedInUrine")*10.0;
            AccumUrineN += (double)myZone.Get("[ApplyUrineOnGivenDate].Script.UrineNDeposited");
            AccumDungN += (double)myZone.Get("[DefoliationManager].DefoliationManagerScript.NReturnedInDung")*10.0;
            AccumDungWt += (double)myZone.Get("[DefoliationManager].DefoliationManagerScript.ReturnedWt")*10.0;
            AccumLeachedN100cm += (waterBalance.FlowUrea[meterLayer] + waterBalance.FlowNH4[meterLayer] + waterBalance.FlowNO3[meterLayer]);

            double AuxDefoliation = (double)myZone.Get("[DefoliationManager].DefoliationManagerScript.DefoliatedWt");
            if (AuxDefoliation > 0.0)
            {
                AccumNumDefoliations += 1;
                AccumDefoliatedWt += AuxDefoliation*10.0;
                AccumDefoliatedN += (double)myZone.Get("[DefoliationManager].DefoliationManagerScript.DefoliatedN")*10.0;
                AccumOffTakeWt += (double)myZone.Get("[DefoliationManager].DefoliationManagerScript.RemovedWt")*10.0;
                AccumOffTakeN += (double)myZone.Get("[DefoliationManager].DefoliationManagerScript.RemovedN")*10.0;
            }
        }

        private void GetDeltas()
        {
            // get deltas (difference between initial, at reset, and current values)
            DeltaSWC = MathUtilities.Sum(waterBalance.SWmm) - iniSWC;
            DeltaSurfOMN = surfaceOM.N - iniSurfOMN;
            DeltaSoilOrgN = MathUtilities.Sum(soilNitrogen.FOMN) + MathUtilities.Sum(soilNitrogen.MicrobialN) + MathUtilities.Sum(soilNitrogen.HumicN) - iniSoilOrgN;
            DeltaSoilMinN = MathUtilities.Sum(Urea.kgha) + MathUtilities.Sum(NH4.kgha) + MathUtilities.Sum(NO3.kgha) - iniSoilMinN;
            DeltaPlantN = (double)myZone.Get("[AgPRyegrass].TotalN") + (double)myZone.Get("[AgPWhiteClover].TotalN") - iniPlantN;
        }

        private void GetCumulativesFirstPeriod()
        {
            // accumulate the values of several outputs
            AccumRainfallFirstPeriod += weather.Rain;
            AccumIrrigationFirstPeriod += irrigator.IrrigationApplied;
            AccumEvaporationFirstPeriod += waterBalance.Es;
            double[] auxE = (double[])myZone.Get("[AgPRyegrass].WaterUptake");
            AccumTranspirationFirstPeriod += MathUtilities.Sum(auxE);
            auxE = (double[])myZone.Get("[AgPWhiteClover].WaterUptake");
            AccumTranspirationFirstPeriod += MathUtilities.Sum(auxE);
            AccumDrainageFirstPeriod += waterBalance.Drainage;
            AccumRunoffFirstPeriod += waterBalance.Runoff;
            AccumDownDrainage10cmFirstPeriod += waterBalance.Flux[1];
            AccumNetWaterFlow10cmFirstPeriod += (waterBalance.Flow[1] + waterBalance.Flux[1]);
        }

        private void GetDeltasFirstPeriod()
        {
            // get deltas (difference between initial, at reset, and current values)
            DeltaSWCFirstPeriod = MathUtilities.Sum(waterBalance.SWmm) - iniSWC;
        }
    }
}
```
        Manager ExtraVars
          ResetDate = 15-Jan
          SkipYearsBeforeSumming = True
          YearsToSkip = 0
          TriggerRecordAtResetEnabled = True
          ResetRecordTableName = AccumReport
          TriggerRecordAtEndingEnabled = False
          EndingRecordTableName = SummReport
```csharp
using System;
using System.Collections.Generic;
using System.Xml.Serialization;
using APSIM.Shared.Utilities;
using Models;
using Models.Core;
using Models.Soils;
using Models.Soils.Nutrients;
using Models.Interfaces;
using Models.PMF;

namespace Models
{
    [Serializable]
    public class Script : Model
    {
        //> Links to other Apsim models
        [Link] private Clock clock;
        [Link] private Zone myZone;
        [Link] private IWeather weather;
        [Link] private Fertiliser fertiliser;
        [Link] private Irrigation irrigator;
        [Link] private IPhysical soilPhysical;
        [Link] private ISoilWater waterBalance;
        [Link(ByName = true)] private SoilNitrogen soilNitrogen;
        [Link(ByName = true)] private ISolute Urea;
        [Link(ByName = true)] private ISolute NO3;
        [Link(ByName = true)] private ISolute NH4;
        [Link] private Models.Surface.SurfaceOrganicMatter surfaceOM;
        [Link] private ISummary summary;

        //> User inputs from properties tab
        [Separator("Generic script to sum up a set of variables, with reset at given date")]
        [Description(" Date to reset the accumulations (dd-mmm): ")]
        public string ResetDate { get; set; }
        [Description(" Skip summary for a few years (otherwise sum from start of simulation)? ")]
        public bool SkipYearsBeforeSumming { get; set; }
        [Description("   Number of summing cycles (~years) to skip: ")]
        public int YearsToSkip { get; set; }

        [Separator("Optional trigger for recording at time of reset")]
        [Description(" Allow this manager to trigger recordings at reset time? ")]
        public bool TriggerRecordAtResetEnabled { get; set; }
        [Description(" Name of the Report: ")]
        public string ResetRecordTableName { get; set; }

        [Separator("Optional trigger for recording at end of simulation")]
        [Description(" Allow this manager to trigger recordings at the end of simulation? ")]
        public bool TriggerRecordAtEndingEnabled { get; set; }
        [Description(" Name of the Report: ")]
        public string EndingRecordTableName { get; set; }

        //> Outputs from this manager
        [XmlIgnore] public bool IsInitialDay { get; set; }
        [XmlIgnore] public int YearsSummed { get; set; }
        [XmlIgnore] public string Agent { get; set; }
        [XmlIgnore] public double InitialSWC { get; set; }
        [XmlIgnore] public double InitialSurfOMN { get; set; }
        [XmlIgnore] public double InitialSoilOrgN { get; set; }
        [XmlIgnore] public double InitialSoilMinN { get; set; }
        [XmlIgnore] public double InitialPlantN { get; set; }

        // state vars, snapshots
        [XmlIgnore] public double TotalSWC { get; set; }
        [XmlIgnore] public double TotalDUL { get; set; }
        [XmlIgnore] public double TotalWaterDeficit { get; set; }

        [XmlIgnore] public double TotalFomN { get; set; }
        [XmlIgnore] public double TotalBiomN { get; set; }
        [XmlIgnore] public double TotalHumN { get; set; }
        [XmlIgnore] public double TotalOrganicN { get; set; }
        [XmlIgnore] public double TotalNO3N { get; set; }
        [XmlIgnore] public double TotalNH4N { get; set; }
        [XmlIgnore] public double TotalUreaN { get; set; }
        [XmlIgnore] public double TotalMineralN { get; set; }

        // cumulative amounts for each year
        [XmlIgnore] public double AccumIrrigation { get; set; }
        [XmlIgnore] public double AccumRainfall { get; set; }
        [XmlIgnore] public double AccumEO { get; set; }
        [XmlIgnore] public double AccumEvaporation { get; set; }
        [XmlIgnore] public double AccumTranspiration { get; set; }
        [XmlIgnore] public double AccumDrainage { get; set; }
        [XmlIgnore] public double AccumRunoff { get; set; }
        [XmlIgnore] public double AccumLateralOutFlow { get; set; }

        [XmlIgnore] public double AccumFertilisedN { get; set; }
        [XmlIgnore] public double AccumMineralisedN { get; set; }
        [XmlIgnore] public double AccumFixedN { get; set; }
        [XmlIgnore] public double AccumLeachedN { get; set; }
        [XmlIgnore] public double AccumDenitrifiedN { get; set; }
        [XmlIgnore] public double AccumTakenUpN { get; set; }
        [XmlIgnore] public double AccumDetachedN { get; set; }
        [XmlIgnore] public double AccumUrineN { get; set; }
        [XmlIgnore] public double AccumDungN { get; set; }
        [XmlIgnore] public double AccumDungWt { get; set; }

        [XmlIgnore] public double AccumDefoliatedWt { get; set; }
        [XmlIgnore] public double AccumDefoliatedN { get; set; }
        [XmlIgnore] public double AccumOffTakeWt { get; set; }
        [XmlIgnore] public double AccumOffTakeN { get; set; }
        [XmlIgnore] public int AccumNumDefoliations { get; set; }

        [XmlIgnore] public double DeltaSWC { get; set; }
        [XmlIgnore] public double DeltaSurfOMN { get; set; }
        [XmlIgnore] public double DeltaSoilOrgN { get; set; }
        [XmlIgnore] public double DeltaSoilMinN { get; set; }
        [XmlIgnore] public double DeltaPlantN { get; set; }

        // overall annual averages of cumulative values
        [XmlIgnore] public double AvgRainfall { get; set; }
        [XmlIgnore] public double AvgIrrigation { get; set; }
        [XmlIgnore] public double AvgEO { get; set; }
        [XmlIgnore] public double AvgEvaporation { get; set; }
        [XmlIgnore] public double AvgTranspiration { get; set; }
        [XmlIgnore] public double AvgDrainage { get; set; }
        [XmlIgnore] public double AvgRunoff { get; set; }
        [XmlIgnore] public double AvgLatOutflow { get; set; }

        [XmlIgnore] public double AvgFertilisedN { get; set; }
        [XmlIgnore] public double AvgMineralisedN { get; set; }
        [XmlIgnore] public double AvgFixedN { get; set; }
        [XmlIgnore] public double AvgLeachedN { get; set; }
        [XmlIgnore] public double AvgDenitrifiedN { get; set; }
        [XmlIgnore] public double AvgTakenUpN { get; set; }
        [XmlIgnore] public double AvgDetachedN { get; set; }
        [XmlIgnore] public double AvgUrineN { get; set; }
        [XmlIgnore] public double AvgDungN { get; set; }
        [XmlIgnore] public double AvgDungWt { get; set; }

        [XmlIgnore] public double AvgDefoliatedWt { get; set; }
        [XmlIgnore] public double AvgOffTakeWt { get; set; }
        [XmlIgnore] public double AvgDefoliatedN { get; set; }
        [XmlIgnore] public double AvgOffTakeN { get; set; }
        [XmlIgnore] public double AvgNumDefoliations { get; set; }

        [XmlIgnore] public double AvgDeltaSWC { get; set; }
        [XmlIgnore] public double AvgDeltaSurfOMN { get; set; }
        [XmlIgnore] public double AvgDeltaSoilOrgN { get; set; }
        [XmlIgnore] public double AvgDeltaSoilMinN { get; set; }
        [XmlIgnore] public double AvgDeltaPlantN { get; set; }

        // overall annual standard deviation in cumulative values
        [XmlIgnore] public double StDvRainfall { get; set; }
        [XmlIgnore] public double StDvIrrigation { get; set; }
        [XmlIgnore] public double StDvEO { get; set; }
        [XmlIgnore] public double StDvEvaporation { get; set; }
        [XmlIgnore] public double StDvTranspiration { get; set; }
        [XmlIgnore] public double StDvDrainage { get; set; }
        [XmlIgnore] public double StDvRunoff { get; set; }
        [XmlIgnore] public double StDvLatOutflow { get; set; }

        [XmlIgnore] public double StDvFertilisedN { get; set; }
        [XmlIgnore] public double StDvMineralisedN { get; set; }
        [XmlIgnore] public double StDvFixedN { get; set; }
        [XmlIgnore] public double StDvLeachedN { get; set; }
        [XmlIgnore] public double StDvDenitrifiedN { get; set; }
        [XmlIgnore] public double StDvTakenUpN { get; set; }
        [XmlIgnore] public double StDvDetachedN { get; set; }
        [XmlIgnore] public double StDvUrineN { get; set; }
        [XmlIgnore] public double StDvDungN { get; set; }
        [XmlIgnore] public double StDvDungWt { get; set; }

        [XmlIgnore] public double StDvDefoliatedWt { get; set; }
        [XmlIgnore] public double StDvOffTakeWt { get; set; }
        [XmlIgnore] public double StDvDefoliatedN { get; set; }
        [XmlIgnore] public double StDvOffTakeN { get; set; }
        [XmlIgnore] public double StDvNumDefoliations { get; set; }

        [XmlIgnore] public double StDvDeltaSWC { get; set; }
        [XmlIgnore] public double StDvDeltaSurfOMN { get; set; }
        [XmlIgnore] public double StDvDeltaSoilOrgN { get; set; }
        [XmlIgnore] public double StDvDeltaSoilMinN { get; set; }
        [XmlIgnore] public double StDvDeltaPlantN { get; set; }

        // seasonal cumulative totals and overall averages and st. deviation
        [XmlIgnore] public double AccumWinterDefoliatedWt { get; set; }
        [XmlIgnore] public double AccumWinterNumDefoliations { get; set; }
        [XmlIgnore] public double AccumSpringDefoliatedWt { get; set; }
        [XmlIgnore] public double AccumSpringNumDefoliations { get; set; }
        [XmlIgnore] public double AccumSummerDefoliatedWt { get; set; }
        [XmlIgnore] public double AccumSummerNumDefoliations { get; set; }
        [XmlIgnore] public double AccumAutumnDefoliatedWt { get; set; }
        [XmlIgnore] public double AccumAutumnNumDefoliations { get; set; }

        [XmlIgnore] public double AvgWinterDefoliatedWt { get; set; }
        [XmlIgnore] public double AvgWinterNumDefoliations { get; set; }
        [XmlIgnore] public double AvgSpringDefoliatedWt { get; set; }
        [XmlIgnore] public double AvgSpringNumDefoliations { get; set; }
        [XmlIgnore] public double AvgSummerDefoliatedWt { get; set; }
        [XmlIgnore] public double AvgSummerNumDefoliations { get; set; }
        [XmlIgnore] public double AvgAutumnDefoliatedWt { get; set; }
        [XmlIgnore] public double AvgAutumnNumDefoliations { get; set; }

        [XmlIgnore] public double StDvWinterDefoliatedWt { get; set; }
        [XmlIgnore] public double StDvWinterNumDefoliations { get; set; }
        [XmlIgnore] public double StDvSpringDefoliatedWt { get; set; }
        [XmlIgnore] public double StDvSpringNumDefoliations { get; set; }
        [XmlIgnore] public double StDvSummerDefoliatedWt { get; set; }
        [XmlIgnore] public double StDvSummerNumDefoliations { get; set; }
        [XmlIgnore] public double StDvAutumnDefoliatedWt { get; set; }
        [XmlIgnore] public double StDvAutumnNumDefoliations { get; set; }

        //> Internal variables
        private Models.Report myReportAtReset;
        private Models.Report myReportAtEnding;
        private string endDate;
        private double iniSWC;
        private double iniSurfOMN;
        private double iniSoilOrgN;
        private double iniSoilMinN;
        private double iniPlantN;
        private int yearsSkipped;
        private int yearIndex;

        private List<double> annualRainfall = new List<double>();
        private List<double> annualIrrigation = new List<double>();
        private List<double> annualEO = new List<double>();
        private List<double> annualEvaporation = new List<double>();
        private List<double> annualTranspiration = new List<double>();
        private List<double> annualDrainage = new List<double>();
        private List<double> annualRunoff = new List<double>();
        private List<double> annualLatOutflow = new List<double>();

        private List<double> annualFertilisedN = new List<double>();
        private List<double> annualMineralisedN = new List<double>();
        private List<double> annualFixedN = new List<double>();
        private List<double> annualLeachedN = new List<double>();
        private List<double> annualDenitrifiedN = new List<double>();
        private List<double> annualTakenUpN = new List<double>();
        private List<double> annualDetachedN = new List<double>();
        private List<double> annualUrineN = new List<double>();
        private List<double> annualDungN = new List<double>();
        private List<double> annualDungWt = new List<double>();

        private List<double> annualDefoliatedWt = new List<double>();
        private List<double> annualOffTakeWt = new List<double>();
        private List<double> annualDefoliatedN = new List<double>();
        private List<double> annualOffTakeN = new List<double>();
        private List<double> annualNumDefoliations = new List<double>();

        private List<double> annualDeltaSWC = new List<double>();
        private List<double> annualDeltaSurfOMN = new List<double>();
        private List<double> annualDeltaSoilOrgN = new List<double>();
        private List<double> annualDeltaSoilMinN = new List<double>();
        private List<double> annualDeltaPlantN = new List<double>();

        private List<double> annualWinterDefoliatedWt = new List<double>();
        private List<double> annualWinterNumDefoliations = new List<double>();
        private List<double> annualSpringDefoliatedWt = new List<double>();
        private List<double> annualSpringNumDefoliations = new List<double>();
        private List<double> annualSummerDefoliatedWt = new List<double>();
        private List<double> annualSummerNumDefoliations = new List<double>();
        private List<double> annualAutumnDefoliatedWt = new List<double>();
        private List<double> annualAutumnNumDefoliations = new List<double>();

        private int autumnDoY = 60;
        private int winterDoY = 152;
        private int springDoY = 244;
        private int summerDoY = 335;


        [EventSubscribe("StartOfSimulation")]
        private void OnStartOfSimulation(object sender, EventArgs e)
        {
            // set some variables
            endDate = clock.EndDate.ToString("dd-MMM");
            yearIndex = -1;
            YearsSummed = 0;
            if (SkipYearsBeforeSumming)
            { // start summing after a number of years (reset cycles)
                yearsSkipped = -1;
                if(DateUtilities.DatesEqual(ResetDate, clock.Today))
                { // count today as first cycle
                    yearsSkipped += 1;
                }
                IsInitialDay = false;
            }
            else
            { // start summing since start of simulation
                YearsToSkip = 0;
                yearsSkipped = 0;
                IsInitialDay = true;
            }

            // get agent number (assuming vcsn)
            char[] separator = new char[] {'\\', '/'};
            string[] aux = (weather.FileName).Split(separator);
            Agent = aux[aux.Length-1].Replace(".met","");

            // check report table names
            myReportAtReset = this.FindInScope(ResetRecordTableName) as Models.Report;
            myReportAtEnding = this.FindInScope(EndingRecordTableName) as Models.Report;

            // write message in summary
            summary.WriteMessage(this," Extra variables and reporting initialised", MessageType.Diagnostic);
            if(SkipYearsBeforeSumming)
            {
                summary.WriteMessage(this,"   Summary will start " + YearsToSkip + " years after the simulation starts", MessageType.Diagnostic);
            }
            else
            {
                summary.WriteMessage(this,"   Summary will be computed from the start of simulation", MessageType.Diagnostic);
            }
            summary.WriteMessage(this,"   Cumulative variables will be reset every year on " + ResetDate, MessageType.Diagnostic);
            if(TriggerRecordAtResetEnabled)
            {
                summary.WriteMessage(this,"   Variables on \"" + ResetRecordTableName + "\" will be recorded each time the cumulative values are reset", MessageType.Diagnostic);
            }
            if(TriggerRecordAtEndingEnabled)
            {
                summary.WriteMessage(this,"   Variables on \"" + EndingRecordTableName + "\" will be recorded at the end of the simulation", MessageType.Diagnostic);
            }
        }

        [EventSubscribe("StartOfDay")]
        private void OnStartOfDay(object sender, EventArgs e)
        {
            if (IsInitialDay == true)
            { // get values at the beggining of the overall recording period
                InitialSWC = MathUtilities.Sum(waterBalance.SWmm);
                InitialSurfOMN = surfaceOM.N;
                InitialSoilOrgN = MathUtilities.Sum(soilNitrogen.FOMN) + MathUtilities.Sum(soilNitrogen.MicrobialN) + MathUtilities.Sum(soilNitrogen.HumicN);
                InitialSoilMinN = MathUtilities.Sum(Urea.kgha) + MathUtilities.Sum(NH4.kgha) + MathUtilities.Sum(NO3.kgha);
                InitialPlantN = (double)myZone.Get("[AgPRyegrass].TotalN") + (double)myZone.Get("[AgPWhiteClover].TotalN");

                IsInitialDay = false;
            }

            if(DateUtilities.DatesEqual(ResetDate, clock.Today))
            {
                // new year to accumulate values, add counter
                yearIndex += 1;

                // zero all the cumulative variables
                resetVariables();

                // get the values at the beggining of the recording year, to compute deltas
                getInitialValues();
            }
        }

        [EventSubscribe("EndOfDay")]
        private void OnEndOfDay(object sender, EventArgs e)
        {
            if (yearsSkipped >= YearsToSkip)
            { // get state totals and the cumulatives for this recording cycle
                getSoilTotals();
                getCumulatives();
            }

            if(DateUtilities.DatesEqual(ResetDate, clock.Today.AddDays(1)))
            { // day before reset, check report
                if (yearsSkipped < YearsToSkip)
                {
                    yearsSkipped += 1;
                    if (yearsSkipped == YearsToSkip)
                    { // start accumulating, from tomorrow onwards
                        IsInitialDay = true;
                    }
                }
                else
                { // end of recording period
                    getAnnualDeltas();
                    getAnnualCumulatives();
                    YearsSummed += 1;
                    if(TriggerRecordAtResetEnabled)
                    {
                        myReportAtReset.DoOutput();
                    }
                }
            }

            if(TriggerRecordAtEndingEnabled && (clock.Today.Date == clock.EndDate.Date))
            { // last day of simulation
                getOverallAverages();
                getOverallStandardDeviations();
                myReportAtEnding.DoOutput();
            }
        }

        private void resetVariables()
        {
            // zero all cumulative variables
            AccumRainfall = 0.0;
            AccumIrrigation = 0.0;
            AccumEO = 0.0;
            AccumEvaporation = 0.0;
            AccumTranspiration = 0.0;
            AccumDrainage = 0.0;
            AccumRunoff = 0.0;
            AccumLateralOutFlow = 0.0;

            AccumFertilisedN = 0.0;
            AccumMineralisedN = 0.0;
            AccumFixedN = 0.0;
            AccumLeachedN = 0.0;
            AccumDenitrifiedN = 0.0;
            AccumTakenUpN = 0.0;
            AccumDetachedN = 0.0;
            AccumUrineN = 0.0;
            AccumDungN = 0.0;
            AccumDungWt = 0.0;

            AccumDefoliatedWt = 0.0;
            AccumDefoliatedN = 0.0;
            AccumOffTakeWt = 0.0;
            AccumOffTakeN = 0.0;
            AccumNumDefoliations = 0;

            DeltaSWC = 0.0;
            DeltaSurfOMN = 0.0;
            DeltaSoilOrgN = 0.0;
            DeltaSoilMinN = 0.0;
            DeltaPlantN = 0.0;

            AccumWinterDefoliatedWt = 0.0;
            AccumWinterNumDefoliations = 0.0;
            AccumSpringDefoliatedWt = 0.0;
            AccumSpringNumDefoliations = 0.0;
            AccumSummerDefoliatedWt = 0.0;
            AccumSummerNumDefoliations = 0.0;
            AccumAutumnDefoliatedWt = 0.0;
            AccumAutumnNumDefoliations = 0.0;
        }

        private void getInitialValues()
        {
            // get initial values for this recording cycle
            iniSWC = MathUtilities.Sum(waterBalance.SWmm);
            iniSurfOMN = surfaceOM.N;
            iniSoilOrgN = MathUtilities.Sum(soilNitrogen.FOMN) + MathUtilities.Sum(soilNitrogen.MicrobialN) + MathUtilities.Sum(soilNitrogen.HumicN);
            iniSoilMinN = MathUtilities.Sum(Urea.kgha) + MathUtilities.Sum(NH4.kgha) + MathUtilities.Sum(NO3.kgha);
            iniPlantN = (double)myZone.Get("[AgPRyegrass].TotalN") + (double)myZone.Get("[AgPWhiteClover].TotalN");
        }

        private void getSoilTotals()
        {
            TotalSWC = MathUtilities.Sum(waterBalance.SWmm);
            TotalDUL = MathUtilities.Sum(soilPhysical.DULmm);
            TotalWaterDeficit = (TotalSWC - TotalDUL);

            TotalFomN = MathUtilities.Sum(soilNitrogen.FOMN);
            TotalHumN = MathUtilities.Sum(soilNitrogen.HumicN);
            TotalBiomN = MathUtilities.Sum(soilNitrogen.MicrobialN);
            TotalOrganicN = TotalFomN + TotalBiomN + TotalHumN;
            TotalNO3N = MathUtilities.Sum(NO3.kgha);
            TotalNH4N = MathUtilities.Sum(NH4.kgha);
            TotalUreaN = MathUtilities.Sum(Urea.kgha);
            TotalMineralN = TotalUreaN + TotalNH4N + TotalNO3N;
        }

        private void getCumulatives()
        {
            // accumulate the values of several outputs, for each year
            AccumRainfall += weather.Rain;
            AccumIrrigation += irrigator.IrrigationApplied;
            AccumEO += waterBalance.Eo;
            AccumEvaporation += waterBalance.Es;
            double[] auxE = (double[])myZone.Get("[AgPRyegrass].WaterUptake");
            AccumTranspiration += MathUtilities.Sum(auxE);
            auxE = (double[])myZone.Get("[AgPWhiteClover].WaterUptake");
            AccumTranspiration += MathUtilities.Sum(auxE);
            AccumDrainage += waterBalance.Drainage;
            AccumRunoff += waterBalance.Runoff;
            double auxLatFlow = MathUtilities.Sum(waterBalance.LateralOutflow);
            AccumLateralOutFlow += auxLatFlow;

            AccumFertilisedN += fertiliser.NitrogenApplied;
            AccumMineralisedN += MathUtilities.Sum(soilNitrogen.dlt_n_min_tot);
            AccumFixedN += (double)myZone.Get("[AgPWhiteClover].FixedN");
            AccumLeachedN += (waterBalance.LeachNO3 + waterBalance.LeachNH4 + waterBalance.LeachUrea);
            AccumDenitrifiedN += MathUtilities.Sum(soilNitrogen.Denitrification);
            AccumTakenUpN += ((double)myZone.Get("[AgPRyegrass].SoilUptakeN") + (double)myZone.Get("[AgPWhiteClover].SoilUptakeN"));
            AccumDetachedN += ((double)myZone.Get("[AgPRyegrass].LitterDepositionN")+(double)myZone.Get("[AgPRyegrass].RootDetachedN")+(double)myZone.Get("[AgPWhiteClover].LitterDepositionN")+(double)myZone.Get("[AgPWhiteClover].RootDetachedN"));
            AccumUrineN += (double)myZone.Get("[DefoliationManager].DefoliationManagerScript.NReturnedInUrine")*10.0;
            AccumUrineN += (double)myZone.Get("[ApplyUrineOnGivenDate].Script.UrineNDeposited");
            AccumDungN += (double)myZone.Get("[DefoliationManager].DefoliationManagerScript.NReturnedInDung")*10.0;
            AccumDungWt += (double)myZone.Get("[DefoliationManager].DefoliationManagerScript.ReturnedWt")*10.0;

            double AuxDefoliation = (double)myZone.Get("[DefoliationManager].DefoliationManagerScript.DefoliatedWt");
            if (AuxDefoliation > 0.0)
            {
                AccumNumDefoliations += 1;
                AccumDefoliatedWt += AuxDefoliation*10.0;
                AccumDefoliatedN += (double)myZone.Get("[DefoliationManager].DefoliationManagerScript.DefoliatedN")*10.0;
                AccumOffTakeWt += (double)myZone.Get("[DefoliationManager].DefoliationManagerScript.RemovedWt")*10.0;
                AccumOffTakeN += (double)myZone.Get("[DefoliationManager].DefoliationManagerScript.RemovedN")*10.0;

                // accumulate values for each season
                if((clock.Today.DayOfYear >= autumnDoY) && (clock.Today.DayOfYear < winterDoY))
                {
                    AccumAutumnDefoliatedWt += AuxDefoliation*10.0;
                    AccumAutumnNumDefoliations += 1.0;
                }
                else if((clock.Today.DayOfYear >= winterDoY) && (clock.Today.DayOfYear < springDoY))
                {
                    AccumWinterDefoliatedWt += AuxDefoliation*10.0;
                    AccumWinterNumDefoliations += 1.0;
                }
                else if((clock.Today.DayOfYear >= springDoY) && (clock.Today.DayOfYear < summerDoY))
                {
                    AccumSpringDefoliatedWt += AuxDefoliation*10.0;
                    AccumSpringNumDefoliations += 1.0;
                }
                else
                {
                    AccumSummerDefoliatedWt += AuxDefoliation*10.0;
                    AccumSummerNumDefoliations += 1.0;
                }
            }
        }

        private void getAnnualDeltas()
        {
            // get deltas (difference between initial, at reset, and current values)
            DeltaSWC = MathUtilities.Sum(waterBalance.SWmm) - iniSWC;
            DeltaSurfOMN = surfaceOM.N - iniSurfOMN;
            DeltaSoilOrgN = MathUtilities.Sum(soilNitrogen.FOMN) + MathUtilities.Sum(soilNitrogen.MicrobialN) + MathUtilities.Sum(soilNitrogen.HumicN) - iniSoilOrgN;
            DeltaSoilMinN = MathUtilities.Sum(Urea.kgha) + MathUtilities.Sum(NH4.kgha) + MathUtilities.Sum(NO3.kgha) - iniSoilMinN;
            DeltaPlantN = (double)myZone.Get("[AgPRyegrass].TotalN") + (double)myZone.Get("[AgPWhiteClover].TotalN") - iniPlantN;

            // accumulate overall deltas
            annualDeltaSWC.Add(DeltaSWC);
            annualDeltaSurfOMN.Add(DeltaSurfOMN);
            annualDeltaSoilOrgN.Add(DeltaSoilOrgN);
            annualDeltaSoilMinN.Add(DeltaSoilMinN);
            annualDeltaPlantN.Add(DeltaPlantN);
        }

        private void getAnnualCumulatives()
        {
            // save the values of cumulative of each recording cycle
            annualRainfall.Add(AccumRainfall);
            annualIrrigation.Add(AccumIrrigation);
            annualEO.Add(AccumEO);
            annualEvaporation.Add(AccumEvaporation);
            annualTranspiration.Add(AccumTranspiration);
            annualDrainage.Add(AccumDrainage);
            annualRunoff.Add(AccumRunoff);
            annualLatOutflow.Add(AccumLateralOutFlow);

            annualFertilisedN.Add(AccumFertilisedN);
            annualMineralisedN.Add(AccumMineralisedN);
            annualFixedN.Add(AccumFixedN);
            annualLeachedN.Add(AccumLeachedN);
            annualDenitrifiedN.Add(AccumDenitrifiedN);
            annualTakenUpN.Add(AccumTakenUpN);
            annualDetachedN.Add(AccumDetachedN);
            annualUrineN.Add(AccumUrineN);
            annualDungN.Add(AccumDungN);
            annualDungWt.Add(AccumDungWt);

            annualDefoliatedWt.Add(AccumDefoliatedWt);
            annualOffTakeWt.Add(AccumOffTakeWt);
            annualDefoliatedN.Add(AccumDefoliatedN);
            annualOffTakeN.Add(AccumOffTakeN);
            annualNumDefoliations.Add(AccumNumDefoliations);

            annualWinterDefoliatedWt.Add(AccumWinterDefoliatedWt);
            annualWinterNumDefoliations.Add(AccumWinterNumDefoliations);
            annualSpringDefoliatedWt.Add(AccumSpringDefoliatedWt);
            annualSpringNumDefoliations.Add(AccumSpringNumDefoliations);
            annualSummerDefoliatedWt.Add(AccumSummerDefoliatedWt);
            annualSummerNumDefoliations.Add(AccumSummerNumDefoliations);
            annualAutumnDefoliatedWt.Add(AccumAutumnDefoliatedWt);
            annualAutumnNumDefoliations.Add(AccumAutumnNumDefoliations);
        }

        private void getOverallAverages()
        {
            // annual values
            AvgRainfall = MathUtilities.Average(annualRainfall);
            AvgIrrigation = MathUtilities.Average(annualIrrigation);
            AvgEO = MathUtilities.Average(annualEO);
            AvgEvaporation = MathUtilities.Average(annualEvaporation);
            AvgTranspiration = MathUtilities.Average(annualTranspiration);
            AvgDrainage = MathUtilities.Average(annualDrainage);
            AvgRunoff = MathUtilities.Average(annualRunoff);
            AvgLatOutflow = MathUtilities.Average(annualLatOutflow);

            AvgFertilisedN = MathUtilities.Average(annualFertilisedN);
            AvgMineralisedN = MathUtilities.Average(annualMineralisedN);
            AvgFixedN = MathUtilities.Average(annualFixedN);
            AvgLeachedN = MathUtilities.Average(annualLeachedN);
            AvgDenitrifiedN = MathUtilities.Average(annualDenitrifiedN);
            AvgTakenUpN = MathUtilities.Average(annualTakenUpN);
            AvgDetachedN = MathUtilities.Average(annualDetachedN);
            AvgUrineN = MathUtilities.Average(annualUrineN);
            AvgDungN = MathUtilities.Average(annualDungN);
            AvgDungWt = MathUtilities.Average(annualDungWt);

            AvgDefoliatedWt = MathUtilities.Average(annualDefoliatedWt);
            AvgOffTakeWt = MathUtilities.Average(annualOffTakeWt);
            AvgDefoliatedN = MathUtilities.Average(annualDefoliatedN);
            AvgOffTakeN = MathUtilities.Average(annualOffTakeN);
            AvgNumDefoliations = MathUtilities.Average(annualNumDefoliations);

            // overall deltas
            AvgDeltaSWC = MathUtilities.Average(annualDeltaSWC);
            AvgDeltaSurfOMN = MathUtilities.Average(annualDeltaSurfOMN);
            AvgDeltaSoilOrgN = MathUtilities.Average(annualDeltaSoilOrgN);
            AvgDeltaSoilMinN = MathUtilities.Average(annualDeltaSoilMinN);
            AvgDeltaPlantN = MathUtilities.Average(annualDeltaPlantN);

            // seasonal yields
            AvgAutumnDefoliatedWt = MathUtilities.Average(annualAutumnDefoliatedWt);
            AvgAutumnNumDefoliations = MathUtilities.Average(annualAutumnNumDefoliations);
            AvgWinterDefoliatedWt = MathUtilities.Average(annualWinterDefoliatedWt);
            AvgWinterNumDefoliations = MathUtilities.Average(annualWinterNumDefoliations);
            AvgSpringDefoliatedWt = MathUtilities.Average(annualSpringDefoliatedWt);
            AvgSpringNumDefoliations = MathUtilities.Average(annualSpringNumDefoliations);
            AvgSummerDefoliatedWt = MathUtilities.Average(annualSummerDefoliatedWt);
            AvgSummerNumDefoliations = MathUtilities.Average(annualSummerNumDefoliations);
        }

        private void getOverallStandardDeviations()
        {
            // annual values
            StDvRainfall = MathUtilities.StandardDeviation(annualRainfall);
            StDvIrrigation = MathUtilities.StandardDeviation(annualIrrigation);
            StDvEO = MathUtilities.StandardDeviation(annualEO);
            StDvEvaporation = MathUtilities.StandardDeviation(annualEvaporation);
            StDvTranspiration = MathUtilities.StandardDeviation(annualTranspiration);
            StDvDrainage = MathUtilities.StandardDeviation(annualDrainage);
            StDvRunoff = MathUtilities.StandardDeviation(annualRunoff);
            StDvLatOutflow = MathUtilities.StandardDeviation(annualLatOutflow);

            StDvFertilisedN = MathUtilities.StandardDeviation(annualFertilisedN);
            StDvMineralisedN = MathUtilities.StandardDeviation(annualMineralisedN);
            StDvFixedN = MathUtilities.StandardDeviation(annualFixedN);
            StDvLeachedN = MathUtilities.StandardDeviation(annualLeachedN);
            StDvDenitrifiedN = MathUtilities.StandardDeviation(annualDenitrifiedN);
            StDvTakenUpN = MathUtilities.StandardDeviation(annualTakenUpN);
            StDvDetachedN = MathUtilities.StandardDeviation(annualDetachedN);
            StDvUrineN = MathUtilities.StandardDeviation(annualUrineN);
            StDvDungN = MathUtilities.StandardDeviation(annualDungN);
            StDvDungWt = MathUtilities.StandardDeviation(annualDungWt);

            StDvDefoliatedWt = MathUtilities.StandardDeviation(annualDefoliatedWt);
            StDvOffTakeWt = MathUtilities.StandardDeviation(annualOffTakeWt);
            StDvDefoliatedN = MathUtilities.StandardDeviation(annualDefoliatedN);
            StDvOffTakeN = MathUtilities.StandardDeviation(annualOffTakeN);
            StDvNumDefoliations = MathUtilities.StandardDeviation(annualNumDefoliations);

            // overall deltas
            StDvDeltaSWC = MathUtilities.StandardDeviation(annualDeltaSWC);
            StDvDeltaSurfOMN = MathUtilities.StandardDeviation(annualDeltaSurfOMN);
            StDvDeltaSoilOrgN = MathUtilities.StandardDeviation(annualDeltaSoilOrgN);
            StDvDeltaSoilMinN = MathUtilities.StandardDeviation(annualDeltaSoilMinN);
            StDvDeltaPlantN = MathUtilities.StandardDeviation(annualDeltaPlantN);

            // seasonal yields
            StDvAutumnDefoliatedWt = MathUtilities.StandardDeviation(annualAutumnDefoliatedWt);
            StDvAutumnNumDefoliations = MathUtilities.StandardDeviation(annualAutumnNumDefoliations);
            StDvWinterDefoliatedWt = MathUtilities.StandardDeviation(annualWinterDefoliatedWt);
            StDvWinterNumDefoliations = MathUtilities.StandardDeviation(annualWinterNumDefoliations);
            StDvSpringDefoliatedWt = MathUtilities.StandardDeviation(annualSpringDefoliatedWt);
            StDvSpringNumDefoliations = MathUtilities.StandardDeviation(annualSpringNumDefoliations);
            StDvSummerDefoliatedWt = MathUtilities.StandardDeviation(annualSummerDefoliatedWt);
            StDvSummerNumDefoliations = MathUtilities.StandardDeviation(annualSummerNumDefoliations);
        }
    }
}
```
        MicroClimate: a_interception=0; b_interception=1; c_interception=0; d_interception=0; SoilHeatFluxFraction=0.4; MinimumHeightDiffForNewLayer=0; NightInterceptionFraction=0.5; ReferenceHeight=2
        Irrigation
        Fertiliser
        SurfaceOrganicMatter: InitialResidueName=grass; InitialResidueType=grass; InitialResidueMass=1000; InitialStandingFraction=0; InitialCPR=0; InitialCNR=25
        Soil: SoilType=Generic Deep Loamy Soil; LocalName=VeryDeep_MediumLoam_WellDrained_ModeratePAW; Country=New Zealand; Latitude=0; Longitude=0
          DataSource=Generic profile description for a well drained stoneless medium textured soil, with no root growth limitations to 2.0m and medium PAW (180mm in top 1.0m)
          Physical
            Thickness  ParticleSizeClay  ParticleSizeSand  ParticleSizeSilt  Rocks  BD    AirDry  LL15   DUL    SAT    KS
            100        17.5              32                50.5              0      1.1   0.058   0.174  0.369  0.53   1200
            150        18.5              33                48.5              0      1.2   0.15    0.166  0.35   0.505  899
            250        18                35                47                0      1.35  0.135   0.135  0.319  0.455  377
            250        15.5              47.5              37                0      1.45  0.11    0.11   0.289  0.42   482
            250        15                48                37                0      1.45  0.109   0.109  0.28   0.421  623
            250        14                50                36                0      1.45  0.101   0.101  0.244  0.423  453
            250        12                54                34                0      1.42  0.095   0.095  0.228  0.419  682
            250        12                55                33                0      1.4   0.098   0.098  0.209  0.419  706
            250        12                55                33                0      1.4   0.102   0.102  0.195  0.411  767
            SoilCrop MaizeSoil
              LL=[0.174, 0.166, 0.135, 0.11, 0.109, 0.101, 0.095, 0.098, 0.102]
              KL=[0.085, 0.07, 0.055, 0.04, 0.015, 0.006, 0.003, 0.001, 0.001]
              XF=[1, 1, 1, 1, 1, 1, 1, 1, 1]
            SoilCrop FodderBeetSoil
              LL=[0.174, 0.166, 0.135, 0.11, 0.109, 0.101, 0.095, 0.098, 0.102]
              KL=[0.09, 0.065, 0.05, 0.03, 0.015, 0.005, 0.002, 0, 0]
              XF=[1, 1, 1, 1, 1, 1, 1, 1, 1]
            SoilCrop OatsSoil
              LL=[0.174, 0.166, 0.135, 0.11, 0.109, 0.101, 0.095, 0.098, 0.102]
              KL=[0.082, 0.063, 0.049, 0.035, 0.02, 0.01, 0.005, 0.002, 0]
              XF=[1, 1, 1, 1, 1, 1, 1, 1, 1]
            SoilCrop PotatoSoil
              LL=[0.174, 0.166, 0.135, 0.11, 0.109, 0.101, 0.095, 0.098, 0.102]
              KL=[0.08, 0.07, 0.05, 0.035, 0.005, 0, 0, 0, 0]
              XF=[1, 1, 1, 1, 1, 1, 1, 1, 1]
            SoilCrop GrapevineSoil
              LL=[0.174, 0.166, 0.135, 0.11, 0.109, 0.101, 0.095, 0.098, 0.102]
              KL=[0.075, 0.06, 0.045, 0.025, 0.012, 0.006, 0.003, 0.002, 0.001]
              XF=[1, 1, 1, 1, 1, 1, 1, 1, 1]
            SoilCrop BarleySoil
              LL=[0.174, 0.166, 0.135, 0.11, 0.109, 0.101, 0.095, 0.098, 0.102]
              KL=[0.09, 0.075, 0.055, 0.04, 0.02, 0.008, 0.002, 0, 0]
              XF=[1, 1, 1, 1, 1, 1, 1, 1, 1]
            SoilCrop WheatSoil
              LL=[0.174, 0.166, 0.135, 0.11, 0.109, 0.101, 0.095, 0.098, 0.102]
              KL=[0.09, 0.075, 0.055, 0.04, 0.02, 0.008, 0.002, 0, 0]
              XF=[1, 1, 1, 1, 1, 1, 1, 1, 1]
            SoilCrop LucerneSoil
              LL=[0.174, 0.166, 0.135, 0.11, 0.109, 0.101, 0.095, 0.098, 0.102]
              KL=[0.08, 0.07, 0.05, 0.033, 0.02, 0.01, 0.006, 0.003, 0.002]
              XF=[1, 1, 1, 1, 1, 1, 1, 1, 1]
            SoilCrop AgPRyegrassSoil
              LL=[0.174, 0.166, 0.135, 0.11, 0.109, 0.101, 0.095, 0.098, 0.102]
              KL=[0.085, 0.07, 0.055, 0.04, 0.015, 0.006, 0.003, 0.001, 0.001]
              XF=[1, 1, 1, 1, 1, 1, 1, 1, 1]
            SoilCrop AgPWhiteCloverSoil
              LL=[0.174, 0.166, 0.135, 0.11, 0.109, 0.101, 0.095, 0.098, 0.102]
              KL=[0.085, 0.07, 0.055, 0.04, 0.015, 0.006, 0.003, 0.001, 0.001]
              XF=[1, 1, 1, 1, 1, 1, 1, 1, 1]
          WaterBalance SoilWater: SummerDate=1-Oct; SummerU=8; SummerCona=4; WinterDate=1-Apr; WinterU=4; WinterCona=1.5; DiffusConst=88; DiffusSlope=35; Salb=0.2; CN2Bare=60; CNRed=20; CNCov=0.8; DischargeWidth=0; CatchmentArea=0; PSIDul=-100; Thickness=[100, 150, 250, 250, 250, 250, 250, 250, 250]
            SWCON=[0.574, 0.537, 0.467, 0.484, 0.493, 0.471, 0.496, 0.507, 0.523]
          Organic: FOMCNRatio=40; CarbonUnits=Total
            Thickness  Carbon  SoilCNRatio  FBiom  FInert  FOM
            100        3       11.8         0.08   0.314   716.5
            150        2.1     11.8         0.05   0.475   677.4
            250        0.75    11.8         0.008  0.779   432.7
            250        0.3     11.8         0.008  0.937   124
            250        0.2     11.8         0.008  0.967   35.5
            250        0.2     11.8         0.008  0.989   10.2
            250        0.2     11.8         0.008  0.992   2.9
            250        0.2     11.8         0.008  0.993   0.8
            250        0.2     11.8         0.008  0.994   0
          Chemical: Thickness=[100, 150, 250, 250, 250, 250, 250, 250, 250]; PH=[6, 6, 6, 6, 6, 6, 6, 6, 6]; PHUnits=Water
          SoilNitrogen: fom_types=[default, manure, mucuna, lablab, shemp, stable]; fract_carb=[0.2, 0.3, 0.54, 0.57, 0.45, 0]; fract_cell=[0.7, 0.3, 0.37, 0.37, 0.47, 0.1]; fract_lign=[0.1, 0.4, 0.09, 0.06, 0.08, 0.9]; NPartitionApproach=0
          CERESSoilTemperature Temperature
          Water: Thickness=[100, 150, 250, 250, 250, 250, 250, 250, 250]; RelativeTo=LL15; FilledFromTop=false
            InitialValues=[0.35925, 0.3408, 0.3098, 0.28005, 0.27145, 0.23685, 0.22135, 0.20345, 0.19035]
          SoilNitrogenNO3 NO3: Thickness=[100, 150, 250, 250, 250, 250, 250, 250, 250]; InitialValuesUnits=ppm; WaterTableConcentration=0; D0=0
            InitialValues=[8.06202, 7.7037, 2.5, 1.28205, 0.952381, 0.701754, 0.45977, 0.344828, 0.2]
          SoilNitrogenNH4 NH4: Thickness=[100, 150, 250, 250, 250, 250, 250, 250, 250]; InitialValuesUnits=ppm; WaterTableConcentration=0; D0=0
            InitialValues=[1.24031, 1.18519, 0.277778, 0.128205, 0.119048, 0.116959, 0.114943, 0.172414, 0.1]
          SoilNitrogenUrea Urea: Thickness=[100, 150, 250, 250, 250, 250, 250, 250, 250]; InitialValues=[0, 0, 0, 0, 0, 0, 0, 0, 0]; InitialValuesUnits=kg/ha; WaterTableConcentration=0; D0=0
        PastureSpecies AGPRyegrass: doyGermination=275; daysEmergenceToAnthesis=120; daysAnthesisToMaturity=85; degreesDayForAnthesis=1100; degreesDayForMaturity=900; daysAnnualsFactor=45; InitialShootDM=1250; InitialRootDM=450; InitialRootDepth=1000; initialDMFractionsGrasses=[0.15, 0.25, 0.25, 0.05, 0.05, 0.1, 0.1, 0.05, 0, 0, 0]; initialDMFractionsForbs=[0.2, 0.2, 0.15, 0.05, 0.1, 0.15, 0.1, 0.05, 0, 0, 0]; PhotosyntheticEfficiency=0.01; PhotosynthesisCurveFactor=0.8; FractionPAR=0.5; ReferenceCO2=380; CO2EffectScaleFactor=700; CO2EffectOffsetFactor=600; CO2EffectMinimum=0.7; CO2EffectExponent=2; ReproSeasonDurationCoeff=2; ReproSeasonShouldersLengthFactor=1; ReproSeasonOnsetDurationFactor=0.6; RelativeTurnoverEmerging=2; DetachmentDroughtCoefficient=3; DetachmentDroughtEffectMin=0.1; TurnoverStockFactor=0.01; TurnoverDefoliationEffectMin=0.025; MinimumGreenLeafProp=0.8; MinimumGreenRootProp=0.5
          initialDMFractionsLegumes=[0.16, 0.23, 0.22, 0.05, 0.03, 0.05, 0.05, 0.01, 0.04, 0.08, 0.08]
          LinearInterpolationFunction FVPDFunction
        PastureSpecies AGPWhiteClover: doyGermination=275; daysEmergenceToAnthesis=120; daysAnthesisToMaturity=85; degreesDayForAnthesis=1100; degreesDayForMaturity=900; daysAnnualsFactor=45; InitialShootDM=500; InitialRootDM=150; InitialRootDepth=350; initialDMFractionsGrasses=[0.15, 0.25, 0.25, 0.05, 0.05, 0.1, 0.1, 0.05, 0, 0, 0]; initialDMFractionsForbs=[0.2, 0.2, 0.15, 0.05, 0.1, 0.15, 0.1, 0.05, 0, 0, 0]; PhotosyntheticEfficiency=0.01; PhotosynthesisCurveFactor=0.8; FractionPAR=0.5; ReferenceCO2=380; CO2EffectScaleFactor=700; CO2EffectOffsetFactor=600; CO2EffectMinimum=0.7; CO2EffectExponent=2; ReproSeasonDurationCoeff=2; ReproSeasonShouldersLengthFactor=1; ReproSeasonOnsetDurationFactor=0.6; RelativeTurnoverEmerging=2; DetachmentDroughtCoefficient=3; DetachmentDroughtEffectMin=0.1; TurnoverStockFactor=0.01; TurnoverDefoliationEffectMin=0.025; MinimumGreenLeafProp=0.8; MinimumGreenRootProp=0.5
          initialDMFractionsLegumes=[0.16, 0.23, 0.22, 0.05, 0.03, 0.05, 0.05, 0.01, 0.04, 0.08, 0.08]
          LinearInterpolationFunction FVPDFunction
        Report BaseReport: EventNames=[Clock].DoReport
          VariableNames:
            [Clock].Today as Date
            [Clock].Today.DayOfYear as DayOfYear
            // Water outputs
            [Weather].Rain as Rainfall
            [Irrigation].IrrigationApplied as Irrigation
            [MicroClimate].PrecipitationInterception as PrecipitationInterception
            [Soil].SoilWater.Es as Evaporation
            (sum([AgPRyegrass].WaterUptake) + sum([AgPWhiteClover].WaterUptake)) as Transpiration
            [Soil].SoilWater.pond as PondedWater
            [Soil].SoilWater.Drainage as Drainage
            [Soil].SoilWater.Runoff as Runoff
            sum([Soil].Water.MM) as TotalSWC
            sum([Soil].Physical.SATmm) as TotalSAT
            sum([Soil].Physical.DULmm) as TotalDUL
            sum([Soil].Physical.LL15mm) as TotalLL15
            [Soil].Water.Volumetric[1] as TopLayerSWC
            [Soil].Physical.DUL[1] as TopLayerDUL
            [Soil].Physical.LL15[1] as TopLayerLL15
            [AutomaticIrrigation].Script.IrrigLayerSWDeficit as IrrigLayerSWDeficit
            // Nitrogen outputs
            [Fertiliser].NitrogenApplied as FertiliserN
            [DefoliationManager].DefoliationManagerScript.NReturnedInDung*10.0 as DungDepositedN
            ([DefoliationManager].DefoliationManagerScript.NReturnedInUrine*10.0 + [ApplyUrineOnGivenDate].Script.UrineNDeposited) as UrineDepositedN
            [AgPWhiteClover].FixedN as FixedN
            sum([Soil].SoilNitrogen.Denitrification) as DenitrifiedN
            ([Soil].SoilWater.LeachUrea + [Soil].SoilWater.LeachNH4 + [Soil].SoilWater.LeachNO3) as LeachedN
            ([AgPRyegrass].SoilUptakeN + [AgPWhiteClover].SoilUptakeN) as UptakeN
            (sum([Soil].SoilNitrogen.MineralisedN) + sum([Soil].SoilNitrogen.dlt_n_min_res)) as NetMineralisedN
            sum([Soil].SoilNitrogen.MineralisedN) as MineralisedSoilN
            sum([Soil].SoilNitrogen.dlt_n_min_res) as MineralisedSurfOMN
            ([AgPRyegrass].LitterDepositionN + [AgPRyegrass].RootDetachedN + [AgPWhiteClover].LitterDepositionN + [AgPWhiteClover].RootDetachedN) as DetachedPlantN
            (sum([Soil].Urea.kgha) + sum([Soil].NH4.kgha) + sum([Soil].NO3.kgha)) as TotalMineralN
            (sum([Soil].Urea.kgha[1:5]) + sum([Soil].NH4.kgha[1:5]) + sum([Soil].NO3.kgha[1:5])) as TopMeterMineralN
            sum([Soil].Urea.kgha) as TotalUrea
            sum([Soil].NH4.kgha) as TotalNH4
            sum([Soil].NO3.kgha) as TotalNO3
            (sum([Soil].Urea.kgha[1:5]) + sum([Soil].NH4.kgha[1:5]) + sum([Soil].NO3.kgha[1:5])) as RootZoneSoilN
            [SurfaceOrganicMatter].N as TotalSurfOMN
            sum([Soil].SoilNitrogen.FOMN) as TotalFOMN
            sum([Soil].SoilNitrogen.HumicN) as TotalHumicN
            sum([Soil].SoilNitrogen.MicrobialN) as TotalMicrobialN
            ([AgPRyegrass].TotalN + [AgPWhiteClover].TotalN) as TotalPlantN
            // Sward outputs
            ([AgPRyegrass].TotalWt + [AgPWhiteClover].TotalWt) as TotalPlantWt
            ([AgPRyegrass].AboveGroundLiveWt + [AgPRyegrass].BelowGroundLiveWt + [AgPWhiteClover].AboveGroundLiveWt + [AgPWhiteClover].BelowGroundLiveWt) as TotalPlantLiveWt
            ([AgPRyegrass].AboveGroundDeadWt + [AgPWhiteClover].AboveGroundDeadWt) as TotalPlantDeadWt
            ([AgPRyegrass].AboveGroundWt + [AgPWhiteClover].AboveGroundWt) as AboveGroundPlantWt
            ([AgPRyegrass].BelowGroundWt + [AgPWhiteClover].BelowGroundWt) as BelowGroundPlantWt
            ([AgPRyegrass].AboveGroundN + [AgPWhiteClover].AboveGroundN)/([AgPRyegrass].AboveGroundWt + [AgPWhiteClover].AboveGroundWt + 0.000000001) as AboveGroundNConc
            ([AgPRyegrass].BelowGroundN + [AgPWhiteClover].BelowGroundN)/([AgPRyegrass].BelowGroundWt + [AgPWhiteClover].BelowGroundWt+ 0.000000001) as BelowGroundNConc
            ([AgPRyegrass].LAIGreen + [AgPWhiteClover].LAIGreen) as LAIGreen
            ([AgPRyegrass].LAIDead + [AgPWhiteClover].LAIDead) as LAIDead
            [MicroClimate].CanopyCover as CoverTotal
            [AgPWhiteClover].AboveGroundWt/([AgPRyegrass].AboveGroundWt + [AgPWhiteClover].AboveGroundWt + 0.000000001) as CloverContentField
            // Defoliation outputs
            [DefoliationManager].DefoliationManagerScript.HarvestedWt*10.0 as DefoliatedWt
            [DefoliationManager].DefoliationManagerScript.HarvestedN*10.0 as DefoliatedN
            [DefoliationManager].DefoliationManagerScript.RemovedWt*10.0 as OffTakePlantWt
            [DefoliationManager].DefoliationManagerScript.RemovedN*10.0 as OffTakePlantN
            [DefoliationManager].DefoliationManagerScript.HarvestedN/([DefoliationManager].DefoliationManagerScript.HarvestedWt + 0.000000001) as DefoliatedNconc
            [AgPWhiteClover].HarvestedWt/([AgPRyegrass].HarvestedWt + [AgPWhiteClover].HarvestedWt + 0.000000001) as CloverContentDefoliated
            ([AgPRyegrass].Harvestable.Wt + [AgPWhiteClover].Harvestable.Wt) as HarvestablePlantWt
            [DefoliationManager].DefoliationManagerScript.PreHarvestDM*10.0 as PreHarvestDM
            [DefoliationManager].DefoliationManagerScript.PostHarvestDM*10.0 as PostHarvestDM
            [DefoliationManager].DefoliationManagerScript.DaysSinceLastDefoliation as DaysSinceLastDefoliation
            // Other - Extras
            [Weather].Radn as RadiationTotal
            [MicroClimate].RadiationInterception as RadiationIntercepted
            [DefoliationManager].DefoliationManagerScript.ReturnedWt*10.0 as DungDepositedWt
            [SurfaceOrganicMatter].Wt as TotalSurfaceOMWt
            ([SurfaceOrganicMatter].C / [SurfaceOrganicMatter].N) as SurfOMCNratio
            sum([Soil].SoilNitrogen.FOMC) / 0.4 as FOMWt
            (sum([Soil].SoilNitrogen.FOMC) / sum([Soil].SoilNitrogen.FOMN)) as FOMCNratio
        Report CumReport: EventNames=[Clock].DoReport
          VariableNames:
            [Clock].Today as Date
            [Clock].Today.Year as Year
            [ExtraSums].Script.AccumRainfallFirstPeriod as RainfallFirstPeriodCum
            [ExtraSums].Script.AccumIrrigationFirstPeriod as IrrigationFirstPeriodCum
            [ExtraSums].Script.AccumEvaporationFirstPeriod as EvaporationFirstPeriodCum
            [ExtraSums].Script.AccumTranspirationFirstPeriod as TranspirationFirstPeriodCum
            [ExtraSums].Script.AccumDrainageFirstPeriod as DrainageFirstPeriodCum
            [ExtraSums].Script.AccumRunoffFirstPeriod as RunoffFirstPeriodCum
            [ExtraSums].Script.AccumDownDrainage10cmFirstPeriod as DownDrainage10cmFirstPeriodCum
            [ExtraSums].Script.AccumNetWaterFlow10cmFirstPeriod as NetWaterFlow10cmFirstPeriodCum
            [ExtraSums].Script.AccumRainfall as RainfallTotalCum
            [ExtraSums].Script.AccumIrrigation as IrrigationTotalCum
            [ExtraSums].Script.AccumEvaporation as EvaporationTotalCum
            [ExtraSums].Script.AccumTranspiration as TranspirationTotalCum
            [ExtraSums].Script.AccumDrainage as DrainageTotalCum
            [ExtraSums].Script.AccumRunoff as RunoffTotalCum
            [ExtraSums].Script.AccumDownDrainage100cm as DownDrainage100cmTotalCum
            [ExtraSums].Script.AccumNetWaterFlow100cm as NetWaterFlow100cmTotalCum
            [ExtraSums].Script.AccumLeachedN100cm as LeachedN100cmTotalCum
            [ExtraVars].Script.AccumRainfall as RainfallCum
            [ExtraVars].Script.AccumIrrigation as IrrigationCum
            [ExtraVars].Script.AccumEvaporation as EvaporationCum
            [ExtraVars].Script.AccumTranspiration as TranspirationCum
            [ExtraVars].Script.AccumDrainage as DrainageCum
            [ExtraVars].Script.AccumRunoff as RunoffCum
            [ExtraVars].Script.AccumFertilisedN as FertiliserNCum
            [ExtraVars].Script.AccumMineralisedN as MineralisedNCum
            [ExtraVars].Script.AccumFixedN as FixedNCum
            [ExtraVars].Script.AccumLeachedN as LeachedNCum
            [ExtraVars].Script.AccumDenitrifiedN as DenitrifiedNCum
            [ExtraVars].Script.AccumTakenUpN as UptakeNCum
            [ExtraVars].Script.AccumDetachedN as DetachedPlantNCum
            [ExtraVars].Script.AccumUrineN as UrineNCum
            [ExtraVars].Script.AccumDungN as DungNCum
            [ExtraVars].Script.AccumDefoliatedWt as DefoliatedWtCum
            [ExtraVars].Script.AccumOffTakeWt as OffTakePlantWtCum
            [ExtraVars].Script.AccumDefoliatedN as DefoliatedNCum
            [ExtraVars].Script.AccumOffTakeN as OffTakePlantNCum
            [ExtraVars].Script.AccumNumDefoliations as NumDefoliationsCum
            [ExtraVars].Script.AccumDungWt as DungWtCum
            [ExtraVars].Script.AvgRainfall as RainfallAvg
            [ExtraVars].Script.AvgDefoliatedWt as DefoliatedWtAvg
        Report SpeciesReport: EventNames=[Clock].DoReport
          VariableNames:
            [Clock].Today as Date
            [Clock].Today.DayOfYear as DayOfYear
            // Radiation
            [Weather].Radn as RadiationTotal
            [MicroClimate].NetRadiation as RadiationNet
            [MicroClimate].RadiationInterception as RadiationIntercepted
            [AgPRyegrass].InterceptedRadn as RadiationIntercepted.Ryegrass
            [AgPWhiteClover].InterceptedRadn as RadiationIntercepted.WhiteClover
            // Species outputs
            [AgPRyegrass].AboveGroundWt as AboveGroundWt.Ryegrass
            [AgPRyegrass].BelowGroundWt as BelowGroundWt.Ryegrass
            [AgPRyegrass].AboveGroundNConc as AboveGroundNConc.Ryegrass
            [AgPRyegrass].BelowGroundN/([AgPRyegrass].BelowGroundWt + 0.000000001) as BelowGroundNConc.Ryegrass
            [AgPRyegrass].GrossPotentialGrowthWt as GrossPotentialGrowthWt.Ryegrass
            [AgPRyegrass].NetPotentialGrowthWt as NetPotentialGrowthAfterRespirationWt.Ryegrass
            [AgPRyegrass].NetPotentialGrowthAfterWaterWt as NetPotentialGrowthAfterWaterWt.Ryegrass
            [AgPRyegrass].NetPotentialGrowthAfterNutrientWt as NetPotentialGrowthAfterNutrientWt.Ryegrass
            [AgPRyegrass].NetGrowthWt as NetGrowthWt.Ryegrass
            ([AgPRyegrass].AboveGroundLiveWt/([AgPRyegrass].BelowGroundWt + 0.000000001)) as ShootRootRatio.Ryegrass
            [AgPWhiteClover].AboveGroundWt as AboveGroundWt.WhiteClover
            [AgPWhiteClover].BelowGroundWt as BelowGroundWt.WhiteClover
            [AgPWhiteClover].AboveGroundNConc as AboveGroundNConc.WhiteClover
            [AgPWhiteClover].BelowGroundN/([AgPWhiteClover].BelowGroundWt + 0.000000001) as BelowGroundNConc.WhiteClover
            [AgPWhiteClover].GrossPotentialGrowthWt as GrossPotentialGrowthWt.WhiteClover
            [AgPWhiteClover].NetPotentialGrowthWt as NetPotentialGrowthAfterRespirationWt.WhiteClover
            [AgPWhiteClover].NetPotentialGrowthAfterWaterWt as NetPotentialGrowthAfterWaterWt.WhiteClover
            [AgPWhiteClover].NetPotentialGrowthAfterNutrientWt as NetPotentialGrowthAfterNutrientWt.WhiteClover
            [AgPWhiteClover].NetGrowthWt as NetGrowthWt.WhiteClover
            ([AgPWhiteClover].AboveGroundLiveWt/([AgPWhiteClover].BelowGroundWt + 0.000000001)) as ShootRootRatio.WhiteClover
            [AgPRyegrass].CoverTotal as Cover.Ryegrass
            [AgPRyegrass].LAIGreen as LAIGreen.Ryegrass
            [AgPRyegrass].LAIDead as LAIDead.Ryegrass
            [AgPRyegrass].Height as ShootHeight.Ryegrass
            [AgPRyegrass].RootDepth as RootDepth.Ryegrass
            [AgPRyegrass].Root.LengthDensity as RootLengthDensity.Ryegrass
            [AgPRyegrass].Harvestable.Wt as HarvestableWt.Ryegrass
            [AgPWhiteClover].CoverTotal as Cover.WhiteClover
            [AgPWhiteClover].LAIGreen as LAIGreen.WhiteClover
            [AgPWhiteClover].LAIDead as LAIDead.WhiteClover
            [AgPWhiteClover].Height as ShootHeight.WhiteClover
            [AgPWhiteClover].RootDepth as RootDepth.WhiteClover
            [AgPWhiteClover].Root.LengthDensity as RootLengthDensity.WhiteClover
            [AgPWhiteClover].Harvestable.Wt as HarvestableWt.WhiteClover
            [AgPRyegrass].LitterDepositionWt as LitterDepositionWt.Ryegrass
            [AgPRyegrass].LitterDepositionN as LitterDepositionN.Ryegrass
            [AgPRyegrass].RootDetachedWt as RootDetachedWt.Ryegrass
            [AgPRyegrass].RootDetachedN as RootDetachedN.Ryegrass
            [AgPWhiteClover].LitterDepositionWt as LitterDepositionWt.WhiteClover
            [AgPWhiteClover].LitterDepositionN as LitterDepositionN.WhiteClover
            [AgPWhiteClover].RootDetachedWt as RootDetachedWt.WhiteClover
            [AgPWhiteClover].RootDetachedN as RootDetachedN.WhiteClover
            // Evaluating N demand and supply
            [AgPRyegrass].DemandAtLuxuryN as DemandAtLuxuryN.Ryegrass
            [AgPRyegrass].DemandAtOptimumN as DemandAtOptimumN.Ryegrass
            [AgPRyegrass].SoilDemandN as SoilDemandN.Ryegrass
            [AgPRyegrass].SoilAvailableN as SoilAvailableN.Ryegrass
            [AgPRyegrass].SoilUptakeN as SoilUptakeN.Ryegrass
            [AgPWhiteClover].DemandAtLuxuryN as DemandAtLuxuryN.WhiteClover
            [AgPWhiteClover].DemandAtOptimumN as DemandAtOptimumN.WhiteClover
            [AgPWhiteClover].SoilDemandN as SoilDemandN.WhiteClover
            [AgPWhiteClover].SoilAvailableN as SoilAvailableN.WhiteClover
            [AgPWhiteClover].SoilUptakeN as SoilUptakeN.WhiteClover
            // Growth limiting factors
            [AgPRyegrass].GlfCO2 as GlfCO2.Ryegrass
            [AgPRyegrass].GlfNContent as GlfNContent.Ryegrass
            [AgPRyegrass].GlfNSupply as GlfNSupply.Ryegrass
            [AgPRyegrass].GlfWaterSupply as GlfWaterSupply.Ryegrass
            [AgPRyegrass].GlfWaterLogging as GlfWaterLogging.Ryegrass
            [AgPRyegrass].GlfTemperature as GlfTemperature.Ryegrass
            [AgPRyegrass].GlfColdDamage as GlfColdDamage.Ryegrass
            [AgPRyegrass].GlfHeatDamage as GlfHeatDamage.Ryegrass
            [AgPWhiteClover].GlfCO2 as GlfCO2.WhiteClover
            [AgPWhiteClover].GlfNContent as GlfNContent.WhiteClover
            [AgPWhiteClover].GlfNSupply as GlfNSupply.WhiteClover
            [AgPWhiteClover].GlfWaterSupply as GlfWaterSupply.WhiteClover
            [AgPWhiteClover].GlfWaterLogging as GlfWaterLogging.WhiteClover
            [AgPWhiteClover].GlfTemperature as GlfTemperature.WhiteClover
            [AgPWhiteClover].GlfColdDamage as GlfColdDamage.WhiteClover
            [AgPWhiteClover].GlfHeatDamage as GlfHeatDamage.WhiteClover
            // Other
            [AgPRyegrass].Standing.Digestibility as Digestibility.Ryegrass
            [AgPWhiteClover].Standing.Digestibility as Digestibility.WhiteClover
        Report AccumReport
          VariableNames:
            [Clock].Today as Date
            [FactorLabels].Script.AGENT_NO as AgentNo
            [FactorLabels].Script.SoilStamp as SoilName
            [ApplyUrineOnGivenDate].Script.UrineDepositionDate.Year as DepositionYear
            [ApplyUrineOnGivenDate].Script.UrineDepositionDate.Month as DepositionMonth
            [ExtraVars].Script.AccumRainfall as RainfallCum
            [ExtraVars].Script.AccumIrrigation as IrrigationCum
            [ExtraVars].Script.AccumEvaporation as EvaporationCum
            [ExtraVars].Script.AccumTranspiration as TranspirationCum
            [ExtraVars].Script.AccumDrainage as DrainageCum
            [ExtraVars].Script.AccumRunoff as RunoffCum
            [ExtraVars].Script.AccumFertilisedN as FertiliserNCum
            [ExtraVars].Script.AccumMineralisedN as MineralisedNCum
            [ExtraVars].Script.AccumFixedN as FixedNCum
            [ExtraVars].Script.AccumLeachedN as LeachedNCum
            [ExtraVars].Script.AccumDenitrifiedN as DenitrifiedNCum
            [ExtraVars].Script.AccumTakenUpN as UptakeNCum
            [ExtraVars].Script.AccumDetachedN as DetachedPlantNCum
            [ExtraVars].Script.AccumUrineN as UrineNCum
            [ExtraVars].Script.AccumDungN as DungNCum
            [ExtraVars].Script.AccumDefoliatedWt as DefoliatedWtCum
            [ExtraVars].Script.AccumOffTakeWt as OffTakePlantWtCum
            [ExtraVars].Script.AccumDefoliatedN as DefoliatedNCum
            [ExtraVars].Script.AccumOffTakeN as OffTakePlantNCum
            [ExtraVars].Script.AccumNumDefoliations as NumDefoliationsCum
            [ExtraVars].Script.AccumDungWt as DungWtCum
        Report SummReport
          VariableNames:
            [Clock].Today as Date
            [FactorLabels].Script.AGENT_NO as AgentNo
            [FactorLabels].Script.SoilStamp as SoilName
            [SoilInitialisationAndReset].Script.SlopeClassGiven as SlopeClass
            [SoilInitialisationAndReset].Script.SlopeAngleSet as SlopeAngle
            [ApplyUrineOnGivenDate].Script.UrineDepositionDate as DepositionDate
            [ApplyUrineOnGivenDate].Script.UrineDepositionDate.Year as DepositionYear
            [ApplyUrineOnGivenDate].Script.UrineDepositionDate.Month as DepositionMonth
            [ExtraSums].Script.AccumRainfallFirstPeriod as RainfallFirstPeriodCum
            [ExtraSums].Script.AccumIrrigationFirstPeriod as IrrigationFirstPeriodCum
            [ExtraSums].Script.AccumEvaporationFirstPeriod as EvaporationFirstPeriodCum
            [ExtraSums].Script.AccumTranspirationFirstPeriod as TranspirationFirstPeriodCum
            [ExtraSums].Script.AccumDrainageFirstPeriod as DrainageFirstPeriodCum
            [ExtraSums].Script.AccumRunoffFirstPeriod as RunoffFirstPeriodCum
            [ExtraSums].Script.AccumDownDrainage10cmFirstPeriod as DownDrainage10cmFirstPeriodCum
            [ExtraSums].Script.AccumNetWaterFlow10cmFirstPeriod as NetWaterFlow10cmFirstPeriodCum
            [ExtraSums].Script.DeltaSWCFirstPeriod as DeltaSWCFirstPeriod
            [ExtraSums].Script.AccumRainfall as RainfallCum
            [ExtraSums].Script.AccumIrrigation as IrrigationCum
            [ExtraSums].Script.AccumEvaporation as EvaporationCum
            [ExtraSums].Script.AccumTranspiration as TranspirationCum
            [ExtraSums].Script.AccumDrainage as DrainageCum
            [ExtraSums].Script.AccumRunoff as RunoffCum
            [ExtraSums].Script.AccumDownDrainage100cm as DownDrainage100cmCum
            [ExtraSums].Script.AccumNetWaterFlow100cm as NetWaterFlow100cmCum
            [ExtraSums].Script.AccumFertilisedN as FertiliserNCum
            [ExtraSums].Script.AccumMineralisedN as MineralisedNCum
            [ExtraSums].Script.AccumFixedN as FixedNCum
            [ExtraSums].Script.AccumLeachedN as LeachedNCum
            [ExtraSums].Script.AccumDenitrifiedN as DenitrifiedNCum
            [ExtraSums].Script.AccumTakenUpN as UptakeNCum
            [ExtraSums].Script.AccumDetachedN as DetachedPlantNCum
            [ExtraSums].Script.AccumUrineN as UrineNCum
            [ExtraSums].Script.AccumDungN as DungNCum
            [ExtraSums].Script.AccumLeachedN100cm as LeachedN100cmCum
            [ExtraSums].Script.AccumDefoliatedWt as DefoliatedWtCum
            [ExtraSums].Script.AccumOffTakeWt as OffTakePlantWtCum
            [ExtraSums].Script.AccumDefoliatedN as DefoliatedNCum
            [ExtraSums].Script.AccumOffTakeN as OffTakePlantNCum
            [ExtraSums].Script.AccumNumDefoliations as NumDefoliationsCum
            [ExtraSums].Script.AccumDungWt as DungWtCum
            [ExtraSums].Script.DeltaSWC as DeltaSWC
            [ExtraSums].Script.DeltaSurfOMN as DeltaSurfOMN
            [ExtraSums].Script.DeltaSoilOrgN as DeltaSoilOrgN
            [ExtraSums].Script.DeltaSoilMinN as DeltaSoilMinN
            [ExtraSums].Script.DeltaPlantN as DeltaPlantN
        Report DiagnosisReport: EventNames=[Clock].DoReport
          VariableNames:
            [Clock].Today as Date
            // plant outputs
            ([AgPRyegrass].RootWt*[AgPRyegrass].RootWtFraction + [AgPWhiteClover].RootWt*[AgPWhiteClover].RootWtFraction) as RootWtByLayer
            ([AgPRyegrass].RootWt*[AgPRyegrass].RootWtFraction) as Ryegrass_RootWtByLayer
            [AgPRyegrass].WaterUptake as Ryegrass_WaterUptakeByLayer
            [AgPRyegrass].NitrogenUptake as Ryegrass_NitrogenUptakeByLayer
            ([AgPWhiteClover].RootWt*[AgPWhiteClover].RootWtFraction) as WhiteClover_RootWtByLayer
            [AgPWhiteClover].WaterUptake as WhiteClover_WaterUptakeByLayer
            [AgPWhiteClover].NitrogenUptake as WhiteClover_NitrogenUptakeByLayer
            // surface OM
            ([AgPRyegrass].LitterDepositionWt+[AgPWhiteClover].LitterDepositionWt)*0.4/([AgPRyegrass].LitterDepositionN+[AgPWhiteClover].LitterDepositionN+0.00000001) as Litter.CN
            ([AgPRyegrass].RootDetachedWt+[AgPWhiteClover].RootDetachedWt)*0.4/([AgPRyegrass].RootDetachedN+[AgPWhiteClover].RootDetachedN+0.00000001) as RootDetached.CN
            [DefoliationManager].DefoliationManagerScript.ReturnedWt*0.4/([DefoliationManager].DefoliationManagerScript.NReturnedInDung + 0.00000001) as Dung.CN
            [SurfaceOrganicMatter].Wt
            ([SurfaceOrganicMatter].C/[SurfaceOrganicMatter].N) as SurfaceOrganicMatter.CN
            // soil water
            (sum([Soil].Water.MM)-sum([Soil].Physical.LL15mm))/(sum([Soil].Physical.DULmm)-sum([Soil].Physical.LL15mm)) as ProfileWaterStatus
            // soil nitrogen
            [Soil].SoilNitrogen.FOM.C/0.4 as Soil.FOM.Wt
            [Soil].SoilNitrogen.FOM.C/[Soil].SoilNitrogen.FOM.N as Soil.FOM.CN
            ([Soil].SoilNitrogen.Microbial.C + [Soil].SoilNitrogen.Humic.C)*100.0/([Soil].Physical.BD * [Soil].Physical.Thickness * 10000.0) as Soil.OC
            //[Soil].SoilNitrogen.Microbial.C/[Soil].SoilNitrogen.Humic.C as FBiom
            [Soil].SoilNitrogen.Microbial.C/([Soil].SoilNitrogen.Humic.C - [Soil].SoilNitrogen.Inert.C) as FBiom
            [Soil].SoilNitrogen.Inert.C/([Soil].SoilNitrogen.Microbial.C + [Soil].SoilNitrogen.Humic.C) as FInert
            [Soil].SoilWater.CN2Bare
            [SoilInitialisationAndReset].Script.CurveNumberSet
            [SoilInitialisationAndReset].Script.SlopeAngleSet
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