Simulations: Version=173
  Memo TitlePage
    ### Base simulation for simulating N leaching risk from a urine patch across New Zealand

    _Rogerio Cichota, Plant and Food Research, New Zealand_

    For the Whitiwhiti Ora / Land use opportunities programme, funded by Our Land and Water National Science Challenge
    In partnership with the Risk Index Tool team from the Ministry for the Environment, NZ

     This simulation contain the basic setup for simulating the fate of N from a 'standard' urine patch deposited in a mixed-species pasture sward.
     It is intended to be used as the template for a series of simulation runs conducted in PowerPlant (PFR's HPC) to obtain N leaching and runoff values.
     For each run, the template will be modified by replacing the soil node and the link to the weather data file to cover all farming areas of New Zealand.

     The simulation uses standard APSIM NextGen models. In particular, the AgPRyegrass and AgPWhiteClover models are used to simulate a mixed sward with variable clover content.
     The pasture is managed mimicking rotational grazing, with defoliations triggered by rules based on aboveground biomass with some restrictions for the interval between defoliations.
     A simplified approach is used to return dung and for urine depositions.  Based on its digestibility, a certain fraction (around 20%) of the biomass harvested (i.e. of its carbon) is returned to the soil homogeneously as dung; a C:N ratio of 17.5 is used to define the amount of N returned as dung.
     No urine depositions are considered after each grazing to reduce its potential impact on the fate of N leaching of the 'main' urine patch.
     The weather data comes from the virtual climate station network (VCSN) of NIWA.
     Soil information is provided by Manaaki Whenua - Landcare based on Smap.  A small sample of Smap soils (about 110) was mapped based of their correspondence with FSL in the areas not covered by Smap.  These were selected by Trevor Webb.  Estimates of the curve number for each Smap soil was added in August 2022.
     General rules are also used to control irrigation applications, when this management is enabled.  N fertiliser is not considered.
     A single urine deposition is set to occur a few months after the simulation begins, this is simulated as an urea application distributied over the top soil.

    Note: the average slope of each location to simulate has been considered as another potentially important factor, particularly for the computation of runoff.  However, the available functions,found in the literature, that could be used to adjust the values of the curve number in APSIM have shown to be quite insensitive and thus were disregarded (to reduce the number of runs needed).

    NOTE: Most of the year-month combinations are disabled for speed of running within the test system
  DataStore
    ExcelInput: FileNames=[RIT TestOutputs.xlsx]; SheetNames=[Sheet1]
    PredictedObserved: PredictedTableName=SummReport; ObservedTableName=SummReport; FieldNameUsedForMatch=SimulationName; AllColumns=true
  Experiment Exp
    Factors
      Permutation
        Factor Water
          CompositeFactor Rainfed: Specifications=[AutomaticIrrigation].Script.AllowIrrigation = No
          CompositeFactor Irr: Specifications=[AutomaticIrrigation].Script.AllowIrrigation = Yes
        Factor DepositionDate (disabled)
          CompositeFactor 1978_Jan
            Specifications:
              [Clock].StartDate = 1977-10-01
              [Clock].EndDate = 1980-01-16
              [ApplyNOnGivenDate].Script.Dates = 1978-01-15
              [ExtraSums].Script.AccumulateStartDate = 1978-01-15
          CompositeFactor 1978_Feb
            Specifications:
              [Clock].StartDate = 1977-11-01
              [Clock].EndDate = 1980-02-16
              [ApplyNOnGivenDate].Script.Dates = 1978-02-15
              [ExtraSums].Script.AccumulateStartDate = 1978-02-15
          CompositeFactor 1978_Mar
            Specifications:
              [Clock].StartDate = 1977-12-01
              [Clock].EndDate = 1980-03-16
              [ApplyNOnGivenDate].Script.Dates = 1978-03-15
              [ExtraSums].Script.AccumulateStartDate = 1978-03-15
          CompositeFactor 1978_Apr
            Specifications:
              [Clock].StartDate = 1978-01-01
              [Clock].EndDate = 1980-04-16
              [ApplyNOnGivenDate].Script.Dates = 1978-04-15
              [ExtraSums].Script.AccumulateStartDate = 1978-04-15
          CompositeFactor 1978_May
            Specifications:
              [Clock].StartDate = 1978-02-01
              [Clock].EndDate = 1980-05-16
              [ApplyNOnGivenDate].Script.Dates = 1978-05-15
              [ExtraSums].Script.AccumulateStartDate = 1978-05-15
          CompositeFactor 1978_Jun
            Specifications:
              [Clock].StartDate = 1978-03-01
              [Clock].EndDate = 1980-06-16
              [ApplyNOnGivenDate].Script.Dates = 1978-06-15
              [ExtraSums].Script.AccumulateStartDate = 1978-06-15
          CompositeFactor 1978_Jul
            Specifications:
              [Clock].StartDate = 1978-04-01
              [Clock].EndDate = 1980-07-16
              [ApplyNOnGivenDate].Script.Dates = 1978-07-15
              [ExtraSums].Script.AccumulateStartDate = 1978-07-15
          CompositeFactor 1978_Aug
            Specifications:
              [Clock].StartDate = 1978-05-01
              [Clock].EndDate = 1980-08-16
              [ApplyNOnGivenDate].Script.Dates = 1978-08-15
              [ExtraSums].Script.AccumulateStartDate = 1978-08-15
          CompositeFactor 1978_Sep
            Specifications:
              [Clock].StartDate = 1978-06-01
              [Clock].EndDate = 1980-09-16
              [ApplyNOnGivenDate].Script.Dates = 1978-09-15
              [ExtraSums].Script.AccumulateStartDate = 1978-09-15
          CompositeFactor 1978_Oct
            Specifications:
              [Clock].StartDate = 1978-07-01
              [Clock].EndDate = 1980-10-16
              [ApplyNOnGivenDate].Script.Dates = 1978-10-15
              [ExtraSums].Script.AccumulateStartDate = 1978-10-15
          CompositeFactor 1978_Nov
            Specifications:
              [Clock].StartDate = 1978-08-01
              [Clock].EndDate = 1980-11-16
              [ApplyNOnGivenDate].Script.Dates = 1978-11-15
              [ExtraSums].Script.AccumulateStartDate = 1978-11-15
          CompositeFactor 1978_Dec
            Specifications:
              [Clock].StartDate = 1978-09-01
              [Clock].EndDate = 1980-12-16
              [ApplyNOnGivenDate].Script.Dates = 1978-12-15
              [ExtraSums].Script.AccumulateStartDate = 1978-12-15
          CompositeFactor 1979_Jan
            Specifications:
              [Clock].StartDate = 1978-10-01
              [Clock].EndDate = 1981-01-16
              [ApplyNOnGivenDate].Script.Dates = 1979-01-15
              [ExtraSums].Script.AccumulateStartDate = 1979-01-15
          CompositeFactor 1979_Feb
            Specifications:
              [Clock].StartDate = 1978-11-01
              [Clock].EndDate = 1981-02-16
              [ApplyNOnGivenDate].Script.Dates = 1979-02-15
              [ExtraSums].Script.AccumulateStartDate = 1979-02-15
          CompositeFactor 1979_Mar
            Specifications:
              [Clock].StartDate = 1978-12-01
              [Clock].EndDate = 1981-03-16
              [ApplyNOnGivenDate].Script.Dates = 1979-03-15
              [ExtraSums].Script.AccumulateStartDate = 1979-03-15
          CompositeFactor 1979_Apr
            Specifications:
              [Clock].StartDate = 1979-01-01
              [Clock].EndDate = 1981-04-16
              [ApplyNOnGivenDate].Script.Dates = 1979-04-15
              [ExtraSums].Script.AccumulateStartDate = 1979-04-15
          CompositeFactor 1979_May
            Specifications:
              [Clock].StartDate = 1979-02-01
              [Clock].EndDate = 1981-05-16
              [ApplyNOnGivenDate].Script.Dates = 1979-05-15
              [ExtraSums].Script.AccumulateStartDate = 1979-05-15
          CompositeFactor 1979_Jun
            Specifications:
              [Clock].StartDate = 1979-03-01
              [Clock].EndDate = 1981-06-16
              [ApplyNOnGivenDate].Script.Dates = 1979-06-15
              [ExtraSums].Script.AccumulateStartDate = 1979-06-15
          CompositeFactor 1979_Jul
            Specifications:
              [Clock].StartDate = 1979-04-01
              [Clock].EndDate = 1981-07-16
              [ApplyNOnGivenDate].Script.Dates = 1979-07-15
              [ExtraSums].Script.AccumulateStartDate = 1979-07-15
          CompositeFactor 1979_Aug
            Specifications:
              [Clock].StartDate = 1979-05-01
              [Clock].EndDate = 1981-08-16
              [ApplyNOnGivenDate].Script.Dates = 1979-08-15
              [ExtraSums].Script.AccumulateStartDate = 1979-08-15
          CompositeFactor 1979_Sep
            Specifications:
              [Clock].StartDate = 1979-06-01
              [Clock].EndDate = 1981-09-16
              [ApplyNOnGivenDate].Script.Dates = 1979-09-15
              [ExtraSums].Script.AccumulateStartDate = 1979-09-15
          CompositeFactor 1979_Oct
            Specifications:
              [Clock].StartDate = 1979-07-01
              [Clock].EndDate = 1981-10-16
              [ApplyNOnGivenDate].Script.Dates = 1979-10-15
              [ExtraSums].Script.AccumulateStartDate = 1979-10-15
          CompositeFactor 1979_Nov
            Specifications:
              [Clock].StartDate = 1979-08-01
              [Clock].EndDate = 1981-11-16
              [ApplyNOnGivenDate].Script.Dates = 1979-11-15
              [ExtraSums].Script.AccumulateStartDate = 1979-11-15
          CompositeFactor 1979_Dec
            Specifications:
              [Clock].StartDate = 1979-09-01
              [Clock].EndDate = 1981-12-16
              [ApplyNOnGivenDate].Script.Dates = 1979-12-15
              [ExtraSums].Script.AccumulateStartDate = 1979-12-15
          CompositeFactor 1980_Jan
            Specifications:
              [Clock].StartDate = 1979-10-01
              [Clock].EndDate = 1982-01-16
              [ApplyNOnGivenDate].Script.Dates = 1980-01-15
              [ExtraSums].Script.AccumulateStartDate = 1980-01-15
          CompositeFactor 1980_Feb
            Specifications:
              [Clock].StartDate = 1979-11-01
              [Clock].EndDate = 1982-02-16
              [ApplyNOnGivenDate].Script.Dates = 1980-02-15
              [ExtraSums].Script.AccumulateStartDate = 1980-02-15
          CompositeFactor 1980_Mar
            Specifications:
              [Clock].StartDate = 1979-12-01
              [Clock].EndDate = 1982-03-16
              [ApplyNOnGivenDate].Script.Dates = 1980-03-15
              [ExtraSums].Script.AccumulateStartDate = 1980-03-15
          CompositeFactor 1980_Apr
            Specifications:
              [Clock].StartDate = 1980-01-01
              [Clock].EndDate = 1982-04-16
              [ApplyNOnGivenDate].Script.Dates = 1980-04-15
              [ExtraSums].Script.AccumulateStartDate = 1980-04-15
          CompositeFactor 1980_May
            Specifications:
              [Clock].StartDate = 1980-02-01
              [Clock].EndDate = 1982-05-16
              [ApplyNOnGivenDate].Script.Dates = 1980-05-15
              [ExtraSums].Script.AccumulateStartDate = 1980-05-15
          CompositeFactor 1980_Jun
            Specifications:
              [Clock].StartDate = 1980-03-01
              [Clock].EndDate = 1982-06-16
              [ApplyNOnGivenDate].Script.Dates = 1980-06-15
              [ExtraSums].Script.AccumulateStartDate = 1980-06-15
          CompositeFactor 1980_Jul
            Specifications:
              [Clock].StartDate = 1980-04-01
              [Clock].EndDate = 1982-07-16
              [ApplyNOnGivenDate].Script.Dates = 1980-07-15
              [ExtraSums].Script.AccumulateStartDate = 1980-07-15
          CompositeFactor 1980_Aug
            Specifications:
              [Clock].StartDate = 1980-05-01
              [Clock].EndDate = 1982-08-16
              [ApplyNOnGivenDate].Script.Dates = 1980-08-15
              [ExtraSums].Script.AccumulateStartDate = 1980-08-15
          CompositeFactor 1980_Sep
            Specifications:
              [Clock].StartDate = 1980-06-01
              [Clock].EndDate = 1982-09-16
              [ApplyNOnGivenDate].Script.Dates = 1980-09-15
              [ExtraSums].Script.AccumulateStartDate = 1980-09-15
          CompositeFactor 1980_Oct
            Specifications:
              [Clock].StartDate = 1980-07-01
              [Clock].EndDate = 1982-10-16
              [ApplyNOnGivenDate].Script.Dates = 1980-10-15
              [ExtraSums].Script.AccumulateStartDate = 1980-10-15
          CompositeFactor 1980_Nov
            Specifications:
              [Clock].StartDate = 1980-08-01
              [Clock].EndDate = 1982-11-16
              [ApplyNOnGivenDate].Script.Dates = 1980-11-15
              [ExtraSums].Script.AccumulateStartDate = 1980-11-15
          CompositeFactor 1980_Dec
            Specifications:
              [Clock].StartDate = 1980-09-01
              [Clock].EndDate = 1982-12-16
              [ApplyNOnGivenDate].Script.Dates = 1980-12-15
              [ExtraSums].Script.AccumulateStartDate = 1980-12-15
          CompositeFactor 1981_Jan
            Specifications:
              [Clock].StartDate = 1980-10-01
              [Clock].EndDate = 1983-01-16
              [ApplyNOnGivenDate].Script.Dates = 1981-01-15
              [ExtraSums].Script.AccumulateStartDate = 1981-01-15
          CompositeFactor 1981_Feb
            Specifications:
              [Clock].StartDate = 1980-11-01
              [Clock].EndDate = 1983-02-16
              [ApplyNOnGivenDate].Script.Dates = 1981-02-15
              [ExtraSums].Script.AccumulateStartDate = 1981-02-15
          CompositeFactor 1981_Mar
            Specifications:
              [Clock].StartDate = 1980-12-01
              [Clock].EndDate = 1983-03-16
              [ApplyNOnGivenDate].Script.Dates = 1981-03-15
              [ExtraSums].Script.AccumulateStartDate = 1981-03-15
          CompositeFactor 1981_Apr
            Specifications:
              [Clock].StartDate = 1981-01-01
              [Clock].EndDate = 1983-04-16
              [ApplyNOnGivenDate].Script.Dates = 1981-04-15
              [ExtraSums].Script.AccumulateStartDate = 1981-04-15
          CompositeFactor 1981_May
            Specifications:
              [Clock].StartDate = 1981-02-01
              [Clock].EndDate = 1983-05-16
              [ApplyNOnGivenDate].Script.Dates = 1981-05-15
              [ExtraSums].Script.AccumulateStartDate = 1981-05-15
          CompositeFactor 1981_Jun
            Specifications:
              [Clock].StartDate = 1981-03-01
              [Clock].EndDate = 1983-06-16
              [ApplyNOnGivenDate].Script.Dates = 1981-06-15
              [ExtraSums].Script.AccumulateStartDate = 1981-06-15
          CompositeFactor 1981_Jul
            Specifications:
              [Clock].StartDate = 1981-04-01
              [Clock].EndDate = 1983-07-16
              [ApplyNOnGivenDate].Script.Dates = 1981-07-15
              [ExtraSums].Script.AccumulateStartDate = 1981-07-15
          CompositeFactor 1981_Aug
            Specifications:
              [Clock].StartDate = 1981-05-01
              [Clock].EndDate = 1983-08-16
              [ApplyNOnGivenDate].Script.Dates = 1981-08-15
              [ExtraSums].Script.AccumulateStartDate = 1981-08-15
          CompositeFactor 1981_Sep
            Specifications:
              [Clock].StartDate = 1981-06-01
              [Clock].EndDate = 1983-09-16
              [ApplyNOnGivenDate].Script.Dates = 1981-09-15
              [ExtraSums].Script.AccumulateStartDate = 1981-09-15
          CompositeFactor 1981_Oct
            Specifications:
              [Clock].StartDate = 1981-07-01
              [Clock].EndDate = 1983-10-16
              [ApplyNOnGivenDate].Script.Dates = 1981-10-15
              [ExtraSums].Script.AccumulateStartDate = 1981-10-15
          CompositeFactor 1981_Nov
            Specifications:
              [Clock].StartDate = 1981-08-01
              [Clock].EndDate = 1983-11-16
              [ApplyNOnGivenDate].Script.Dates = 1981-11-15
              [ExtraSums].Script.AccumulateStartDate = 1981-11-15
          CompositeFactor 1981_Dec
            Specifications:
              [Clock].StartDate = 1981-09-01
              [Clock].EndDate = 1983-12-16
              [ApplyNOnGivenDate].Script.Dates = 1981-12-15
              [ExtraSums].Script.AccumulateStartDate = 1981-12-15
          CompositeFactor 1982_Jan
            Specifications:
              [Clock].StartDate = 1981-10-01
              [Clock].EndDate = 1984-01-16
              [ApplyNOnGivenDate].Script.Dates = 1982-01-15
              [ExtraSums].Script.AccumulateStartDate = 1982-01-15
          CompositeFactor 1982_Feb
            Specifications:
              [Clock].StartDate = 1981-11-01
              [Clock].EndDate = 1984-02-16
              [ApplyNOnGivenDate].Script.Dates = 1982-02-15
              [ExtraSums].Script.AccumulateStartDate = 1982-02-15
          CompositeFactor 1982_Mar
            Specifications:
              [Clock].StartDate = 1981-12-01
              [Clock].EndDate = 1984-03-16
              [ApplyNOnGivenDate].Script.Dates = 1982-03-15
              [ExtraSums].Script.AccumulateStartDate = 1982-03-15
          CompositeFactor 1982_Apr
            Specifications:
              [Clock].StartDate = 1982-01-01
              [Clock].EndDate = 1984-04-16
              [ApplyNOnGivenDate].Script.Dates = 1982-04-15
              [ExtraSums].Script.AccumulateStartDate = 1982-04-15
          CompositeFactor 1982_May
            Specifications:
              [Clock].StartDate = 1982-02-01
              [Clock].EndDate = 1984-05-16
              [ApplyNOnGivenDate].Script.Dates = 1982-05-15
              [ExtraSums].Script.AccumulateStartDate = 1982-05-15
          CompositeFactor 1982_Jun
            Specifications:
              [Clock].StartDate = 1982-03-01
              [Clock].EndDate = 1984-06-16
              [ApplyNOnGivenDate].Script.Dates = 1982-06-15
              [ExtraSums].Script.AccumulateStartDate = 1982-06-15
          CompositeFactor 1982_Jul
            Specifications:
              [Clock].StartDate = 1982-04-01
              [Clock].EndDate = 1984-07-16
              [ApplyNOnGivenDate].Script.Dates = 1982-07-15
              [ExtraSums].Script.AccumulateStartDate = 1982-07-15
          CompositeFactor 1982_Aug
            Specifications:
              [Clock].StartDate = 1982-05-01
              [Clock].EndDate = 1984-08-16
              [ApplyNOnGivenDate].Script.Dates = 1982-08-15
              [ExtraSums].Script.AccumulateStartDate = 1982-08-15
          CompositeFactor 1982_Sep
            Specifications:
              [Clock].StartDate = 1982-06-01
              [Clock].EndDate = 1984-09-16
              [ApplyNOnGivenDate].Script.Dates = 1982-09-15
              [ExtraSums].Script.AccumulateStartDate = 1982-09-15
          CompositeFactor 1982_Oct
            Specifications:
              [Clock].StartDate = 1982-07-01
              [Clock].EndDate = 1984-10-16
              [ApplyNOnGivenDate].Script.Dates = 1982-10-15
              [ExtraSums].Script.AccumulateStartDate = 1982-10-15
          CompositeFactor 1982_Nov
            Specifications:
              [Clock].StartDate = 1982-08-01
              [Clock].EndDate = 1984-11-16
              [ApplyNOnGivenDate].Script.Dates = 1982-11-15
              [ExtraSums].Script.AccumulateStartDate = 1982-11-15
          CompositeFactor 1982_Dec
            Specifications:
              [Clock].StartDate = 1982-09-01
              [Clock].EndDate = 1984-12-16
              [ApplyNOnGivenDate].Script.Dates = 1982-12-15
              [ExtraSums].Script.AccumulateStartDate = 1982-12-15
          CompositeFactor 1983_Jan
            Specifications:
              [Clock].StartDate = 1982-10-01
              [Clock].EndDate = 1985-01-16
              [ApplyNOnGivenDate].Script.Dates = 1983-01-15
              [ExtraSums].Script.AccumulateStartDate = 1983-01-15
          CompositeFactor 1983_Feb
            Specifications:
              [Clock].StartDate = 1982-11-01
              [Clock].EndDate = 1985-02-16
              [ApplyNOnGivenDate].Script.Dates = 1983-02-15
              [ExtraSums].Script.AccumulateStartDate = 1983-02-15
          CompositeFactor 1983_Mar
            Specifications:
              [Clock].StartDate = 1982-12-01
              [Clock].EndDate = 1985-03-16
              [ApplyNOnGivenDate].Script.Dates = 1983-03-15
              [ExtraSums].Script.AccumulateStartDate = 1983-03-15
          CompositeFactor 1983_Apr
            Specifications:
              [Clock].StartDate = 1983-01-01
              [Clock].EndDate = 1985-04-16
              [ApplyNOnGivenDate].Script.Dates = 1983-04-15
              [ExtraSums].Script.AccumulateStartDate = 1983-04-15
          CompositeFactor 1983_May
            Specifications:
              [Clock].StartDate = 1983-02-01
              [Clock].EndDate = 1985-05-16
              [ApplyNOnGivenDate].Script.Dates = 1983-05-15
              [ExtraSums].Script.AccumulateStartDate = 1983-05-15
          CompositeFactor 1983_Jun
            Specifications:
              [Clock].StartDate = 1983-03-01
              [Clock].EndDate = 1985-06-16
              [ApplyNOnGivenDate].Script.Dates = 1983-06-15
              [ExtraSums].Script.AccumulateStartDate = 1983-06-15
          CompositeFactor 1983_Jul
            Specifications:
              [Clock].StartDate = 1983-04-01
              [Clock].EndDate = 1985-07-16
              [ApplyNOnGivenDate].Script.Dates = 1983-07-15
              [ExtraSums].Script.AccumulateStartDate = 1983-07-15
          CompositeFactor 1983_Aug
            Specifications:
              [Clock].StartDate = 1983-05-01
              [Clock].EndDate = 1985-08-16
              [ApplyNOnGivenDate].Script.Dates = 1983-08-15
              [ExtraSums].Script.AccumulateStartDate = 1983-08-15
          CompositeFactor 1983_Sep
            Specifications:
              [Clock].StartDate = 1983-06-01
              [Clock].EndDate = 1985-09-16
              [ApplyNOnGivenDate].Script.Dates = 1983-09-15
              [ExtraSums].Script.AccumulateStartDate = 1983-09-15
          CompositeFactor 1983_Oct
            Specifications:
              [Clock].StartDate = 1983-07-01
              [Clock].EndDate = 1985-10-16
              [ApplyNOnGivenDate].Script.Dates = 1983-10-15
              [ExtraSums].Script.AccumulateStartDate = 1983-10-15
          CompositeFactor 1983_Nov
            Specifications:
              [Clock].StartDate = 1983-08-01
              [Clock].EndDate = 1985-11-16
              [ApplyNOnGivenDate].Script.Dates = 1983-11-15
              [ExtraSums].Script.AccumulateStartDate = 1983-11-15
          CompositeFactor 1983_Dec
            Specifications:
              [Clock].StartDate = 1983-09-01
              [Clock].EndDate = 1985-12-16
              [ApplyNOnGivenDate].Script.Dates = 1983-12-15
              [ExtraSums].Script.AccumulateStartDate = 1983-12-15
          CompositeFactor 1984_Jan
            Specifications:
              [Clock].StartDate = 1983-10-01
              [Clock].EndDate = 1986-01-16
              [ApplyNOnGivenDate].Script.Dates = 1984-01-15
              [ExtraSums].Script.AccumulateStartDate = 1984-01-15
          CompositeFactor 1984_Feb
            Specifications:
              [Clock].StartDate = 1983-11-01
              [Clock].EndDate = 1986-02-16
              [ApplyNOnGivenDate].Script.Dates = 1984-02-15
              [ExtraSums].Script.AccumulateStartDate = 1984-02-15
          CompositeFactor 1984_Mar
            Specifications:
              [Clock].StartDate = 1983-12-01
              [Clock].EndDate = 1986-03-16
              [ApplyNOnGivenDate].Script.Dates = 1984-03-15
              [ExtraSums].Script.AccumulateStartDate = 1984-03-15
          CompositeFactor 1984_Apr
            Specifications:
              [Clock].StartDate = 1984-01-01
              [Clock].EndDate = 1986-04-16
              [ApplyNOnGivenDate].Script.Dates = 1984-04-15
              [ExtraSums].Script.AccumulateStartDate = 1984-04-15
          CompositeFactor 1984_May
            Specifications:
              [Clock].StartDate = 1984-02-01
              [Clock].EndDate = 1986-05-16
              [ApplyNOnGivenDate].Script.Dates = 1984-05-15
              [ExtraSums].Script.AccumulateStartDate = 1984-05-15
          CompositeFactor 1984_Jun
            Specifications:
              [Clock].StartDate = 1984-03-01
              [Clock].EndDate = 1986-06-16
              [ApplyNOnGivenDate].Script.Dates = 1984-06-15
              [ExtraSums].Script.AccumulateStartDate = 1984-06-15
          CompositeFactor 1984_Jul
            Specifications:
              [Clock].StartDate = 1984-04-01
              [Clock].EndDate = 1986-07-16
              [ApplyNOnGivenDate].Script.Dates = 1984-07-15
              [ExtraSums].Script.AccumulateStartDate = 1984-07-15
          CompositeFactor 1984_Aug
            Specifications:
              [Clock].StartDate = 1984-05-01
              [Clock].EndDate = 1986-08-16
              [ApplyNOnGivenDate].Script.Dates = 1984-08-15
              [ExtraSums].Script.AccumulateStartDate = 1984-08-15
          CompositeFactor 1984_Sep
            Specifications:
              [Clock].StartDate = 1984-06-01
              [Clock].EndDate = 1986-09-16
              [ApplyNOnGivenDate].Script.Dates = 1984-09-15
              [ExtraSums].Script.AccumulateStartDate = 1984-09-15
          CompositeFactor 1984_Oct
            Specifications:
              [Clock].StartDate = 1984-07-01
              [Clock].EndDate = 1986-10-16
              [ApplyNOnGivenDate].Script.Dates = 1984-10-15
              [ExtraSums].Script.AccumulateStartDate = 1984-10-15
          CompositeFactor 1984_Nov
            Specifications:
              [Clock].StartDate = 1984-08-01
              [Clock].EndDate = 1986-11-16
              [ApplyNOnGivenDate].Script.Dates = 1984-11-15
              [ExtraSums].Script.AccumulateStartDate = 1984-11-15
          CompositeFactor 1984_Dec
            Specifications:
              [Clock].StartDate = 1984-09-01
              [Clock].EndDate = 1986-12-16
              [ApplyNOnGivenDate].Script.Dates = 1984-12-15
              [ExtraSums].Script.AccumulateStartDate = 1984-12-15
          CompositeFactor 1985_Jan
            Specifications:
              [Clock].StartDate = 1984-10-01
              [Clock].EndDate = 1987-01-16
              [ApplyNOnGivenDate].Script.Dates = 1985-01-15
              [ExtraSums].Script.AccumulateStartDate = 1985-01-15
          CompositeFactor 1985_Feb
            Specifications:
              [Clock].StartDate = 1984-11-01
              [Clock].EndDate = 1987-02-16
              [ApplyNOnGivenDate].Script.Dates = 1985-02-15
              [ExtraSums].Script.AccumulateStartDate = 1985-02-15
          CompositeFactor 1985_Mar
            Specifications:
              [Clock].StartDate = 1984-12-01
              [Clock].EndDate = 1987-03-16
              [ApplyNOnGivenDate].Script.Dates = 1985-03-15
              [ExtraSums].Script.AccumulateStartDate = 1985-03-15
          CompositeFactor 1985_Apr
            Specifications:
              [Clock].StartDate = 1985-01-01
              [Clock].EndDate = 1987-04-16
              [ApplyNOnGivenDate].Script.Dates = 1985-04-15
              [ExtraSums].Script.AccumulateStartDate = 1985-04-15
          CompositeFactor 1985_May
            Specifications:
              [Clock].StartDate = 1985-02-01
              [Clock].EndDate = 1987-05-16
              [ApplyNOnGivenDate].Script.Dates = 1985-05-15
              [ExtraSums].Script.AccumulateStartDate = 1985-05-15
          CompositeFactor 1985_Jun
            Specifications:
              [Clock].StartDate = 1985-03-01
              [Clock].EndDate = 1987-06-16
              [ApplyNOnGivenDate].Script.Dates = 1985-06-15
              [ExtraSums].Script.AccumulateStartDate = 1985-06-15
          CompositeFactor 1985_Jul
            Specifications:
              [Clock].StartDate = 1985-04-01
              [Clock].EndDate = 1987-07-16
              [ApplyNOnGivenDate].Script.Dates = 1985-07-15
              [ExtraSums].Script.AccumulateStartDate = 1985-07-15
          CompositeFactor 1985_Aug
            Specifications:
              [Clock].StartDate = 1985-05-01
              [Clock].EndDate = 1987-08-16
              [ApplyNOnGivenDate].Script.Dates = 1985-08-15
              [ExtraSums].Script.AccumulateStartDate = 1985-08-15
          CompositeFactor 1985_Sep
            Specifications:
              [Clock].StartDate = 1985-06-01
              [Clock].EndDate = 1987-09-16
              [ApplyNOnGivenDate].Script.Dates = 1985-09-15
              [ExtraSums].Script.AccumulateStartDate = 1985-09-15
          CompositeFactor 1985_Oct
            Specifications:
              [Clock].StartDate = 1985-07-01
              [Clock].EndDate = 1987-10-16
              [ApplyNOnGivenDate].Script.Dates = 1985-10-15
              [ExtraSums].Script.AccumulateStartDate = 1985-10-15
          CompositeFactor 1985_Nov
            Specifications:
              [Clock].StartDate = 1985-08-01
              [Clock].EndDate = 1987-11-16
              [ApplyNOnGivenDate].Script.Dates = 1985-11-15
              [ExtraSums].Script.AccumulateStartDate = 1985-11-15
          CompositeFactor 1985_Dec
            Specifications:
              [Clock].StartDate = 1985-09-01
              [Clock].EndDate = 1987-12-16
              [ApplyNOnGivenDate].Script.Dates = 1985-12-15
              [ExtraSums].Script.AccumulateStartDate = 1985-12-15
          CompositeFactor 1986_Jan
            Specifications:
              [Clock].StartDate = 1985-10-01
              [Clock].EndDate = 1988-01-16
              [ApplyNOnGivenDate].Script.Dates = 1986-01-15
              [ExtraSums].Script.AccumulateStartDate = 1986-01-15
          CompositeFactor 1986_Feb
            Specifications:
              [Clock].StartDate = 1985-11-01
              [Clock].EndDate = 1988-02-16
              [ApplyNOnGivenDate].Script.Dates = 1986-02-15
              [ExtraSums].Script.AccumulateStartDate = 1986-02-15
          CompositeFactor 1986_Mar
            Specifications:
              [Clock].StartDate = 1985-12-01
              [Clock].EndDate = 1988-03-16
              [ApplyNOnGivenDate].Script.Dates = 1986-03-15
              [ExtraSums].Script.AccumulateStartDate = 1986-03-15
          CompositeFactor 1986_Apr
            Specifications:
              [Clock].StartDate = 1986-01-01
              [Clock].EndDate = 1988-04-16
              [ApplyNOnGivenDate].Script.Dates = 1986-04-15
              [ExtraSums].Script.AccumulateStartDate = 1986-04-15
          CompositeFactor 1986_May
            Specifications:
              [Clock].StartDate = 1986-02-01
              [Clock].EndDate = 1988-05-16
              [ApplyNOnGivenDate].Script.Dates = 1986-05-15
              [ExtraSums].Script.AccumulateStartDate = 1986-05-15
          CompositeFactor 1986_Jun
            Specifications:
              [Clock].StartDate = 1986-03-01
              [Clock].EndDate = 1988-06-16
              [ApplyNOnGivenDate].Script.Dates = 1986-06-15
              [ExtraSums].Script.AccumulateStartDate = 1986-06-15
          CompositeFactor 1986_Jul
            Specifications:
              [Clock].StartDate = 1986-04-01
              [Clock].EndDate = 1988-07-16
              [ApplyNOnGivenDate].Script.Dates = 1986-07-15
              [ExtraSums].Script.AccumulateStartDate = 1986-07-15
          CompositeFactor 1986_Aug
            Specifications:
              [Clock].StartDate = 1986-05-01
              [Clock].EndDate = 1988-08-16
              [ApplyNOnGivenDate].Script.Dates = 1986-08-15
              [ExtraSums].Script.AccumulateStartDate = 1986-08-15
          CompositeFactor 1986_Sep
            Specifications:
              [Clock].StartDate = 1986-06-01
              [Clock].EndDate = 1988-09-16
              [ApplyNOnGivenDate].Script.Dates = 1986-09-15
              [ExtraSums].Script.AccumulateStartDate = 1986-09-15
          CompositeFactor 1986_Oct
            Specifications:
              [Clock].StartDate = 1986-07-01
              [Clock].EndDate = 1988-10-16
              [ApplyNOnGivenDate].Script.Dates = 1986-10-15
              [ExtraSums].Script.AccumulateStartDate = 1986-10-15
          CompositeFactor 1986_Nov
            Specifications:
              [Clock].StartDate = 1986-08-01
              [Clock].EndDate = 1988-11-16
              [ApplyNOnGivenDate].Script.Dates = 1986-11-15
              [ExtraSums].Script.AccumulateStartDate = 1986-11-15
          CompositeFactor 1986_Dec
            Specifications:
              [Clock].StartDate = 1986-09-01
              [Clock].EndDate = 1988-12-16
              [ApplyNOnGivenDate].Script.Dates = 1986-12-15
              [ExtraSums].Script.AccumulateStartDate = 1986-12-15
          CompositeFactor 1987_Jan
            Specifications:
              [Clock].StartDate = 1986-10-01
              [Clock].EndDate = 1989-01-16
              [ApplyNOnGivenDate].Script.Dates = 1987-01-15
              [ExtraSums].Script.AccumulateStartDate = 1987-01-15
          CompositeFactor 1987_Feb
            Specifications:
              [Clock].StartDate = 1986-11-01
              [Clock].EndDate = 1989-02-16
              [ApplyNOnGivenDate].Script.Dates = 1987-02-15
              [ExtraSums].Script.AccumulateStartDate = 1987-02-15
          CompositeFactor 1987_Mar
            Specifications:
              [Clock].StartDate = 1986-12-01
              [Clock].EndDate = 1989-03-16
              [ApplyNOnGivenDate].Script.Dates = 1987-03-15
              [ExtraSums].Script.AccumulateStartDate = 1987-03-15
          CompositeFactor 1987_Apr
            Specifications:
              [Clock].StartDate = 1987-01-01
              [Clock].EndDate = 1989-04-16
              [ApplyNOnGivenDate].Script.Dates = 1987-04-15
              [ExtraSums].Script.AccumulateStartDate = 1987-04-15
          CompositeFactor 1987_May
            Specifications:
              [Clock].StartDate = 1987-02-01
              [Clock].EndDate = 1989-05-16
              [ApplyNOnGivenDate].Script.Dates = 1987-05-15
              [ExtraSums].Script.AccumulateStartDate = 1987-05-15
          CompositeFactor 1987_Jun
            Specifications:
              [Clock].StartDate = 1987-03-01
              [Clock].EndDate = 1989-06-16
              [ApplyNOnGivenDate].Script.Dates = 1987-06-15
              [ExtraSums].Script.AccumulateStartDate = 1987-06-15
          CompositeFactor 1987_Jul
            Specifications:
              [Clock].StartDate = 1987-04-01
              [Clock].EndDate = 1989-07-16
              [ApplyNOnGivenDate].Script.Dates = 1987-07-15
              [ExtraSums].Script.AccumulateStartDate = 1987-07-15
          CompositeFactor 1987_Aug
            Specifications:
              [Clock].StartDate = 1987-05-01
              [Clock].EndDate = 1989-08-16
              [ApplyNOnGivenDate].Script.Dates = 1987-08-15
              [ExtraSums].Script.AccumulateStartDate = 1987-08-15
          CompositeFactor 1987_Sep
            Specifications:
              [Clock].StartDate = 1987-06-01
              [Clock].EndDate = 1989-09-16
              [ApplyNOnGivenDate].Script.Dates = 1987-09-15
              [ExtraSums].Script.AccumulateStartDate = 1987-09-15
          CompositeFactor 1987_Oct
            Specifications:
              [Clock].StartDate = 1987-07-01
              [Clock].EndDate = 1989-10-16
              [ApplyNOnGivenDate].Script.Dates = 1987-10-15
              [ExtraSums].Script.AccumulateStartDate = 1987-10-15
          CompositeFactor 1987_Nov
            Specifications:
              [Clock].StartDate = 1987-08-01
              [Clock].EndDate = 1989-11-16
              [ApplyNOnGivenDate].Script.Dates = 1987-11-15
              [ExtraSums].Script.AccumulateStartDate = 1987-11-15
          CompositeFactor 1987_Dec
            Specifications:
              [Clock].StartDate = 1987-09-01
              [Clock].EndDate = 1989-12-16
              [ApplyNOnGivenDate].Script.Dates = 1987-12-15
              [ExtraSums].Script.AccumulateStartDate = 1987-12-15
          CompositeFactor 1988_Jan
            Specifications:
              [Clock].StartDate = 1987-10-01
              [Clock].EndDate = 1990-01-16
              [ApplyNOnGivenDate].Script.Dates = 1988-01-15
              [ExtraSums].Script.AccumulateStartDate = 1988-01-15
          CompositeFactor 1988_Feb
            Specifications:
              [Clock].StartDate = 1987-11-01
              [Clock].EndDate = 1990-02-16
              [ApplyNOnGivenDate].Script.Dates = 1988-02-15
              [ExtraSums].Script.AccumulateStartDate = 1988-02-15
          CompositeFactor 1988_Mar
            Specifications:
              [Clock].StartDate = 1987-12-01
              [Clock].EndDate = 1990-03-16
              [ApplyNOnGivenDate].Script.Dates = 1988-03-15
              [ExtraSums].Script.AccumulateStartDate = 1988-03-15
          CompositeFactor 1988_Apr
            Specifications:
              [Clock].StartDate = 1988-01-01
              [Clock].EndDate = 1990-04-16
              [ApplyNOnGivenDate].Script.Dates = 1988-04-15
              [ExtraSums].Script.AccumulateStartDate = 1988-04-15
          CompositeFactor 1988_May
            Specifications:
              [Clock].StartDate = 1988-02-01
              [Clock].EndDate = 1990-05-16
              [ApplyNOnGivenDate].Script.Dates = 1988-05-15
              [ExtraSums].Script.AccumulateStartDate = 1988-05-15
          CompositeFactor 1988_Jun
            Specifications:
              [Clock].StartDate = 1988-03-01
              [Clock].EndDate = 1990-06-16
              [ApplyNOnGivenDate].Script.Dates = 1988-06-15
              [ExtraSums].Script.AccumulateStartDate = 1988-06-15
          CompositeFactor 1988_Jul
            Specifications:
              [Clock].StartDate = 1988-04-01
              [Clock].EndDate = 1990-07-16
              [ApplyNOnGivenDate].Script.Dates = 1988-07-15
              [ExtraSums].Script.AccumulateStartDate = 1988-07-15
          CompositeFactor 1988_Aug
            Specifications:
              [Clock].StartDate = 1988-05-01
              [Clock].EndDate = 1990-08-16
              [ApplyNOnGivenDate].Script.Dates = 1988-08-15
              [ExtraSums].Script.AccumulateStartDate = 1988-08-15
          CompositeFactor 1988_Sep
            Specifications:
              [Clock].StartDate = 1988-06-01
              [Clock].EndDate = 1990-09-16
              [ApplyNOnGivenDate].Script.Dates = 1988-09-15
              [ExtraSums].Script.AccumulateStartDate = 1988-09-15
          CompositeFactor 1988_Oct
            Specifications:
              [Clock].StartDate = 1988-07-01
              [Clock].EndDate = 1990-10-16
              [ApplyNOnGivenDate].Script.Dates = 1988-10-15
              [ExtraSums].Script.AccumulateStartDate = 1988-10-15
          CompositeFactor 1988_Nov
            Specifications:
              [Clock].StartDate = 1988-08-01
              [Clock].EndDate = 1990-11-16
              [ApplyNOnGivenDate].Script.Dates = 1988-11-15
              [ExtraSums].Script.AccumulateStartDate = 1988-11-15
          CompositeFactor 1988_Dec
            Specifications:
              [Clock].StartDate = 1988-09-01
              [Clock].EndDate = 1990-12-16
              [ApplyNOnGivenDate].Script.Dates = 1988-12-15
              [ExtraSums].Script.AccumulateStartDate = 1988-12-15
          CompositeFactor 1989_Jan
            Specifications:
              [Clock].StartDate = 1988-10-01
              [Clock].EndDate = 1991-01-16
              [ApplyNOnGivenDate].Script.Dates = 1989-01-15
              [ExtraSums].Script.AccumulateStartDate = 1989-01-15
          CompositeFactor 1989_Feb
            Specifications:
              [Clock].StartDate = 1988-11-01
              [Clock].EndDate = 1991-02-16
              [ApplyNOnGivenDate].Script.Dates = 1989-02-15
              [ExtraSums].Script.AccumulateStartDate = 1989-02-15
          CompositeFactor 1989_Mar
            Specifications:
              [Clock].StartDate = 1988-12-01
              [Clock].EndDate = 1991-03-16
              [ApplyNOnGivenDate].Script.Dates = 1989-03-15
              [ExtraSums].Script.AccumulateStartDate = 1989-03-15
          CompositeFactor 1989_Apr
            Specifications:
              [Clock].StartDate = 1989-01-01
              [Clock].EndDate = 1991-04-16
              [ApplyNOnGivenDate].Script.Dates = 1989-04-15
              [ExtraSums].Script.AccumulateStartDate = 1989-04-15
          CompositeFactor 1989_May
            Specifications:
              [Clock].StartDate = 1989-02-01
              [Clock].EndDate = 1991-05-16
              [ApplyNOnGivenDate].Script.Dates = 1989-05-15
              [ExtraSums].Script.AccumulateStartDate = 1989-05-15
          CompositeFactor 1989_Jun
            Specifications:
              [Clock].StartDate = 1989-03-01
              [Clock].EndDate = 1991-06-16
              [ApplyNOnGivenDate].Script.Dates = 1989-06-15
              [ExtraSums].Script.AccumulateStartDate = 1989-06-15
          CompositeFactor 1989_Jul
            Specifications:
              [Clock].StartDate = 1989-04-01
              [Clock].EndDate = 1991-07-16
              [ApplyNOnGivenDate].Script.Dates = 1989-07-15
              [ExtraSums].Script.AccumulateStartDate = 1989-07-15
          CompositeFactor 1989_Aug
            Specifications:
              [Clock].StartDate = 1989-05-01
              [Clock].EndDate = 1991-08-16
              [ApplyNOnGivenDate].Script.Dates = 1989-08-15
              [ExtraSums].Script.AccumulateStartDate = 1989-08-15
          CompositeFactor 1989_Sep
            Specifications:
              [Clock].StartDate = 1989-06-01
              [Clock].EndDate = 1991-09-16
              [ApplyNOnGivenDate].Script.Dates = 1989-09-15
              [ExtraSums].Script.AccumulateStartDate = 1989-09-15
          CompositeFactor 1989_Oct
            Specifications:
              [Clock].StartDate = 1989-07-01
              [Clock].EndDate = 1991-10-16
              [ApplyNOnGivenDate].Script.Dates = 1989-10-15
              [ExtraSums].Script.AccumulateStartDate = 1989-10-15
          CompositeFactor 1989_Nov
            Specifications:
              [Clock].StartDate = 1989-08-01
              [Clock].EndDate = 1991-11-16
              [ApplyNOnGivenDate].Script.Dates = 1989-11-15
              [ExtraSums].Script.AccumulateStartDate = 1989-11-15
          CompositeFactor 1989_Dec
            Specifications:
              [Clock].StartDate = 1989-09-01
              [Clock].EndDate = 1991-12-16
              [ApplyNOnGivenDate].Script.Dates = 1989-12-15
              [ExtraSums].Script.AccumulateStartDate = 1989-12-15
          CompositeFactor 1990_Jan
            Specifications:
              [Clock].StartDate = 1989-10-01
              [Clock].EndDate = 1992-01-16
              [ApplyNOnGivenDate].Script.Dates = 1990-01-15
              [ExtraSums].Script.AccumulateStartDate = 1990-01-15
          CompositeFactor 1990_Feb
            Specifications:
              [Clock].StartDate = 1989-11-01
              [Clock].EndDate = 1992-02-16
              [ApplyNOnGivenDate].Script.Dates = 1990-02-15
              [ExtraSums].Script.AccumulateStartDate = 1990-02-15
          CompositeFactor 1990_Mar
            Specifications:
              [Clock].StartDate = 1989-12-01
              [Clock].EndDate = 1992-03-16
              [ApplyNOnGivenDate].Script.Dates = 1990-03-15
              [ExtraSums].Script.AccumulateStartDate = 1990-03-15
          CompositeFactor 1990_Apr
            Specifications:
              [Clock].StartDate = 1990-01-01
              [Clock].EndDate = 1992-04-16
              [ApplyNOnGivenDate].Script.Dates = 1990-04-15
              [ExtraSums].Script.AccumulateStartDate = 1990-04-15
          CompositeFactor 1990_May
            Specifications:
              [Clock].StartDate = 1990-02-01
              [Clock].EndDate = 1992-05-16
              [ApplyNOnGivenDate].Script.Dates = 1990-05-15
              [ExtraSums].Script.AccumulateStartDate = 1990-05-15
          CompositeFactor 1990_Jun
            Specifications:
              [Clock].StartDate = 1990-03-01
              [Clock].EndDate = 1992-06-16
              [ApplyNOnGivenDate].Script.Dates = 1990-06-15
              [ExtraSums].Script.AccumulateStartDate = 1990-06-15
          CompositeFactor 1990_Jul
            Specifications:
              [Clock].StartDate = 1990-04-01
              [Clock].EndDate = 1992-07-16
              [ApplyNOnGivenDate].Script.Dates = 1990-07-15
              [ExtraSums].Script.AccumulateStartDate = 1990-07-15
          CompositeFactor 1990_Aug
            Specifications:
              [Clock].StartDate = 1990-05-01
              [Clock].EndDate = 1992-08-16
              [ApplyNOnGivenDate].Script.Dates = 1990-08-15
              [ExtraSums].Script.AccumulateStartDate = 1990-08-15
          CompositeFactor 1990_Sep
            Specifications:
              [Clock].StartDate = 1990-06-01
              [Clock].EndDate = 1992-09-16
              [ApplyNOnGivenDate].Script.Dates = 1990-09-15
              [ExtraSums].Script.AccumulateStartDate = 1990-09-15
          CompositeFactor 1990_Oct
            Specifications:
              [Clock].StartDate = 1990-07-01
              [Clock].EndDate = 1992-10-16
              [ApplyNOnGivenDate].Script.Dates = 1990-10-15
              [ExtraSums].Script.AccumulateStartDate = 1990-10-15
          CompositeFactor 1990_Nov
            Specifications:
              [Clock].StartDate = 1990-08-01
              [Clock].EndDate = 1992-11-16
              [ApplyNOnGivenDate].Script.Dates = 1990-11-15
              [ExtraSums].Script.AccumulateStartDate = 1990-11-15
          CompositeFactor 1990_Dec
            Specifications:
              [Clock].StartDate = 1990-09-01
              [Clock].EndDate = 1992-12-16
              [ApplyNOnGivenDate].Script.Dates = 1990-12-15
              [ExtraSums].Script.AccumulateStartDate = 1990-12-15
          CompositeFactor 1991_Jan
            Specifications:
              [Clock].StartDate = 1990-10-01
              [Clock].EndDate = 1993-01-16
              [ApplyNOnGivenDate].Script.Dates = 1991-01-15
              [ExtraSums].Script.AccumulateStartDate = 1991-01-15
          CompositeFactor 1991_Feb
            Specifications:
              [Clock].StartDate = 1990-11-01
              [Clock].EndDate = 1993-02-16
              [ApplyNOnGivenDate].Script.Dates = 1991-02-15
              [ExtraSums].Script.AccumulateStartDate = 1991-02-15
          CompositeFactor 1991_Mar
            Specifications:
              [Clock].StartDate = 1990-12-01
              [Clock].EndDate = 1993-03-16
              [ApplyNOnGivenDate].Script.Dates = 1991-03-15
              [ExtraSums].Script.AccumulateStartDate = 1991-03-15
          CompositeFactor 1991_Apr
            Specifications:
              [Clock].StartDate = 1991-01-01
              [Clock].EndDate = 1993-04-16
              [ApplyNOnGivenDate].Script.Dates = 1991-04-15
              [ExtraSums].Script.AccumulateStartDate = 1991-04-15
          CompositeFactor 1991_May
            Specifications:
              [Clock].StartDate = 1991-02-01
              [Clock].EndDate = 1993-05-16
              [ApplyNOnGivenDate].Script.Dates = 1991-05-15
              [ExtraSums].Script.AccumulateStartDate = 1991-05-15
          CompositeFactor 1991_Jun
            Specifications:
              [Clock].StartDate = 1991-03-01
              [Clock].EndDate = 1993-06-16
              [ApplyNOnGivenDate].Script.Dates = 1991-06-15
              [ExtraSums].Script.AccumulateStartDate = 1991-06-15
          CompositeFactor 1991_Jul
            Specifications:
              [Clock].StartDate = 1991-04-01
              [Clock].EndDate = 1993-07-16
              [ApplyNOnGivenDate].Script.Dates = 1991-07-15
              [ExtraSums].Script.AccumulateStartDate = 1991-07-15
          CompositeFactor 1991_Aug
            Specifications:
              [Clock].StartDate = 1991-05-01
              [Clock].EndDate = 1993-08-16
              [ApplyNOnGivenDate].Script.Dates = 1991-08-15
              [ExtraSums].Script.AccumulateStartDate = 1991-08-15
          CompositeFactor 1991_Sep
            Specifications:
              [Clock].StartDate = 1991-06-01
              [Clock].EndDate = 1993-09-16
              [ApplyNOnGivenDate].Script.Dates = 1991-09-15
              [ExtraSums].Script.AccumulateStartDate = 1991-09-15
          CompositeFactor 1991_Oct
            Specifications:
              [Clock].StartDate = 1991-07-01
              [Clock].EndDate = 1993-10-16
              [ApplyNOnGivenDate].Script.Dates = 1991-10-15
              [ExtraSums].Script.AccumulateStartDate = 1991-10-15
          CompositeFactor 1991_Nov
            Specifications:
              [Clock].StartDate = 1991-08-01
              [Clock].EndDate = 1993-11-16
              [ApplyNOnGivenDate].Script.Dates = 1991-11-15
              [ExtraSums].Script.AccumulateStartDate = 1991-11-15
          CompositeFactor 1991_Dec
            Specifications:
              [Clock].StartDate = 1991-09-01
              [Clock].EndDate = 1993-12-16
              [ApplyNOnGivenDate].Script.Dates = 1991-12-15
              [ExtraSums].Script.AccumulateStartDate = 1991-12-15
          CompositeFactor 1992_Jan
            Specifications:
              [Clock].StartDate = 1991-10-01
              [Clock].EndDate = 1994-01-16
              [ApplyNOnGivenDate].Script.Dates = 1992-01-15
              [ExtraSums].Script.AccumulateStartDate = 1992-01-15
          CompositeFactor 1992_Feb
            Specifications:
              [Clock].StartDate = 1991-11-01
              [Clock].EndDate = 1994-02-16
              [ApplyNOnGivenDate].Script.Dates = 1992-02-15
              [ExtraSums].Script.AccumulateStartDate = 1992-02-15
          CompositeFactor 1992_Mar
            Specifications:
              [Clock].StartDate = 1991-12-01
              [Clock].EndDate = 1994-03-16
              [ApplyNOnGivenDate].Script.Dates = 1992-03-15
              [ExtraSums].Script.AccumulateStartDate = 1992-03-15
          CompositeFactor 1992_Apr
            Specifications:
              [Clock].StartDate = 1992-01-01
              [Clock].EndDate = 1994-04-16
              [ApplyNOnGivenDate].Script.Dates = 1992-04-15
              [ExtraSums].Script.AccumulateStartDate = 1992-04-15
          CompositeFactor 1992_May
            Specifications:
              [Clock].StartDate = 1992-02-01
              [Clock].EndDate = 1994-05-16
              [ApplyNOnGivenDate].Script.Dates = 1992-05-15
              [ExtraSums].Script.AccumulateStartDate = 1992-05-15
          CompositeFactor 1992_Jun
            Specifications:
              [Clock].StartDate = 1992-03-01
              [Clock].EndDate = 1994-06-16
              [ApplyNOnGivenDate].Script.Dates = 1992-06-15
              [ExtraSums].Script.AccumulateStartDate = 1992-06-15
          CompositeFactor 1992_Jul
            Specifications:
              [Clock].StartDate = 1992-04-01
              [Clock].EndDate = 1994-07-16
              [ApplyNOnGivenDate].Script.Dates = 1992-07-15
              [ExtraSums].Script.AccumulateStartDate = 1992-07-15
          CompositeFactor 1992_Aug
            Specifications:
              [Clock].StartDate = 1992-05-01
              [Clock].EndDate = 1994-08-16
              [ApplyNOnGivenDate].Script.Dates = 1992-08-15
              [ExtraSums].Script.AccumulateStartDate = 1992-08-15
          CompositeFactor 1992_Sep
            Specifications:
              [Clock].StartDate = 1992-06-01
              [Clock].EndDate = 1994-09-16
              [ApplyNOnGivenDate].Script.Dates = 1992-09-15
              [ExtraSums].Script.AccumulateStartDate = 1992-09-15
          CompositeFactor 1992_Oct
            Specifications:
              [Clock].StartDate = 1992-07-01
              [Clock].EndDate = 1994-10-16
              [ApplyNOnGivenDate].Script.Dates = 1992-10-15
              [ExtraSums].Script.AccumulateStartDate = 1992-10-15
          CompositeFactor 1992_Nov
            Specifications:
              [Clock].StartDate = 1992-08-01
              [Clock].EndDate = 1994-11-16
              [ApplyNOnGivenDate].Script.Dates = 1992-11-15
              [ExtraSums].Script.AccumulateStartDate = 1992-11-15
          CompositeFactor 1992_Dec
            Specifications:
              [Clock].StartDate = 1992-09-01
              [Clock].EndDate = 1994-12-16
              [ApplyNOnGivenDate].Script.Dates = 1992-12-15
              [ExtraSums].Script.AccumulateStartDate = 1992-12-15
          CompositeFactor 1993_Jan
            Specifications:
              [Clock].StartDate = 1992-10-01
              [Clock].EndDate = 1995-01-16
              [ApplyNOnGivenDate].Script.Dates = 1993-01-15
              [ExtraSums].Script.AccumulateStartDate = 1993-01-15
          CompositeFactor 1993_Feb
            Specifications:
              [Clock].StartDate = 1992-11-01
              [Clock].EndDate = 1995-02-16
              [ApplyNOnGivenDate].Script.Dates = 1993-02-15
              [ExtraSums].Script.AccumulateStartDate = 1993-02-15
          CompositeFactor 1993_Mar
            Specifications:
              [Clock].StartDate = 1992-12-01
              [Clock].EndDate = 1995-03-16
              [ApplyNOnGivenDate].Script.Dates = 1993-03-15
              [ExtraSums].Script.AccumulateStartDate = 1993-03-15
          CompositeFactor 1993_Apr
            Specifications:
              [Clock].StartDate = 1993-01-01
              [Clock].EndDate = 1995-04-16
              [ApplyNOnGivenDate].Script.Dates = 1993-04-15
              [ExtraSums].Script.AccumulateStartDate = 1993-04-15
          CompositeFactor 1993_May
            Specifications:
              [Clock].StartDate = 1993-02-01
              [Clock].EndDate = 1995-05-16
              [ApplyNOnGivenDate].Script.Dates = 1993-05-15
              [ExtraSums].Script.AccumulateStartDate = 1993-05-15
          CompositeFactor 1993_Jun
            Specifications:
              [Clock].StartDate = 1993-03-01
              [Clock].EndDate = 1995-06-16
              [ApplyNOnGivenDate].Script.Dates = 1993-06-15
              [ExtraSums].Script.AccumulateStartDate = 1993-06-15
          CompositeFactor 1993_Jul
            Specifications:
              [Clock].StartDate = 1993-04-01
              [Clock].EndDate = 1995-07-16
              [ApplyNOnGivenDate].Script.Dates = 1993-07-15
              [ExtraSums].Script.AccumulateStartDate = 1993-07-15
          CompositeFactor 1993_Aug
            Specifications:
              [Clock].StartDate = 1993-05-01
              [Clock].EndDate = 1995-08-16
              [ApplyNOnGivenDate].Script.Dates = 1993-08-15
              [ExtraSums].Script.AccumulateStartDate = 1993-08-15
          CompositeFactor 1993_Sep
            Specifications:
              [Clock].StartDate = 1993-06-01
              [Clock].EndDate = 1995-09-16
              [ApplyNOnGivenDate].Script.Dates = 1993-09-15
              [ExtraSums].Script.AccumulateStartDate = 1993-09-15
          CompositeFactor 1993_Oct
            Specifications:
              [Clock].StartDate = 1993-07-01
              [Clock].EndDate = 1995-10-16
              [ApplyNOnGivenDate].Script.Dates = 1993-10-15
              [ExtraSums].Script.AccumulateStartDate = 1993-10-15
          CompositeFactor 1993_Nov
            Specifications:
              [Clock].StartDate = 1993-08-01
              [Clock].EndDate = 1995-11-16
              [ApplyNOnGivenDate].Script.Dates = 1993-11-15
              [ExtraSums].Script.AccumulateStartDate = 1993-11-15
          CompositeFactor 1993_Dec
            Specifications:
              [Clock].StartDate = 1993-09-01
              [Clock].EndDate = 1995-12-16
              [ApplyNOnGivenDate].Script.Dates = 1993-12-15
              [ExtraSums].Script.AccumulateStartDate = 1993-12-15
          CompositeFactor 1994_Jan
            Specifications:
              [Clock].StartDate = 1993-10-01
              [Clock].EndDate = 1996-01-16
              [ApplyNOnGivenDate].Script.Dates = 1994-01-15
              [ExtraSums].Script.AccumulateStartDate = 1994-01-15
          CompositeFactor 1994_Feb
            Specifications:
              [Clock].StartDate = 1993-11-01
              [Clock].EndDate = 1996-02-16
              [ApplyNOnGivenDate].Script.Dates = 1994-02-15
              [ExtraSums].Script.AccumulateStartDate = 1994-02-15
          CompositeFactor 1994_Mar
            Specifications:
              [Clock].StartDate = 1993-12-01
              [Clock].EndDate = 1996-03-16
              [ApplyNOnGivenDate].Script.Dates = 1994-03-15
              [ExtraSums].Script.AccumulateStartDate = 1994-03-15
          CompositeFactor 1994_Apr
            Specifications:
              [Clock].StartDate = 1994-01-01
              [Clock].EndDate = 1996-04-16
              [ApplyNOnGivenDate].Script.Dates = 1994-04-15
              [ExtraSums].Script.AccumulateStartDate = 1994-04-15
          CompositeFactor 1994_May
            Specifications:
              [Clock].StartDate = 1994-02-01
              [Clock].EndDate = 1996-05-16
              [ApplyNOnGivenDate].Script.Dates = 1994-05-15
              [ExtraSums].Script.AccumulateStartDate = 1994-05-15
          CompositeFactor 1994_Jun
            Specifications:
              [Clock].StartDate = 1994-03-01
              [Clock].EndDate = 1996-06-16
              [ApplyNOnGivenDate].Script.Dates = 1994-06-15
              [ExtraSums].Script.AccumulateStartDate = 1994-06-15
          CompositeFactor 1994_Jul
            Specifications:
              [Clock].StartDate = 1994-04-01
              [Clock].EndDate = 1996-07-16
              [ApplyNOnGivenDate].Script.Dates = 1994-07-15
              [ExtraSums].Script.AccumulateStartDate = 1994-07-15
          CompositeFactor 1994_Aug
            Specifications:
              [Clock].StartDate = 1994-05-01
              [Clock].EndDate = 1996-08-16
              [ApplyNOnGivenDate].Script.Dates = 1994-08-15
              [ExtraSums].Script.AccumulateStartDate = 1994-08-15
          CompositeFactor 1994_Sep
            Specifications:
              [Clock].StartDate = 1994-06-01
              [Clock].EndDate = 1996-09-16
              [ApplyNOnGivenDate].Script.Dates = 1994-09-15
              [ExtraSums].Script.AccumulateStartDate = 1994-09-15
          CompositeFactor 1994_Oct
            Specifications:
              [Clock].StartDate = 1994-07-01
              [Clock].EndDate = 1996-10-16
              [ApplyNOnGivenDate].Script.Dates = 1994-10-15
              [ExtraSums].Script.AccumulateStartDate = 1994-10-15
          CompositeFactor 1994_Nov
            Specifications:
              [Clock].StartDate = 1994-08-01
              [Clock].EndDate = 1996-11-16
              [ApplyNOnGivenDate].Script.Dates = 1994-11-15
              [ExtraSums].Script.AccumulateStartDate = 1994-11-15
          CompositeFactor 1994_Dec
            Specifications:
              [Clock].StartDate = 1994-09-01
              [Clock].EndDate = 1996-12-16
              [ApplyNOnGivenDate].Script.Dates = 1994-12-15
              [ExtraSums].Script.AccumulateStartDate = 1994-12-15
          CompositeFactor 1995_Jan
            Specifications:
              [Clock].StartDate = 1994-10-01
              [Clock].EndDate = 1997-01-16
              [ApplyNOnGivenDate].Script.Dates = 1995-01-15
              [ExtraSums].Script.AccumulateStartDate = 1995-01-15
          CompositeFactor 1995_Feb
            Specifications:
              [Clock].StartDate = 1994-11-01
              [Clock].EndDate = 1997-02-16
              [ApplyNOnGivenDate].Script.Dates = 1995-02-15
              [ExtraSums].Script.AccumulateStartDate = 1995-02-15
          CompositeFactor 1995_Mar
            Specifications:
              [Clock].StartDate = 1994-12-01
              [Clock].EndDate = 1997-03-16
              [ApplyNOnGivenDate].Script.Dates = 1995-03-15
              [ExtraSums].Script.AccumulateStartDate = 1995-03-15
          CompositeFactor 1995_Apr
            Specifications:
              [Clock].StartDate = 1995-01-01
              [Clock].EndDate = 1997-04-16
              [ApplyNOnGivenDate].Script.Dates = 1995-04-15
              [ExtraSums].Script.AccumulateStartDate = 1995-04-15
          CompositeFactor 1995_May
            Specifications:
              [Clock].StartDate = 1995-02-01
              [Clock].EndDate = 1997-05-16
              [ApplyNOnGivenDate].Script.Dates = 1995-05-15
              [ExtraSums].Script.AccumulateStartDate = 1995-05-15
          CompositeFactor 1995_Jun
            Specifications:
              [Clock].StartDate = 1995-03-01
              [Clock].EndDate = 1997-06-16
              [ApplyNOnGivenDate].Script.Dates = 1995-06-15
              [ExtraSums].Script.AccumulateStartDate = 1995-06-15
          CompositeFactor 1995_Jul
            Specifications:
              [Clock].StartDate = 1995-04-01
              [Clock].EndDate = 1997-07-16
              [ApplyNOnGivenDate].Script.Dates = 1995-07-15
              [ExtraSums].Script.AccumulateStartDate = 1995-07-15
          CompositeFactor 1995_Aug
            Specifications:
              [Clock].StartDate = 1995-05-01
              [Clock].EndDate = 1997-08-16
              [ApplyNOnGivenDate].Script.Dates = 1995-08-15
              [ExtraSums].Script.AccumulateStartDate = 1995-08-15
          CompositeFactor 1995_Sep
            Specifications:
              [Clock].StartDate = 1995-06-01
              [Clock].EndDate = 1997-09-16
              [ApplyNOnGivenDate].Script.Dates = 1995-09-15
              [ExtraSums].Script.AccumulateStartDate = 1995-09-15
          CompositeFactor 1995_Oct
            Specifications:
              [Clock].StartDate = 1995-07-01
              [Clock].EndDate = 1997-10-16
              [ApplyNOnGivenDate].Script.Dates = 1995-10-15
              [ExtraSums].Script.AccumulateStartDate = 1995-10-15
          CompositeFactor 1995_Nov
            Specifications:
              [Clock].StartDate = 1995-08-01
              [Clock].EndDate = 1997-11-16
              [ApplyNOnGivenDate].Script.Dates = 1995-11-15
              [ExtraSums].Script.AccumulateStartDate = 1995-11-15
          CompositeFactor 1995_Dec
            Specifications:
              [Clock].StartDate = 1995-09-01
              [Clock].EndDate = 1997-12-16
              [ApplyNOnGivenDate].Script.Dates = 1995-12-15
              [ExtraSums].Script.AccumulateStartDate = 1995-12-15
          CompositeFactor 1996_Jan
            Specifications:
              [Clock].StartDate = 1995-10-01
              [Clock].EndDate = 1998-01-16
              [ApplyNOnGivenDate].Script.Dates = 1996-01-15
              [ExtraSums].Script.AccumulateStartDate = 1996-01-15
          CompositeFactor 1996_Feb
            Specifications:
              [Clock].StartDate = 1995-11-01
              [Clock].EndDate = 1998-02-16
              [ApplyNOnGivenDate].Script.Dates = 1996-02-15
              [ExtraSums].Script.AccumulateStartDate = 1996-02-15
          CompositeFactor 1996_Mar
            Specifications:
              [Clock].StartDate = 1995-12-01
              [Clock].EndDate = 1998-03-16
              [ApplyNOnGivenDate].Script.Dates = 1996-03-15
              [ExtraSums].Script.AccumulateStartDate = 1996-03-15
          CompositeFactor 1996_Apr
            Specifications:
              [Clock].StartDate = 1996-01-01
              [Clock].EndDate = 1998-04-16
              [ApplyNOnGivenDate].Script.Dates = 1996-04-15
              [ExtraSums].Script.AccumulateStartDate = 1996-04-15
          CompositeFactor 1996_May
            Specifications:
              [Clock].StartDate = 1996-02-01
              [Clock].EndDate = 1998-05-16
              [ApplyNOnGivenDate].Script.Dates = 1996-05-15
              [ExtraSums].Script.AccumulateStartDate = 1996-05-15
          CompositeFactor 1996_Jun
            Specifications:
              [Clock].StartDate = 1996-03-01
              [Clock].EndDate = 1998-06-16
              [ApplyNOnGivenDate].Script.Dates = 1996-06-15
              [ExtraSums].Script.AccumulateStartDate = 1996-06-15
          CompositeFactor 1996_Jul
            Specifications:
              [Clock].StartDate = 1996-04-01
              [Clock].EndDate = 1998-07-16
              [ApplyNOnGivenDate].Script.Dates = 1996-07-15
              [ExtraSums].Script.AccumulateStartDate = 1996-07-15
          CompositeFactor 1996_Aug
            Specifications:
              [Clock].StartDate = 1996-05-01
              [Clock].EndDate = 1998-08-16
              [ApplyNOnGivenDate].Script.Dates = 1996-08-15
              [ExtraSums].Script.AccumulateStartDate = 1996-08-15
          CompositeFactor 1996_Sep
            Specifications:
              [Clock].StartDate = 1996-06-01
              [Clock].EndDate = 1998-09-16
              [ApplyNOnGivenDate].Script.Dates = 1996-09-15
              [ExtraSums].Script.AccumulateStartDate = 1996-09-15
          CompositeFactor 1996_Oct
            Specifications:
              [Clock].StartDate = 1996-07-01
              [Clock].EndDate = 1998-10-16
              [ApplyNOnGivenDate].Script.Dates = 1996-10-15
              [ExtraSums].Script.AccumulateStartDate = 1996-10-15
          CompositeFactor 1996_Nov
            Specifications:
              [Clock].StartDate = 1996-08-01
              [Clock].EndDate = 1998-11-16
              [ApplyNOnGivenDate].Script.Dates = 1996-11-15
              [ExtraSums].Script.AccumulateStartDate = 1996-11-15
          CompositeFactor 1996_Dec
            Specifications:
              [Clock].StartDate = 1996-09-01
              [Clock].EndDate = 1998-12-16
              [ApplyNOnGivenDate].Script.Dates = 1996-12-15
              [ExtraSums].Script.AccumulateStartDate = 1996-12-15
          CompositeFactor 1997_Jan
            Specifications:
              [Clock].StartDate = 1996-10-01
              [Clock].EndDate = 1999-01-16
              [ApplyNOnGivenDate].Script.Dates = 1997-01-15
              [ExtraSums].Script.AccumulateStartDate = 1997-01-15
          CompositeFactor 1997_Feb
            Specifications:
              [Clock].StartDate = 1996-11-01
              [Clock].EndDate = 1999-02-16
              [ApplyNOnGivenDate].Script.Dates = 1997-02-15
              [ExtraSums].Script.AccumulateStartDate = 1997-02-15
          CompositeFactor 1997_Mar
            Specifications:
              [Clock].StartDate = 1996-12-01
              [Clock].EndDate = 1999-03-16
              [ApplyNOnGivenDate].Script.Dates = 1997-03-15
              [ExtraSums].Script.AccumulateStartDate = 1997-03-15
          CompositeFactor 1997_Apr
            Specifications:
              [Clock].StartDate = 1997-01-01
              [Clock].EndDate = 1999-04-16
              [ApplyNOnGivenDate].Script.Dates = 1997-04-15
              [ExtraSums].Script.AccumulateStartDate = 1997-04-15
          CompositeFactor 1997_May
            Specifications:
              [Clock].StartDate = 1997-02-01
              [Clock].EndDate = 1999-05-16
              [ApplyNOnGivenDate].Script.Dates = 1997-05-15
              [ExtraSums].Script.AccumulateStartDate = 1997-05-15
          CompositeFactor 1997_Jun
            Specifications:
              [Clock].StartDate = 1997-03-01
              [Clock].EndDate = 1999-06-16
              [ApplyNOnGivenDate].Script.Dates = 1997-06-15
              [ExtraSums].Script.AccumulateStartDate = 1997-06-15
          CompositeFactor 1997_Jul
            Specifications:
              [Clock].StartDate = 1997-04-01
              [Clock].EndDate = 1999-07-16
              [ApplyNOnGivenDate].Script.Dates = 1997-07-15
              [ExtraSums].Script.AccumulateStartDate = 1997-07-15
          CompositeFactor 1997_Aug
            Specifications:
              [Clock].StartDate = 1997-05-01
              [Clock].EndDate = 1999-08-16
              [ApplyNOnGivenDate].Script.Dates = 1997-08-15
              [ExtraSums].Script.AccumulateStartDate = 1997-08-15
          CompositeFactor 1997_Sep
            Specifications:
              [Clock].StartDate = 1997-06-01
              [Clock].EndDate = 1999-09-16
              [ApplyNOnGivenDate].Script.Dates = 1997-09-15
              [ExtraSums].Script.AccumulateStartDate = 1997-09-15
          CompositeFactor 1997_Oct
            Specifications:
              [Clock].StartDate = 1997-07-01
              [Clock].EndDate = 1999-10-16
              [ApplyNOnGivenDate].Script.Dates = 1997-10-15
              [ExtraSums].Script.AccumulateStartDate = 1997-10-15
          CompositeFactor 1997_Nov
            Specifications:
              [Clock].StartDate = 1997-08-01
              [Clock].EndDate = 1999-11-16
              [ApplyNOnGivenDate].Script.Dates = 1997-11-15
              [ExtraSums].Script.AccumulateStartDate = 1997-11-15
          CompositeFactor 1997_Dec
            Specifications:
              [Clock].StartDate = 1997-09-01
              [Clock].EndDate = 1999-12-16
              [ApplyNOnGivenDate].Script.Dates = 1997-12-15
              [ExtraSums].Script.AccumulateStartDate = 1997-12-15
          CompositeFactor 1998_Jan
            Specifications:
              [Clock].StartDate = 1997-10-01
              [Clock].EndDate = 2000-01-16
              [ApplyNOnGivenDate].Script.Dates = 1998-01-15
              [ExtraSums].Script.AccumulateStartDate = 1998-01-15
          CompositeFactor 1998_Feb
            Specifications:
              [Clock].StartDate = 1997-11-01
              [Clock].EndDate = 2000-02-16
              [ApplyNOnGivenDate].Script.Dates = 1998-02-15
              [ExtraSums].Script.AccumulateStartDate = 1998-02-15
          CompositeFactor 1998_Mar
            Specifications:
              [Clock].StartDate = 1997-12-01
              [Clock].EndDate = 2000-03-16
              [ApplyNOnGivenDate].Script.Dates = 1998-03-15
              [ExtraSums].Script.AccumulateStartDate = 1998-03-15
          CompositeFactor 1998_Apr
            Specifications:
              [Clock].StartDate = 1998-01-01
              [Clock].EndDate = 2000-04-16
              [ApplyNOnGivenDate].Script.Dates = 1998-04-15
              [ExtraSums].Script.AccumulateStartDate = 1998-04-15
          CompositeFactor 1998_May
            Specifications:
              [Clock].StartDate = 1998-02-01
              [Clock].EndDate = 2000-05-16
              [ApplyNOnGivenDate].Script.Dates = 1998-05-15
              [ExtraSums].Script.AccumulateStartDate = 1998-05-15
          CompositeFactor 1998_Jun
            Specifications:
              [Clock].StartDate = 1998-03-01
              [Clock].EndDate = 2000-06-16
              [ApplyNOnGivenDate].Script.Dates = 1998-06-15
              [ExtraSums].Script.AccumulateStartDate = 1998-06-15
          CompositeFactor 1998_Jul
            Specifications:
              [Clock].StartDate = 1998-04-01
              [Clock].EndDate = 2000-07-16
              [ApplyNOnGivenDate].Script.Dates = 1998-07-15
              [ExtraSums].Script.AccumulateStartDate = 1998-07-15
          CompositeFactor 1998_Aug
            Specifications:
              [Clock].StartDate = 1998-05-01
              [Clock].EndDate = 2000-08-16
              [ApplyNOnGivenDate].Script.Dates = 1998-08-15
              [ExtraSums].Script.AccumulateStartDate = 1998-08-15
          CompositeFactor 1998_Sep
            Specifications:
              [Clock].StartDate = 1998-06-01
              [Clock].EndDate = 2000-09-16
              [ApplyNOnGivenDate].Script.Dates = 1998-09-15
              [ExtraSums].Script.AccumulateStartDate = 1998-09-15
          CompositeFactor 1998_Oct
            Specifications:
              [Clock].StartDate = 1998-07-01
              [Clock].EndDate = 2000-10-16
              [ApplyNOnGivenDate].Script.Dates = 1998-10-15
              [ExtraSums].Script.AccumulateStartDate = 1998-10-15
          CompositeFactor 1998_Nov
            Specifications:
              [Clock].StartDate = 1998-08-01
              [Clock].EndDate = 2000-11-16
              [ApplyNOnGivenDate].Script.Dates = 1998-11-15
              [ExtraSums].Script.AccumulateStartDate = 1998-11-15
          CompositeFactor 1998_Dec
            Specifications:
              [Clock].StartDate = 1998-09-01
              [Clock].EndDate = 2000-12-16
              [ApplyNOnGivenDate].Script.Dates = 1998-12-15
              [ExtraSums].Script.AccumulateStartDate = 1998-12-15
          CompositeFactor 1999_Jan
            Specifications:
              [Clock].StartDate = 1998-10-01
              [Clock].EndDate = 2001-01-16
              [ApplyNOnGivenDate].Script.Dates = 1999-01-15
              [ExtraSums].Script.AccumulateStartDate = 1999-01-15
          CompositeFactor 1999_Feb
            Specifications:
              [Clock].StartDate = 1998-11-01
              [Clock].EndDate = 2001-02-16
              [ApplyNOnGivenDate].Script.Dates = 1999-02-15
              [ExtraSums].Script.AccumulateStartDate = 1999-02-15
          CompositeFactor 1999_Mar
            Specifications:
              [Clock].StartDate = 1998-12-01
              [Clock].EndDate = 2001-03-16
              [ApplyNOnGivenDate].Script.Dates = 1999-03-15
              [ExtraSums].Script.AccumulateStartDate = 1999-03-15
          CompositeFactor 1999_Apr
            Specifications:
              [Clock].StartDate = 1999-01-01
              [Clock].EndDate = 2001-04-16
              [ApplyNOnGivenDate].Script.Dates = 1999-04-15
              [ExtraSums].Script.AccumulateStartDate = 1999-04-15
          CompositeFactor 1999_May
            Specifications:
              [Clock].StartDate = 1999-02-01
              [Clock].EndDate = 2001-05-16
              [ApplyNOnGivenDate].Script.Dates = 1999-05-15
              [ExtraSums].Script.AccumulateStartDate = 1999-05-15
          CompositeFactor 1999_Jun
            Specifications:
              [Clock].StartDate = 1999-03-01
              [Clock].EndDate = 2001-06-16
              [ApplyNOnGivenDate].Script.Dates = 1999-06-15
              [ExtraSums].Script.AccumulateStartDate = 1999-06-15
          CompositeFactor 1999_Jul
            Specifications:
              [Clock].StartDate = 1999-04-01
              [Clock].EndDate = 2001-07-16
              [ApplyNOnGivenDate].Script.Dates = 1999-07-15
              [ExtraSums].Script.AccumulateStartDate = 1999-07-15
          CompositeFactor 1999_Aug
            Specifications:
              [Clock].StartDate = 1999-05-01
              [Clock].EndDate = 2001-08-16
              [ApplyNOnGivenDate].Script.Dates = 1999-08-15
              [ExtraSums].Script.AccumulateStartDate = 1999-08-15
          CompositeFactor 1999_Sep
            Specifications:
              [Clock].StartDate = 1999-06-01
              [Clock].EndDate = 2001-09-16
              [ApplyNOnGivenDate].Script.Dates = 1999-09-15
              [ExtraSums].Script.AccumulateStartDate = 1999-09-15
          CompositeFactor 1999_Oct
            Specifications:
              [Clock].StartDate = 1999-07-01
              [Clock].EndDate = 2001-10-16
              [ApplyNOnGivenDate].Script.Dates = 1999-10-15
              [ExtraSums].Script.AccumulateStartDate = 1999-10-15
          CompositeFactor 1999_Nov
            Specifications:
              [Clock].StartDate = 1999-08-01
              [Clock].EndDate = 2001-11-16
              [ApplyNOnGivenDate].Script.Dates = 1999-11-15
              [ExtraSums].Script.AccumulateStartDate = 1999-11-15
          CompositeFactor 1999_Dec
            Specifications:
              [Clock].StartDate = 1999-09-01
              [Clock].EndDate = 2001-12-16
              [ApplyNOnGivenDate].Script.Dates = 1999-12-15
              [ExtraSums].Script.AccumulateStartDate = 1999-12-15
          CompositeFactor 2000_Jan
            Specifications:
              [Clock].StartDate = 1999-10-01
              [Clock].EndDate = 2002-01-16
              [ApplyNOnGivenDate].Script.Dates = 2000-01-15
              [ExtraSums].Script.AccumulateStartDate = 2000-01-15
          CompositeFactor 2000_Feb
            Specifications:
              [Clock].StartDate = 1999-11-01
              [Clock].EndDate = 2002-02-16
              [ApplyNOnGivenDate].Script.Dates = 2000-02-15
              [ExtraSums].Script.AccumulateStartDate = 2000-02-15
          CompositeFactor 2000_Mar
            Specifications:
              [Clock].StartDate = 1999-12-01
              [Clock].EndDate = 2002-03-16
              [ApplyNOnGivenDate].Script.Dates = 2000-03-15
              [ExtraSums].Script.AccumulateStartDate = 2000-03-15
          CompositeFactor 2000_Apr
            Specifications:
              [Clock].StartDate = 2000-01-01
              [Clock].EndDate = 2002-04-16
              [ApplyNOnGivenDate].Script.Dates = 2000-04-15
              [ExtraSums].Script.AccumulateStartDate = 2000-04-15
          CompositeFactor 2000_May
            Specifications:
              [Clock].StartDate = 2000-02-01
              [Clock].EndDate = 2002-05-16
              [ApplyNOnGivenDate].Script.Dates = 2000-05-15
              [ExtraSums].Script.AccumulateStartDate = 2000-05-15
          CompositeFactor 2000_Jun
            Specifications:
              [Clock].StartDate = 2000-03-01
              [Clock].EndDate = 2002-06-16
              [ApplyNOnGivenDate].Script.Dates = 2000-06-15
              [ExtraSums].Script.AccumulateStartDate = 2000-06-15
          CompositeFactor 2000_Jul
            Specifications:
              [Clock].StartDate = 2000-04-01
              [Clock].EndDate = 2002-07-16
              [ApplyNOnGivenDate].Script.Dates = 2000-07-15
              [ExtraSums].Script.AccumulateStartDate = 2000-07-15
          CompositeFactor 2000_Aug
            Specifications:
              [Clock].StartDate = 2000-05-01
              [Clock].EndDate = 2002-08-16
              [ApplyNOnGivenDate].Script.Dates = 2000-08-15
              [ExtraSums].Script.AccumulateStartDate = 2000-08-15
          CompositeFactor 2000_Sep
            Specifications:
              [Clock].StartDate = 2000-06-01
              [Clock].EndDate = 2002-09-16
              [ApplyNOnGivenDate].Script.Dates = 2000-09-15
              [ExtraSums].Script.AccumulateStartDate = 2000-09-15
          CompositeFactor 2000_Oct
            Specifications:
              [Clock].StartDate = 2000-07-01
              [Clock].EndDate = 2002-10-16
              [ApplyNOnGivenDate].Script.Dates = 2000-10-15
              [ExtraSums].Script.AccumulateStartDate = 2000-10-15
          CompositeFactor 2000_Nov
            Specifications:
              [Clock].StartDate = 2000-08-01
              [Clock].EndDate = 2002-11-16
              [ApplyNOnGivenDate].Script.Dates = 2000-11-15
              [ExtraSums].Script.AccumulateStartDate = 2000-11-15
          CompositeFactor 2000_Dec
            Specifications:
              [Clock].StartDate = 2000-09-01
              [Clock].EndDate = 2002-12-16
              [ApplyNOnGivenDate].Script.Dates = 2000-12-15
              [ExtraSums].Script.AccumulateStartDate = 2000-12-15
          CompositeFactor 2001_Jan
            Specifications:
              [Clock].StartDate = 2000-10-01
              [Clock].EndDate = 2003-01-16
              [ApplyNOnGivenDate].Script.Dates = 2001-01-15
              [ExtraSums].Script.AccumulateStartDate = 2001-01-15
          CompositeFactor 2001_Feb
            Specifications:
              [Clock].StartDate = 2000-11-01
              [Clock].EndDate = 2003-02-16
              [ApplyNOnGivenDate].Script.Dates = 2001-02-15
              [ExtraSums].Script.AccumulateStartDate = 2001-02-15
          CompositeFactor 2001_Mar
            Specifications:
              [Clock].StartDate = 2000-12-01
              [Clock].EndDate = 2003-03-16
              [ApplyNOnGivenDate].Script.Dates = 2001-03-15
              [ExtraSums].Script.AccumulateStartDate = 2001-03-15
          CompositeFactor 2001_Apr
            Specifications:
              [Clock].StartDate = 2001-01-01
              [Clock].EndDate = 2003-04-16
              [ApplyNOnGivenDate].Script.Dates = 2001-04-15
              [ExtraSums].Script.AccumulateStartDate = 2001-04-15
          CompositeFactor 2001_May
            Specifications:
              [Clock].StartDate = 2001-02-01
              [Clock].EndDate = 2003-05-16
              [ApplyNOnGivenDate].Script.Dates = 2001-05-15
              [ExtraSums].Script.AccumulateStartDate = 2001-05-15
          CompositeFactor 2001_Jun
            Specifications:
              [Clock].StartDate = 2001-03-01
              [Clock].EndDate = 2003-06-16
              [ApplyNOnGivenDate].Script.Dates = 2001-06-15
              [ExtraSums].Script.AccumulateStartDate = 2001-06-15
          CompositeFactor 2001_Jul
            Specifications:
              [Clock].StartDate = 2001-04-01
              [Clock].EndDate = 2003-07-16
              [ApplyNOnGivenDate].Script.Dates = 2001-07-15
              [ExtraSums].Script.AccumulateStartDate = 2001-07-15
          CompositeFactor 2001_Aug
            Specifications:
              [Clock].StartDate = 2001-05-01
              [Clock].EndDate = 2003-08-16
              [ApplyNOnGivenDate].Script.Dates = 2001-08-15
              [ExtraSums].Script.AccumulateStartDate = 2001-08-15
          CompositeFactor 2001_Sep
            Specifications:
              [Clock].StartDate = 2001-06-01
              [Clock].EndDate = 2003-09-16
              [ApplyNOnGivenDate].Script.Dates = 2001-09-15
              [ExtraSums].Script.AccumulateStartDate = 2001-09-15
          CompositeFactor 2001_Oct
            Specifications:
              [Clock].StartDate = 2001-07-01
              [Clock].EndDate = 2003-10-16
              [ApplyNOnGivenDate].Script.Dates = 2001-10-15
              [ExtraSums].Script.AccumulateStartDate = 2001-10-15
          CompositeFactor 2001_Nov
            Specifications:
              [Clock].StartDate = 2001-08-01
              [Clock].EndDate = 2003-11-16
              [ApplyNOnGivenDate].Script.Dates = 2001-11-15
              [ExtraSums].Script.AccumulateStartDate = 2001-11-15
          CompositeFactor 2001_Dec
            Specifications:
              [Clock].StartDate = 2001-09-01
              [Clock].EndDate = 2003-12-16
              [ApplyNOnGivenDate].Script.Dates = 2001-12-15
              [ExtraSums].Script.AccumulateStartDate = 2001-12-15
          CompositeFactor 2002_Jan
            Specifications:
              [Clock].StartDate = 2001-10-01
              [Clock].EndDate = 2004-01-16
              [ApplyNOnGivenDate].Script.Dates = 2002-01-15
              [ExtraSums].Script.AccumulateStartDate = 2002-01-15
          CompositeFactor 2002_Feb
            Specifications:
              [Clock].StartDate = 2001-11-01
              [Clock].EndDate = 2004-02-16
              [ApplyNOnGivenDate].Script.Dates = 2002-02-15
              [ExtraSums].Script.AccumulateStartDate = 2002-02-15
          CompositeFactor 2002_Mar
            Specifications:
              [Clock].StartDate = 2001-12-01
              [Clock].EndDate = 2004-03-16
              [ApplyNOnGivenDate].Script.Dates = 2002-03-15
              [ExtraSums].Script.AccumulateStartDate = 2002-03-15
          CompositeFactor 2002_Apr
            Specifications:
              [Clock].StartDate = 2002-01-01
              [Clock].EndDate = 2004-04-16
              [ApplyNOnGivenDate].Script.Dates = 2002-04-15
              [ExtraSums].Script.AccumulateStartDate = 2002-04-15
          CompositeFactor 2002_May
            Specifications:
              [Clock].StartDate = 2002-02-01
              [Clock].EndDate = 2004-05-16
              [ApplyNOnGivenDate].Script.Dates = 2002-05-15
              [ExtraSums].Script.AccumulateStartDate = 2002-05-15
          CompositeFactor 2002_Jun
            Specifications:
              [Clock].StartDate = 2002-03-01
              [Clock].EndDate = 2004-06-16
              [ApplyNOnGivenDate].Script.Dates = 2002-06-15
              [ExtraSums].Script.AccumulateStartDate = 2002-06-15
          CompositeFactor 2002_Jul
            Specifications:
              [Clock].StartDate = 2002-04-01
              [Clock].EndDate = 2004-07-16
              [ApplyNOnGivenDate].Script.Dates = 2002-07-15
              [ExtraSums].Script.AccumulateStartDate = 2002-07-15
          CompositeFactor 2002_Aug
            Specifications:
              [Clock].StartDate = 2002-05-01
              [Clock].EndDate = 2004-08-16
              [ApplyNOnGivenDate].Script.Dates = 2002-08-15
              [ExtraSums].Script.AccumulateStartDate = 2002-08-15
          CompositeFactor 2002_Sep
            Specifications:
              [Clock].StartDate = 2002-06-01
              [Clock].EndDate = 2004-09-16
              [ApplyNOnGivenDate].Script.Dates = 2002-09-15
              [ExtraSums].Script.AccumulateStartDate = 2002-09-15
          CompositeFactor 2002_Oct
            Specifications:
              [Clock].StartDate = 2002-07-01
              [Clock].EndDate = 2004-10-16
              [ApplyNOnGivenDate].Script.Dates = 2002-10-15
              [ExtraSums].Script.AccumulateStartDate = 2002-10-15
          CompositeFactor 2002_Nov
            Specifications:
              [Clock].StartDate = 2002-08-01
              [Clock].EndDate = 2004-11-16
              [ApplyNOnGivenDate].Script.Dates = 2002-11-15
              [ExtraSums].Script.AccumulateStartDate = 2002-11-15
          CompositeFactor 2002_Dec
            Specifications:
              [Clock].StartDate = 2002-09-01
              [Clock].EndDate = 2004-12-16
              [ApplyNOnGivenDate].Script.Dates = 2002-12-15
              [ExtraSums].Script.AccumulateStartDate = 2002-12-15
          CompositeFactor 2003_Jan
            Specifications:
              [Clock].StartDate = 2002-10-01
              [Clock].EndDate = 2005-01-16
              [ApplyNOnGivenDate].Script.Dates = 2003-01-15
              [ExtraSums].Script.AccumulateStartDate = 2003-01-15
          CompositeFactor 2003_Feb
            Specifications:
              [Clock].StartDate = 2002-11-01
              [Clock].EndDate = 2005-02-16
              [ApplyNOnGivenDate].Script.Dates = 2003-02-15
              [ExtraSums].Script.AccumulateStartDate = 2003-02-15
          CompositeFactor 2003_Mar
            Specifications:
              [Clock].StartDate = 2002-12-01
              [Clock].EndDate = 2005-03-16
              [ApplyNOnGivenDate].Script.Dates = 2003-03-15
              [ExtraSums].Script.AccumulateStartDate = 2003-03-15
          CompositeFactor 2003_Apr
            Specifications:
              [Clock].StartDate = 2003-01-01
              [Clock].EndDate = 2005-04-16
              [ApplyNOnGivenDate].Script.Dates = 2003-04-15
              [ExtraSums].Script.AccumulateStartDate = 2003-04-15
          CompositeFactor 2003_May
            Specifications:
              [Clock].StartDate = 2003-02-01
              [Clock].EndDate = 2005-05-16
              [ApplyNOnGivenDate].Script.Dates = 2003-05-15
              [ExtraSums].Script.AccumulateStartDate = 2003-05-15
          CompositeFactor 2003_Jun
            Specifications:
              [Clock].StartDate = 2003-03-01
              [Clock].EndDate = 2005-06-16
              [ApplyNOnGivenDate].Script.Dates = 2003-06-15
              [ExtraSums].Script.AccumulateStartDate = 2003-06-15
          CompositeFactor 2003_Jul
            Specifications:
              [Clock].StartDate = 2003-04-01
              [Clock].EndDate = 2005-07-16
              [ApplyNOnGivenDate].Script.Dates = 2003-07-15
              [ExtraSums].Script.AccumulateStartDate = 2003-07-15
          CompositeFactor 2003_Aug
            Specifications:
              [Clock].StartDate = 2003-05-01
              [Clock].EndDate = 2005-08-16
              [ApplyNOnGivenDate].Script.Dates = 2003-08-15
              [ExtraSums].Script.AccumulateStartDate = 2003-08-15
          CompositeFactor 2003_Sep
            Specifications:
              [Clock].StartDate = 2003-06-01
              [Clock].EndDate = 2005-09-16
              [ApplyNOnGivenDate].Script.Dates = 2003-09-15
              [ExtraSums].Script.AccumulateStartDate = 2003-09-15
          CompositeFactor 2003_Oct
            Specifications:
              [Clock].StartDate = 2003-07-01
              [Clock].EndDate = 2005-10-16
              [ApplyNOnGivenDate].Script.Dates = 2003-10-15
              [ExtraSums].Script.AccumulateStartDate = 2003-10-15
          CompositeFactor 2003_Nov
            Specifications:
              [Clock].StartDate = 2003-08-01
              [Clock].EndDate = 2005-11-16
              [ApplyNOnGivenDate].Script.Dates = 2003-11-15
              [ExtraSums].Script.AccumulateStartDate = 2003-11-15
          CompositeFactor 2003_Dec
            Specifications:
              [Clock].StartDate = 2003-09-01
              [Clock].EndDate = 2005-12-16
              [ApplyNOnGivenDate].Script.Dates = 2003-12-15
              [ExtraSums].Script.AccumulateStartDate = 2003-12-15
          CompositeFactor 2004_Jan
            Specifications:
              [Clock].StartDate = 2003-10-01
              [Clock].EndDate = 2006-01-16
              [ApplyNOnGivenDate].Script.Dates = 2004-01-15
              [ExtraSums].Script.AccumulateStartDate = 2004-01-15
          CompositeFactor 2004_Feb
            Specifications:
              [Clock].StartDate = 2003-11-01
              [Clock].EndDate = 2006-02-16
              [ApplyNOnGivenDate].Script.Dates = 2004-02-15
              [ExtraSums].Script.AccumulateStartDate = 2004-02-15
          CompositeFactor 2004_Mar
            Specifications:
              [Clock].StartDate = 2003-12-01
              [Clock].EndDate = 2006-03-16
              [ApplyNOnGivenDate].Script.Dates = 2004-03-15
              [ExtraSums].Script.AccumulateStartDate = 2004-03-15
          CompositeFactor 2004_Apr
            Specifications:
              [Clock].StartDate = 2004-01-01
              [Clock].EndDate = 2006-04-16
              [ApplyNOnGivenDate].Script.Dates = 2004-04-15
              [ExtraSums].Script.AccumulateStartDate = 2004-04-15
          CompositeFactor 2004_May
            Specifications:
              [Clock].StartDate = 2004-02-01
              [Clock].EndDate = 2006-05-16
              [ApplyNOnGivenDate].Script.Dates = 2004-05-15
              [ExtraSums].Script.AccumulateStartDate = 2004-05-15
          CompositeFactor 2004_Jun
            Specifications:
              [Clock].StartDate = 2004-03-01
              [Clock].EndDate = 2006-06-16
              [ApplyNOnGivenDate].Script.Dates = 2004-06-15
              [ExtraSums].Script.AccumulateStartDate = 2004-06-15
          CompositeFactor 2004_Jul
            Specifications:
              [Clock].StartDate = 2004-04-01
              [Clock].EndDate = 2006-07-16
              [ApplyNOnGivenDate].Script.Dates = 2004-07-15
              [ExtraSums].Script.AccumulateStartDate = 2004-07-15
          CompositeFactor 2004_Aug
            Specifications:
              [Clock].StartDate = 2004-05-01
              [Clock].EndDate = 2006-08-16
              [ApplyNOnGivenDate].Script.Dates = 2004-08-15
              [ExtraSums].Script.AccumulateStartDate = 2004-08-15
          CompositeFactor 2004_Sep
            Specifications:
              [Clock].StartDate = 2004-06-01
              [Clock].EndDate = 2006-09-16
              [ApplyNOnGivenDate].Script.Dates = 2004-09-15
              [ExtraSums].Script.AccumulateStartDate = 2004-09-15
          CompositeFactor 2004_Oct
            Specifications:
              [Clock].StartDate = 2004-07-01
              [Clock].EndDate = 2006-10-16
              [ApplyNOnGivenDate].Script.Dates = 2004-10-15
              [ExtraSums].Script.AccumulateStartDate = 2004-10-15
          CompositeFactor 2004_Nov
            Specifications:
              [Clock].StartDate = 2004-08-01
              [Clock].EndDate = 2006-11-16
              [ApplyNOnGivenDate].Script.Dates = 2004-11-15
              [ExtraSums].Script.AccumulateStartDate = 2004-11-15
          CompositeFactor 2004_Dec
            Specifications:
              [Clock].StartDate = 2004-09-01
              [Clock].EndDate = 2006-12-16
              [ApplyNOnGivenDate].Script.Dates = 2004-12-15
              [ExtraSums].Script.AccumulateStartDate = 2004-12-15
          CompositeFactor 2005_Jan
            Specifications:
              [Clock].StartDate = 2004-10-01
              [Clock].EndDate = 2007-01-16
              [ApplyNOnGivenDate].Script.Dates = 2005-01-15
              [ExtraSums].Script.AccumulateStartDate = 2005-01-15
          CompositeFactor 2005_Feb
            Specifications:
              [Clock].StartDate = 2004-11-01
              [Clock].EndDate = 2007-02-16
              [ApplyNOnGivenDate].Script.Dates = 2005-02-15
              [ExtraSums].Script.AccumulateStartDate = 2005-02-15
          CompositeFactor 2005_Mar
            Specifications:
              [Clock].StartDate = 2004-12-01
              [Clock].EndDate = 2007-03-16
              [ApplyNOnGivenDate].Script.Dates = 2005-03-15
              [ExtraSums].Script.AccumulateStartDate = 2005-03-15
          CompositeFactor 2005_Apr
            Specifications:
              [Clock].StartDate = 2005-01-01
              [Clock].EndDate = 2007-04-16
              [ApplyNOnGivenDate].Script.Dates = 2005-04-15
              [ExtraSums].Script.AccumulateStartDate = 2005-04-15
          CompositeFactor 2005_May
            Specifications:
              [Clock].StartDate = 2005-02-01
              [Clock].EndDate = 2007-05-16
              [ApplyNOnGivenDate].Script.Dates = 2005-05-15
              [ExtraSums].Script.AccumulateStartDate = 2005-05-15
          CompositeFactor 2005_Jun
            Specifications:
              [Clock].StartDate = 2005-03-01
              [Clock].EndDate = 2007-06-16
              [ApplyNOnGivenDate].Script.Dates = 2005-06-15
              [ExtraSums].Script.AccumulateStartDate = 2005-06-15
          CompositeFactor 2005_Jul
            Specifications:
              [Clock].StartDate = 2005-04-01
              [Clock].EndDate = 2007-07-16
              [ApplyNOnGivenDate].Script.Dates = 2005-07-15
              [ExtraSums].Script.AccumulateStartDate = 2005-07-15
          CompositeFactor 2005_Aug
            Specifications:
              [Clock].StartDate = 2005-05-01
              [Clock].EndDate = 2007-08-16
              [ApplyNOnGivenDate].Script.Dates = 2005-08-15
              [ExtraSums].Script.AccumulateStartDate = 2005-08-15
          CompositeFactor 2005_Sep
            Specifications:
              [Clock].StartDate = 2005-06-01
              [Clock].EndDate = 2007-09-16
              [ApplyNOnGivenDate].Script.Dates = 2005-09-15
              [ExtraSums].Script.AccumulateStartDate = 2005-09-15
          CompositeFactor 2005_Oct
            Specifications:
              [Clock].StartDate = 2005-07-01
              [Clock].EndDate = 2007-10-16
              [ApplyNOnGivenDate].Script.Dates = 2005-10-15
              [ExtraSums].Script.AccumulateStartDate = 2005-10-15
          CompositeFactor 2005_Nov
            Specifications:
              [Clock].StartDate = 2005-08-01
              [Clock].EndDate = 2007-11-16
              [ApplyNOnGivenDate].Script.Dates = 2005-11-15
              [ExtraSums].Script.AccumulateStartDate = 2005-11-15
          CompositeFactor 2005_Dec
            Specifications:
              [Clock].StartDate = 2005-09-01
              [Clock].EndDate = 2007-12-16
              [ApplyNOnGivenDate].Script.Dates = 2005-12-15
              [ExtraSums].Script.AccumulateStartDate = 2005-12-15
          CompositeFactor 2006_Jan
            Specifications:
              [Clock].StartDate = 2005-10-01
              [Clock].EndDate = 2008-01-16
              [ApplyNOnGivenDate].Script.Dates = 2006-01-15
              [ExtraSums].Script.AccumulateStartDate = 2006-01-15
          CompositeFactor 2006_Feb
            Specifications:
              [Clock].StartDate = 2005-11-01
              [Clock].EndDate = 2008-02-16
              [ApplyNOnGivenDate].Script.Dates = 2006-02-15
              [ExtraSums].Script.AccumulateStartDate = 2006-02-15
          CompositeFactor 2006_Mar
            Specifications:
              [Clock].StartDate = 2005-12-01
              [Clock].EndDate = 2008-03-16
              [ApplyNOnGivenDate].Script.Dates = 2006-03-15
              [ExtraSums].Script.AccumulateStartDate = 2006-03-15
          CompositeFactor 2006_Apr
            Specifications:
              [Clock].StartDate = 2006-01-01
              [Clock].EndDate = 2008-04-16
              [ApplyNOnGivenDate].Script.Dates = 2006-04-15
              [ExtraSums].Script.AccumulateStartDate = 2006-04-15
          CompositeFactor 2006_May
            Specifications:
              [Clock].StartDate = 2006-02-01
              [Clock].EndDate = 2008-05-16
              [ApplyNOnGivenDate].Script.Dates = 2006-05-15
              [ExtraSums].Script.AccumulateStartDate = 2006-05-15
          CompositeFactor 2006_Jun
            Specifications:
              [Clock].StartDate = 2006-03-01
              [Clock].EndDate = 2008-06-16
              [ApplyNOnGivenDate].Script.Dates = 2006-06-15
              [ExtraSums].Script.AccumulateStartDate = 2006-06-15
          CompositeFactor 2006_Jul
            Specifications:
              [Clock].StartDate = 2006-04-01
              [Clock].EndDate = 2008-07-16
              [ApplyNOnGivenDate].Script.Dates = 2006-07-15
              [ExtraSums].Script.AccumulateStartDate = 2006-07-15
          CompositeFactor 2006_Aug
            Specifications:
              [Clock].StartDate = 2006-05-01
              [Clock].EndDate = 2008-08-16
              [ApplyNOnGivenDate].Script.Dates = 2006-08-15
              [ExtraSums].Script.AccumulateStartDate = 2006-08-15
          CompositeFactor 2006_Sep
            Specifications:
              [Clock].StartDate = 2006-06-01
              [Clock].EndDate = 2008-09-16
              [ApplyNOnGivenDate].Script.Dates = 2006-09-15
              [ExtraSums].Script.AccumulateStartDate = 2006-09-15
          CompositeFactor 2006_Oct
            Specifications:
              [Clock].StartDate = 2006-07-01
              [Clock].EndDate = 2008-10-16
              [ApplyNOnGivenDate].Script.Dates = 2006-10-15
              [ExtraSums].Script.AccumulateStartDate = 2006-10-15
          CompositeFactor 2006_Nov
            Specifications:
              [Clock].StartDate = 2006-08-01
              [Clock].EndDate = 2008-11-16
              [ApplyNOnGivenDate].Script.Dates = 2006-11-15
              [ExtraSums].Script.AccumulateStartDate = 2006-11-15
          CompositeFactor 2006_Dec
            Specifications:
              [Clock].StartDate = 2006-09-01
              [Clock].EndDate = 2008-12-16
              [ApplyNOnGivenDate].Script.Dates = 2006-12-15
              [ExtraSums].Script.AccumulateStartDate = 2006-12-15
          CompositeFactor 2007_Jan
            Specifications:
              [Clock].StartDate = 2006-10-01
              [Clock].EndDate = 2009-01-16
              [ApplyNOnGivenDate].Script.Dates = 2007-01-15
              [ExtraSums].Script.AccumulateStartDate = 2007-01-15
          CompositeFactor 2007_Feb
            Specifications:
              [Clock].StartDate = 2006-11-01
              [Clock].EndDate = 2009-02-16
              [ApplyNOnGivenDate].Script.Dates = 2007-02-15
              [ExtraSums].Script.AccumulateStartDate = 2007-02-15
          CompositeFactor 2007_Mar
            Specifications:
              [Clock].StartDate = 2006-12-01
              [Clock].EndDate = 2009-03-16
              [ApplyNOnGivenDate].Script.Dates = 2007-03-15
              [ExtraSums].Script.AccumulateStartDate = 2007-03-15
          CompositeFactor 2007_Apr
            Specifications:
              [Clock].StartDate = 2007-01-01
              [Clock].EndDate = 2009-04-16
              [ApplyNOnGivenDate].Script.Dates = 2007-04-15
              [ExtraSums].Script.AccumulateStartDate = 2007-04-15
          CompositeFactor 2007_May
            Specifications:
              [Clock].StartDate = 2007-02-01
              [Clock].EndDate = 2009-05-16
              [ApplyNOnGivenDate].Script.Dates = 2007-05-15
              [ExtraSums].Script.AccumulateStartDate = 2007-05-15
          CompositeFactor 2007_Jun
            Specifications:
              [Clock].StartDate = 2007-03-01
              [Clock].EndDate = 2009-06-16
              [ApplyNOnGivenDate].Script.Dates = 2007-06-15
              [ExtraSums].Script.AccumulateStartDate = 2007-06-15
          CompositeFactor 2007_Jul
            Specifications:
              [Clock].StartDate = 2007-04-01
              [Clock].EndDate = 2009-07-16
              [ApplyNOnGivenDate].Script.Dates = 2007-07-15
              [ExtraSums].Script.AccumulateStartDate = 2007-07-15
          CompositeFactor 2007_Aug
            Specifications:
              [Clock].StartDate = 2007-05-01
              [Clock].EndDate = 2009-08-16
              [ApplyNOnGivenDate].Script.Dates = 2007-08-15
              [ExtraSums].Script.AccumulateStartDate = 2007-08-15
          CompositeFactor 2007_Sep
            Specifications:
              [Clock].StartDate = 2007-06-01
              [Clock].EndDate = 2009-09-16
              [ApplyNOnGivenDate].Script.Dates = 2007-09-15
              [ExtraSums].Script.AccumulateStartDate = 2007-09-15
          CompositeFactor 2007_Oct
            Specifications:
              [Clock].StartDate = 2007-07-01
              [Clock].EndDate = 2009-10-16
              [ApplyNOnGivenDate].Script.Dates = 2007-10-15
              [ExtraSums].Script.AccumulateStartDate = 2007-10-15
          CompositeFactor 2007_Nov
            Specifications:
              [Clock].StartDate = 2007-08-01
              [Clock].EndDate = 2009-11-16
              [ApplyNOnGivenDate].Script.Dates = 2007-11-15
              [ExtraSums].Script.AccumulateStartDate = 2007-11-15
          CompositeFactor 2007_Dec
            Specifications:
              [Clock].StartDate = 2007-09-01
              [Clock].EndDate = 2009-12-16
              [ApplyNOnGivenDate].Script.Dates = 2007-12-15
              [ExtraSums].Script.AccumulateStartDate = 2007-12-15
          CompositeFactor 2008_Jan
            Specifications:
              [Clock].StartDate = 2007-10-01
              [Clock].EndDate = 2010-01-16
              [ApplyNOnGivenDate].Script.Dates = 2008-01-15
              [ExtraSums].Script.AccumulateStartDate = 2008-01-15
          CompositeFactor 2008_Feb
            Specifications:
              [Clock].StartDate = 2007-11-01
              [Clock].EndDate = 2010-02-16
              [ApplyNOnGivenDate].Script.Dates = 2008-02-15
              [ExtraSums].Script.AccumulateStartDate = 2008-02-15
          CompositeFactor 2008_Mar
            Specifications:
              [Clock].StartDate = 2007-12-01
              [Clock].EndDate = 2010-03-16
              [ApplyNOnGivenDate].Script.Dates = 2008-03-15
              [ExtraSums].Script.AccumulateStartDate = 2008-03-15
          CompositeFactor 2008_Apr
            Specifications:
              [Clock].StartDate = 2008-01-01
              [Clock].EndDate = 2010-04-16
              [ApplyNOnGivenDate].Script.Dates = 2008-04-15
              [ExtraSums].Script.AccumulateStartDate = 2008-04-15
          CompositeFactor 2008_May
            Specifications:
              [Clock].StartDate = 2008-02-01
              [Clock].EndDate = 2010-05-16
              [ApplyNOnGivenDate].Script.Dates = 2008-05-15
              [ExtraSums].Script.AccumulateStartDate = 2008-05-15
          CompositeFactor 2008_Jun
            Specifications:
              [Clock].StartDate = 2008-03-01
              [Clock].EndDate = 2010-06-16
              [ApplyNOnGivenDate].Script.Dates = 2008-06-15
              [ExtraSums].Script.AccumulateStartDate = 2008-06-15
          CompositeFactor 2008_Jul
            Specifications:
              [Clock].StartDate = 2008-04-01
              [Clock].EndDate = 2010-07-16
              [ApplyNOnGivenDate].Script.Dates = 2008-07-15
              [ExtraSums].Script.AccumulateStartDate = 2008-07-15
          CompositeFactor 2008_Aug
            Specifications:
              [Clock].StartDate = 2008-05-01
              [Clock].EndDate = 2010-08-16
              [ApplyNOnGivenDate].Script.Dates = 2008-08-15
              [ExtraSums].Script.AccumulateStartDate = 2008-08-15
          CompositeFactor 2008_Sep
            Specifications:
              [Clock].StartDate = 2008-06-01
              [Clock].EndDate = 2010-09-16
              [ApplyNOnGivenDate].Script.Dates = 2008-09-15
              [ExtraSums].Script.AccumulateStartDate = 2008-09-15
          CompositeFactor 2008_Oct
            Specifications:
              [Clock].StartDate = 2008-07-01
              [Clock].EndDate = 2010-10-16
              [ApplyNOnGivenDate].Script.Dates = 2008-10-15
              [ExtraSums].Script.AccumulateStartDate = 2008-10-15
          CompositeFactor 2008_Nov
            Specifications:
              [Clock].StartDate = 2008-08-01
              [Clock].EndDate = 2010-11-16
              [ApplyNOnGivenDate].Script.Dates = 2008-11-15
              [ExtraSums].Script.AccumulateStartDate = 2008-11-15
          CompositeFactor 2008_Dec
            Specifications:
              [Clock].StartDate = 2008-09-01
              [Clock].EndDate = 2010-12-16
              [ApplyNOnGivenDate].Script.Dates = 2008-12-15
              [ExtraSums].Script.AccumulateStartDate = 2008-12-15
          CompositeFactor 2009_Jan
            Specifications:
              [Clock].StartDate = 2008-10-01
              [Clock].EndDate = 2011-01-16
              [ApplyNOnGivenDate].Script.Dates = 2009-01-15
              [ExtraSums].Script.AccumulateStartDate = 2009-01-15
          CompositeFactor 2009_Feb
            Specifications:
              [Clock].StartDate = 2008-11-01
              [Clock].EndDate = 2011-02-16
              [ApplyNOnGivenDate].Script.Dates = 2009-02-15
              [ExtraSums].Script.AccumulateStartDate = 2009-02-15
          CompositeFactor 2009_Mar
            Specifications:
              [Clock].StartDate = 2008-12-01
              [Clock].EndDate = 2011-03-16
              [ApplyNOnGivenDate].Script.Dates = 2009-03-15
              [ExtraSums].Script.AccumulateStartDate = 2009-03-15
          CompositeFactor 2009_Apr
            Specifications:
              [Clock].StartDate = 2009-01-01
              [Clock].EndDate = 2011-04-16
              [ApplyNOnGivenDate].Script.Dates = 2009-04-15
              [ExtraSums].Script.AccumulateStartDate = 2009-04-15
          CompositeFactor 2009_May
            Specifications:
              [Clock].StartDate = 2009-02-01
              [Clock].EndDate = 2011-05-16
              [ApplyNOnGivenDate].Script.Dates = 2009-05-15
              [ExtraSums].Script.AccumulateStartDate = 2009-05-15
          CompositeFactor 2009_Jun
            Specifications:
              [Clock].StartDate = 2009-03-01
              [Clock].EndDate = 2011-06-16
              [ApplyNOnGivenDate].Script.Dates = 2009-06-15
              [ExtraSums].Script.AccumulateStartDate = 2009-06-15
          CompositeFactor 2009_Jul
            Specifications:
              [Clock].StartDate = 2009-04-01
              [Clock].EndDate = 2011-07-16
              [ApplyNOnGivenDate].Script.Dates = 2009-07-15
              [ExtraSums].Script.AccumulateStartDate = 2009-07-15
          CompositeFactor 2009_Aug
            Specifications:
              [Clock].StartDate = 2009-05-01
              [Clock].EndDate = 2011-08-16
              [ApplyNOnGivenDate].Script.Dates = 2009-08-15
              [ExtraSums].Script.AccumulateStartDate = 2009-08-15
          CompositeFactor 2009_Sep
            Specifications:
              [Clock].StartDate = 2009-06-01
              [Clock].EndDate = 2011-09-16
              [ApplyNOnGivenDate].Script.Dates = 2009-09-15
              [ExtraSums].Script.AccumulateStartDate = 2009-09-15
          CompositeFactor 2009_Oct
            Specifications:
              [Clock].StartDate = 2009-07-01
              [Clock].EndDate = 2011-10-16
              [ApplyNOnGivenDate].Script.Dates = 2009-10-15
              [ExtraSums].Script.AccumulateStartDate = 2009-10-15
          CompositeFactor 2009_Nov
            Specifications:
              [Clock].StartDate = 2009-08-01
              [Clock].EndDate = 2011-11-16
              [ApplyNOnGivenDate].Script.Dates = 2009-11-15
              [ExtraSums].Script.AccumulateStartDate = 2009-11-15
          CompositeFactor 2009_Dec
            Specifications:
              [Clock].StartDate = 2009-09-01
              [Clock].EndDate = 2011-12-16
              [ApplyNOnGivenDate].Script.Dates = 2009-12-15
              [ExtraSums].Script.AccumulateStartDate = 2009-12-15
          CompositeFactor 2010_Jan
            Specifications:
              [Clock].StartDate = 2009-10-01
              [Clock].EndDate = 2012-01-16
              [ApplyNOnGivenDate].Script.Dates = 2010-01-15
              [ExtraSums].Script.AccumulateStartDate = 2010-01-15
          CompositeFactor 2010_Feb
            Specifications:
              [Clock].StartDate = 2009-11-01
              [Clock].EndDate = 2012-02-16
              [ApplyNOnGivenDate].Script.Dates = 2010-02-15
              [ExtraSums].Script.AccumulateStartDate = 2010-02-15
          CompositeFactor 2010_Mar
            Specifications:
              [Clock].StartDate = 2009-12-01
              [Clock].EndDate = 2012-03-16
              [ApplyNOnGivenDate].Script.Dates = 2010-03-15
              [ExtraSums].Script.AccumulateStartDate = 2010-03-15
          CompositeFactor 2010_Apr
            Specifications:
              [Clock].StartDate = 2010-01-01
              [Clock].EndDate = 2012-04-16
              [ApplyNOnGivenDate].Script.Dates = 2010-04-15
              [ExtraSums].Script.AccumulateStartDate = 2010-04-15
          CompositeFactor 2010_May
            Specifications:
              [Clock].StartDate = 2010-02-01
              [Clock].EndDate = 2012-05-16
              [ApplyNOnGivenDate].Script.Dates = 2010-05-15
              [ExtraSums].Script.AccumulateStartDate = 2010-05-15
          CompositeFactor 2010_Jun
            Specifications:
              [Clock].StartDate = 2010-03-01
              [Clock].EndDate = 2012-06-16
              [ApplyNOnGivenDate].Script.Dates = 2010-06-15
              [ExtraSums].Script.AccumulateStartDate = 2010-06-15
          CompositeFactor 2010_Jul
            Specifications:
              [Clock].StartDate = 2010-04-01
              [Clock].EndDate = 2012-07-16
              [ApplyNOnGivenDate].Script.Dates = 2010-07-15
              [ExtraSums].Script.AccumulateStartDate = 2010-07-15
          CompositeFactor 2010_Aug
            Specifications:
              [Clock].StartDate = 2010-05-01
              [Clock].EndDate = 2012-08-16
              [ApplyNOnGivenDate].Script.Dates = 2010-08-15
              [ExtraSums].Script.AccumulateStartDate = 2010-08-15
          CompositeFactor 2010_Sep
            Specifications:
              [Clock].StartDate = 2010-06-01
              [Clock].EndDate = 2012-09-16
              [ApplyNOnGivenDate].Script.Dates = 2010-09-15
              [ExtraSums].Script.AccumulateStartDate = 2010-09-15
          CompositeFactor 2010_Oct
            Specifications:
              [Clock].StartDate = 2010-07-01
              [Clock].EndDate = 2012-10-16
              [ApplyNOnGivenDate].Script.Dates = 2010-10-15
              [ExtraSums].Script.AccumulateStartDate = 2010-10-15
          CompositeFactor 2010_Nov
            Specifications:
              [Clock].StartDate = 2010-08-01
              [Clock].EndDate = 2012-11-16
              [ApplyNOnGivenDate].Script.Dates = 2010-11-15
              [ExtraSums].Script.AccumulateStartDate = 2010-11-15
          CompositeFactor 2010_Dec
            Specifications:
              [Clock].StartDate = 2010-09-01
              [Clock].EndDate = 2012-12-16
              [ApplyNOnGivenDate].Script.Dates = 2010-12-15
              [ExtraSums].Script.AccumulateStartDate = 2010-12-15
          CompositeFactor 2011_Jan
            Specifications:
              [Clock].StartDate = 2010-10-01
              [Clock].EndDate = 2013-01-16
              [ApplyNOnGivenDate].Script.Dates = 2011-01-15
              [ExtraSums].Script.AccumulateStartDate = 2011-01-15
          CompositeFactor 2011_Feb
            Specifications:
              [Clock].StartDate = 2010-11-01
              [Clock].EndDate = 2013-02-16
              [ApplyNOnGivenDate].Script.Dates = 2011-02-15
              [ExtraSums].Script.AccumulateStartDate = 2011-02-15
          CompositeFactor 2011_Mar
            Specifications:
              [Clock].StartDate = 2010-12-01
              [Clock].EndDate = 2013-03-16
              [ApplyNOnGivenDate].Script.Dates = 2011-03-15
              [ExtraSums].Script.AccumulateStartDate = 2011-03-15
          CompositeFactor 2011_Apr
            Specifications:
              [Clock].StartDate = 2011-01-01
              [Clock].EndDate = 2013-04-16
              [ApplyNOnGivenDate].Script.Dates = 2011-04-15
              [ExtraSums].Script.AccumulateStartDate = 2011-04-15
          CompositeFactor 2011_May
            Specifications:
              [Clock].StartDate = 2011-02-01
              [Clock].EndDate = 2013-05-16
              [ApplyNOnGivenDate].Script.Dates = 2011-05-15
              [ExtraSums].Script.AccumulateStartDate = 2011-05-15
          CompositeFactor 2011_Jun
            Specifications:
              [Clock].StartDate = 2011-03-01
              [Clock].EndDate = 2013-06-16
              [ApplyNOnGivenDate].Script.Dates = 2011-06-15
              [ExtraSums].Script.AccumulateStartDate = 2011-06-15
          CompositeFactor 2011_Jul
            Specifications:
              [Clock].StartDate = 2011-04-01
              [Clock].EndDate = 2013-07-16
              [ApplyNOnGivenDate].Script.Dates = 2011-07-15
              [ExtraSums].Script.AccumulateStartDate = 2011-07-15
          CompositeFactor 2011_Aug
            Specifications:
              [Clock].StartDate = 2011-05-01
              [Clock].EndDate = 2013-08-16
              [ApplyNOnGivenDate].Script.Dates = 2011-08-15
              [ExtraSums].Script.AccumulateStartDate = 2011-08-15
          CompositeFactor 2011_Sep
            Specifications:
              [Clock].StartDate = 2011-06-01
              [Clock].EndDate = 2013-09-16
              [ApplyNOnGivenDate].Script.Dates = 2011-09-15
              [ExtraSums].Script.AccumulateStartDate = 2011-09-15
          CompositeFactor 2011_Oct
            Specifications:
              [Clock].StartDate = 2011-07-01
              [Clock].EndDate = 2013-10-16
              [ApplyNOnGivenDate].Script.Dates = 2011-10-15
              [ExtraSums].Script.AccumulateStartDate = 2011-10-15
          CompositeFactor 2011_Nov
            Specifications:
              [Clock].StartDate = 2011-08-01
              [Clock].EndDate = 2013-11-16
              [ApplyNOnGivenDate].Script.Dates = 2011-11-15
              [ExtraSums].Script.AccumulateStartDate = 2011-11-15
          CompositeFactor 2011_Dec
            Specifications:
              [Clock].StartDate = 2011-09-01
              [Clock].EndDate = 2013-12-16
              [ApplyNOnGivenDate].Script.Dates = 2011-12-15
              [ExtraSums].Script.AccumulateStartDate = 2011-12-15
          CompositeFactor 2012_Jan
            Specifications:
              [Clock].StartDate = 2011-10-01
              [Clock].EndDate = 2014-01-16
              [ApplyNOnGivenDate].Script.Dates = 2012-01-15
              [ExtraSums].Script.AccumulateStartDate = 2012-01-15
          CompositeFactor 2012_Feb
            Specifications:
              [Clock].StartDate = 2011-11-01
              [Clock].EndDate = 2014-02-16
              [ApplyNOnGivenDate].Script.Dates = 2012-02-15
              [ExtraSums].Script.AccumulateStartDate = 2012-02-15
          CompositeFactor 2012_Mar
            Specifications:
              [Clock].StartDate = 2011-12-01
              [Clock].EndDate = 2014-03-16
              [ApplyNOnGivenDate].Script.Dates = 2012-03-15
              [ExtraSums].Script.AccumulateStartDate = 2012-03-15
          CompositeFactor 2012_Apr
            Specifications:
              [Clock].StartDate = 2012-01-01
              [Clock].EndDate = 2014-04-16
              [ApplyNOnGivenDate].Script.Dates = 2012-04-15
              [ExtraSums].Script.AccumulateStartDate = 2012-04-15
          CompositeFactor 2012_May
            Specifications:
              [Clock].StartDate = 2012-02-01
              [Clock].EndDate = 2014-05-16
              [ApplyNOnGivenDate].Script.Dates = 2012-05-15
              [ExtraSums].Script.AccumulateStartDate = 2012-05-15
          CompositeFactor 2012_Jun
            Specifications:
              [Clock].StartDate = 2012-03-01
              [Clock].EndDate = 2014-06-16
              [ApplyNOnGivenDate].Script.Dates = 2012-06-15
              [ExtraSums].Script.AccumulateStartDate = 2012-06-15
          CompositeFactor 2012_Jul
            Specifications:
              [Clock].StartDate = 2012-04-01
              [Clock].EndDate = 2014-07-16
              [ApplyNOnGivenDate].Script.Dates = 2012-07-15
              [ExtraSums].Script.AccumulateStartDate = 2012-07-15
          CompositeFactor 2012_Aug
            Specifications:
              [Clock].StartDate = 2012-05-01
              [Clock].EndDate = 2014-08-16
              [ApplyNOnGivenDate].Script.Dates = 2012-08-15
              [ExtraSums].Script.AccumulateStartDate = 2012-08-15
          CompositeFactor 2012_Sep
            Specifications:
              [Clock].StartDate = 2012-06-01
              [Clock].EndDate = 2014-09-16
              [ApplyNOnGivenDate].Script.Dates = 2012-09-15
              [ExtraSums].Script.AccumulateStartDate = 2012-09-15
          CompositeFactor 2012_Oct
            Specifications:
              [Clock].StartDate = 2012-07-01
              [Clock].EndDate = 2014-10-16
              [ApplyNOnGivenDate].Script.Dates = 2012-10-15
              [ExtraSums].Script.AccumulateStartDate = 2012-10-15
          CompositeFactor 2012_Nov
            Specifications:
              [Clock].StartDate = 2012-08-01
              [Clock].EndDate = 2014-11-16
              [ApplyNOnGivenDate].Script.Dates = 2012-11-15
              [ExtraSums].Script.AccumulateStartDate = 2012-11-15
          CompositeFactor 2012_Dec
            Specifications:
              [Clock].StartDate = 2012-09-01
              [Clock].EndDate = 2014-12-16
              [ApplyNOnGivenDate].Script.Dates = 2012-12-15
              [ExtraSums].Script.AccumulateStartDate = 2012-12-15
          CompositeFactor 2013_Jan
            Specifications:
              [Clock].StartDate = 2012-10-01
              [Clock].EndDate = 2015-01-16
              [ApplyNOnGivenDate].Script.Dates = 2013-01-15
              [ExtraSums].Script.AccumulateStartDate = 2013-01-15
          CompositeFactor 2013_Feb
            Specifications:
              [Clock].StartDate = 2012-11-01
              [Clock].EndDate = 2015-02-16
              [ApplyNOnGivenDate].Script.Dates = 2013-02-15
              [ExtraSums].Script.AccumulateStartDate = 2013-02-15
          CompositeFactor 2013_Mar
            Specifications:
              [Clock].StartDate = 2012-12-01
              [Clock].EndDate = 2015-03-16
              [ApplyNOnGivenDate].Script.Dates = 2013-03-15
              [ExtraSums].Script.AccumulateStartDate = 2013-03-15
          CompositeFactor 2013_Apr
            Specifications:
              [Clock].StartDate = 2013-01-01
              [Clock].EndDate = 2015-04-16
              [ApplyNOnGivenDate].Script.Dates = 2013-04-15
              [ExtraSums].Script.AccumulateStartDate = 2013-04-15
          CompositeFactor 2013_May
            Specifications:
              [Clock].StartDate = 2013-02-01
              [Clock].EndDate = 2015-05-16
              [ApplyNOnGivenDate].Script.Dates = 2013-05-15
              [ExtraSums].Script.AccumulateStartDate = 2013-05-15
          CompositeFactor 2013_Jun
            Specifications:
              [Clock].StartDate = 2013-03-01
              [Clock].EndDate = 2015-06-16
              [ApplyNOnGivenDate].Script.Dates = 2013-06-15
              [ExtraSums].Script.AccumulateStartDate = 2013-06-15
          CompositeFactor 2013_Jul
            Specifications:
              [Clock].StartDate = 2013-04-01
              [Clock].EndDate = 2015-07-16
              [ApplyNOnGivenDate].Script.Dates = 2013-07-15
              [ExtraSums].Script.AccumulateStartDate = 2013-07-15
          CompositeFactor 2013_Aug
            Specifications:
              [Clock].StartDate = 2013-05-01
              [Clock].EndDate = 2015-08-16
              [ApplyNOnGivenDate].Script.Dates = 2013-08-15
              [ExtraSums].Script.AccumulateStartDate = 2013-08-15
          CompositeFactor 2013_Sep
            Specifications:
              [Clock].StartDate = 2013-06-01
              [Clock].EndDate = 2015-09-16
              [ApplyNOnGivenDate].Script.Dates = 2013-09-15
              [ExtraSums].Script.AccumulateStartDate = 2013-09-15
          CompositeFactor 2013_Oct
            Specifications:
              [Clock].StartDate = 2013-07-01
              [Clock].EndDate = 2015-10-16
              [ApplyNOnGivenDate].Script.Dates = 2013-10-15
              [ExtraSums].Script.AccumulateStartDate = 2013-10-15
          CompositeFactor 2013_Nov
            Specifications:
              [Clock].StartDate = 2013-08-01
              [Clock].EndDate = 2015-11-16
              [ApplyNOnGivenDate].Script.Dates = 2013-11-15
              [ExtraSums].Script.AccumulateStartDate = 2013-11-15
          CompositeFactor 2013_Dec
            Specifications:
              [Clock].StartDate = 2013-09-01
              [Clock].EndDate = 2015-12-16
              [ApplyNOnGivenDate].Script.Dates = 2013-12-15
              [ExtraSums].Script.AccumulateStartDate = 2013-12-15
          CompositeFactor 2014_Jan
            Specifications:
              [Clock].StartDate = 2013-10-01
              [Clock].EndDate = 2016-01-16
              [ApplyNOnGivenDate].Script.Dates = 2014-01-15
              [ExtraSums].Script.AccumulateStartDate = 2014-01-15
          CompositeFactor 2014_Feb
            Specifications:
              [Clock].StartDate = 2013-11-01
              [Clock].EndDate = 2016-02-16
              [ApplyNOnGivenDate].Script.Dates = 2014-02-15
              [ExtraSums].Script.AccumulateStartDate = 2014-02-15
          CompositeFactor 2014_Mar
            Specifications:
              [Clock].StartDate = 2013-12-01
              [Clock].EndDate = 2016-03-16
              [ApplyNOnGivenDate].Script.Dates = 2014-03-15
              [ExtraSums].Script.AccumulateStartDate = 2014-03-15
          CompositeFactor 2014_Apr
            Specifications:
              [Clock].StartDate = 2014-01-01
              [Clock].EndDate = 2016-04-16
              [ApplyNOnGivenDate].Script.Dates = 2014-04-15
              [ExtraSums].Script.AccumulateStartDate = 2014-04-15
          CompositeFactor 2014_May
            Specifications:
              [Clock].StartDate = 2014-02-01
              [Clock].EndDate = 2016-05-16
              [ApplyNOnGivenDate].Script.Dates = 2014-05-15
              [ExtraSums].Script.AccumulateStartDate = 2014-05-15
          CompositeFactor 2014_Jun
            Specifications:
              [Clock].StartDate = 2014-03-01
              [Clock].EndDate = 2016-06-16
              [ApplyNOnGivenDate].Script.Dates = 2014-06-15
              [ExtraSums].Script.AccumulateStartDate = 2014-06-15
          CompositeFactor 2014_Jul
            Specifications:
              [Clock].StartDate = 2014-04-01
              [Clock].EndDate = 2016-07-16
              [ApplyNOnGivenDate].Script.Dates = 2014-07-15
              [ExtraSums].Script.AccumulateStartDate = 2014-07-15
          CompositeFactor 2014_Aug
            Specifications:
              [Clock].StartDate = 2014-05-01
              [Clock].EndDate = 2016-08-16
              [ApplyNOnGivenDate].Script.Dates = 2014-08-15
              [ExtraSums].Script.AccumulateStartDate = 2014-08-15
          CompositeFactor 2014_Sep
            Specifications:
              [Clock].StartDate = 2014-06-01
              [Clock].EndDate = 2016-09-16
              [ApplyNOnGivenDate].Script.Dates = 2014-09-15
              [ExtraSums].Script.AccumulateStartDate = 2014-09-15
          CompositeFactor 2014_Oct
            Specifications:
              [Clock].StartDate = 2014-07-01
              [Clock].EndDate = 2016-10-16
              [ApplyNOnGivenDate].Script.Dates = 2014-10-15
              [ExtraSums].Script.AccumulateStartDate = 2014-10-15
          CompositeFactor 2014_Nov
            Specifications:
              [Clock].StartDate = 2014-08-01
              [Clock].EndDate = 2016-11-16
              [ApplyNOnGivenDate].Script.Dates = 2014-11-15
              [ExtraSums].Script.AccumulateStartDate = 2014-11-15
          CompositeFactor 2014_Dec
            Specifications:
              [Clock].StartDate = 2014-09-01
              [Clock].EndDate = 2016-12-16
              [ApplyNOnGivenDate].Script.Dates = 2014-12-15
              [ExtraSums].Script.AccumulateStartDate = 2014-12-15
          CompositeFactor 2015_Jan
            Specifications:
              [Clock].StartDate = 2014-10-01
              [Clock].EndDate = 2017-01-16
              [ApplyNOnGivenDate].Script.Dates = 2015-01-15
              [ExtraSums].Script.AccumulateStartDate = 2015-01-15
          CompositeFactor 2015_Feb
            Specifications:
              [Clock].StartDate = 2014-11-01
              [Clock].EndDate = 2017-02-16
              [ApplyNOnGivenDate].Script.Dates = 2015-02-15
              [ExtraSums].Script.AccumulateStartDate = 2015-02-15
          CompositeFactor 2015_Mar
            Specifications:
              [Clock].StartDate = 2014-12-01
              [Clock].EndDate = 2017-03-16
              [ApplyNOnGivenDate].Script.Dates = 2015-03-15
              [ExtraSums].Script.AccumulateStartDate = 2015-03-15
          CompositeFactor 2015_Apr
            Specifications:
              [Clock].StartDate = 2015-01-01
              [Clock].EndDate = 2017-04-16
              [ApplyNOnGivenDate].Script.Dates = 2015-04-15
              [ExtraSums].Script.AccumulateStartDate = 2015-04-15
          CompositeFactor 2015_May
            Specifications:
              [Clock].StartDate = 2015-02-01
              [Clock].EndDate = 2017-05-16
              [ApplyNOnGivenDate].Script.Dates = 2015-05-15
              [ExtraSums].Script.AccumulateStartDate = 2015-05-15
          CompositeFactor 2015_Jun
            Specifications:
              [Clock].StartDate = 2015-03-01
              [Clock].EndDate = 2017-06-16
              [ApplyNOnGivenDate].Script.Dates = 2015-06-15
              [ExtraSums].Script.AccumulateStartDate = 2015-06-15
          CompositeFactor 2015_Jul
            Specifications:
              [Clock].StartDate = 2015-04-01
              [Clock].EndDate = 2017-07-16
              [ApplyNOnGivenDate].Script.Dates = 2015-07-15
              [ExtraSums].Script.AccumulateStartDate = 2015-07-15
          CompositeFactor 2015_Aug
            Specifications:
              [Clock].StartDate = 2015-05-01
              [Clock].EndDate = 2017-08-16
              [ApplyNOnGivenDate].Script.Dates = 2015-08-15
              [ExtraSums].Script.AccumulateStartDate = 2015-08-15
          CompositeFactor 2015_Sep
            Specifications:
              [Clock].StartDate = 2015-06-01
              [Clock].EndDate = 2017-09-16
              [ApplyNOnGivenDate].Script.Dates = 2015-09-15
              [ExtraSums].Script.AccumulateStartDate = 2015-09-15
          CompositeFactor 2015_Oct
            Specifications:
              [Clock].StartDate = 2015-07-01
              [Clock].EndDate = 2017-10-16
              [ApplyNOnGivenDate].Script.Dates = 2015-10-15
              [ExtraSums].Script.AccumulateStartDate = 2015-10-15
          CompositeFactor 2015_Nov
            Specifications:
              [Clock].StartDate = 2015-08-01
              [Clock].EndDate = 2017-11-16
              [ApplyNOnGivenDate].Script.Dates = 2015-11-15
              [ExtraSums].Script.AccumulateStartDate = 2015-11-15
          CompositeFactor 2015_Dec
            Specifications:
              [Clock].StartDate = 2015-09-01
              [Clock].EndDate = 2017-12-16
              [ApplyNOnGivenDate].Script.Dates = 2015-12-15
              [ExtraSums].Script.AccumulateStartDate = 2015-12-15
          CompositeFactor 2016_Jan
            Specifications:
              [Clock].StartDate = 2015-10-01
              [Clock].EndDate = 2018-01-16
              [ApplyNOnGivenDate].Script.Dates = 2016-01-15
              [ExtraSums].Script.AccumulateStartDate = 2016-01-15
          CompositeFactor 2016_Feb
            Specifications:
              [Clock].StartDate = 2015-11-01
              [Clock].EndDate = 2018-02-16
              [ApplyNOnGivenDate].Script.Dates = 2016-02-15
              [ExtraSums].Script.AccumulateStartDate = 2016-02-15
          CompositeFactor 2016_Mar
            Specifications:
              [Clock].StartDate = 2015-12-01
              [Clock].EndDate = 2018-03-16
              [ApplyNOnGivenDate].Script.Dates = 2016-03-15
              [ExtraSums].Script.AccumulateStartDate = 2016-03-15
          CompositeFactor 2016_Apr
            Specifications:
              [Clock].StartDate = 2016-01-01
              [Clock].EndDate = 2018-04-16
              [ApplyNOnGivenDate].Script.Dates = 2016-04-15
              [ExtraSums].Script.AccumulateStartDate = 2016-04-15
          CompositeFactor 2016_May
            Specifications:
              [Clock].StartDate = 2016-02-01
              [Clock].EndDate = 2018-05-16
              [ApplyNOnGivenDate].Script.Dates = 2016-05-15
              [ExtraSums].Script.AccumulateStartDate = 2016-05-15
          CompositeFactor 2016_Jun
            Specifications:
              [Clock].StartDate = 2016-03-01
              [Clock].EndDate = 2018-06-16
              [ApplyNOnGivenDate].Script.Dates = 2016-06-15
              [ExtraSums].Script.AccumulateStartDate = 2016-06-15
          CompositeFactor 2016_Jul
            Specifications:
              [Clock].StartDate = 2016-04-01
              [Clock].EndDate = 2018-07-16
              [ApplyNOnGivenDate].Script.Dates = 2016-07-15
              [ExtraSums].Script.AccumulateStartDate = 2016-07-15
          CompositeFactor 2016_Aug
            Specifications:
              [Clock].StartDate = 2016-05-01
              [Clock].EndDate = 2018-08-16
              [ApplyNOnGivenDate].Script.Dates = 2016-08-15
              [ExtraSums].Script.AccumulateStartDate = 2016-08-15
          CompositeFactor 2016_Sep
            Specifications:
              [Clock].StartDate = 2016-06-01
              [Clock].EndDate = 2018-09-16
              [ApplyNOnGivenDate].Script.Dates = 2016-09-15
              [ExtraSums].Script.AccumulateStartDate = 2016-09-15
          CompositeFactor 2016_Oct
            Specifications:
              [Clock].StartDate = 2016-07-01
              [Clock].EndDate = 2018-10-16
              [ApplyNOnGivenDate].Script.Dates = 2016-10-15
              [ExtraSums].Script.AccumulateStartDate = 2016-10-15
          CompositeFactor 2016_Nov
            Specifications:
              [Clock].StartDate = 2016-08-01
              [Clock].EndDate = 2018-11-16
              [ApplyNOnGivenDate].Script.Dates = 2016-11-15
              [ExtraSums].Script.AccumulateStartDate = 2016-11-15
          CompositeFactor 2016_Dec
            Specifications:
              [Clock].StartDate = 2016-09-01
              [Clock].EndDate = 2018-12-16
              [ApplyNOnGivenDate].Script.Dates = 2016-12-15
              [ExtraSums].Script.AccumulateStartDate = 2016-12-15
          CompositeFactor 2017_Jan
            Specifications:
              [Clock].StartDate = 2016-10-01
              [Clock].EndDate = 2019-01-16
              [ApplyNOnGivenDate].Script.Dates = 2017-01-15
              [ExtraSums].Script.AccumulateStartDate = 2017-01-15
          CompositeFactor 2017_Feb
            Specifications:
              [Clock].StartDate = 2016-11-01
              [Clock].EndDate = 2019-02-16
              [ApplyNOnGivenDate].Script.Dates = 2017-02-15
              [ExtraSums].Script.AccumulateStartDate = 2017-02-15
          CompositeFactor 2017_Mar
            Specifications:
              [Clock].StartDate = 2016-12-01
              [Clock].EndDate = 2019-03-16
              [ApplyNOnGivenDate].Script.Dates = 2017-03-15
              [ExtraSums].Script.AccumulateStartDate = 2017-03-15
          CompositeFactor 2017_Apr
            Specifications:
              [Clock].StartDate = 2017-01-01
              [Clock].EndDate = 2019-04-16
              [ApplyNOnGivenDate].Script.Dates = 2017-04-15
              [ExtraSums].Script.AccumulateStartDate = 2017-04-15
          CompositeFactor 2017_May
            Specifications:
              [Clock].StartDate = 2017-02-01
              [Clock].EndDate = 2019-05-16
              [ApplyNOnGivenDate].Script.Dates = 2017-05-15
              [ExtraSums].Script.AccumulateStartDate = 2017-05-15
          CompositeFactor 2017_Jun
            Specifications:
              [Clock].StartDate = 2017-03-01
              [Clock].EndDate = 2019-06-16
              [ApplyNOnGivenDate].Script.Dates = 2017-06-15
              [ExtraSums].Script.AccumulateStartDate = 2017-06-15
          CompositeFactor 2017_Jul
            Specifications:
              [Clock].StartDate = 2017-04-01
              [Clock].EndDate = 2019-07-16
              [ApplyNOnGivenDate].Script.Dates = 2017-07-15
              [ExtraSums].Script.AccumulateStartDate = 2017-07-15
          CompositeFactor 2017_Aug
            Specifications:
              [Clock].StartDate = 2017-05-01
              [Clock].EndDate = 2019-08-16
              [ApplyNOnGivenDate].Script.Dates = 2017-08-15
              [ExtraSums].Script.AccumulateStartDate = 2017-08-15
          CompositeFactor 2017_Sep
            Specifications:
              [Clock].StartDate = 2017-06-01
              [Clock].EndDate = 2019-09-16
              [ApplyNOnGivenDate].Script.Dates = 2017-09-15
              [ExtraSums].Script.AccumulateStartDate = 2017-09-15
          CompositeFactor 2017_Oct
            Specifications:
              [Clock].StartDate = 2017-07-01
              [Clock].EndDate = 2019-10-16
              [ApplyNOnGivenDate].Script.Dates = 2017-10-15
              [ExtraSums].Script.AccumulateStartDate = 2017-10-15
          CompositeFactor 2017_Nov
            Specifications:
              [Clock].StartDate = 2017-08-01
              [Clock].EndDate = 2019-11-16
              [ApplyNOnGivenDate].Script.Dates = 2017-11-15
              [ExtraSums].Script.AccumulateStartDate = 2017-11-15
          CompositeFactor 2017_Dec
            Specifications:
              [Clock].StartDate = 2017-09-01
              [Clock].EndDate = 2019-12-16
              [ApplyNOnGivenDate].Script.Dates = 2017-12-15
              [ExtraSums].Script.AccumulateStartDate = 2017-12-15
          CompositeFactor 2018_Jan
            Specifications:
              [Clock].StartDate = 2017-10-01
              [Clock].EndDate = 2020-01-16
              [ApplyNOnGivenDate].Script.Dates = 2018-01-15
              [ExtraSums].Script.AccumulateStartDate = 2018-01-15
          CompositeFactor 2018_Feb
            Specifications:
              [Clock].StartDate = 2017-11-01
              [Clock].EndDate = 2020-02-16
              [ApplyNOnGivenDate].Script.Dates = 2018-02-15
              [ExtraSums].Script.AccumulateStartDate = 2018-02-15
          CompositeFactor 2018_Mar
            Specifications:
              [Clock].StartDate = 2017-12-01
              [Clock].EndDate = 2020-03-16
              [ApplyNOnGivenDate].Script.Dates = 2018-03-15
              [ExtraSums].Script.AccumulateStartDate = 2018-03-15
          CompositeFactor 2018_Apr
            Specifications:
              [Clock].StartDate = 2018-01-01
              [Clock].EndDate = 2020-04-16
              [ApplyNOnGivenDate].Script.Dates = 2018-04-15
              [ExtraSums].Script.AccumulateStartDate = 2018-04-15
          CompositeFactor 2018_May
            Specifications:
              [Clock].StartDate = 2018-02-01
              [Clock].EndDate = 2020-05-16
              [ApplyNOnGivenDate].Script.Dates = 2018-05-15
              [ExtraSums].Script.AccumulateStartDate = 2018-05-15
          CompositeFactor 2018_Jun
            Specifications:
              [Clock].StartDate = 2018-03-01
              [Clock].EndDate = 2020-06-16
              [ApplyNOnGivenDate].Script.Dates = 2018-06-15
              [ExtraSums].Script.AccumulateStartDate = 2018-06-15
          CompositeFactor 2018_Jul
            Specifications:
              [Clock].StartDate = 2018-04-01
              [Clock].EndDate = 2020-07-16
              [ApplyNOnGivenDate].Script.Dates = 2018-07-15
              [ExtraSums].Script.AccumulateStartDate = 2018-07-15
          CompositeFactor 2018_Aug
            Specifications:
              [Clock].StartDate = 2018-05-01
              [Clock].EndDate = 2020-08-16
              [ApplyNOnGivenDate].Script.Dates = 2018-08-15
              [ExtraSums].Script.AccumulateStartDate = 2018-08-15
          CompositeFactor 2018_Sep
            Specifications:
              [Clock].StartDate = 2018-06-01
              [Clock].EndDate = 2020-09-16
              [ApplyNOnGivenDate].Script.Dates = 2018-09-15
              [ExtraSums].Script.AccumulateStartDate = 2018-09-15
          CompositeFactor 2018_Oct
            Specifications:
              [Clock].StartDate = 2018-07-01
              [Clock].EndDate = 2020-10-16
              [ApplyNOnGivenDate].Script.Dates = 2018-10-15
              [ExtraSums].Script.AccumulateStartDate = 2018-10-15
          CompositeFactor 2018_Nov
            Specifications:
              [Clock].StartDate = 2018-08-01
              [Clock].EndDate = 2020-11-16
              [ApplyNOnGivenDate].Script.Dates = 2018-11-15
              [ExtraSums].Script.AccumulateStartDate = 2018-11-15
          CompositeFactor 2018_Dec
            Specifications:
              [Clock].StartDate = 2018-09-01
              [Clock].EndDate = 2020-12-16
              [ApplyNOnGivenDate].Script.Dates = 2018-12-15
              [ExtraSums].Script.AccumulateStartDate = 2018-12-15
        Factor DepDate
          CompositeFactor 2018_Oct
            Specifications:
              [Clock].StartDate = 2018-07-01
              [Clock].EndDate = 2020-10-16
              [ApplyNOnGivenDate].Script.Dates = 15-oct-2018
              [ExtraSums].Script.AccumulateStartDate = 2018-10-15
          CompositeFactor 2018_Nov
            Specifications:
              [Clock].StartDate = 2018-08-01
              [Clock].EndDate = 2020-11-16
              [ApplyNOnGivenDate].Script.Dates = 15-nov-2018
              [ExtraSums].Script.AccumulateStartDate = 2018-11-15
          CompositeFactor 2018_Dec
            Specifications:
              [Clock].StartDate = 2018-09-01
              [Clock].EndDate = 2020-12-16
              [ApplyNOnGivenDate].Script.Dates = 15-dec-2018
              [ExtraSums].Script.AccumulateStartDate = 2018-12-15
    Simulation Rotation
      Clock: Start=1980-01-01; End=1982-04-16
      Weather: FileName=9938.met
      Forages
        Parameters:
          IsLive  UseDigestibilityFromModel  MinimumAmount  Name                          DigestibilityString  FractionConsumable
          true    false                      -              -                             -                    -
          false   false                      0              -                             -                    -
          true    false                      -              -                             -                    -
          false   false                      0              -                             -                    -
          true    false                      -              -                             -                    -
          false   false                      0              -                             -                    -
          true    false                      -              -                             -                    -
          false   false                      0              -                             -                    -
          true    false                      100            SurfaceOrganicMatter.Residue  0.7                  0
          false   false                      0              SurfaceOrganicMatter.Residue  0.3                  0
          true    false                      100            AGPRyegrass.Leaf              0.7                  1
          false   false                      0              AGPRyegrass.Leaf              0.3                  1
          true    false                      100            AGPRyegrass.Stem              0.7                  1
          false   false                      0              AGPRyegrass.Stem              0.3                  1
          true    false                      100            AGPRyegrass.Stolon            0.7                  1
          false   false                      0              AGPRyegrass.Stolon            0.3                  1
          true    false                      100            AGPWhiteClover.Leaf           0.7                  1
          false   false                      0              AGPWhiteClover.Leaf           0.3                  1
          true    false                      100            AGPWhiteClover.Stem           0.7                  1
          false   false                      0              AGPWhiteClover.Stem           0.3                  1
          true    false                      100            AGPWhiteClover.Stolon         0.7                  1
          false   false                      0              AGPWhiteClover.Stolon         0.3                  1
      MicroClimate: a_interception=0; b_interception=1; c_interception=0; d_interception=0; SoilHeatFluxFraction=0.4; MinimumHeightDiffForNewLayer=0; NightInterceptionFraction=0.5; ReferenceHeight=2
      SoilArbitrator
      Summary SummaryFile
      Zone Block: Area=1; Slope=0; AspectAngle=0; Altitude=0
        SimpleGrazing: GrazingRotationType=1; SimpleMinGrazable=0; SimpleGrazingResidual=0; FlexibleGrazePostDM=0; MaximumRotationLengthArray=[15, 15, 15, 15, 15, 15, 15, 15, 15, 15, 15, 15]; MinimumRotationLengthArray=[60, 60, 60, 60, 60, 60, 60, 60, 60, 60, 60, 60]; FractionDefoliatedBiomassToSoil=[0.4]; FractionDefoliatedNToSoil=[0.4]; FractionExcretedNToDung=[1]; CNRatioDung=0; DepthUrineIsAdded=17.5; SendDungElsewhere=0; SendUrineElsewhere=1; FractionPopulationDecline=0; TramplingOn=false; MaximumPropLitterMovedToSoil=0.1; PastureConsumedAtMaximumRateOfLitterRemoval=1200
          PreGrazeDMArray=[2500, 2500, 2500, 2500, 2500, 2500, 2500, 2500, 2500, 2500, 2500, 2500]
          PostGrazeDMArray=[1250, 1250, 1250, 1250, 1250, 1250, 1250, 1250, 1250, 1250, 1250, 1250]
        Folder ManagerFolder
          Manager AutomaticIrrigation
            AllowIrrigation = Yes
            SeasonStartDate = 1-Sep
            SeasonEndDate = 30-Apr
            IrrigationTriggerType = TriggerBySoilDeficit
            IntervalBetweenIrrigations = 0
            TriggerDeficit = 60
            IrrigationAmountType = BasedOnSoilDeficit
            GivenAmount = 0
            TargetDeficit = 90
            MaximumAmount = 50
            CheckCropActive = Yes
            SkipRainDays = Yes
            ReturnDays = 3
            DepthForPAWC = 500
```csharp
// Determines when and how much irrigation is to be applied based on given instructions and/or soil condition.
// Developed by RCichota, last updated in 10/Dec/2021

using System;
using System.Xml.Serialization;
using APSIM.Shared.Utilities;
using Models.Interfaces;
using Models.Core;
using Models.PMF;
using Models.Soils;

namespace Models
{
    [Serializable]
    [System.Xml.Serialization.XmlInclude(typeof(Model))]
    public class Script : Model
    {
        //> Links to other Apsim models
        [Link] private Clock clock;
        [Link] private IWeather weather;
        [Link] private Irrigation irrigator;
        [Link] private IPhysical soilPhysical;
        [Link] private ISoilWater soilWater;
        [Link(IsOptional = true)] private IPlant existingCrop;
        [Link] private ISummary summary;

        //> User inputs from properties tab
        [Separator("Generic irrigation management")]
        [Description(" Turn automatic irrigation on?")]
        public yesNoAnswer AllowIrrigation { get; set; }
        [Description(" Start of irrigation season (dd-MMM)")]
        public string SeasonStartDate { get; set; }
        [Description(" End of irrigation season (dd-MMM)")]
        public string SeasonEndDate { get; set; }

        [Separator("Parameters defining how the irrigation is triggered")]
        [Description(" How irrigation should be triggered? ")]
        public IrrigationTriggerTypes IrrigationTriggerType { get; set; }
        [Description("  Number of days between irrigations, if using fixed interval")]
        public int IntervalBetweenIrrigations { get; set; }
        [Description("  Deficit to trigger irrigation, if using soil deficit (% PAWC)")]
        public double TriggerDeficit { get; set; }

        [Separator("Parameters defining how much irrigation is applied")]
        [Description(" How irrigation amount is determined? ")]
        public IrrigationAmountTypes IrrigationAmountType { get; set; }
        [Description("  Amount of irrigation to apply, if setting amount (mm)")]
        public double GivenAmount { get; set; }
        [Description("  Deficit to stop irrigation, if based on soil deficit (% PAWC)")]
        public double TargetDeficit { get; set; }
        [Description("  Maximum irrigation application (mm/day)")]
        public double MaximumAmount { get; set; }

        [Separator("Parameters defining extra constraint to irrigation")]
        [Description(" Only apply irrigation if there's a crop?")]
        public yesNoAnswer CheckCropActive { get; set; }
        [Description(" Skip rainy days (rain > 5mm)?")]
        public yesNoAnswer SkipRainDays { get; set; }
        [Description(" Minimum number of days between irrigations (ignored if irrigating using fixed interval")]
        public double ReturnDays { get; set; }

        [Separator("Parameters for computing soil water deficit")]
        [Description("Depth to calculate PAWC (mm)")]
        public double DepthForPAWC { get; set; }

        //> Outputs from this manager
        [XmlIgnore] public double IrrigLayerSWDeficit { get; set; }
        [XmlIgnore] public double TopSWC { get; set; }
        [XmlIgnore] public double TopDUL { get; set; }
        [XmlIgnore] public double TopLL { get; set; }
        [XmlIgnore] public double DaysSinceIrrigation { get; set; }
        [XmlIgnore] public double AmountToApply { get; set; }
        [XmlIgnore] public double SeasonAppliedAmount { get; set; }

        //> Internal variables
        private int bottomLayer;
        private double fracBottomLayer;
        private bool irrigationIsAllowed;
        private bool checkingCropActive;
        private bool skippingRainDays;
        private bool seasonIsOpen;
        private bool cropIsActive;
        private bool rainIsNotSignificant;
        private bool irrigatorIsAvailable;
        private bool soilMoistureIsLow;


        [EventSubscribe("StartOfSimulation")]
        private void OnStartOfSimulation(object sender, EventArgs e)
        {
            //Can we irrigate at all?
            irrigationIsAllowed = false;
            if (AllowIrrigation == yesNoAnswer.Yes)
            {
                irrigationIsAllowed = true;

                //Do we need to check crop?
                checkingCropActive = false;
                if (CheckCropActive == yesNoAnswer.Yes)
                {
                    checkingCropActive = true;
                    if(existingCrop == null)
                    {
                        throw new Exception(" Manager requires checking active crop, but no crop is present");
                    }
                }

                //Do we need to check rainfall?
                skippingRainDays = false;
                if (SkipRainDays == yesNoAnswer.Yes)
                {
                    skippingRainDays = true;
                }
            }

            //Calculate soil water variables
            double depthFromSurface = 0.0;
            for (int layer = 0; layer < soilPhysical.Thickness.Length; layer++)
            {
                fracBottomLayer = Math.Min(1.0, (DepthForPAWC - depthFromSurface) / soilPhysical.Thickness[layer]);
                TopLL += soilPhysical.LL15mm[layer] * fracBottomLayer;
                TopDUL += soilPhysical.DULmm[layer] * fracBottomLayer;
                depthFromSurface += soilPhysical.Thickness[layer];
                if (depthFromSurface >= DepthForPAWC)
                {
                    bottomLayer = layer;
                    layer = soilPhysical.Thickness.Length;
                }
            }

            // write message in summary
            summary.WriteMessage(this," Automatic irrigation manager initialised", MessageType.Diagnostic);
            if (irrigationIsAllowed)
            {
                summary.WriteMessage(this,"  Irrigation is enabled between " + SeasonStartDate + " and " + SeasonEndDate, MessageType.Diagnostic);
                if (IrrigationTriggerType == IrrigationTriggerTypes.FixedInterval)
                {
                    summary.WriteMessage(this,"  Irrigation will be triggered every " + IntervalBetweenIrrigations + " days", MessageType.Diagnostic);
                }
                else
                {
                    summary.WriteMessage(this,"  Irrigation will be triggered every time soil moisture is below " + TriggerDeficit.ToString("#0.0") + "% of PAWC", MessageType.Diagnostic);
                }

                if (IrrigationAmountType == IrrigationAmountTypes.GivenAmount)
                {
                    summary.WriteMessage(this,"  Amount to be applied is fixed at " + Math.Min(MaximumAmount, GivenAmount).ToString("#0.0") + "mm each application", MessageType.Diagnostic);
                }
                else
                {
                    summary.WriteMessage(this,"  Amount to be applied will aim to bring soil moisture up to " + TargetDeficit.ToString("#0.0") + "% of PAWC", MessageType.Diagnostic);
                    summary.WriteMessage(this,"   limited to " + MaximumAmount.ToString("#0.0") + "mm in each application", MessageType.Diagnostic);
                }
            }
            else
            {
                summary.WriteMessage(this,"  Irrigation is disabled", MessageType.Diagnostic);
            }
        }

        [EventSubscribe("StartOfDay")]
        private void OnStartOfDay(object sender, EventArgs e)
        {
            //Check for whether we are within the irrigation season
            if(DateUtilities.WithinDates(SeasonStartDate, clock.Today, SeasonEndDate))
            {
                seasonIsOpen = true;
            }
            else
            {
                seasonIsOpen = false;
                SeasonAppliedAmount = 0;
            }

            //Check for whether there is a crop that needs irrigation
            cropIsActive = true;
            if (checkingCropActive)
            {
                if (!existingCrop.IsAlive)
                {
                    cropIsActive = false;
                }
            }
            //if ((existingCrop.Phenology.Stage >= 3.0) && (existingCrop.Phenology.Stage < 6.0))

            //Check whether there is significant rainfall
            rainIsNotSignificant = true;
            if (skippingRainDays && weather.Rain > 5.0)
            {
                rainIsNotSignificant = false;
            }

            //Check whether the irrigator available
            irrigatorIsAvailable = false;
            DaysSinceIrrigation += 1;
            if(IrrigationTriggerType == IrrigationTriggerTypes.FixedInterval)
            {
                if (DaysSinceIrrigation >= IntervalBetweenIrrigations)
                {
                    irrigatorIsAvailable = true;
                }
            }
            else
            {
                if (DaysSinceIrrigation >= ReturnDays)
                {
                    irrigatorIsAvailable = true;
                }
            }
        }

        [EventSubscribe("DoManagement")]
        private void OnDoManagement(object sender, EventArgs e)
        {
            //Get current soil moisture at appropriate depth
            TopSWC = 0.0;
            for (int layer = 0; layer < bottomLayer; layer++)
            {
                TopSWC += soilWater.SWmm[layer];
            }
            TopSWC += soilWater.SWmm[bottomLayer] * fracBottomLayer;

            //Check whether the soil is dry enough to require irrigation
            IrrigLayerSWDeficit = TopSWC - TopDUL;
            if(IrrigationTriggerType == IrrigationTriggerTypes.TriggerBySoilDeficit)
            {
                soilMoistureIsLow = false;
                if (Math.Max(0.0, -IrrigLayerSWDeficit) >= (TopDUL - TopLL) * (100.0 - TriggerDeficit) / 100.0)
                {
                    soilMoistureIsLow = true;
                }
            }
            else
            { // moisture is not checked
                soilMoistureIsLow = true;
            }

            //Are all the conditions ratifying irrigation
            if (irrigationIsAllowed && seasonIsOpen && cropIsActive && irrigatorIsAvailable && rainIsNotSignificant && soilMoistureIsLow)
            {
                //Lets bloody well irrigate then!!!!
                if(IrrigationAmountType == IrrigationAmountTypes.GivenAmount)
                {
                    AmountToApply = Math.Min(GivenAmount, MaximumAmount);
                }
                else
                {
                    AmountToApply = TopLL + (TopDUL - TopLL) * TargetDeficit / 100.0 - TopSWC;
                    AmountToApply = Math.Max(0.0, Math.Min(AmountToApply, MaximumAmount));
                }

                irrigator.Apply(amount: AmountToApply, depth: 0.0, duration: 1440, willRunoff: true);
                DaysSinceIrrigation = 0;
                SeasonAppliedAmount += AmountToApply;
            }
        }


        /// <summary>Flag for a yes or no answer</summary>
        public enum yesNoAnswer
        {
            /// <summary>Positive answer</summary>
            Yes,
            /// <summary>Negative answer</summary>
            No
        }

        /// <summary>Flag how irrigation will be triggered</summary>
        public enum IrrigationTriggerTypes
        {
            /// <summary>Setting a fixed interval</summary>
            FixedInterval,
            /// <summary>Setting a soil deficit</summary>
            TriggerBySoilDeficit
        }

        /// <summary>Flag how much irrigation will be applied</summary>
        public enum IrrigationAmountTypes
        {
            /// <summary>Setting a fixed interval</summary>
            GivenAmount,
            /// <summary>Setting a soil deficit</summary>
            BasedOnSoilDeficit
        }
    }
}
```
          Manager ApplyNOnGivenDate
            Dates = 15-mar-1980
            EachYear = False
            Amount = 450
```csharp
using Models.Interfaces;
using APSIM.Shared.Utilities;
using Models.PMF;
using Models.Soils;
using Models.Core;
using System;
using System.Linq;
using Models.Soils.Nutrients;
using Newtonsoft.Json;

namespace Models
{
    [Serializable]
    public class Script : Model
    {
        [Link] private Clock clock;
        [Link] private Fertiliser fertiliser;
        [Link] private ISummary summary;
        [Link] private Soil soil;
        private Nutrient nutrient;
        //private SoilNitrogen soilN;
        [Link]
        private IPhysical soilPhysical;


        [Separator("Urine will be deposited on the date(s) below")]
        [Description("Apply urine on the same day(s) each year? If no, then must include the year of appliaction below")]
        public bool EachYear { get; set; }

        [Description("Dates for one or more N additions (dd-mmm or dd-mmm-yyyy) as a list with a comma between dates")]
        public string[] Dates { get; set; }

        [JsonIgnore] public double Depth { get; set; }
		
        [Description("Amount of N to apply (kg N /ha) for each deposition")]
        public double Amount { get; set; }


        [EventSubscribe("StartOfSimulation")]
        private void FindSoilNOrNutrient(object sender, EventArgs e)
        {
            nutrient = this.FindInScope<Nutrient>() as Nutrient;
            //soilN = this.FindInScope<SoilNitrogen>() as SoilNitrogen;

            //if (nutrient == null && soilN == null)
                //throw new Exception(string.Format("Error in script {0}: Unable to find nutrient or soilN.", Name));
        }

        [EventSubscribe("DoManagement")]
        private void OnDoManagement(object sender, EventArgs e)
        {
            if (OnDepositionDate())
            {
                double[] weights = GetLayerWeights();
                            double cumulativeDepth = 0.0;
                            Fertiliser.Types FertiliserType = Fertiliser.Types.UreaN;
                
                for (int i = 0; i < soilPhysical.Thickness.Length; i++)
               {
                                cumulativeDepth += soilPhysical.Thickness[i];
                                if (weights[i] > 0.0)
                                                fertiliser.Apply(Amount * weights[i], FertiliserType, cumulativeDepth - (soilPhysical.Thickness[i] / 2.0) );  
                            }
                            summary.WriteMessage(this, "N addition of " + Amount + " kg N /ha to a depth of " + Depth + " mm", MessageType.Information); 
            }
        }

        /// <summary>Checks if today's date is one of the specified fertiliser application dates.</summary>
        private bool OnDepositionDate()
        {
            if (EachYear)
                return Dates.Any(d => DateUtilities.DatesEqual(d, clock.Today));
            
            DateTime[] dates = Dates.Select(d => DateTime.ParseExact(d, "d-MMM-yyyy", null)).ToArray();
            return dates.Any(d => SameDate(d, clock.Today));
        }

        private double[] GetLayerWeights()
        {
            double[] weights = new double[soilPhysical.Thickness.Length];
            double cumDepth = 0;
            for (int i = 0; i < soilPhysical.Thickness.Length; i++)
            {
                cumDepth += soilPhysical.Thickness[i];
                if (cumDepth < Depth)
                    weights[i] = soilPhysical.Thickness[i] / Depth;    // all the layer is within the deposition depth
                else if (cumDepth - soilPhysical.Thickness[i] <= Depth)
                    weights[i] = (Depth - (cumDepth - soilPhysical.Thickness[i])) / Depth;
                else
                    weights[i] = 0;
            }
            return weights;
        }

        private bool SameDate(DateTime d1, DateTime d2)
        {
            return d1.Year == d2.Year && d1.DayOfYear == d2.DayOfYear;
        }
    }
}
```
          Manager FactorLabels
            AGENT_NO = 999
            Lat = 999
            Lon = 999
            SoilStamp = SiltLoam
            GCM = ERA
            RCP = ERA
            TS = BaseLine
```csharp
using Models.Soils;
using Models.Core;
using System;

namespace Models
{
    [Serializable]
    public class Script : Model
    {
        //> Links to other Apsim models
        [Link] Clock Clock;
        [Link] ISummary mySummary;

        //> User inputs from properties tab
        [Separator("Tags used to defined simulation factors")]
        [Description("Agent number: ")]
        public string AGENT_NO { get; set; }
        [Description("Latitude: ")]
        public string Lat { get; set; }
        [Description("Longitude: ")]
        public string Lon { get; set; }
        [Description("SoilStamp: ")]
        public string SoilStamp { get; set; }
        [Description("GCM: ")]
        public string GCM { get; set; }
        [Description("RCP: ")]
        public string RCP { get; set; }
        [Description("Time slice: ")]
        public string TS { get; set; }

        //> Internal variables
        private string someVar;
        
        [EventSubscribe("DoManagementCalculations")]
        private void OnDoManagementCalculations(object sender, EventArgs e)
        {
            // Sort out time slice classification
            if ((Clock.Today.Date.Year <= 2005))
            {
                TS = "Baseline";
            }
            else
            {
                TS = "Future";
            }
        }
    }
}
```
        Manager SoilInitialisationAndReset
          AllowChangingSoilN = True
          NewInitThickness = 200, 300, 500, 1000
          NewInitNH4 = 0, 0, 0, 0
          NewInitNO3 = 1, 1, 1, 1
          AllowSoilReset = False
          AllowPlantReset = False
          ResetsDate = 01-Jul
          ResetInterval = 3
          AllowSetRunoff = False
          NewCNBare = 90
          NewCNRed = 20
          NewCNCov = 0.8
          AllowModifyRunoff = True
          SlopeCorrectionApproach = UseWilliams
          SlopeClassificationType = UseSimple
          SlopeClassGiven = B
          SlopeGiven = 0
```csharp
using System;
using System.Linq;
using Newtonsoft.Json;
using APSIM.Shared.Utilities;
using Models.Core;
using Models.PMF;
using Models.Soils;
using Models.Soils.Nutrients;
using Models.Surface;
using Models.Interfaces;
using Models.WaterModel;

namespace Models
{
    [Serializable]
    public class Script : Model
    {
        [Link] private Clock clock;
        [Link] private Zone myZone;
        [Link] private Soil mySoil;
        [Link] private IPhysical soilPhysical;
        [Link] private Chemical soilChemical;
        [Link] private ISoilWater soilWater;
        [Link] private WaterBalance waterBalance;
        [Link] private Nutrient soilN;
        [Link(ByName = true)] private ISolute NH4;
        [Link(ByName = true)] private ISolute NO3;
        [Link] private Models.Surface.SurfaceOrganicMatter surfaceOM;
        [Link] private ISummary summary;
        private int yearCounter;
        private double newCN2;
        [Link]
        private Nutrient Nutrient;
        [Link(Path="[SurfaceOrganicMatter].SurfaceResidue.Decomposition")]
        private OrganicFlow ResidueDecomposition;
        //> Links to other Apsim models
        [Link] private AgPasture.PastureSpecies[] AgPSpecies;

        //> User inputs from properties tab
        [Separator("Manager script for setting up some soil parameters")]
        [Description(" Enable this manager to change soil parameters?")]
        public bool AllowChangingSoilN { get; set; }
        [Description(" Values of layer thickness to use (mm):")]
        public double[] NewInitThickness { get; set; }
        [Description(" Values for initial soil NH4 (kgN/ha):")]
        public double[] NewInitNH4 { get; set; }
        [Description(" Values for initial soil NO3 (kgN/ha):")]
        public double[] NewInitNO3 { get; set; }

        [Separator("Extra functions to reset soil and plants")]
        [Description(" Enable this manager to reset the soil and surface OM?")]
        public bool AllowSoilReset { get; set; }
        [Description(" Enable this manager to reset the plants?")]
        public bool AllowPlantReset { get; set; }
        [Description(" Date to reset the models (dd-mmm):")]
        public string ResetsDate { get; set; }
        [Description(" Number of years between each reseting (>=1):")]
        public int ResetInterval { get; set; }

        [Separator("Extra functions to set soil runoff parameters")]
        [Description(" Enable this manager to set the soil runoff parameters?")]
        public bool AllowSetRunoff { get; set; }
        [Description(" New value for the curve number of bare soil:")]
        public double NewCNBare { get; set; }
        [Description(" New value for the maximum reduction in curve number due to cover:")]
        public double NewCNRed { get; set; }
        [Description(" New value for the cover at which curve number reduction is maximum:")]
        public double NewCNCov { get; set; }
        [Description(" Enable this manager to modify soil runoff parameters based on slope?")]
        public bool AllowModifyRunoff { get; set; }
        [Description(" Which approach to modify soil runoff parameters based on slope should be used?")]
        public SlopeCorrectionApproaches SlopeCorrectionApproach { get; set; }
        [Description(" Which slope classification should be used to modify soil runoff parameters?")]
        public SlopeClassificationTypes SlopeClassificationType { get; set; }
        [Description("  - Slope class to use for modifying the curve number:")]
        public string SlopeClassGiven { get; set; }
        [Description("  - Slope to use for modifying the curve number (degrees):")]
        public double SlopeGiven { get; set; }

        //> Outputs from this manager
        [JsonIgnore] public double CurveNumberSet { get; set; }
        [JsonIgnore] public double SlopeAngleSet { get; set; }

        //> Internal variables
        private double[] newNH4;
        private double[] newNO3;
        // parameter for changing CurveNumber
        private string[] slopeClassesFSL = new string[] {"A", "B", "C", "D", "E", "F", "G"};
        private double[] slopeAnglesFSL = new double[] {1.5, 5.5, 11.5, 18.0, 22.5, 30.5, 39.0};
        private string[] slopeClassesSimple = new string[] {"A", "B", "C", "D"};
        private double[] slopeAnglesSimple = new double[] {4.0, 12.0, 21.0, 31.0};


        [EventSubscribe("StartOfSimulation")]
        private void OnStartOfSimulation(object sender, EventArgs e)
        {
            // start year counter (assumes counter will be updated at the beggining of the simulation)
            yearCounter = -1;

            if(AllowChangingSoilN)
            {
                // check array length
                if ((NewInitThickness.Length > NewInitNH4.Length) || (NewInitThickness.Length > NewInitNO3.Length))
                {
                    throw new Exception("The number of new values for NH4 and NO3 must be equal or larger than the number of thickness values provided");
                }

                // get layer fractions (map given layer here with actual soil)
                double[][] mapFraction = getLayerFractions();

                // compute new values, mapped to actaul soil
                int nLayers = soilPhysical.Thickness.Length;
                newNH4 = new double[nLayers];
                newNO3 = new double[nLayers];
                for (int Za = 0; Za < nLayers; Za++)
                {
                    for (int Zm = 0; Zm < NewInitThickness.Length; Zm++)
                    {
                        newNH4[Za] += NewInitNH4[Zm]*mapFraction[Za][Zm];
                        newNO3[Za] += NewInitNO3[Zm]*mapFraction[Za][Zm];
                    }
                }

                // change the initial soil N
                NH4.SetKgHa(SoluteSetterType.Fertiliser, newNH4);
                NO3.SetKgHa(SoluteSetterType.Fertiliser, newNO3);
            }
            
            if(AllowSetRunoff)
            {
                // simply pass the given values to the soil model
                waterBalance.CN2Bare = NewCNBare;
                waterBalance.CNRed = NewCNRed;
                waterBalance.CNCov = NewCNCov;
                CurveNumberSet = waterBalance.CN2Bare;
            }
            
            if(AllowModifyRunoff)
            {
                double currentCN2 = waterBalance.CN2Bare;

                // compute new values for the curve number and pass to the soil model
                if(SlopeClassificationType == SlopeClassificationTypes.UseFSL)
                { // the FSL slope classes are to be used (A-G)
                    // 1. find the index and slope angle for the given class
                    int i = Array.IndexOf(slopeClassesFSL, SlopeClassGiven);
                    SlopeAngleSet = slopeAnglesFSL[i];

                    // 2. get the adjusted curve number of the class
                    newCN2 = getCurveNumberFromSlopeClass(currentCN2, i, slopeClassesFSL, slopeAnglesFSL);
                }
                else if(SlopeClassificationType == SlopeClassificationTypes.UseSimple)
                { // the simplified slope classes are to be used (A-D)
                    // 1. find the index and slope angle for the given class
                    int i = Array.IndexOf(slopeClassesSimple, SlopeClassGiven);
                    SlopeAngleSet = slopeAnglesSimple[i];

                    // 2. get the adjusted curve number of the class
                    newCN2 = getCurveNumberFromSlopeClass(currentCN2, i, slopeClassesSimple, slopeAnglesSimple);
                }
                else
                { // a value for sope is to be used
                    // 1. set the class and slope angle
                    SlopeClassGiven = "U";
                    SlopeAngleSet = SlopeGiven;

                    // 2. get the adjusted curve number of the slope
                    newCN2 = getCurveNumberAdjustedForSlope(currentCN2, SlopeGiven);
                }

                // make sure the CN does not decrease
                newCN2 = Math.Max(currentCN2, newCN2);

                // do the actual setting
                waterBalance.CN2Bare = newCN2;
                CurveNumberSet = waterBalance.CN2Bare;
            }

            // write message in summary
            summary.WriteMessage(this," Soil initialisation and reset initialised", MessageType.Diagnostic);
            if(AllowChangingSoilN)
            {
                summary.WriteMessage(this,"   Changes to initial soil N are enabled", MessageType.Diagnostic);
                summary.WriteMessage(this,"     Initial NH4 will be " + newNH4.Sum().ToString() + " kgN/ha over the profile", MessageType.Diagnostic);
                summary.WriteMessage(this,"     Initial NO3 will be " + newNO3.Sum().ToString() + " kgN/ha over the profile", MessageType.Diagnostic);
            }
            else
            {
                summary.WriteMessage(this,"   Changes to initial soil N are disabled", MessageType.Diagnostic);
            }
            
            if(AllowSetRunoff)
            {
                summary.WriteMessage(this,"   Soil runoff parameters (CN2Bare, CNRed, CNCov) changed to " + waterBalance.CN2Bare.ToString("#0.0")
                                          + ", " + waterBalance.CNRed.ToString("#0.0") + ", " + waterBalance.CNCov.ToString("#0.00"), MessageType.Diagnostic);
            }
            if(AllowModifyRunoff)
            {
                if(SlopeClassificationType == SlopeClassificationTypes.UseSlopeGiven)
                {
                    summary.WriteMessage(this,"   Soil runoff parameter (CN2Bare) changed to " + waterBalance.CN2Bare.ToString("#0.0")
                                              + " because the slope to be simulated was set to " + SlopeAngleSet.ToString("#0.0") + " degrees"
                                              , MessageType.Diagnostic);
                }
                else
                {
                    summary.WriteMessage(this,"   Soil runoff parameter (CN2Bare) changed to " + waterBalance.CN2Bare.ToString("#0.0")
                                              + " because the slope class to be simulated was set to " + SlopeClassGiven
                                              + ", which corresponds to an average slope of " + SlopeAngleSet.ToString("#0.0") + " degrees"
                                              , MessageType.Diagnostic);
                }
            }
            
            if(AllowSoilReset)
            {
                summary.WriteMessage(this,"   Soil and surface OM will be reset every " + ResetInterval + " years on " + ResetsDate, MessageType.Diagnostic);
            }

            if(AllowPlantReset)
            {
                summary.WriteMessage(this,"   AgPasture will be reset every " + ResetInterval + " years on " + ResetsDate, MessageType.Diagnostic);
            }
        }

        [EventSubscribe("StartOfDay")]
        private void OnStartOfDay(object sender, EventArgs e)
        {
            // check whether soil and/or plant need to be reset
            if(AllowSoilReset || AllowPlantReset)
            {
                if (DateUtilities.DatesEqual(ResetsDate, clock.Today))
                {
                    yearCounter += 1;
                    if(yearCounter >= ResetInterval)
                    {
                        if(AllowSoilReset)
                        {
                            surfaceOM.Reset();
                            soilWater.Reset();
                            soilN.Reset();
                            yearCounter = 0;
                        }
                        if(AllowPlantReset)
                        {
                            foreach (AgPasture.PastureSpecies species in AgPSpecies)
                            {
                                species.Reset();
                                yearCounter = 0;
                            }
                        }
                    }
                }
            }
        }
        
        /// <summary>Computes the CurveNumber adjusted for slope, ensuring for monotonic behaviour</summary>
        private double getCurveNumberFromSlopeClass(double baseCN, int classIndex, string[] slopeClass, double[] angleByClass)
        {
            // get the first value, assumed to be smallest slope
            double newCN = getCurveNumberAdjustedForSlope(baseCN, angleByClass[0]);

            // starting from the smallest, this loop will go through the classes and get the adjusted CN value
            //  it will stop when the class given is found or when the adjusted CN value starts to decrease.
            //  This is needed because some aproaches used to modify the value of CN are not monotonic with
            //  respect to slope and thus can return smaller values of CN for steeper slopes...

            for(int i = 1; i <= classIndex; i++)
            {
                double newestCN = getCurveNumberAdjustedForSlope(baseCN, angleByClass[i]);
                if(newestCN < newCN)
                { // function started to go down, stop calculations
                    i = classIndex + 1;
                }
                else
                { // still going up, continue calculations
                    newCN = newestCN;
                }
            }
            
            return newCN;
        }
        
        /// <summary>Computes the CurveNumber adjusted for slope, links to different claculation approaches</summary>
        private double getCurveNumberAdjustedForSlope(double baseCN, double slopeAngle)
        {
            double adjustedCN = -1.0;
            if(SlopeCorrectionApproach == SlopeCorrectionApproaches.UseWilliams)
            {
                adjustedCN = adjustCurveNumberForSlope_Williams(baseCN, slopeAngle);
            }
            
            return adjustedCN;
        }
        
        /// <summary>Computes an adjusted CurveNumber based on a given slope using the Williams approach</summary>
        private double adjustCurveNumberForSlope_Williams(double baseCN, double slopeAngle)
        {
            double gradient = 100.0*Math.Tan(slopeAngle*Math.PI/180.0);
            double adjustedCN = 100.0/((100.0/baseCN - 1.0)*(1.1 - gradient/(gradient + Math.Exp(3.7 + 0.02118*gradient))) + 1.0);
            return Math.Round(adjustedCN, 1);
        }

        /// <summary>Gets the fraction that each given layer maps into actaul soil layers</summary>
        private double[][] getLayerFractions()
        {
            int nLayers = soilPhysical.Thickness.Length;
            int nToMap = NewInitThickness.Length;
            double[][] mappedLayerFrac = new double[nLayers][];
            double depthLayerTop = 0.0;
            double depthLayerBottom = soilPhysical.Thickness[0];
            for (int Za = 0; Za < nLayers; Za++)
            {
                mappedLayerFrac[Za] = new double[nToMap];
                double depthToMapTop = 0.0;
                double depthToMapBottom = NewInitThickness[0];
                for (int Zm = 0; Zm < nToMap; Zm++)
                {
                    mappedLayerFrac[Za][Zm] = (Math.Min(depthLayerBottom, depthToMapBottom) - Math.Max(depthLayerTop, depthToMapTop)) / NewInitThickness[Zm];
                    mappedLayerFrac[Za][Zm] = Math.Max(0.0, mappedLayerFrac[Za][Zm]);
                    depthToMapTop = depthToMapBottom;
                    if (Zm < nToMap - 1)
                    {
                        depthToMapBottom += NewInitThickness[Zm + 1];
                    }
                }

                depthLayerTop = depthLayerBottom;
                if (Za < nLayers - 1)
                {
                    depthLayerBottom += soilPhysical.Thickness[Za + 1];
                }
            }

            return mappedLayerFrac;
        }

        /// <summary>Flag which slope 'classification' is been used</summary>
        public enum SlopeClassificationTypes
        {
            /// <summary>Use the FSL classes (A-G)</summary>
            UseFSL,
            /// <summary>Use a simplified set (A-D)</summary>
            UseSimple,
            /// <summary>Use the slope value provided</summary>
            UseSlopeGiven
        }
        
        /// <summary>Flag which approach to modify CurveNumber due to slope is been used</summary>
        public enum SlopeCorrectionApproaches
        {
            /// <summary>Use the Williams approach</summary>
            UseWilliams
        }
    }
}
```
        Manager ExtraSums
          AccumulateStartDate = 04/15/1980 00:00:00
          LengthFirstSummPeriod = 30
          LengthSecondSummPeriod = 730
          TriggerRecordAtEndingEnabled = True
          EndingRecordTableName = SummReport
```csharp
using System;
using System.Collections.Generic;
using System.Xml.Serialization;
using APSIM.Shared.Utilities;
using Models;
using Models.Core;
using Models.Soils;
using Models.Soils.Nutrients;
using Models.Interfaces;
using Models.PMF;

namespace Models
{
    [Serializable]
    public class Script : Model
    {
        [Link] private Clock clock;
        [Link] private Zone myZone;
        [Link] private IWeather weather;
        [Link] private Fertiliser fertiliser;
        [Link] private Irrigation irrigator;
        [Link] private IPhysical soilPhysical;
        [Link] private ISoilWater waterBalance;
        //[Link(ByName = true)] private Nutrient soilNitrogen;
        [Link] private Nutrient soilNitrogen;
        [Link(ByName = true)] private ISolute Urea;
        [Link(ByName = true)] private ISolute NO3;
        [Link(ByName = true)] private ISolute NH4;
        [Link] private Models.Surface.SurfaceOrganicMatter surfaceOM;
        [Link] private ISummary summary;
        private Models.Report myReportAtEnding;
        private string endDate;
        private double iniSWC;
        private double iniSurfOMN;
        private double iniSoilOrgN;
        private double iniSoilMinN;
        private double iniPlantN;
        private int daysAfterDeposition;
        private int meterLayer;
        private bool summaryIsAllowed;
        [Link]
        private Nutrient Nutrient;
        [Link(Path="[SurfaceOrganicMatter].SurfaceResidue.Decomposition")]
        private OrganicFlow ResidueDecomposition;
        //> Links to other Apsim models

        //> User inputs from properties tab
        [Separator("Generic script to sum up a set of variables, taylored for RIT work (WWO+MfE)")]
        [Description(" Date to start the accumulations (dd/mm/yyyy): ")]
        public DateTime AccumulateStartDate { get; set; }
        [Description(" Number of days for the first summary period: ")]
        public int LengthFirstSummPeriod { get; set; }
        [Description(" Number of days for the second summary period: ")]
        public int LengthSecondSummPeriod { get; set; }
        
         [XmlIgnore] public DateTime AccumulateEndShortDate { get; set; }
         [XmlIgnore] public DateTime AccumulateEndLongDate { get; set; }        

        [Separator("Optional trigger for recording at end of simulation")]
        [Description(" Allow this manager to trigger recordings at the end of simulation? ")]
        public bool TriggerRecordAtEndingEnabled { get; set; }
        [Description(" Name of the Report: ")]
        public string EndingRecordTableName { get; set; }

        //> Outputs from this manager
        [XmlIgnore] public string Agent { get; set; }
        [XmlIgnore] public double InitialSWC { get; set; }
        [XmlIgnore] public double InitialSurfOMN { get; set; }
        [XmlIgnore] public double InitialSoilOrgN { get; set; }
        [XmlIgnore] public double InitialSoilMinN { get; set; }
        [XmlIgnore] public double InitialPlantN { get; set; }

        // state vars, snapshots
        [XmlIgnore] public double TotalSWC { get; set; }
        [XmlIgnore] public double TotalDUL { get; set; }
        [XmlIgnore] public double TotalWaterDeficit { get; set; }

        [XmlIgnore] public double TotalFomN { get; set; }
        [XmlIgnore] public double TotalBiomN { get; set; }
        [XmlIgnore] public double TotalHumN { get; set; }
        [XmlIgnore] public double TotalOrganicN { get; set; }
        [XmlIgnore] public double TotalNO3N { get; set; }
        [XmlIgnore] public double TotalNH4N { get; set; }
        [XmlIgnore] public double TotalUreaN { get; set; }
        [XmlIgnore] public double TotalMineralN { get; set; }

        // cumulative amounts for the first period (15 days)
        [XmlIgnore] public double AccumIrrigationFirstPeriod { get; set; }
        [XmlIgnore] public double AccumRainfallFirstPeriod { get; set; }
        [XmlIgnore] public double AccumEvaporationFirstPeriod { get; set; }
        [XmlIgnore] public double AccumTranspirationFirstPeriod { get; set; }
        [XmlIgnore] public double AccumDrainageFirstPeriod { get; set; }
        [XmlIgnore] public double AccumRunoffFirstPeriod { get; set; }
        [XmlIgnore] public double AccumDownDrainage10cmFirstPeriod { get; set; }
        [XmlIgnore] public double AccumNetWaterFlow10cmFirstPeriod { get; set; }
        [XmlIgnore] public double DeltaSWCFirstPeriod { get; set; }

        // cumulative amounts for second period (urine patch life)
        [XmlIgnore] public double AccumIrrigation { get; set; }
        [XmlIgnore] public double AccumRainfall { get; set; }
        [XmlIgnore] public double AccumEO { get; set; }
        [XmlIgnore] public double AccumEvaporation { get; set; }
        [XmlIgnore] public double AccumTranspiration { get; set; }
        [XmlIgnore] public double AccumDrainage { get; set; }
        [XmlIgnore] public double AccumRunoff { get; set; }
        [XmlIgnore] public double AccumLateralOutFlow { get; set; }
        [XmlIgnore] public double AccumDownDrainage100cm { get; set; }
        [XmlIgnore] public double AccumNetWaterFlow100cm { get; set; }

        [XmlIgnore] public double AccumFertilisedN { get; set; }
        [XmlIgnore] public double AccumMineralisedN { get; set; }
        [XmlIgnore] public double AccumFixedN { get; set; }
        [XmlIgnore] public double AccumLeachedN { get; set; }
        [XmlIgnore] public double AccumDenitrifiedN { get; set; }
        [XmlIgnore] public double AccumTakenUpN { get; set; }
        [XmlIgnore] public double AccumDetachedN { get; set; }
        [XmlIgnore] public double AccumUrineN { get; set; }
        [XmlIgnore] public double AccumDungN { get; set; }
        [XmlIgnore] public double AccumDungWt { get; set; }
        [XmlIgnore] public double AccumLeachedN100cm { get; set; }

        [XmlIgnore] public double AccumDefoliatedWt { get; set; }
        [XmlIgnore] public double AccumDefoliatedN { get; set; }
        [XmlIgnore] public double AccumOffTakeWt { get; set; }
        [XmlIgnore] public double AccumOffTakeN { get; set; }
        [XmlIgnore] public int AccumNumDefoliations { get; set; }

        [XmlIgnore] public double DeltaSWC { get; set; }
        [XmlIgnore] public double DeltaSurfOMN { get; set; }
        [XmlIgnore] public double DeltaSoilOrgN { get; set; }
        [XmlIgnore] public double DeltaSoilMinN { get; set; }
        [XmlIgnore] public double DeltaPlantN { get; set; }

        //> Internal variables


        [EventSubscribe("StartOfSimulation")]
        private void OnStartOfSimulation(object sender, EventArgs e)
        {
            // set some variables
            endDate = clock.EndDate.ToString("dd-MMM");
            daysAfterDeposition = 0;
            summaryIsAllowed = false;
            
            
    //                public DateTime AccumulateStartDate { get; set; }
    //    [Description(" Number of days for the first summary period: ")]
    //    public int LengthFirstSummPeriod { get; set; }
    //    [Description(" Number of days for the second summary period: ")]
    //    public int LengthSecondSummPeriod { get; set; }
        
         	AccumulateEndShortDate = AccumulateStartDate.AddDays(LengthFirstSummPeriod);
         	AccumulateEndLongDate = AccumulateStartDate.AddDays(LengthSecondSummPeriod);

      //   [XmlIgnore] public DateTime AccumulateEndLongDate { get; set; }   
         
         
         

            // get agent number (assuming vcsn)
            char[] separator = new char[] {'\\', '/'};
            string[] aux = (weather.FileName).Split(separator);
            Agent = aux[aux.Length-1].Replace(".met","");

            // check report table names
            myReportAtEnding = this.FindInScope(EndingRecordTableName) as Models.Report;

            // check layer that contains the 100cm depth
            meterLayer = soilPhysical.Thickness.Length - 1;
            for (int z = 0; z < soilPhysical.Thickness.Length; z++)
            {
                if (soilPhysical.ThicknessCumulative[z] > 1000)
                {
                    meterLayer = z;
                    z = soilPhysical.Thickness.Length;
                }
            }

            // write message in summary
            summary.WriteMessage(this," Extra variable summary and reporting initialised", MessageType.Diagnostic);
            summary.WriteMessage(this,"   Summary will computed from " + AccumulateStartDate.ToShortDateString(), MessageType.Diagnostic);
            summary.WriteMessage(this,"   With some variables summed up over the first " + LengthFirstSummPeriod + " days only.", MessageType.Diagnostic);
            summary.WriteMessage(this,"   The remaining variables summed up over " + LengthSecondSummPeriod + " days, or the end of simulation.", MessageType.Diagnostic);
            if(TriggerRecordAtEndingEnabled)
            {
                summary.WriteMessage(this,"   Report on " + EndingRecordTableName + " will be recorded at the end of the simulation", MessageType.Diagnostic);
            }
        }

        [EventSubscribe("StartOfDay")]
        private void OnStartOfDay(object sender, EventArgs e)
        {
            // check whether the period for summing up has began
            if (clock.Today.Date == AccumulateStartDate.Date)
            {
                summaryIsAllowed = true;
                InitialSWC = MathUtilities.Sum(waterBalance.SWmm);
                InitialSurfOMN = surfaceOM.N;
                InitialSoilOrgN = MathUtilities.Sum(Nutrient.FOM.N) + MathUtilities.Sum(Nutrient.Microbial.N) + MathUtilities.Sum(Nutrient.Humic.N);
                InitialSoilMinN = MathUtilities.Sum(Urea.kgha) + MathUtilities.Sum(NH4.kgha) + MathUtilities.Sum(NO3.kgha);
                InitialPlantN = (double)myZone.Get("[AgPRyegrass].TotalN") + (double)myZone.Get("[AgPWhiteClover].TotalN");

                // reset variables
                ClearVariables();
                daysAfterDeposition = 0;
            }
        }

        [EventSubscribe("EndOfDay")]
        private void OnEndOfDay(object sender, EventArgs e)
        {
            if (summaryIsAllowed)
            {
                // get state totals and cycle cumulative
                GetTotals();
                daysAfterDeposition += 1;

                // get the cumulatives for the first period
                if(daysAfterDeposition <= LengthFirstSummPeriod)
                {
                    GetCumulativesFirstPeriod();
                    if(daysAfterDeposition == LengthFirstSummPeriod)
                    {
                        GetDeltasFirstPeriod();
                    }
                }

                // get the cumulatives for the second period
                if(daysAfterDeposition <= LengthSecondSummPeriod)
                {
                    GetCumulatives();
                    if ((daysAfterDeposition == LengthSecondSummPeriod) || (clock.Today.Date == clock.EndDate.Date))
                    {
                        GetDeltas();
                        summaryIsAllowed = false;
                    }
                }
            }

            if(TriggerRecordAtEndingEnabled && (clock.Today.Date == clock.EndDate.Date))
            { // last day of simulation
                myReportAtEnding.DoOutput();
            }
        }

        private void ClearVariables()
        {
            // clear all accum variables
            AccumRainfallFirstPeriod = 0.0;
            AccumIrrigationFirstPeriod = 0.0;
            AccumEvaporationFirstPeriod = 0.0;
            AccumTranspirationFirstPeriod = 0.0;
            AccumDrainageFirstPeriod = 0.0;
            AccumRunoffFirstPeriod = 0.0;
            AccumDownDrainage10cmFirstPeriod = 0.0;
            AccumNetWaterFlow10cmFirstPeriod = 0.0;

            AccumRainfall = 0.0;
            AccumIrrigation = 0.0;
            AccumEO = 0.0;
            AccumEvaporation = 0.0;
            AccumTranspiration = 0.0;
            AccumDrainage = 0.0;
            AccumRunoff = 0.0;
            AccumLateralOutFlow = 0.0;
            AccumDownDrainage100cm = 0.0;
            AccumNetWaterFlow100cm = 0.0;

            AccumFertilisedN = 0.0;
            AccumMineralisedN = 0.0;
            AccumFixedN = 0.0;
            AccumLeachedN = 0.0;
            AccumDenitrifiedN = 0.0;
            AccumTakenUpN = 0.0;
            AccumDetachedN = 0.0;
            AccumUrineN = 0.0;
            AccumDungN = 0.0;
            AccumDungWt = 0.0;
            AccumLeachedN100cm = 0.0;

            AccumDefoliatedWt = 0.0;
            AccumDefoliatedN = 0.0;
            AccumOffTakeWt = 0.0;
            AccumOffTakeN = 0.0;
            AccumNumDefoliations = 0;

            DeltaSWCFirstPeriod = 0.0;
            DeltaSWC = 0.0;
            DeltaSurfOMN = 0.0;
            DeltaSoilOrgN = 0.0;
            DeltaSoilMinN = 0.0;
            DeltaPlantN = 0.0;

            // get initial values for this summ cycle
            iniSWC = MathUtilities.Sum(waterBalance.SWmm);
            iniSurfOMN = surfaceOM.N;
            iniSoilOrgN = MathUtilities.Sum(Nutrient.FOM.N) + MathUtilities.Sum(Nutrient.Microbial.N) + MathUtilities.Sum(Nutrient.Humic.N);
            iniSoilMinN = MathUtilities.Sum(Urea.kgha) + MathUtilities.Sum(NH4.kgha) + MathUtilities.Sum(NO3.kgha);
            iniPlantN = (double)myZone.Get("[AgPRyegrass].TotalN") + (double)myZone.Get("[AgPWhiteClover].TotalN");
        }

        private void GetTotals()
        {
            TotalSWC = MathUtilities.Sum(waterBalance.SWmm);
            TotalDUL = MathUtilities.Sum(soilPhysical.DULmm);
            TotalWaterDeficit = (TotalSWC - TotalDUL);

            TotalFomN = MathUtilities.Sum(Nutrient.FOM.N);
            TotalHumN = MathUtilities.Sum(Nutrient.Humic.N);
            TotalBiomN = MathUtilities.Sum(Nutrient.Microbial.N);
            TotalOrganicN = TotalFomN + TotalBiomN + TotalHumN;
            TotalNO3N = MathUtilities.Sum(NO3.kgha);
            TotalNH4N = MathUtilities.Sum(NH4.kgha);
            TotalUreaN = MathUtilities.Sum(Urea.kgha);
            TotalMineralN = TotalUreaN + TotalNH4N + TotalNO3N;
        }

        private void GetCumulatives()
        {
            // accumulate the values of several outputs
            AccumRainfall += weather.Rain;
            AccumIrrigation += irrigator.IrrigationApplied;
            AccumEO += waterBalance.Eo;
            AccumEvaporation += waterBalance.Es;
            double[] auxE = (double[])myZone.Get("[AgPRyegrass].WaterUptake");
            AccumTranspiration += MathUtilities.Sum(auxE);
            auxE = (double[])myZone.Get("[AgPWhiteClover].WaterUptake");
            AccumTranspiration += MathUtilities.Sum(auxE);
            AccumDrainage += waterBalance.Drainage;
            AccumRunoff += waterBalance.Runoff;
            double auxLatFlow = MathUtilities.Sum(waterBalance.LateralOutflow);
            AccumLateralOutFlow += auxLatFlow;
            AccumDownDrainage100cm += waterBalance.Flux[meterLayer];
            AccumNetWaterFlow100cm += (waterBalance.Flow[meterLayer] + waterBalance.Flux[meterLayer]);

            AccumFertilisedN += fertiliser.NitrogenApplied;
            //AccumMineralisedN += MathUtilities.Sum(soilNitrogen.dlt_n_min_tot);
            AccumFixedN += (double)myZone.Get("[AgPWhiteClover].FixedN");
            AccumLeachedN += (waterBalance.LeachNO3 + waterBalance.LeachNH4 + waterBalance.LeachUrea);
            AccumDenitrifiedN += MathUtilities.Sum(Nutrient.Natm);
            AccumTakenUpN += ((double)myZone.Get("[AgPRyegrass].SoilUptakeN") + (double)myZone.Get("[AgPWhiteClover].SoilUptakeN"));
            AccumDetachedN += ((double)myZone.Get("[AgPRyegrass].LitterDepositionN")+(double)myZone.Get("[AgPRyegrass].RootDetachedN")+(double)myZone.Get("[AgPWhiteClover].LitterDepositionN")+(double)myZone.Get("[AgPWhiteClover].RootDetachedN"));
            //AccumUrineN += (double)myZone.Get("[DefoliationManager].DefoliationManagerScript.NReturnedInUrine")*10.0;
            AccumUrineN += (double)myZone.Get("[ApplyNOnGivenDate].Script.Amount");
            //AccumDungN += (double)myZone.Get("[DefoliationManager].DefoliationManagerScript.NReturnedInDung")*10.0;
            //AccumDungWt += (double)myZone.Get("[DefoliationManager].DefoliationManagerScript.ReturnedWt")*10.0;
            AccumLeachedN100cm += (waterBalance.FlowUrea[meterLayer] + waterBalance.FlowNH4[meterLayer] + waterBalance.FlowNO3[meterLayer]);


            double AuxDefoliation = (double)myZone.Get("[SimpleGrazing].GrazedDM");   //double AuxDefoliation = (double)myZone.Get("[DefoliationManager].DefoliationManagerScript.DefoliatedWt");
            if (AuxDefoliation > 0.0)
            {
                AccumNumDefoliations += 1;
                AccumDefoliatedWt += AuxDefoliation;   //*10.0;

                AccumDefoliatedN += (double)myZone.Get("[SimpleGrazing].GrazedN");    //AccumDefoliatedN += (double)myZone.Get("[DefoliationManager].DefoliationManagerScript.DefoliatedN")*10.0;

                //AccumOffTakeWt += (double)myZone.Get("[DefoliationManager].DefoliationManagerScript.RemovedWt")*10.0;
                //AccumOffTakeN += (double)myZone.Get("[DefoliationManager].DefoliationManagerScript.RemovedN")*10.0;
            }
        }

        private void GetDeltas()
        {
            // get deltas (difference between initial, at reset, and current values)
            DeltaSWC = MathUtilities.Sum(waterBalance.SWmm) - iniSWC;
            DeltaSurfOMN = surfaceOM.N - iniSurfOMN;
            DeltaSoilOrgN = MathUtilities.Sum(Nutrient.FOM.N) + MathUtilities.Sum(Nutrient.Microbial.N) + MathUtilities.Sum(Nutrient.Humic.N) - iniSoilOrgN;
            DeltaSoilMinN = MathUtilities.Sum(Urea.kgha) + MathUtilities.Sum(NH4.kgha) + MathUtilities.Sum(NO3.kgha) - iniSoilMinN;
            DeltaPlantN = (double)myZone.Get("[AgPRyegrass].TotalN") + (double)myZone.Get("[AgPWhiteClover].TotalN") - iniPlantN;
        }

        private void GetCumulativesFirstPeriod()
        {
            // accumulate the values of several outputs
            AccumRainfallFirstPeriod += weather.Rain;
            AccumIrrigationFirstPeriod += irrigator.IrrigationApplied;
            AccumEvaporationFirstPeriod += waterBalance.Es;
            double[] auxE = (double[])myZone.Get("[AgPRyegrass].WaterUptake");
            AccumTranspirationFirstPeriod += MathUtilities.Sum(auxE);
            auxE = (double[])myZone.Get("[AgPWhiteClover].WaterUptake");
            AccumTranspirationFirstPeriod += MathUtilities.Sum(auxE);
            AccumDrainageFirstPeriod += waterBalance.Drainage;
            AccumRunoffFirstPeriod += waterBalance.Runoff;
            AccumDownDrainage10cmFirstPeriod += waterBalance.Flux[1];
            AccumNetWaterFlow10cmFirstPeriod += (waterBalance.Flow[1] + waterBalance.Flux[1]);
        }

        private void GetDeltasFirstPeriod()
        {
            // get deltas (difference between initial, at reset, and current values)
            DeltaSWCFirstPeriod = MathUtilities.Sum(waterBalance.SWmm) - iniSWC;
        }
    }
}
```
        Irrigation
        Fertiliser
        SurfaceOrganicMatter: InitialResidueName=grass; InitialResidueType=grass; InitialResidueMass=1000; InitialStandingFraction=0; InitialCPR=0; InitialCNR=25
        Soil: SoilType=Generic Deep Loamy Soil; LocalName=VeryDeep_MediumLoam_WellDrained_ModeratePAW; Country=New Zealand; Latitude=0; Longitude=0
          DataSource=Generic profile description for a well drained stoneless medium textured soil, with no root growth limitations to 2.0m and medium PAW (180mm in top 1.0m)
          Physical
            Thickness  ParticleSizeClay  ParticleSizeSand  ParticleSizeSilt  Rocks  BD    AirDry  LL15   DUL    SAT    KS
            100        17.5              32                50.5              0      1.1   0.058   0.174  0.369  0.53   1200
            150        18.5              33                48.5              0      1.2   0.15    0.166  0.35   0.505  899
            250        18                35                47                0      1.35  0.135   0.135  0.319  0.455  377
            250        15.5              47.5              37                0      1.45  0.11    0.11   0.289  0.42   482
            250        15                48                37                0      1.45  0.109   0.109  0.28   0.421  623
            250        14                50                36                0      1.45  0.101   0.101  0.244  0.423  453
            250        12                54                34                0      1.42  0.095   0.095  0.228  0.419  682
            250        12                55                33                0      1.4   0.098   0.098  0.209  0.419  706
            250        12                55                33                0      1.4   0.102   0.102  0.195  0.411  767
            SoilCrop MaizeSoil
              LL=[0.174, 0.166, 0.135, 0.11, 0.109, 0.101, 0.095, 0.098, 0.102]
              KL=[0.085, 0.07, 0.055, 0.04, 0.015, 0.006, 0.003, 0.001, 0.001]
              XF=[1, 1, 1, 1, 1, 1, 1, 1, 1]
            SoilCrop FodderBeetSoil
              LL=[0.174, 0.166, 0.135, 0.11, 0.109, 0.101, 0.095, 0.098, 0.102]
              KL=[0.09, 0.065, 0.05, 0.03, 0.015, 0.005, 0.002, 0, 0]
              XF=[1, 1, 1, 1, 1, 1, 1, 1, 1]
            SoilCrop OatsSoil
              LL=[0.174, 0.166, 0.135, 0.11, 0.109, 0.101, 0.095, 0.098, 0.102]
              KL=[0.082, 0.063, 0.049, 0.035, 0.02, 0.01, 0.005, 0.002, 0]
              XF=[1, 1, 1, 1, 1, 1, 1, 1, 1]
            SoilCrop PotatoSoil
              LL=[0.174, 0.166, 0.135, 0.11, 0.109, 0.101, 0.095, 0.098, 0.102]
              KL=[0.08, 0.07, 0.05, 0.035, 0.005, 0, 0, 0, 0]
              XF=[1, 1, 1, 1, 1, 1, 1, 1, 1]
            SoilCrop GrapevineSoil
              LL=[0.174, 0.166, 0.135, 0.11, 0.109, 0.101, 0.095, 0.098, 0.102]
              KL=[0.075, 0.06, 0.045, 0.025, 0.012, 0.006, 0.003, 0.002, 0.001]
              XF=[1, 1, 1, 1, 1, 1, 1, 1, 1]
            SoilCrop BarleySoil
              LL=[0.174, 0.166, 0.135, 0.11, 0.109, 0.101, 0.095, 0.098, 0.102]
              KL=[0.09, 0.075, 0.055, 0.04, 0.02, 0.008, 0.002, 0, 0]
              XF=[1, 1, 1, 1, 1, 1, 1, 1, 1]
            SoilCrop WheatSoil
              LL=[0.174, 0.166, 0.135, 0.11, 0.109, 0.101, 0.095, 0.098, 0.102]
              KL=[0.09, 0.075, 0.055, 0.04, 0.02, 0.008, 0.002, 0, 0]
              XF=[1, 1, 1, 1, 1, 1, 1, 1, 1]
            SoilCrop LucerneSoil
              LL=[0.174, 0.166, 0.135, 0.11, 0.109, 0.101, 0.095, 0.098, 0.102]
              KL=[0.08, 0.07, 0.05, 0.033, 0.02, 0.01, 0.006, 0.003, 0.002]
              XF=[1, 1, 1, 1, 1, 1, 1, 1, 1]
            SoilCrop AgPRyegrassSoil
              LL=[0.174, 0.166, 0.135, 0.11, 0.109, 0.101, 0.095, 0.098, 0.102]
              KL=[0.085, 0.07, 0.055, 0.04, 0.015, 0.006, 0.003, 0.001, 0.001]
              XF=[1, 1, 1, 1, 1, 1, 1, 1, 1]
            SoilCrop AgPWhiteCloverSoil
              LL=[0.174, 0.166, 0.135, 0.11, 0.109, 0.101, 0.095, 0.098, 0.102]
              KL=[0.085, 0.07, 0.055, 0.04, 0.015, 0.006, 0.003, 0.001, 0.001]
              XF=[1, 1, 1, 1, 1, 1, 1, 1, 1]
          WaterBalance SoilWater: SummerDate=1-Oct; SummerU=8; SummerCona=4; WinterDate=1-Apr; WinterU=4; WinterCona=1.5; DiffusConst=88; DiffusSlope=35; Salb=0.2; CN2Bare=90; CNRed=20; CNCov=0.8; DischargeWidth=0; CatchmentArea=0; PSIDul=-100; Thickness=[100, 150, 250, 250, 250, 250, 250, 250, 250]
            SWCON=[0.574, 0.537, 0.467, 0.484, 0.493, 0.471, 0.496, 0.507, 0.523]
          Organic: FOMCNRatio=40; CarbonUnits=Total
            Thickness  Carbon  SoilCNRatio  FBiom  FInert  FOM
            100        3       11.8         0.08   0.314   716.5
            150        2.1     11.8         0.05   0.475   677.4
            250        0.75    11.8         0.008  0.779   432.7
            250        0.3     11.8         0.008  0.937   124
            250        0.2     11.8         0.008  0.967   35.5
            250        0.2     11.8         0.008  0.989   10.2
            250        0.2     11.8         0.008  0.992   2.9
            250        0.2     11.8         0.008  0.993   0.8
            250        0.2     11.8         0.008  0.994   0
          Chemical: Thickness=[100, 150, 250, 250, 250, 250, 250, 250, 250]; PH=[6, 6, 6, 6, 6, 6, 6, 6, 6]; PHUnits=Water
          CERESSoilTemperature Temperature
          Water: Thickness=[100, 150, 250, 250, 250, 250, 250, 250, 250]; InitialPAWmm=285.57; RelativeTo=LL15; FilledFromTop=false
            InitialValues=[0.35925, 0.3408, 0.3098, 0.28005, 0.27145, 0.23685, 0.22135, 0.20345, 0.19035]
          Solute NO3: Thickness=[100, 150, 250, 250, 250, 250, 250, 250, 250]; InitialValuesUnits=ppm; WaterTableConcentration=0; D0=0; DepthConstant=0; MaxDepthSoluteAccessible=0; RunoffEffectivenessAtMovingSolute=0; MaxEffectiveRunoff=0
            InitialValues=[8.06202, 7.7037, 2.5, 1.28205, 0.952381, 0.701754, 0.45977, 0.344828, 0.2]
          Solute NH4: Thickness=[100, 150, 250, 250, 250, 250, 250, 250, 250]; InitialValuesUnits=ppm; WaterTableConcentration=0; D0=0; DepthConstant=0; MaxDepthSoluteAccessible=0; RunoffEffectivenessAtMovingSolute=0; MaxEffectiveRunoff=0
            InitialValues=[1.24031, 1.18519, 0.277778, 0.128205, 0.119048, 0.116959, 0.114943, 0.172414, 0.1]
          Solute Urea: Thickness=[100, 150, 250, 250, 250, 250, 250, 250, 250]; InitialValues=[0, 0, 0, 0, 0, 0, 0, 0, 0]; InitialValuesUnits=kg/ha; WaterTableConcentration=0; D0=0; DepthConstant=0; MaxDepthSoluteAccessible=0; RunoffEffectivenessAtMovingSolute=0; MaxEffectiveRunoff=0
          Nutrient
        PastureSpecies AGPRyegrass: doyGermination=275; daysEmergenceToAnthesis=120; daysAnthesisToMaturity=85; degreesDayForAnthesis=1100; degreesDayForMaturity=900; daysAnnualsFactor=45; CanopyType=PastureSpecies; InitialShootDM=1250; InitialRootDM=450; InitialRootDepth=1000; initialDMFractionsGrasses=[0.15, 0.25, 0.25, 0.05, 0.05, 0.1, 0.1, 0.05, 0, 0, 0]; initialDMFractionsForbs=[0.2, 0.2, 0.15, 0.05, 0.1, 0.15, 0.1, 0.05, 0, 0, 0]; PhotosyntheticEfficiency=0.01; PhotosynthesisCurveFactor=0.8; FractionPAR=0.5; ReferenceCO2=380; CO2EffectScaleFactor=700; CO2EffectOffsetFactor=600; CO2EffectMinimum=0.7; CO2EffectExponent=2; ReproSeasonDurationCoeff=2; ReproSeasonShouldersLengthFactor=1; ReproSeasonOnsetDurationFactor=0.6; RelativeTurnoverEmerging=2; DetachmentDroughtCoefficient=3; DetachmentDroughtEffectMin=0.1; TurnoverStockFactor=0.01; TurnoverDefoliationEffectMin=0.025; MinimumGreenLeafProp=0.8; MinimumGreenRootProp=0.5
          initialDMFractionsLegumes=[0.16, 0.23, 0.22, 0.05, 0.03, 0.05, 0.05, 0.01, 0.04, 0.08, 0.08]
          LinearInterpolationFunction FVPDFunction
        PastureSpecies AGPWhiteClover: doyGermination=275; daysEmergenceToAnthesis=120; daysAnthesisToMaturity=85; degreesDayForAnthesis=1100; degreesDayForMaturity=900; daysAnnualsFactor=45; CanopyType=PastureSpecies; InitialShootDM=500; InitialRootDM=150; InitialRootDepth=350; initialDMFractionsGrasses=[0.15, 0.25, 0.25, 0.05, 0.05, 0.1, 0.1, 0.05, 0, 0, 0]; initialDMFractionsForbs=[0.2, 0.2, 0.15, 0.05, 0.1, 0.15, 0.1, 0.05, 0, 0, 0]; PhotosyntheticEfficiency=0.01; PhotosynthesisCurveFactor=0.8; FractionPAR=0.5; ReferenceCO2=380; CO2EffectScaleFactor=700; CO2EffectOffsetFactor=600; CO2EffectMinimum=0.7; CO2EffectExponent=2; ReproSeasonDurationCoeff=2; ReproSeasonShouldersLengthFactor=1; ReproSeasonOnsetDurationFactor=0.6; RelativeTurnoverEmerging=2; DetachmentDroughtCoefficient=3; DetachmentDroughtEffectMin=0.1; TurnoverStockFactor=0.01; TurnoverDefoliationEffectMin=0.025; MinimumGreenLeafProp=0.8; MinimumGreenRootProp=0.5
          initialDMFractionsLegumes=[0.16, 0.23, 0.22, 0.05, 0.03, 0.05, 0.05, 0.01, 0.04, 0.08, 0.08]
          LinearInterpolationFunction FVPDFunction
        Report SummReport
          VariableNames:
            [Clock].Today as Date
            [FactorLabels].Script.AGENT_NO as AgentNo
            [FactorLabels].Script.SoilStamp as SoilName
            [ApplyNOnGivenDate].Script.Dates[1] as DepositionDate
            [ExtraSums].Script.AccumRunoffFirstPeriod as RunoffFirstPeriodCum
            [ExtraSums].Script.AccumLeachedN100cm as LeachedN100cmCum
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