Simulations: Version=220
  Memo TitlePage
    ## Benchmark simulation for calculating transport factors for the New Zealand Risk Index Tool

    _Val Snow, AgResearch, New Zealand_ and _Rogerio Cichota, New Zealand Bioeconomy Science Institute_

    _23 October 2025 - added information in the memo about the observed data being a benchmark in the test suite_

    _5 September 2025 - updated to include the slope effect using the Manning correction (and the new affiliations)_

    _14 May 2025 - updated to r7740, simplified the factor structure and the reporting, and added in reporting of runoff at 30, 60 and 90 days_

    Descriptive publications:
    * Snow, V., R. Cichota, L. Lilburne, R. McDowell and S. Vickers (2024). "A method to derive nitrogen transport factors for New Zealand's agricultural lands." MethodsX 13: 102814.
    * McDowell, R. W., V. O. Snow, R. Tamepo, L. Lilburne, R. Cichota, K. Muraoka and E. Soal (2025). "A risk index tool to minimize the risk of nitrogen loss from land to water." J Environ Qual 54: 233–245.
    * Ministry for the Environment (2024). Contaminant Loss Risk Index Tool: Technical document. Wellington, New Zealand. https://environment.govt.nz/publications/contaminant-loss-risk-index-tool-technical-document/

    ### On the nature of this test

    The simulations here are a tiny fraction of the simulations that generate the database underneath the Risk Index Tool. It is expected that the database will be updated, perhaps annually, as the tool develops but also as the soils database for New Zealand is improved with additional mapping.

    The simulation is in the test suite first of all to make sure that it continues to run and secondly to gain an understanding of how much the outputs are changing over time as a result of changes and improvements in APSIM. The observed data "2025 Benchmark" are the outputs as of 5 September 2025 and reflect the database for the RIT on that date and so started with perfect statistics.

    We expect that there will be drift in the outputs as APSIM changes and want to be able to assess the extent of that drift. Given that, we do not want any changes in the soil properties or other inputs (no changes in the .apsimx file) until the simulation is re-benchmarked. This may be 2026 or 2027. Until that time we will assess the extent of the drift.

    ### Background

    Initially developed for the Whitiwhiti Ora / Land Use Opportunities programme, funded by Our Land and Water National Science Challenge, in partnership with the Risk Index Tool team from the New Zealand Ministry for the Environment.

    This simulation contains the basic setup for simulating the fate of N from a spike of N applied to a mixed-species pasture sward.
    It is intended to be used as the template for a series of simulation runs on a HPC, combined with soil data from Manaki Whenua’s S-Map and weather data from NIWA’s VCSN  to obtain N leaching and runoff values that are then post-processed to calculate transport factors.
    For each run on the HPC, the template will be modified by replacing the soil node and the link to the weather data file to cover all farming areas of New Zealand.

    The simulation uses standard APSIM models. In particular, the AGPRyegrass and AGPWhiteClover models are used to simulate a mixed sward with variable clover content.
    The pasture is managed mimicking rotational grazing, with defoliations triggered by rules based on aboveground biomass with some restrictions for the interval between defoliations.
    A simplified approach is used to return dung and for urine depositions.  Based on its digestibility, a certain fraction (around 20%) of the biomass harvested (i.e. of its carbon) is returned to the soil homogeneously as dung; a C:N ratio of 17.5 is used to define the amount of N returned as dung.
    No urine depositions are considered after each grazing to reduce its potential impact on the fate of N leaching.

    The weather data comes from the virtual climate station network (VCSN) of NIWA.
    Soil information is provided by Manaaki Whenua - Landcare based on Smap.
    General rules are also used to control irrigation applications, when this management is enabled.  N fertiliser is not considered.
    A single application of nitrate-N is set to occur five months after the simulation begins and only outputs after this application date for the next two years are considered.

    NOTE: Most of the year-month combinations are disabled for speed of running within the test system and for the purposes of testing, additional factors for soil and weather are included in this test version

    For usage in generating the data base the factor values should be set to:
    * Month - [#DateChanger].Script.Month = 1 to 12 step 1
    * Year - [#DateChanger].Script.Year = 1973 to 2022 step 1 (updating the final year as needed)
    * delete the Weather and Soil factors
  DataStore
    ExcelInput: FileNames=[RITTemplate2025_7740Obs.xlsx]; SheetNames=[Benchmarked2025]
    PredictedObserved: PredictedTableName=Report; ObservedTableName=Benchmarked2025; FieldNameUsedForMatch=SimulationName; AllColumns=false
      Tests: POName=PredictedObserved
        AcceptedStats:
          Name                   n    Slope     Intercept   SEslope      SEintercept  R2        RMSE         NSE       ME            MAE          RSR         RMR
          Denitrification1000mm  216  0.986333  0.00619284  0.00126392   0.0915461    0.999649  1.50519      0.999401  -0.517234     0.654641     0.0244269   0.0393028
          Drainage1000mm         216  1.00201   -0.796459   0.000631059  1.48065      0.999915  15.1261      0.999908  2.70498       7.44364      0.00958117  0.00869799
          ETCum                  216  1.00075   -2.20133    0.00186534   2.59742      0.999257  7.11791      0.999234  -1.17152      4.0281       0.0276113   0.00520123
          HarvestedDM            216  0.974574  194.94      0.00932761   103.468      0.980774  470.735      0.980247  -73.9417      297.219      0.140219    0.0445144
          HarvestedN             216  0.967546  9.14844     0.00849739   3.30928      0.983762  15.8263      0.982936  -2.86357      10.5075      0.130326    0.0427595
          IncMinN                216  0.960846  -0.0810525  0.00616288   0.0541609    0.991273  0.832395     0.989724  -0.203669     0.350605     0.101137    0.265801
          Irrigation             216  0.998886  0.869824    0.00235034   0.922405     0.998817  10.8041      0.998813  0.606842      4.6232       0.0343752   0.0457802
          Leaching1000mm         216  0.995032  -1.44469    0.0012245    0.242112     0.999676  3.44296      0.999449  -2.10375      2.28784      0.0234284   0.0259539
          M                      216  1         0           0            0            1         0            1         0             0            0           0
          N2O300mm               216  0.985389  -0.0156739  0.00244463   0.021676     0.998685  0.297423     0.998364  -0.0880523    0.113808     0.0403506   0.060039
          Rainfall               216  1         0           -            -            1         2.43919e-12  1         -8.46335e-13  1.97057e-12  1.141e-15   7.38065e-16
          Runoff30               216  1.03301   0.0610817   0.00996175   0.181905     0.980487  2.57738      0.977431  0.267481      0.360956     0.149882    0.412166
          Runoff60               216  1.00679   0.154081    0.00646346   0.19384      0.991257  2.59791      0.990937  0.238505      0.417289     0.094977    0.208881
          Runoff90               216  1.00348   0.100734    0.00408088   0.214366     0.996473  2.7765       0.996408  0.186857      0.57322      0.0597963   0.112114
          RunoffCum              216  0.994203  1.11615     0.00120792   0.980173     0.999684  12.6069      0.999649  -1.5116       5.31868      0.0186885   0.0278097
          SpikeNApplied          216  -         -           -            -            -         0            -         0             0            -           0
          Y                      216  1         0           0            0            1         0            1         0             0            0           0
        AcceptedStatsName=Name n Slope Intercept SEslope SEintercept R2 RMSE NSE ME MAE RSR RMR
        Memo Note
          Where:
           - n: The number of PO (predicted-observed) pairs for the given variable;
           - Slope: The slope of the straight line linear regression. A perfect fit would have a value of 1;
           - Intercept: The intercept of the straight line linear regression. A perfect fit would have a value of 0;
           - SEslope: Standard error in the slope;
           - SEintercept: Standard error in the intercept.;
           - R2: The value for the coefficient of determination. It varies between 0 and 1, where 1 is a perfect fit;
           - RMSE: Root Mean Squared Error. 0 is a perfect fit. Values less than half the standard deviation of the observed data are acceptable;
           - NSE: Nash-Sutcliffe Efficiency. Indicates how well the PO data fits the 1:1 line. Ranges from -infinity to 1 with 1 being the optimal value while values  between 0 and 1 are generally viewed as acceptable. Values < 0 indicate unacceptable model performance;
           - ME: Mean Error between predicted and observed values. 0 is a perfect fit;
           - MAE: Mean Absolute Error. 0 is a perfect fit. Values less than half the standard deviation of the observed data are acceptable;
           - RSR: Ratio between the RMSE and the standard deviation of observations. 0 is a perfect fit;
           - RMR: Ratio between the RMSE and the mean of observations. 0 indicates a perfect fit;
  Experiment Exp
    Factors
      Permutation
        Factor M: Specification=[DateChanger].Script.Month = 1, 7
        Factor Y: Specification=[DateChanger].Script.Year = 1973 to 2022 step 20
        Factor Irr
          CompositeFactor Rain: Specifications=[AutomaticIrrigation].Script.AllowIrrigation = No
          CompositeFactor Irr: Specifications=[AutomaticIrrigation].Script.AllowIrrigation = Yes
        Factor Soil
          CompositeFactor Light: Specifications=[Soil]
            Soil: ASCOrder=R; SoilType=Weathered Orthic Recent Soils; LocalName=Tata_6a1; Country=New Zealand; Latitude=-41; Longitude=174
              DataSource=Profile descriptions provided by Smap based on the work done by Trevor Webb.
              Physical
                Thickness  ParticleSizeSand  ParticleSizeSilt  ParticleSizeClay  Rocks  BD     AirDry  LL15   DUL    SAT    KS
                75         45                42.5              12.5              52.5   0.58   0.026   0.051  0.149  0.239  2400
                75         45                42.5              12.5              52.5   0.58   0.026   0.051  0.149  0.239  2400
                150        80                17                3                 50     0.637  0.01    0.019  0.087  0.242  9600
                242        80                17                3                 80     0.326  0.013   0.013  0.042  0.072  14400
                242        80                17                3                 80     0.326  0.013   0.013  0.042  0.072  14400
                242        80                17                3                 80     0.326  0.013   0.013  0.042  0.072  14400
                242        80                17                3                 80     0.326  0.013   0.013  0.042  0.072  14400
                242        80                17                3                 80     0.326  0.013   0.013  0.042  0.072  14400
                242        80                17                3                 80     0.326  0.013   0.013  0.042  0.072  14400
                248        80                17                3                 80     0.326  0.013   0.013  0.042  0.072  14400
                SoilCrop AgPRyegrassSoil
                  LL=[0.051, 0.051, 0.019, 0.013, 0.013, 0.013, 0.013, 0.013, 0.013, 0.013]
                  KL=[0.111363, 0.111363, 0.0713038, 0.0264116, 0.0264116, 0.0264116, 0.0264116, 0.0264116, 0.0264116, 0.0264116]
                  XF=[1, 1, 0.64, 0.09, 0.09, 0.09, 0.09, 0.09, 0.09, 0.09]
                SoilCrop AgPWhiteCloverSoil
                  LL=[0.051, 0.051, 0.019, 0.013, 0.013, 0.013, 0.013, 0.013, 0.013, 0.013]
                  KL=[0.156907, 0.156907, 0.0506071, 0.0133043, 0.0133043, 0.0133043, 0.0133043, 0.0133043, 0.0133043, 0.0133043]
                  XF=[1, 1, 0.562, 0.016, 0.016, 0.016, 0.016, 0.016, 0.016, 0.016]
              Organic: FOMCNRatio=40; CarbonUnits=Total
                Thickness  Carbon    SoilCNRatio  FBiom      FInert    FOM
                50         3         10.4         0.0788566  0.254814  227.364
                50         3         10.4         0.0610103  0.314843  220.546
                50         3         10.4         0.0477893  0.365656  177.533
                50         2.49245   10.4         0.037995   0.430797  138.263
                50         1.73667   10.4         0.0307392  0.510097  107.679
                50         1.23006   10.4         0.025364   0.582298  83.8606
                50         0.890471  10.4         0.0213819  0.648343  65.3107
                50         0.662837  10.4         0.0184319  0.70861   50.864
                50         0.510249  10.4         0.0162465  0.762893  39.6129
                50         0.407966  10.4         0.0146275  0.810591  30.8506
                250        0.262638  10.4         0.0118814  0.910194  77.4992
                250        0.208477  10.4         0.0104198  0.975936  22.2039
                500        0.200422  10.4         0.0100442  0.990828  8.18413
                500        0.200008  10.4         0.0100022  0.996255  0
              Chemical: PHUnits=Water
                Thickness  PH  CEC
                150        7   16.76
                150        7   7.94672
                1700       7   2.3934
              Water: Thickness=[150, 150, 1700]; InitialValues=[0.149, 0.087, 0.042]; FilledFromTop=false
              WaterBalance SoilWater: SummerDate=1-oct; SummerU=9; SummerCona=4.4; WinterDate=1-apr; WinterU=4; WinterCona=2; DiffusConst=88; DiffusSlope=35; Salb=0.13; CN2Bare=77; CNRed=37; CNCov=0.8; PSIDul=-100
                Thickness  SWCON  KLAT
                150        0.5    0
                150        0.5    0
                1700       0.5    0
              SoilTemperature Temperature: InteractionsPerDay=8
              Solute NO3: Thickness=[150, 150, 1700]; InitialValues=[9.5, 9.5, 1]; InitialValuesUnits=kg/ha; WaterTableConcentration=0; D0=0; DepthConstant=0; MaxDepthSoluteAccessible=0; RunoffEffectivenessAtMovingSolute=0; MaxEffectiveRunoff=0
              Solute NH4: Thickness=[150, 150, 1700]; InitialValues=[1.425, 1.425, 0.15]; InitialValuesUnits=kg/ha; WaterTableConcentration=0; D0=0; DepthConstant=0; MaxDepthSoluteAccessible=0; RunoffEffectivenessAtMovingSolute=0; MaxEffectiveRunoff=0
              Solute Urea: Thickness=[150, 150, 1700]; InitialValues=[0, 0, 0]; InitialValuesUnits=ppm; WaterTableConcentration=0; D0=0; DepthConstant=0; MaxDepthSoluteAccessible=0; RunoffEffectivenessAtMovingSolute=0; MaxEffectiveRunoff=0
              Nutrient
          CompositeFactor Medium: Specifications=[Soil]
            Soil: ASCOrder=W; SoilType=Sandy Raw Soils; LocalName=Kairaki_8a1; Country=New Zealand; Latitude=-41; Longitude=174
              DataSource=Profile descriptions provided by Smap based on the work done by Trevor Webb.
              Physical
                Thickness  ParticleSizeSand  ParticleSizeSilt  ParticleSizeClay  Rocks  BD     AirDry  LL15   DUL    SAT    KS
                125        85                13.5              1.5               0      1.295  0.032   0.035  0.162  0.476  14400
                125        85                13.5              1.5               0      1.295  0.032   0.035  0.162  0.476  14400
                125        85                13.5              1.5               0      1.295  0.032   0.035  0.162  0.476  14400
                125        85                13.5              1.5               0      1.295  0.032   0.035  0.162  0.476  14400
                125        85                13.5              1.5               0      1.295  0.032   0.035  0.162  0.476  14400
                125        85                13.5              1.5               0      1.295  0.032   0.035  0.162  0.476  14400
                125        85                13.5              1.5               0      1.295  0.032   0.035  0.162  0.476  14400
                125        85                13.5              1.5               0      1.295  0.032   0.035  0.162  0.476  14400
                125        85                13.5              1.5               0      1.295  0.032   0.035  0.162  0.476  14400
                125        85                13.5              1.5               0      1.295  0.032   0.035  0.162  0.476  14400
                125        85                13.5              1.5               0      1.295  0.032   0.035  0.162  0.476  14400
                125        85                13.5              1.5               0      1.295  0.032   0.035  0.162  0.476  14400
                125        85                13.5              1.5               0      1.295  0.032   0.035  0.162  0.476  14400
                125        85                13.5              1.5               0      1.295  0.032   0.035  0.162  0.476  14400
                125        85                13.5              1.5               0      1.295  0.032   0.035  0.162  0.476  14400
                125        85                13.5              1.5               0      1.295  0.032   0.035  0.162  0.476  14400
                SoilCrop AgPRyegrassSoil
                  LL=[0.035, 0.035, 0.035, 0.035, 0.035, 0.035, 0.035, 0.035, 0.035, 0.035, 0.035, 0.035, 0.035, 0.035, 0.035, 0.035]
                  KL=[0.0876895, 0.0876895, 0.0876895, 0.0876895, 0.0876895, 0.0876895, 0.0876895, 0.0876895, 0.0876895, 0.0876895, 0.0876895, 0.0876895, 0.0876895, 0.0876895, 0.0876895, 0.0876895]
                  XF=[0.81, 0.81, 0.81, 0.81, 0.81, 0.81, 0.81, 0.81, 0.81, 0.81, 0.81, 0.81, 0.81, 0.81, 0.81, 0.81]
                SoilCrop AgPWhiteCloverSoil
                  LL=[0.035, 0.035, 0.035, 0.035, 0.035, 0.035, 0.035, 0.035, 0.035, 0.035, 0.035, 0.035, 0.035, 0.035, 0.035, 0.035]
                  KL=[0.17408, 0.17408, 0.17408, 0.17408, 0.17408, 0.17408, 0.17408, 0.17408, 0.17408, 0.17408, 0.17408, 0.17408, 0.17408, 0.17408, 0.17408, 0.17408]
                  XF=[0.766, 0.766, 0.766, 0.766, 0.766, 0.766, 0.766, 0.766, 0.766, 0.766, 0.766, 0.766, 0.766, 0.766, 0.766, 0.766]
              Organic: FOMCNRatio=40; CarbonUnits=Total
                Thickness  Carbon    SoilCNRatio  FBiom      FInert    FOM
                50         0.5       11           0.0788566  0.158981  227.364
                50         0.5       11           0.0610103  0.21901   220.546
                50         0.5       11           0.0477893  0.269823  177.533
                50         0.445619  11           0.037995   0.312835  138.263
                50         0.364643  11           0.0307392  0.349244  107.679
                50         0.310364  11           0.025364   0.380064  83.8606
                50         0.273979  11           0.0213819  0.406152  65.3107
                50         0.24959   11           0.0184319  0.428235  50.864
                50         0.233241  11           0.0162465  0.603706  39.6129
                50         0.222282  11           0.0146275  0.72525   30.8506
                250        0.206711  11           0.0118814  0.900214  77.4992
                250        0.200908  11           0.0104198  0.975029  22.2039
                500        0.200045  11           0.0100442  0.990823  8.18413
                500        0.200001  11           0.0100022  0.996255  0
              Chemical: Thickness=[2000]; PH=[7]; PHUnits=Water; CEC=[1.76628]
              Water: Thickness=[2000]; InitialValues=[0.162]; FilledFromTop=false
              WaterBalance SoilWater: SummerDate=1-oct; SummerU=9; SummerCona=4.4; WinterDate=1-apr; WinterU=4; WinterCona=2; DiffusConst=88; DiffusSlope=35; Salb=0.13; CN2Bare=77; CNRed=37; CNCov=0.8; PSIDul=-100; Thickness=[2000]; SWCON=[0.5]; KLAT=[0]
              SoilTemperature Temperature: InteractionsPerDay=8
              Solute NO3: Thickness=[2000]; InitialValues=[20]; InitialValuesUnits=kg/ha; WaterTableConcentration=0; D0=0; DepthConstant=0; MaxDepthSoluteAccessible=0; RunoffEffectivenessAtMovingSolute=0; MaxEffectiveRunoff=0
              Solute NH4: Thickness=[2000]; InitialValues=[3]; InitialValuesUnits=kg/ha; WaterTableConcentration=0; D0=0; DepthConstant=0; MaxDepthSoluteAccessible=0; RunoffEffectivenessAtMovingSolute=0; MaxEffectiveRunoff=0
              Solute Urea: Thickness=[2000]; InitialValues=[0]; InitialValuesUnits=ppm; WaterTableConcentration=0; D0=0; DepthConstant=0; MaxDepthSoluteAccessible=0; RunoffEffectivenessAtMovingSolute=0; MaxEffectiveRunoff=0
              Nutrient
          CompositeFactor Heavy: Specifications=[Soil]
            Soil: ASCOrder=B; SoilType=Pedal Allophanic Brown Soils; LocalName=Princhester_5a1; Country=New Zealand; Latitude=-41; Longitude=174
              DataSource=Profile descriptions provided by Smap based on the work done by Trevor Webb.
              Physical
                Thickness  ParticleSizeSand  ParticleSizeSilt  ParticleSizeClay  Rocks  BD     AirDry  LL15   DUL    SAT    KS
                112        22.5              40                37.5              0      0.964  0.13    0.26   0.492  0.592  1920
                113        22.5              40                37.5              0      0.964  0.13    0.26   0.492  0.592  1920
                125        32.5              32.5              35                0      0.988  0.184   0.263  0.49   0.584  1920
                150        47.5              30                22.5              0      1.269  0.208   0.208  0.399  0.485  240
                150        67.5              22.5              10                0      1.478  0.176   0.176  0.343  0.412  24
                225        42.5              45                12.5              0      1.544  0.164   0.164  0.353  0.388  240
                225        42.5              45                12.5              0      1.544  0.164   0.164  0.353  0.388  240
                225        42.5              45                12.5              0      1.544  0.164   0.164  0.353  0.388  240
                225        42.5              45                12.5              0      1.544  0.164   0.164  0.353  0.388  240
                225        42.5              45                12.5              0      1.544  0.164   0.164  0.353  0.388  240
                225        42.5              45                12.5              0      1.544  0.164   0.164  0.353  0.388  240
                SoilCrop AgPRyegrassSoil
                  LL=[0.26, 0.26, 0.263, 0.208, 0.176, 0.164, 0.164, 0.164, 0.164, 0.164, 0.164]
                  KL=[0.0958513, 0.0958513, 0.0475984, 0.0228849, 0.0075357, 0.00372172, 0.00372172, 0.00372172, 0.00372172, 0.00372172, 0.00372172]
                  XF=[1, 1, 1, 0.49, 0.01, 0.25, 0.25, 0.25, 0.25, 0.25, 0.25]
                SoilCrop AgPWhiteCloverSoil
                  LL=[0.26, 0.26, 0.263, 0.208, 0.176, 0.164, 0.164, 0.164, 0.164, 0.164, 0.164]
                  KL=[0.113775, 0.113775, 0.0253867, 0.00650996, 0.00102686, 0, 0, 0, 0, 0, 0]
                  XF=[1, 1, 1, 0.391, 0, 0, 0, 0, 0, 0, 0]
              Organic: FOMCNRatio=40; CarbonUnits=Total
                Thickness  Carbon    SoilCNRatio  FBiom      FInert    FOM
                50         9         11.1         0.0788566  0.527778  227.364
                50         9         11.1         0.0610103  0.550954  220.546
                50         9         11.1         0.0477893  0.601767  177.533
                50         7.40483   11.1         0.037995   0.651072  138.263
                50         5.02954   11.1         0.0307392  0.699403  107.679
                50         3.43734   11.1         0.025364   0.7414    83.8606
                50         2.37005   11.1         0.0213819  0.778075  65.3107
                50         1.65463   11.1         0.0184319  0.810284  50.864
                50         1.17507   11.1         0.0162465  0.838726  39.6129
                50         0.853607  11.1         0.0146275  0.863926  30.8506
                250        0.396863  11.1         0.0118814  0.92267   77.4992
                250        0.226642  11.1         0.0104198  0.977865  22.2039
                500        0.201326  11.1         0.0100442  0.990839  8.18413
                500        0.200024  11.1         0.0100022  0.996255  0
              Chemical: PHUnits=Water
                Thickness  PH  CEC
                225        7   23.2675
                125        7   15.3428
                150        7   9.58938
                150        7   4.9654
                1350       7   6.80334
              Water: Thickness=[225, 125, 150, 150, 1350]; InitialValues=[0.492, 0.49, 0.399, 0.343, 0.353]; FilledFromTop=false
              WaterBalance SoilWater: SummerDate=1-oct; SummerU=9; SummerCona=4.4; WinterDate=1-apr; WinterU=4; WinterCona=2; DiffusConst=88; DiffusSlope=35; Salb=0.13; CN2Bare=90; CNRed=21; CNCov=0.8; PSIDul=-100
                Thickness  SWCON  KLAT
                225        0.35   0
                125        0.35   0
                150        0.2    0
                150        0.15   0
                1350       0.25   0
              SoilTemperature Temperature: InteractionsPerDay=8
              Solute NO3: Thickness=[225, 125, 150, 150, 1350]; InitialValues=[14.25, 4.77941, 0.0882353, 0.0882353, 0.794118]; InitialValuesUnits=kg/ha; WaterTableConcentration=0; D0=0; DepthConstant=0; MaxDepthSoluteAccessible=0; RunoffEffectivenessAtMovingSolute=0; MaxEffectiveRunoff=0
              Solute NH4: Thickness=[225, 125, 150, 150, 1350]; InitialValues=[2.1375, 0.716912, 0.0132353, 0.0132353, 0.119118]; InitialValuesUnits=kg/ha; WaterTableConcentration=0; D0=0; DepthConstant=0; MaxDepthSoluteAccessible=0; RunoffEffectivenessAtMovingSolute=0; MaxEffectiveRunoff=0
              Solute Urea: Thickness=[225, 125, 150, 150, 1350]; InitialValues=[0, 0, 0, 0, 0]; InitialValuesUnits=ppm; WaterTableConcentration=0; D0=0; DepthConstant=0; MaxDepthSoluteAccessible=0; RunoffEffectivenessAtMovingSolute=0; MaxEffectiveRunoff=0
              Nutrient
        Factor W
          CompositeFactor R0500: Specifications=[Weather]
            Weather: FileName=13695.met
          CompositeFactor R1000 (disabled): Specifications=[Weather]
            Weather: FileName=18822.met
          CompositeFactor R1500: Specifications=[Weather]
            Weather: FileName=29804.met
          CompositeFactor R3000: Specifications=[Weather]
            Weather: FileName=20601.met
        Factor Slope: Specification=[AdjustCurveNumber].Script.SlopeCategory = Flat, SteepHill
    Simulation Base
      Manager DateChanger
        Year = 1900
        Month = 1
        Day = 15
```csharp
using System;
using System.Xml.Serialization;
using APSIM.Shared.Utilities;
using Models.Interfaces;
using Models.Core;
using Models.PMF;
using Models.Soils;
using Models.WaterModel;

namespace Models
{
	[Serializable]
	public class DateChangerScript : Model
	{
		//> Links to other Apsim models
		[Link] private Clock clock;
        [Link] private ISummary summary;
	
		[Separator("Change the start and end date from the factor levels")]


		[Description("Year of interest")]
		public int Year {get; set;}

		[Description("Month of interest")]
		public int Month {get; set;}

		[Description("Day of interest")]
		public int Day {get; set;}

		[XmlIgnore] public string DateAsString {get; set;}
		[XmlIgnore] public DateTime ApplicationDate {get; set;}
		[XmlIgnore] public DateTime ApplicationDateMinus1 {get; set;}
		[XmlIgnore] public DateTime ApplicationDatePlus30 {get; set;}
		[XmlIgnore] public DateTime ApplicationDatePlus60 {get; set;}
		[XmlIgnore] public DateTime ApplicationDatePlus90 {get; set;}
		
		[EventSubscribe("Commencing")]
		private void OnComencing(object sender, EventArgs e)
		{

            DateAsString = Day + "-" + Month + "-" + Year;
            ApplicationDate = new DateTime(Year, Month, Day);
            
            clock.StartDate = ApplicationDate.AddMonths(-5);
            clock.EndDate = ApplicationDate.AddYears(2).AddDays(-1);
            
            ApplicationDateMinus1 = ApplicationDate.AddDays(-1);
            ApplicationDatePlus30 = ApplicationDate.AddDays(30);
            ApplicationDatePlus60 = ApplicationDate.AddDays(60);
            ApplicationDatePlus90 = ApplicationDate.AddDays(90);

            
		}
		
		[EventSubscribe("StartOfSimulation")]
		private void OnStartOfSimulation(object sender, EventArgs e)
		{
            summary.WriteMessage(this, "In DateChanger, the application date will be " + ApplicationDate, MessageType.Information);
            
		}
		
		[EventSubscribe("StartOfDay")]
		private void OnStartOfDay(object sender, EventArgs e)
		{
		}
		
		[EventSubscribe("DoManagement")]
		private void OnDoManagement(object sender, EventArgs e)
		{
		}
		
	}
}
```
      Clock: Start=1980-01-01; End=1982-04-16
      Weather: FileName=19730.met
      MicroClimate: a_interception=0; b_interception=1; c_interception=0; d_interception=0; SoilHeatFluxFraction=0.4; MinimumHeightDiffForNewLayer=0; NightInterceptionFraction=0.5; ReferenceHeight=2
      Forages
        Parameters:
          Name                          LiveDigestibility  DeadDigestibility  LiveFractionConsumable  DeadFractionConsumable  LiveMinimumBiomass  DeadMinimumBiomass
          SurfaceOrganicMatter.Residue  0.7                0.3                0                       0                       100                 0
          AGPRyegrass.Leaf              FromModel          FromModel          1                       1                       10                  0
          AGPRyegrass.Stem              FromModel          FromModel          1                       1                       10                  0
          AGPRyegrass.Stolon            FromModel          FromModel          1                       1                       10                  0
          AGPWhiteClover.Leaf           FromModel          FromModel          1                       1                       10                  0
          AGPWhiteClover.Stem           FromModel          FromModel          1                       1                       10                  0
          AGPWhiteClover.Stolon         FromModel          FromModel          1                       1                       10                  0
      SoilArbitrator
      Summary SummaryFile
      Zone Block: Area=1; Slope=0; AspectAngle=0; Altitude=0
        Manager AdjustCurveNumber
          SlopeCategory = Flat
          CorrectionType = Manning
```csharp
using System;
using System.Xml.Serialization;
using APSIM.Shared.Utilities;
using Models.Interfaces;
using Models.Core;
using Models.PMF;
using Models.Soils;
using Models.WaterModel;

namespace Models
{
	[Serializable]
	public class Script : Model
	{
		//> Links to other Apsim models
		[Link] private Clock clock;
		[Link] private WaterBalance waterBalance;
		[Link] private ISummary summary;
		
		[Separator("Changes the Curve Number, CN2, with slope following the method of Williams et al. (2012)")]


        // Evolution of the SCS Runoff Curve Number Method and Its Application to Continuous Runoff Simulation
        // J. R. Williams, N. Kannan, X. Wang, C. Santhi and J. G. 
        // ArnoldJournal of Hydrologic Engineering 2012 Vol. 17 Issue 11 Pages 1221-1229DOI: 10.1061/(asce)he.1943-5584.0000529
        


		[Description("Slope category")]
		public Slopes SlopeCategory {get; set;}

		[Description("Correction type")]
		public CorrectionTypes CorrectionType {get; set;}

		[XmlIgnore] public double Slope {get; set;}   // percent
		[XmlIgnore] public double CNMultiplier {get; set;}
		[XmlIgnore] public double CNOriginal {get; set;}
		[XmlIgnore] public double CNNew {get; set;}
		
		[EventSubscribe("StartOfSimulation")]
		private void OnStartOfSimulation(object sender, EventArgs e)
		{
			//Williams and Izaurralde
			if (SlopeCategory.ToString() == "Flat")
				Slope = 3.0;
			else if (SlopeCategory.ToString() == "Rolling")
				Slope = 11.0;
			else if (SlopeCategory.ToString() == "EasyHill")
				Slope = 20.0;
			else if (SlopeCategory.ToString() == "SteepHill")
			    if (CorrectionType.ToString() == "Manning")
				    Slope = 35.0;
				else
				    Slope = 25.0;    // this is because of the parabolic nature of Williams that maxes out at 25 degrees
			else
				throw new Exception("Invalid slope category");

			double SlopePercentGradient = Math.Tan(Slope * Math.PI / 180.0) * 100.0;   // in percent gradient
			double SlopePercentGradientFlat = Math.Tan(3.0 * Math.PI / 180.0) * 100.0;   // in percent gradient
			
			CNOriginal = waterBalance.CN2Bare;
			double retentionOriginal = 254.0 * (100.0 / CNOriginal - 1.0);
  			double retentionNew = 0.0;

            if (CorrectionType.ToString() == "Williams")
            {
  			    retentionNew = retentionOriginal * (1.1 - SlopePercentGradient / (SlopePercentGradient + Math.Exp(3.7 + 0.02117 * SlopePercentGradient)));
    			CNNew = 100.0 / (retentionNew / 254.0 + 1.0);
            }
            else if (CorrectionType.ToString() == "Manning")
            {
                retentionNew = retentionOriginal * Math.Pow(SlopePercentGradientFlat, 0.5) / Math.Pow(SlopePercentGradient, 0.5);
    			CNNew = 100.0 / (retentionNew / 254.0 + 1.0);
            }
            else
                throw new Exception(CorrectionType + " is not a valid slope correction type");

            CNMultiplier = CNNew / CNOriginal;
			waterBalance.CN2Bare = CNNew;
		}
		
		[EventSubscribe("StartOfDay")]
		private void OnStartOfDay(object sender, EventArgs e)
		{
		}
		
		[EventSubscribe("DoManagement")]
		private void OnDoManagement(object sender, EventArgs e)
		{
		}
		
		/// <summary>Slope categories</summary>
		public enum Slopes
		{
			/// <summary>Flat, < 7 degrees, taken as 3 degrees</summary>
			Flat,
			
			/// <summary>Rolling, 7-15 degrees, taken as 11 degrees</summary>
			Rolling,
			
			/// <summary>EasyHill, 16-25 degrees, taken as 20 degrees</summary>
			EasyHill,
			
			/// <summary>SteepHill, > 26 degrees, taken as 35 degrees</summary>
			SteepHill
		}

		/// <summary>Correction types</summary>
		public enum CorrectionTypes
		{
			/// <summary>Williams</summary>
			Williams,
			
			/// <summary>Manning</summary>
			Manning
		}
	}
}
```
        SimpleGrazing: GrazingRotationType=1; SimpleMinGrazable=0; SimpleGrazingResidual=0; FlexibleGrazePostDM=0; MaximumRotationLengthArray=[60, 60, 60, 60, 60, 60, 60, 60, 60, 60, 60, 60]; MinimumRotationLengthArray=[15, 15, 15, 15, 15, 15, 15, 15, 15, 15, 15, 15]; IsCutAndCarry=false; FractionClippingsReturned=0; FractionIntakeNToAnimal=[0.6]; DungNConc=2.6; FractionOfDungUrineOffPaddock=[0.6]; DepthUrineIsAdded=250; ShowAdvancedExcretaOptions=false; SendDungElsewhere=0; SendUrineElsewhere=1; UsePatching=false; PseudoPatches=true; ZoneCount=25; UrineReturnPattern=2; PseudoRandomSeed=666; MaxEffectiveNConcentration=3.5; FractionPopulationDecline=0; TramplingOn=false; MaximumPropLitterMovedToSoil=0.1; PastureConsumedAtMaximumRateOfLitterRemoval=1200
          PreGrazeDMArray=[2500, 2500, 2500, 2500, 2500, 2500, 2500, 2500, 2500, 2500, 2500, 2500]
          PostGrazeDMArray=[1250, 1250, 1250, 1250, 1250, 1250, 1250, 1250, 1250, 1250, 1250, 1250]
        Manager AutomaticIrrigation
          AllowIrrigation = Yes
          SeasonStartDate = 1-Sep
          SeasonEndDate = 30-Apr
          IrrigationTriggerType = TriggerBySoilDeficit
          IntervalBetweenIrrigations = 0
          TriggerDeficit = 60
          IrrigationAmountType = BasedOnSoilDeficit
          GivenAmount = 0
          TargetDeficit = 90
          MaximumAmount = 50
          CheckCropActive = Yes
          SkipRainDays = Yes
          ReturnDays = 3
          DepthForPAWC = 500
```csharp
// Determines when and how much irrigation is to be applied based on given instructions and/or soil condition.
// Developed by RCichota, last updated in 10/Dec/2021

using System;
using System.Xml.Serialization;
using APSIM.Shared.Utilities;
using Models.Interfaces;
using Models.Core;
using Models.PMF;
using Models.Soils;

namespace Models
{
    [Serializable]
    [System.Xml.Serialization.XmlInclude(typeof(Model))]
    public class Script : Model
    {
        //> Links to other Apsim models
        [Link] private Clock clock;
        [Link] private IWeather weather;
        [Link] private Irrigation irrigator;
        [Link] private IPhysical soilPhysical;
        [Link] private ISoilWater soilWater;
        [Link(IsOptional = true)] private IPlant existingCrop;
        [Link] private ISummary summary;

        //> User inputs from properties tab
        [Separator("Generic irrigation management")]
        [Description(" Turn automatic irrigation on?")]
        public yesNoAnswer AllowIrrigation { get; set; }
        [Description(" Start of irrigation season (dd-MMM)")]
        public string SeasonStartDate { get; set; }
        [Description(" End of irrigation season (dd-MMM)")]
        public string SeasonEndDate { get; set; }

        [Separator("Parameters defining how the irrigation is triggered")]
        [Description(" How irrigation should be triggered? ")]
        public IrrigationTriggerTypes IrrigationTriggerType { get; set; }
        [Description("  Number of days between irrigations, if using fixed interval")]
        public int IntervalBetweenIrrigations { get; set; }
        [Description("  Deficit to trigger irrigation, if using soil deficit (% PAWC)")]
        public double TriggerDeficit { get; set; }

        [Separator("Parameters defining how much irrigation is applied")]
        [Description(" How irrigation amount is determined? ")]
        public IrrigationAmountTypes IrrigationAmountType { get; set; }
        [Description("  Amount of irrigation to apply, if setting amount (mm)")]
        public double GivenAmount { get; set; }
        [Description("  Deficit to stop irrigation, if based on soil deficit (% PAWC)")]
        public double TargetDeficit { get; set; }
        [Description("  Maximum irrigation application (mm/day)")]
        public double MaximumAmount { get; set; }

        [Separator("Parameters defining extra constraint to irrigation")]
        [Description(" Only apply irrigation if there's a crop?")]
        public yesNoAnswer CheckCropActive { get; set; }
        [Description(" Skip rainy days (rain > 5mm)?")]
        public yesNoAnswer SkipRainDays { get; set; }
        [Description(" Minimum number of days between irrigations (ignored if irrigating using fixed interval")]
        public double ReturnDays { get; set; }

        [Separator("Parameters for computing soil water deficit")]
        [Description("Depth to calculate PAWC (mm)")]
        public double DepthForPAWC { get; set; }

        //> Outputs from this manager
        [XmlIgnore] public double IrrigLayerSWDeficit { get; set; }
        [XmlIgnore] public double TopSWC { get; set; }
        [XmlIgnore] public double TopDUL { get; set; }
        [XmlIgnore] public double TopLL { get; set; }
        [XmlIgnore] public double DaysSinceIrrigation { get; set; }
        [XmlIgnore] public double AmountToApply { get; set; }
        [XmlIgnore] public double SeasonAppliedAmount { get; set; }

        //> Internal variables
        private int bottomLayer;
        private double fracBottomLayer;
        private bool irrigationIsAllowed;
        private bool checkingCropActive;
        private bool skippingRainDays;
        private bool seasonIsOpen;
        private bool cropIsActive;
        private bool rainIsNotSignificant;
        private bool irrigatorIsAvailable;
        private bool soilMoistureIsLow;


        [EventSubscribe("StartOfSimulation")]
        private void OnStartOfSimulation(object sender, EventArgs e)
        {
            //Can we irrigate at all?
            irrigationIsAllowed = false;
            if (AllowIrrigation == yesNoAnswer.Yes)
            {
                irrigationIsAllowed = true;

                //Do we need to check crop?
                checkingCropActive = false;
                if (CheckCropActive == yesNoAnswer.Yes)
                {
                    checkingCropActive = true;
                    if(existingCrop == null)
                    {
                        throw new Exception(" Manager requires checking active crop, but no crop is present");
                    }
                }

                //Do we need to check rainfall?
                skippingRainDays = false;
                if (SkipRainDays == yesNoAnswer.Yes)
                {
                    skippingRainDays = true;
                }
            }

            //Calculate soil water variables
            double depthFromSurface = 0.0;
            for (int layer = 0; layer < soilPhysical.Thickness.Length; layer++)
            {
                fracBottomLayer = Math.Min(1.0, (DepthForPAWC - depthFromSurface) / soilPhysical.Thickness[layer]);
                TopLL += soilPhysical.LL15mm[layer] * fracBottomLayer;
                TopDUL += soilPhysical.DULmm[layer] * fracBottomLayer;
                depthFromSurface += soilPhysical.Thickness[layer];
                if (depthFromSurface >= DepthForPAWC)
                {
                    bottomLayer = layer;
                    layer = soilPhysical.Thickness.Length;
                }
            }

            // write message in summary
            summary.WriteMessage(this," Automatic irrigation manager initialised", MessageType.Diagnostic);
            if (irrigationIsAllowed)
            {
                summary.WriteMessage(this,"  Irrigation is enabled between " + SeasonStartDate + " and " + SeasonEndDate, MessageType.Diagnostic);
                if (IrrigationTriggerType == IrrigationTriggerTypes.FixedInterval)
                {
                    summary.WriteMessage(this,"  Irrigation will be triggered every " + IntervalBetweenIrrigations + " days", MessageType.Diagnostic);
                }
                else
                {
                    summary.WriteMessage(this,"  Irrigation will be triggered every time soil moisture is below " + TriggerDeficit.ToString("#0.0") + "% of PAWC", MessageType.Diagnostic);
                }

                if (IrrigationAmountType == IrrigationAmountTypes.GivenAmount)
                {
                    summary.WriteMessage(this,"  Amount to be applied is fixed at " + Math.Min(MaximumAmount, GivenAmount).ToString("#0.0") + "mm each application", MessageType.Diagnostic);
                }
                else
                {
                    summary.WriteMessage(this,"  Amount to be applied will aim to bring soil moisture up to " + TargetDeficit.ToString("#0.0") + "% of PAWC", MessageType.Diagnostic);
                    summary.WriteMessage(this,"   limited to " + MaximumAmount.ToString("#0.0") + "mm in each application", MessageType.Diagnostic);
                }
            }
            else
            {
                summary.WriteMessage(this,"  Irrigation is disabled", MessageType.Diagnostic);
            }
        }

        [EventSubscribe("StartOfDay")]
        private void OnStartOfDay(object sender, EventArgs e)
        {
            //Check for whether we are within the irrigation season
            if(DateUtilities.WithinDates(SeasonStartDate, clock.Today, SeasonEndDate))
            {
                seasonIsOpen = true;
            }
            else
            {
                seasonIsOpen = false;
                SeasonAppliedAmount = 0;
            }

            //Check for whether there is a crop that needs irrigation
            cropIsActive = true;
            if (checkingCropActive)
            {
                if (!existingCrop.IsAlive)
                {
                    cropIsActive = false;
                }
            }
            //if ((existingCrop.Phenology.Stage >= 3.0) && (existingCrop.Phenology.Stage < 6.0))

            //Check whether there is significant rainfall
            rainIsNotSignificant = true;
            if (skippingRainDays && weather.Rain > 5.0)
            {
                rainIsNotSignificant = false;
            }

            //Check whether the irrigator available
            irrigatorIsAvailable = false;
            DaysSinceIrrigation += 1;
            if(IrrigationTriggerType == IrrigationTriggerTypes.FixedInterval)
            {
                if (DaysSinceIrrigation >= IntervalBetweenIrrigations)
                {
                    irrigatorIsAvailable = true;
                }
            }
            else
            {
                if (DaysSinceIrrigation >= ReturnDays)
                {
                    irrigatorIsAvailable = true;
                }
            }
        }

        [EventSubscribe("DoManagement")]
        private void OnDoManagement(object sender, EventArgs e)
        {
            //Get current soil moisture at appropriate depth
            TopSWC = 0.0;
            for (int layer = 0; layer < bottomLayer; layer++)
            {
                TopSWC += soilWater.SWmm[layer];
            }
            TopSWC += soilWater.SWmm[bottomLayer] * fracBottomLayer;

            //Check whether the soil is dry enough to require irrigation
            IrrigLayerSWDeficit = TopSWC - TopDUL;
            if(IrrigationTriggerType == IrrigationTriggerTypes.TriggerBySoilDeficit)
            {
                soilMoistureIsLow = false;
                if (Math.Max(0.0, -IrrigLayerSWDeficit) >= (TopDUL - TopLL) * (100.0 - TriggerDeficit) / 100.0)
                {
                    soilMoistureIsLow = true;
                }
            }
            else
            { // moisture is not checked
                soilMoistureIsLow = true;
            }

            //Are all the conditions ratifying irrigation
            if (irrigationIsAllowed && seasonIsOpen && cropIsActive && irrigatorIsAvailable && rainIsNotSignificant && soilMoistureIsLow)
            {
                //Lets bloody well irrigate then!!!!
                if(IrrigationAmountType == IrrigationAmountTypes.GivenAmount)
                {
                    AmountToApply = Math.Min(GivenAmount, MaximumAmount);
                }
                else
                {
                    AmountToApply = TopLL + (TopDUL - TopLL) * TargetDeficit / 100.0 - TopSWC;
                    AmountToApply = Math.Max(0.0, Math.Min(AmountToApply, MaximumAmount));
                }

                irrigator.Apply(amount: AmountToApply, depth: 0.0, duration: 1440, willRunoff: true);
                DaysSinceIrrigation = 0;
                SeasonAppliedAmount += AmountToApply;
            }
        }


        /// <summary>Flag for a yes or no answer</summary>
        public enum yesNoAnswer
        {
            /// <summary>Positive answer</summary>
            Yes,
            /// <summary>Negative answer</summary>
            No
        }

        /// <summary>Flag how irrigation will be triggered</summary>
        public enum IrrigationTriggerTypes
        {
            /// <summary>Setting a fixed interval</summary>
            FixedInterval,
            /// <summary>Setting a soil deficit</summary>
            TriggerBySoilDeficit
        }

        /// <summary>Flag how much irrigation will be applied</summary>
        public enum IrrigationAmountTypes
        {
            /// <summary>Setting a fixed interval</summary>
            GivenAmount,
            /// <summary>Setting a soil deficit</summary>
            BasedOnSoilDeficit
        }
    }
}
```
        Manager ApplySpikeOfN
          Amount = 450
          FertiliserType = NO3N
```csharp
using Models.Interfaces;
using APSIM.Shared.Utilities;
using Models.PMF;
using Models.Soils;
using Models.Core;
using System;
using System.Linq;
using Models.Soils.Nutrients;
using Newtonsoft.Json;
using System.Xml.Serialization;

namespace Models
{
    [Serializable]
    public class Script : Model
    {
        [Link] private Clock clock;
        [Link] private Fertiliser fertiliser;
        [Link] private ISummary summary;
        [Link] private Nutrient nutrient;
        [Link] private DateChangerScript dateChangerScript;

        [Separator("Nitrogen will be applied on the date set by the DateChanger Script")]
        
        [Description("Amount of N to apply (kg N /ha) for each deposition")]
        public double Amount { get; set; }

        [Description("Type of fertiliser to apply? ")] 
        [Display(Type = DisplayType.FertiliserType)]public string FertiliserType { get; set; }

        [XmlIgnore] public double Depth { get; set; }
		[XmlIgnore] public DateTime myApplicationDate {get; set;}
        [XmlIgnore] public double SpikeNApplied { get; set; }
        
        [EventSubscribe("StartOfSimulation")]
        private void FindSoilNOrNutrient(object sender, EventArgs e)
        {
            myApplicationDate = dateChangerScript.ApplicationDate;
            summary.WriteMessage(this, "The application date will be " + myApplicationDate, MessageType.Information);
        }

        [EventSubscribe("DoManagement")]
        private void OnDoManagement(object sender, EventArgs e)
        {
            SpikeNApplied = 0.0;
            if (clock.Today == myApplicationDate)
            {
                fertiliser.Apply(Amount, FertiliserType, 5.0);
                summary.WriteMessage(this, "N addition of " + Amount + " kg N /ha to a depth of " + Depth + " mm", MessageType.Information); 
                SpikeNApplied = Amount;
            }
        }
    }
}
```
        Manager Outputs1000mm
          TargetDepth = 1000
```csharp
// Gets an output at a particular depth for reporting
using System;
using System.Xml.Serialization;
using APSIM.Shared.Utilities;
using Models.Interfaces;
using Models.Core;
using Models.PMF;
using Models.Soils;
using Models.Soils.Nutrients;

namespace Models
{
    [Serializable]
    [System.Xml.Serialization.XmlInclude(typeof(Model))]
    public class Script : Model
    {
        [Link] private Clock clock;
        [Link] private IPhysical physical;
        [Link] private ISoilWater soilWater;
        [Link] private Nutrient nutrient;
        [Link(ByName = true)] private ISolute urea;
        [Link(ByName = true)] private ISolute nH4;
        [Link(ByName = true)] private ISolute nO3;
        [Link] private ISummary summary;

        [Separator("This just gets leaching at the specified depth for reporting")]

        [Description("Depth for reporting (mm)")]
        public double TargetDepth { get; set; }

        [XmlIgnore] public double LeachingForOutput { get; set; }
        [XmlIgnore] public double DrainageForOutput { get; set; }
        [XmlIgnore] public double DenitrificationForOutput { get; set; }
        [XmlIgnore] public double N2OForOutput { get; set; }
        [XmlIgnore] public int Layer { get; set; }


        [EventSubscribe("StartOfSimulation")]
        private void OnStartOfSimulation(object sender, EventArgs e)
        {
            Layer = 0;
            for (int i = 0; i < physical.Thickness.Length; i++)
            {
                if (Layer < 1 && physical.ThicknessCumulative[i] >= TargetDepth)  // this will only trigger the first time the cumulative depth is greater than the target depth
                    Layer = i;   
            }
        }

        [EventSubscribe("DoReportCalculations")]
        private void OnDoReportCalculations(object sender, EventArgs e)
        {
            LeachingForOutput = urea.Flow[Layer] + nH4.Flow[Layer] + nO3.Flow[Layer];
            DrainageForOutput = soilWater.Flow[Layer] + soilWater.Flux[Layer];
            
            DenitrificationForOutput = 0.0;
            N2OForOutput = 0.0;
            for (int i = 0; i <= Layer; i++)
            {
                DenitrificationForOutput += nutrient.DenitrifiedN[i];
                if (physical.ThicknessCumulative[i] <= 300.0)
                    N2OForOutput += nutrient.N2Oatm[i];
            }
        }
    }
}
```
        Irrigation
        Fertiliser
        SurfaceOrganicMatter: InitialResidueName=grass; InitialResidueType=grass; InitialResidueMass=1000; InitialStandingFraction=0; InitialCPR=0; InitialCNR=25
        PastureSpecies AGPRyegrass: doyGermination=275; daysEmergenceToAnthesis=120; daysAnthesisToMaturity=85; degreesDayForAnthesis=1100; degreesDayForMaturity=900; daysAnnualsFactor=45; CanopyType=PastureSpecies; InitialisePlantAtStartOfSimulation=true; InitialShootDM=1250; InitialRootDM=450; InitialRootDepth=1000; PotentialRootingDepth=1000; initialDMFractionsGrasses=[0.15, 0.25, 0.25, 0.05, 0.05, 0.1, 0.1, 0.05, 0, 0, 0]; initialDMFractionsForbs=[0.2, 0.2, 0.15, 0.05, 0.1, 0.15, 0.1, 0.05, 0, 0, 0]; UseHeatStressFactor=0; UseColdStressFactor=0; UseReproSeasonFactor=0; ReproSeasonReferenceLatitude=41; ReproSeasonTimingCoeff=0.14; ReproSeasonDurationCoeff=2; ReproSeasonShouldersLengthFactor=1; ReproSeasonOnsetDurationFactor=0.6; ReproSeasonMaxAllocationIncrease=0.5; ReproSeasonAllocationCoeff=0.1; StolonProportionTarget=0; RelativeTurnoverEmerging=2; TurnoverDefoliationEffectMin=0.025; GlfGeneric=1; GlfSoilFertility=1; MinimumGreenLeafProp=0.8; MinimumGreenRootProp=0.5; PreferenceForLeafOverStems=1
          initialDMFractionsLegumes=[0.16, 0.23, 0.22, 0.05, 0.03, 0.05, 0.05, 0.01, 0.04, 0.08, 0.08]
          LinearInterpolationFunction FVPDFunction
        PastureSpecies AGPWhiteClover: doyGermination=275; daysEmergenceToAnthesis=120; daysAnthesisToMaturity=85; degreesDayForAnthesis=1100; degreesDayForMaturity=900; daysAnnualsFactor=45; CanopyType=PastureSpecies; InitialisePlantAtStartOfSimulation=true; InitialShootDM=500; InitialRootDM=150; InitialRootDepth=350; PotentialRootingDepth=350; initialDMFractionsGrasses=[0.15, 0.25, 0.25, 0.05, 0.05, 0.1, 0.1, 0.05, 0, 0, 0]; initialDMFractionsForbs=[0.2, 0.2, 0.15, 0.05, 0.1, 0.15, 0.1, 0.05, 0, 0, 0]; UseHeatStressFactor=0; UseColdStressFactor=0; UseReproSeasonFactor=0; ReproSeasonReferenceLatitude=41; ReproSeasonTimingCoeff=0.14; ReproSeasonDurationCoeff=2; ReproSeasonShouldersLengthFactor=1; ReproSeasonOnsetDurationFactor=0.6; ReproSeasonMaxAllocationIncrease=0.5; ReproSeasonAllocationCoeff=0.1; RelativeTurnoverEmerging=2; TurnoverDefoliationEffectMin=0.025; GlfGeneric=1; GlfSoilFertility=1; MinimumGreenLeafProp=0.8; MinimumGreenRootProp=0.5; PreferenceForLeafOverStems=1
          initialDMFractionsLegumes=[0.16, 0.23, 0.22, 0.05, 0.03, 0.05, 0.05, 0.01, 0.04, 0.08, 0.08]
          LinearInterpolationFunction FVPDFunction
        Soil: ASCOrder=R; SoilType=Typic Fluvial Recent Soils; LocalName=Huangarua_35a1; Country=New Zealand; Latitude=-41; Longitude=174
          DataSource=Profile descriptions provided by Smap based on the work done by Trevor Webb.
          Physical
            Thickness  ParticleSizeSand  ParticleSizeSilt  ParticleSizeClay  Rocks  BD     AirDry  LL15   DUL    SAT    KS
            92         14                66                20                10     1.106  0.072   0.144  0.354  0.449  2400
            93         14                66                20                10     1.106  0.072   0.144  0.354  0.449  2400
            188        14                66                20                50     0.653  0.042   0.047  0.138  0.236  1440
            188        14                66                20                50     0.653  0.042   0.047  0.138  0.236  1440
            189        14                66                20                50     0.653  0.042   0.047  0.138  0.236  1440
            250        90                7.5               2.5               50     0.646  0.015   0.015  0.076  0.239  9600
            250        90                7.5               2.5               50     0.646  0.015   0.015  0.076  0.239  9600
            250        90                7.5               2.5               50     0.646  0.015   0.015  0.076  0.239  9600
            250        90                7.5               2.5               50     0.646  0.015   0.015  0.076  0.239  9600
            250        90                7.5               2.5               50     0.646  0.015   0.015  0.076  0.239  9600
            SoilCrop AgPRyegrassSoil
              LL=[0.144, 0.144, 0.047, 0.047, 0.047, 0.015, 0.015, 0.015, 0.015, 0.015]
              KL=[0.103835, 0.103835, 0.0231686, 0.0231686, 0.0231686, 0, 0, 0, 0, 0]
              XF=[1, 1, 0.81, 0.81, 0.81, 0, 0, 0, 0, 0]
            SoilCrop AgPWhiteCloverSoil
              LL=[0.144, 0.144, 0.047, 0.047, 0.047, 0.015, 0.015, 0.015, 0.015, 0.015]
              KL=[0.135051, 0.135051, 0.00542691, 0.00542691, 0.00542691, 0, 0, 0, 0, 0]
              XF=[1, 1, 0.766, 0.766, 0.766, 0, 0, 0, 0, 0]
          Organic: FOMCNRatio=40; CarbonUnits=Total
            Thickness  Carbon    SoilCNRatio  FBiom      FInert    FOM
            50         3.5       10.4         0.0788566  0.30541   231.228
            50         3.5       10.4         0.0610103  0.365438  224.294
            50         3.5       10.4         0.0477893  0.416251  180.55
            50         2.90181   10.4         0.037995   0.477639  140.612
            50         2.01108   10.4         0.0307392  0.549551  109.509
            50         1.414     10.4         0.025364   0.614528  85.2856
            50         1.01377   10.4         0.0213819  0.673618  66.4205
            50         0.745486  10.4         0.0184319  0.727416  51.7283
            50         0.56565   10.4         0.0162465  0.776021  40.2861
            50         0.445103  10.4         0.0146275  0.819115  31.3748
            250        0.273824  10.4         0.0118814  0.911701  78.8161
            250        0.209991  10.4         0.0104198  0.976109  0
            500        0.200497  10.4         0.0100442  0.990829  0
            500        0.200009  10.4         0.0100022  0.996255  0
          Chemical: PHUnits=Water
            Thickness  PH  CEC
            185        7   20.337
            565        7   11.0105
            1250       7   1.62056
          Water: Thickness=[185, 565, 1250]; InitialValues=[0.354, 0.138, 0.076]; FilledFromTop=false
          WaterBalance SoilWater: SummerDate=1-oct; SummerU=9; SummerCona=4.4; WinterDate=1-apr; WinterU=4; WinterCona=2; DiffusConst=88; DiffusSlope=35; Salb=0.13; CN2Bare=83; CNRed=27; CNCov=0.8; PSIDul=-100
            Thickness  SWCON  KLAT
            185        0.5    0
            565        0.35   0
            1250       0.5    0
          SoilTemperature Temperature: InteractionsPerDay=8
          Solute NO3: Thickness=[185, 565, 1250]; InitialValues=[11.7167, 7.54804, 0.735294]; InitialValuesUnits=kg/ha; WaterTableConcentration=0; D0=0; DepthConstant=0; MaxDepthSoluteAccessible=0; RunoffEffectivenessAtMovingSolute=0; MaxEffectiveRunoff=0
          Solute NH4: Thickness=[185, 565, 1250]; InitialValues=[1.7575, 1.13221, 0.110294]; InitialValuesUnits=kg/ha; WaterTableConcentration=0; D0=0; DepthConstant=0; MaxDepthSoluteAccessible=0; RunoffEffectivenessAtMovingSolute=0; MaxEffectiveRunoff=0
          Solute Urea: Thickness=[185, 565, 1250]; InitialValues=[0, 0, 0]; InitialValuesUnits=ppm; WaterTableConcentration=0; D0=0; DepthConstant=0; MaxDepthSoluteAccessible=0; RunoffEffectivenessAtMovingSolute=0; MaxEffectiveRunoff=0
          Nutrient
        Report: EventNames=[Clock].EndOfSimulation
          VariableNames:
            [Clock].Today as SimEndDate
            [Weather].FileName as Agent
            [Soil].LocalName as Soil
            Sum of [Outputs1000mm].Script.LeachingForOutput from [DateChanger].DateChangerScript.ApplicationDate to [Clock].Today as Leaching1000mm
            Sum of [ISoilWater].Runoff from [DateChanger].DateChangerScript.ApplicationDate to [DateChanger].DateChangerScript.ApplicationDatePlus30 as Runoff30
            Sum of [ISoilWater].Runoff from [DateChanger].DateChangerScript.ApplicationDate to [DateChanger].DateChangerScript.ApplicationDatePlus60 as Runoff60
            Sum of [ISoilWater].Runoff from [DateChanger].DateChangerScript.ApplicationDate to [DateChanger].DateChangerScript.ApplicationDatePlus90 as Runoff90
            Sum of [ISoilWater].Runoff from [DateChanger].DateChangerScript.ApplicationDate to [Clock].Today as RunoffCum
            Sum of [Outputs1000mm].Script.DrainageForOutput from [DateChanger].DateChangerScript.ApplicationDate to [Clock].Today as Drainage1000mm
            Sum of [Outputs1000mm].Script.DenitrificationForOutput from [DateChanger].DateChangerScript.ApplicationDate to [Clock].Today as Denitrification1000mm
            Sum of [Outputs1000mm].Script.N2OForOutput from [DateChanger].DateChangerScript.ApplicationDate to [Clock].Today as N2O300mm
            Sum of ([AGPRyegrass].HarvestedWt + [AGPWhiteClover].HarvestedWt) from [DateChanger].DateChangerScript.ApplicationDate to [Clock].Today as HarvestedDM
            Sum of ([AGPRyegrass].HarvestedN + [AGPWhiteClover].HarvestedN) from [DateChanger].DateChangerScript.ApplicationDate to [Clock].Today as HarvestedN
            Sum of [Weather].Rain from [DateChanger].DateChangerScript.ApplicationDate to [Clock].Today as Rainfall
            Sum of [Irrigation].IrrigationApplied from [DateChanger].DateChangerScript.ApplicationDate to [Clock].Today as Irrigation
            Sum of [ApplySpikeOfN].Script.SpikeNApplied from [DateChanger].DateChangerScript.ApplicationDate to [Clock].Today as SpikeNApplied
            Sum of [Outputs1000mm].Script.N2OForOutput from [DateChanger].DateChangerScript.ApplicationDate to [Clock].Today as N2O300mm
            Sum of ([ISoilWater].Es + sum([AGPRyegrass].WaterUptake[:]) + sum([AGPWhiteClover].WaterUptake[:])) from [DateChanger].DateChangerScript.ApplicationDate to [Clock].Today as ETCum
            Diff of (sum([NO3].kgha + [NH4].kgha)) from [DateChanger].DateChangerScript.ApplicationDateMinus1 to [Clock].Today as IncMinN
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