Simulations: Version=220
  DataStore
    ExcelInput: SheetNames=[Observed]
      FileNames=[ObservedSoilTotalN1967-87.xlsx, ObservedSoilP1967.xlsx, ObservedSoilOM.xlsx, ObservedSoilNa1967.xlsx, ObservedPeakYieldAnnualSummary 1970-1990.xlsx, ObservedPctSownGrassAnnualSummary 1970-1990.xlsx, ObservedPastureN.xlsx, ObservedPastureBiomass.xlsx, ObservedLWGAnnualSummary 1970-1990.xlsx, ObservedLWG.xlsx, ObservedDigestibility.xlsx]
    PredictedObserved: PredictedTableName=Report; ObservedTableName=Observed; FieldNameUsedForMatch=SimulationName; FieldName2UsedForMatch=Clock.Today; AllColumns=false
      Tests: POName=PredictedObserved
        AcceptedStats:
          Name                    n     Slope     Intercept  SEslope    SEintercept  R2         RMSE      NSE        ME        MAE       RSR       RMR
          N                       3333  1         0          0          0            1          0         1          0         0         0         0
          Panicum.AboveGround.N   259   0.167271  1.27909    0.0603036  0.46612      0.0290676  5.88203   -3.65873   -4.74423  5.01396   2.15424   0.813197
          Panicum.AboveGround.Wt  639   0.290952  36.9024    0.0162656  5.64581      0.334355   237.949   -0.119565  -150.569  167.128   1.05727   0.899961
          Rhodes.AboveGround.N    134   0.64455   1.10293    0.40676    0.184521     0.0186672  1.5442    -35.278    0.969907  1.03794   6.00061   4.12623
          Rhodes.AboveGround.Wt   639   0.596514  45.2811    0.0629903  2.69336      0.12341    60.5246   -2.85989   33.317    41.9857   1.96312   2.04118
          Total.AboveGround.N     134   0.102352  2.03674    0.0699199  0.543188     0.0159744  5.66499   -2.69899   -4.41617  4.86927   1.91609   0.788043
          Total.AboveGround.Wt    639   0.343265  75.8614    0.0193107  7.30145      0.331572   227.014   0.0878168  -117.252  161.644   0.954335  0.772023
          TotalSoilNPercent       480   0.581562  0.786987   0.117871   0.040849     0.0484593  0.655396  -186.392   0.643366  0.643366  13.6749   1.90948
        AcceptedStatsName=Name n Slope Intercept SEslope SEintercept R2 RMSE NSE ME MAE RSR RMR
        Memo Note
          Where:
           - n: The number of PO (predicted-observed) pairs for the given variable;
           - Slope: The slope of the straight line linear regression. A perfect fit would have a value of 1;
           - Intercept: The intercept of the straight line linear regression. A perfect fit would have a value of 0;
           - SEslope: Standard error in the slope;
           - SEintercept: Standard error in the intercept.;
           - R2: The value for the coefficient of determination. It varies between 0 and 1, where 1 is a perfect fit;
           - RMSE: Root Mean Squared Error. 0 is a perfect fit. Values less than half the standard deviation of the observed data are acceptable;
           - NSE: Nash-Sutcliffe Efficiency. Indicates how well the PO data fits the 1:1 line. Ranges from -infinity to 1 with 1 being the optimal value while values  between 0 and 1 are generally viewed as acceptable. Values < 0 indicate unacceptable model performance;
           - ME: Mean Error between predicted and observed values. 0 is a perfect fit;
           - MAE: Mean Absolute Error. 0 is a perfect fit. Values less than half the standard deviation of the observed data are acceptable;
           - RSR: Ratio between the RMSE and the standard deviation of observations. 0 is a perfect fit;
           - RMR: Ratio between the RMSE and the mean of observations. 0 indicates a perfect fit;
  Experiment Narayen
    Factors
      Permutation
        Factor N: Specification=[FertiliseOnFixedDates]
          Manager 0
            FertiliserType = NH4NO3N
            FertiliserDates = 15-may, 15-sep
            FertiliseDepth = 0
            Amount = 0
            AmountType = True
```csharp
using Models.Soils;
using System;
using System.Linq;
using Models.Core;
using Models.PMF;
using APSIM.Shared.Utilities;
namespace Models
{
    [Serializable]
    public class Script : Model
    {
        [Link] Clock Clock;
        [Link] Fertiliser Fertiliser;
        
        [Separator("A component to apply fertiliser on one or more dates on every year of the simulation")]

        [Description("Type of fertiliser to apply? ")] 
        [Display(Type = DisplayType.FertiliserType)]public string FertiliserType { get; set; }

        [Description("Enter the fertilisation dates as dd-mmm with comma separation (any year information entered will be ignored): ")] 
        public string[] FertiliserDates { get; set; } 
        
        [Description("Fertilise depth (mm)")]
        public double FertiliseDepth { get; set; }

        [Description("Amount of fertiliser to be applied (kg/ha)")] 
        public double Amount { get; set; }

        [Description("Is the above amount to be applied each time? (yes/ticked)? Or is it the total annual amount across all dates (no/unticked)")] 
        public bool AmountType { get; set; }

        
        [EventSubscribe("DoManagement")]
        private void OnDoManagement(object sender, EventArgs e)
        {
            foreach (string ddMMM in FertiliserDates)
            {
                if (DateUtilities.DatesEqual(ddMMM, Clock.Today))
                {
                    if (AmountType)
                        Fertiliser.Apply(amount: Amount, type: FertiliserType);
                    else
                        Fertiliser.Apply(amount: Amount / FertiliserDates.Length, type: FertiliserType, depth: FertiliseDepth);
                }
            }
        }
    }
}
```
          Manager 100
            FertiliserType = NH4NO3N
            FertiliserDates = 15-may, 15-sep
            FertiliseDepth = 0
            Amount = 100
            AmountType = False
            script: same as in Narayen.Factors.Permutation.N.0
        Factor Stocking
          CompositeFactor 1_0: Specifications=[Paddock].Area=3
          CompositeFactor 1_4: Specifications=[Paddock].Area=2.143
          CompositeFactor 1_8: Specifications=[Paddock].Area=1.666
          CompositeFactor 2_0: Specifications=[Paddock].Area=1.5
          CompositeFactor 2_2: Specifications=[Paddock].Area=1.3636
    Simulation NarayenBase
      Clock: Start=1974-01-01; End=1985-12-31
      Summary
      Weather: FileName=AU_Narayen.met
      SoilArbitrator
      MicroClimate: a_interception=0; b_interception=1; c_interception=0; d_interception=0; SoilHeatFluxFraction=0.4; MinimumHeightDiffForNewLayer=0; NightInterceptionFraction=0.5; ReferenceHeight=2
      Stock: RandSeed=9999
      Forages
        Parameters:
          Name                          LiveDigestibility  DeadDigestibility  LiveFractionConsumable  DeadFractionConsumable  LiveMinimumBiomass  DeadMinimumBiomass
          SurfaceOrganicMatter.Residue  0.7                0.3                1                       1                       100                 0
          Panicum.Leaf                  0.7                0.3                1                       1                       100                 0
          Panicum.Stem                  0.7                0.3                1                       1                       100                 0
          Panicum.Stolon                0.7                0.3                1                       1                       100                 0
          Rhodes.Leaf                   0.7                0.3                1                       1                       100                 0
          Rhodes.Stem                   0.7                0.3                1                       1                       100                 0
          Rhodes.Stolon                 0.7                0.3                1                       1                       100                 0
      Operations StockOperations
        1980-05-15  [StockManagement].Script.AddStock()
      Manager StockManagement
        StockNumber = 3
        Genotype = Angus
        Sex = Castrate
        Age = 12
        Weight = 100
        Pregnant = 0
        Lactating = 0
        YoungNumber = 0
        YoungWt = 0
```csharp
using Models.PMF.Interfaces;
using System.Diagnostics;
using Models.AgPasture;
using System.Linq;
using System.Collections.Generic;
using System.Collections;
using Models.Soils;
using Models.PMF;
using System.Xml.Serialization;
using APSIM.Shared.Utilities;
using Models.GrazPlan;
using Models.Utilities;
using Models.Core;
using Models;
using System;

namespace Models
{

    [Serializable]
    public class Script : Model
    {
        [Link] Clock clock;
        [Link] Stock stock;
        //[Link] Supplement supplement;
        [Link] List<Zone> paddocks;
        [Link] ISummary summary;
        [Link] Simulation farm;
        [Link] List<IPlantDamage> forages = null;

        private int CurrentGroupNum = 1;    // animal group number
        private int CurrentLocationNum { get; set; }

        [Separator("Stock type info - these stock are bought at the start of the simulation")]

        [Description("Number of stock added to the simulation (head): ")] 
        public int StockNumber { get; set; } 

        [Description("Stock: genotype (e.g. Small Merino, Angus, Friesian):")] 
        [Display(Values="GetGenotypes")]
        public string Genotype { get; set; }

        [Description("Stock: sex (Female, Male, Castrate):")] 
        public ReproductiveType Sex { get; set; }

        [Description("Stock: age (months):")] 
        public double Age { get; set; }

        [Description("Stock: weight (kg liveweight /head):")] 
        public double Weight { get; set; }

        [Description("Stock: fertility status (0 if non-pregnant or days since conception):")] 
        public int Pregnant { get; set; }

        [Description("Stock: lactation status (0 if non-lactating or days since parturition):")]
        public int Lactating { get; set; }

        [Description("Stock: number of unweaned young:")]
        public int YoungNumber { get; set; }

        [Description("Stock: weight of unweaned young:")] 
        public double YoungWt { get; set; }

        public int NumStock { get; set; }

        // Return a list of genotypes to the properties tab.
        public string[] GetGenotypes()
        {
            if (stock != null)
                return stock.Genotypes.Names.ToArray();
            return null;
        }

        

        public void AddStock()
        {
            summary.WriteMessage(this, "Adding livestock to the simulation", MessageType.Diagnostic);

            CurrentGroupNum = stock.NoGroups + 1;
            StockBuy purchase = new StockBuy();
            purchase.Genotype = Genotype;
            purchase.Number = StockNumber;
            purchase.Sex = Sex;
            purchase.Age = Age;       // age in months
            purchase.Weight = Weight;  // live weight in kg
            purchase.UseTag = CurrentGroupNum + 1;
            purchase.MatedTo = purchase.Genotype;
            purchase.Pregnant = Pregnant;  // days pregnant, 0 = non pregnant, 1 = pregnant
            purchase.Lactating = Lactating;  // 0 for dry, 1 for lactating
            purchase.NumYoung = YoungNumber;
            purchase.YoungWt = YoungWt;

            stock.Buy(purchase);
            stock.Move("Paddock");
        }

    }
}
```
      Zone Paddock: Area=1; Slope=0; AspectAngle=0; Altitude=50
        Report: EventNames=[Clock].DoReport
          VariableNames:
            [Clock].Today
            sum([Soil].Water.MM)
            sum([Soil].Physical.LL15mm)
            sum([Soil].Physical.DULmm)
            sum([Soil].NO3.kgha)
            sum([Soil].Nutrient.TotalC)
            sum([Soil].Nutrient.TotalN)
            [Soil].Nutrient.TotalN[1]/([Soil].Physical.Thickness[1]/1000*[Soil].Physical.BD[1]*10000) as TotalSoilNPercent
            [SurfaceOrganicMatter].Wt
            [Rhodes].AboveGround.Wt
            [Rhodes].AboveGround.N
            [Rhodes].LAI
            [Panicum].AboveGround.Wt
            [Panicum].AboveGround.N
            [Panicum].LAI
            ([Rhodes].AboveGround.Wt + [Panicum].AboveGround.Wt) as Total.AboveGround.Wt
            ([Rhodes].AboveGround.N + [Panicum].AboveGround.N) as Total.AboveGround.N
            [Stock].NumberAll
            [Stock].CondScoreAll
            [Stock].WeightAll
            [Rhodes].Root.Depth
            [Panicum].Root.Depth
            [Panicum].GlfWaterSupply
            [Panicum].GlfNContent
            [Rhodes].GlfWaterSupply
            [Rhodes].GlfNContent
            ([Rhodes].WaterDemand+[Panicum].WaterDemand) as Total.WaterDemand
        Fertiliser
        Soil: ASCOrder=Vertosol; ASCSubOrder=Grey; SoilType=Clay; Site=Warra; NearestTown=Warra, Q, 4411; Region=Darling Downs and Granite Belt; State=Queensland; Country=Australia; NaturalVegetation=Brigalow scrub; ApsoilNumber=19; Latitude=-26.897; Longitude=150.909; LocationAccuracy=+/- 20m; DataSource=0; Comments=CSIRO Sustainable Ecosystems, Toowoomba
          Physical
            Thickness  BD    AirDry  LL15  DUL   SAT   KS
            150        1.39  0.1     0.18  0.4   0.45  100
            150        1.35  0.17    0.19  0.41  0.46  100
            300        1.35  0.17    0.19  0.41  0.46  20
            300        1.43  0.17    0.2   0.38  0.43  20
            300        1.44  0.17    0.23  0.38  0.43  20
            600        1.45  0.17    0.25  0.37  0.42  20
            SoilCrop RhodesSoil: LL=[0.18, 0.19, 0.19, 0.2, 0.23, 0.25]; KL=[0.06, 0.06, 0.06, 0.06, 0.06, 0.06]; XF=[1, 1, 1, 1, 1, 1]
            SoilCrop PanicumSoil: LL=[0.18, 0.19, 0.19, 0.2, 0.23, 0.25]; KL=[0.06, 0.06, 0.06, 0.06, 0.06, 0.06]; XF=[1, 1, 1, 1, 1, 1]
          WaterBalance SoilWater: SummerDate=1-Nov; SummerU=6; SummerCona=3.5; WinterDate=1-Apr; WinterU=6; WinterCona=3.5; DiffusConst=0; DiffusSlope=8; Salb=0.12; CN2Bare=73; CNRed=20; CNCov=0.8; PSIDul=-100; Thickness=[150, 150, 300, 300, 300, 300]; SWCON=[0.3, 0.3, 0.3, 0.3, 0.3, 0.3]
          Nutrient
          Organic: FOMCNRatio=40; CarbonUnits=Total
            Thickness  Carbon  SoilCNRatio  FBiom  FInert  FOM
            150        0.915   12           0.04   0.4     390.598
            150        0.777   12           0.02   0.6     289.362
            300        0.346   12           0.02   0.8     158.805
            300        0.231   12           0.02   1       87.1541
            300        0.154   12           0.01   1       47.8312
            300        0.123   12           0.01   1       26.2503
          Chemical: Thickness=[150, 150, 300, 300, 300, 300]; PH=[8, 8, 8, 8, 8, 8]; PHUnits=Water
          Water: Thickness=[50, 100, 150, 300, 300, 300, 300]; InitialValues=[0.4, 0.4, 0.41, 0.41, 0.38, 0.38, 0.37]; FilledFromTop=false
          Solute NO3: Thickness=[150, 150, 300, 300, 300, 300]; InitialValues=[1, 1, 1, 1, 1, 1]; InitialValuesUnits=ppm; WaterTableConcentration=0; D0=0; DepthConstant=0; MaxDepthSoluteAccessible=0; RunoffEffectivenessAtMovingSolute=0; MaxEffectiveRunoff=0
          Solute NH4: Thickness=[150, 150, 300, 300, 300, 300]; InitialValues=[0.1, 0.1, 0.1, 0.1, 0.1, 0.1]; InitialValuesUnits=ppm; WaterTableConcentration=0; D0=0; DepthConstant=0; MaxDepthSoluteAccessible=0; RunoffEffectivenessAtMovingSolute=0; MaxEffectiveRunoff=0
          Solute Urea: Thickness=[150, 150, 300, 300, 300, 300]; InitialValues=[0, 0, 0, 0, 0, 0]; InitialValuesUnits=kg/ha; WaterTableConcentration=0; D0=0; DepthConstant=0; MaxDepthSoluteAccessible=0; RunoffEffectivenessAtMovingSolute=0; MaxEffectiveRunoff=0
          SoilTemperature Temperature: InteractionsPerDay=8
          LayerStructure: Thickness=[100, 200, 300, 300, 300, 300, 300]
        Manager FertiliseOnFixedDates
          FertiliserType = NH4NO3N
          FertiliserDates = 15-may, 15-sep
          FertiliseDepth = 0
          Amount = 0
          AmountType = False
          script: same as in Narayen.Factors.Permutation.N.0
        SurfaceOrganicMatter: InitialResidueName=wheat_stubble; InitialResidueType=wheat; InitialResidueMass=500; InitialStandingFraction=0; InitialCPR=0; InitialCNR=100
        PastureSpecies Rhodes: doyGermination=275; daysEmergenceToAnthesis=120; daysAnthesisToMaturity=85; degreesDayForAnthesis=1100; degreesDayForMaturity=900; daysAnnualsFactor=45; CanopyType=PastureSpecies; Albedo=0.26; Gsmax=0.011; R50=200; PlantType=AGPRhodes; SpeciesFamily=0; PhotosyntheticPathway=1; InitialShootDM=1000; InitialRootDM=1000; InitialRootDepth=100; initialDMFractionsGrasses=[0.15, 0.25, 0.25, 0.05, 0.05, 0.1, 0.1, 0.05, 0, 0, 0]; initialDMFractionsForbs=[0.2, 0.2, 0.15, 0.05, 0.1, 0.15, 0.1, 0.05, 0, 0, 0]; ReferencePhotosyntheticRate=1.2; PhotosyntheticEfficiency=0.01; PhotosynthesisCurveFactor=0.8; FractionPAR=0.5; LightExtinctionCoefficient=0.5; GrowthTminimum=10; GrowthToptimum=35; GrowthTEffectExponent=1.25; ReferenceCO2=380; CO2EffectScaleFactor=700; CO2EffectOffsetFactor=600; CO2EffectMinimum=0.7; CO2EffectExponent=2; UseHeatStressFactor=0; HeatOnsetTemperature=35; HeatFullTemperature=42; HeatRecoverySumDD=30; HeatRecoveryTReference=35; UseColdStressFactor=0; ColdOnsetTemperature=8; ColdFullTemperature=3; ColdRecoverySumDD=50; ColdRecoveryTReference=5; MaintenanceRespirationCoefficient=0.03; GrowthRespirationCoefficient=0.25; RespirationTReference=20; RespirationExponent=1.5; DegreesDayForGermination=150; TargetShootRootRatio=2; MaxRootAllocation=0.45; ShootRootGlfFactor=0.6; UseReproSeasonFactor=0; ReproSeasonReferenceLatitude=41; ReproSeasonTimingCoeff=0.14; ReproSeasonDurationCoeff=2; ReproSeasonShouldersLengthFactor=1; ReproSeasonOnsetDurationFactor=0.6; ReproSeasonMaxAllocationIncrease=0.5; ReproSeasonAllocationCoeff=0.1; FractionLeafMaximum=0.6; FractionLeafMinimum=0.6; FractionLeafDMThreshold=500; FractionLeafDMFactor=2000; FractionLeafExponent=3; FractionToStolon=0; SpecificLeafArea=20; StolonEffectOnLAI=0; ShootMaxEffectOnLAI=1000; MaxStemEffectOnLAI=0.75; LiveLeavesPerTiller=3.5; TissueTurnoverRefRateShoot=0.05; TissueTurnoverRefRateRoot=0.02; RelativeTurnoverEmerging=2; DetachmentRefRateShoot=0.06; TurnoverTemperatureMin=5; TurnoverTemperatureRef=25; TurnoverTemperatureExponent=1.5; TurnoverDroughtEffectMax=1; TurnoverDroughtThreshold=0.6; TurnoverDroughtExponent=2; DetachmentDroughtCoefficient=3; DetachmentDroughtEffectMin=0.1; TurnoverStockFactor=0.01; TurnoverDefoliationMultiplier=1; TurnoverDefoliationCoefficient=0.5; TurnoverDefoliationEffectMin=0.025; TurnoverDefoliationEffectOnRoots=0.1; MinimumNFixation=0; MaximumNFixation=0; SoilSaturationEffectMax=0.1; MinimumWaterFreePorosity=-1; SoilSaturationRecoveryFactor=0.25; NDilutionCoefficient=2; GlfGeneric=1; GlfSoilFertility=1; PlantHeightMinimum=300; PlantHeightMaximum=300; PlantHeightMassForMax=12000; PlantHeightExponent=2.7; MinimumGreenWt=50; MinimumGreenLeafProp=0.8; MinimumGreenRootProp=0.5; PreferenceForGreenOverDead=1; PreferenceForLeafOverStems=1
          initialDMFractionsLegumes=[0.16, 0.23, 0.22, 0.05, 0.03, 0.05, 0.05, 0.01, 0.04, 0.08, 0.08]
          LinearInterpolationFunction FVPDFunction
          PastureAboveGroundOrgan Leaf: NConcOptimum=0.03; NConcMinimum=0.009; NConcMaximum=0.04; FractionStanding=1; MinimumLiveDM=10
            GenericTissue EmergingTissue: FractionNRemobilisable=0; FractionSugarNewGrowth=0.5; DigestibilityCellWall=0.75; DigestibilityProtein=1; DMTransferredIn=0; NTransferredIn=0; NRemobilisable=0; NRemobilised=0
            GenericTissue DevelopingTissue: FractionNRemobilisable=0.15; FractionSugarNewGrowth=0; DigestibilityCellWall=0.6; DigestibilityProtein=1; DMTransferredIn=0; NTransferredIn=0; NRemobilisable=0; NRemobilised=0
            GenericTissue MatureTissue: FractionNRemobilisable=0.25; FractionSugarNewGrowth=0; DigestibilityCellWall=0.55; DigestibilityProtein=1; DMTransferredIn=0; NTransferredIn=0; NRemobilisable=0; NRemobilised=0
            GenericTissue DeadTissue: FractionNRemobilisable=1; FractionSugarNewGrowth=0; DigestibilityCellWall=0.2; DigestibilityProtein=1; DMTransferredIn=0; NTransferredIn=0; NRemobilisable=0; NRemobilised=0
          PastureAboveGroundOrgan Stem: NConcOptimum=0.015; NConcMinimum=0.005; NConcMaximum=0.02; FractionStanding=1; MinimumLiveDM=10
            GenericTissue EmergingTissue: FractionNRemobilisable=0; FractionSugarNewGrowth=0.5; DigestibilityCellWall=0.6; DigestibilityProtein=1; DMTransferredIn=0; NTransferredIn=0; NRemobilisable=0; NRemobilised=0
            GenericTissue DevelopingTissue: FractionNRemobilisable=0.12; FractionSugarNewGrowth=0; DigestibilityCellWall=0.55; DigestibilityProtein=1; DMTransferredIn=0; NTransferredIn=0; NRemobilisable=0; NRemobilised=0
            GenericTissue MatureTissue: FractionNRemobilisable=0.23; FractionSugarNewGrowth=0; DigestibilityCellWall=0.5; DigestibilityProtein=1; DMTransferredIn=0; NTransferredIn=0; NRemobilisable=0; NRemobilised=0
            GenericTissue DeadTissue: FractionNRemobilisable=1; FractionSugarNewGrowth=0; DigestibilityCellWall=0.2; DigestibilityProtein=1; DMTransferredIn=0; NTransferredIn=0; NRemobilisable=0; NRemobilised=0
          PastureAboveGroundOrgan Stolon: NConcOptimum=0; NConcMinimum=0; NConcMaximum=0; FractionStanding=0; MinimumLiveDM=10
            GenericTissue EmergingTissue: FractionNRemobilisable=0; FractionSugarNewGrowth=0.5; DigestibilityCellWall=0.6; DigestibilityProtein=1; DMTransferredIn=0; NTransferredIn=0; NRemobilisable=0; NRemobilised=0
            GenericTissue DevelopingTissue: FractionNRemobilisable=0.1; FractionSugarNewGrowth=0; DigestibilityCellWall=0.6; DigestibilityProtein=1; DMTransferredIn=0; NTransferredIn=0; NRemobilisable=0; NRemobilised=0
            GenericTissue MatureTissue: FractionNRemobilisable=0.2; FractionSugarNewGrowth=0; DigestibilityCellWall=0.5; DigestibilityProtein=1; DMTransferredIn=0; NTransferredIn=0; NRemobilisable=0; NRemobilised=0
            GenericTissue DeadTissue: FractionNRemobilisable=1; FractionSugarNewGrowth=0; DigestibilityCellWall=0.2; DigestibilityProtein=1; DMTransferredIn=0; NTransferredIn=0; NRemobilisable=0; NRemobilised=0
          PastureBelowGroundOrgan Root: ExponentSoilMoisture=1.5; MinimumRootingDepth=50; MaximumPotentialRootingDepth=1500; MaximumAllowedRootingDepth=500; ElongationRate=25; DepthDistributionParamTop=80; DepthDistributionExponent=3.5; DepthDistributionParamBottom=1.05; SpecificRootLength=75; NConcOptimum=0.015; NConcMinimum=0.005; NConcMaximum=0.02; KNH4=0.01; KNO3=0.02; MaximumNUptake=10; MinimumLiveDM=1; Depth=0
            RootTissue Live: DMTransferredOut=0; FractionNRemobilisable=0.2; DMRemoved=0; NRemoved=0; NRemobilisable=0; NRemobilised=0
            RootTissue Dead: DMTransferredOut=0; FractionNRemobilisable=1; DMRemoved=0; NRemoved=0; NRemobilisable=0; NRemobilised=0
        PastureSpecies Panicum: doyGermination=275; daysEmergenceToAnthesis=120; daysAnthesisToMaturity=85; degreesDayForAnthesis=1100; degreesDayForMaturity=900; daysAnnualsFactor=45; CanopyType=PastureSpecies; Albedo=0.26; Gsmax=0.011; R50=200; PlantType=AGPRhodes; SpeciesFamily=0; PhotosyntheticPathway=1; InitialShootDM=5000; InitialRootDM=1000; InitialRootDepth=100; initialDMFractionsGrasses=[0.15, 0.25, 0.25, 0.05, 0.05, 0.1, 0.1, 0.05, 0, 0, 0]; initialDMFractionsForbs=[0.2, 0.2, 0.15, 0.05, 0.1, 0.15, 0.1, 0.05, 0, 0, 0]; ReferencePhotosyntheticRate=1.2; PhotosyntheticEfficiency=0.01; PhotosynthesisCurveFactor=0.8; FractionPAR=0.5; LightExtinctionCoefficient=0.5; GrowthTminimum=10; GrowthToptimum=35; GrowthTEffectExponent=1.25; ReferenceCO2=380; CO2EffectScaleFactor=700; CO2EffectOffsetFactor=600; CO2EffectMinimum=0.7; CO2EffectExponent=2; UseHeatStressFactor=0; HeatOnsetTemperature=35; HeatFullTemperature=42; HeatRecoverySumDD=30; HeatRecoveryTReference=35; UseColdStressFactor=0; ColdOnsetTemperature=8; ColdFullTemperature=3; ColdRecoverySumDD=50; ColdRecoveryTReference=5; MaintenanceRespirationCoefficient=0.03; GrowthRespirationCoefficient=0.25; RespirationTReference=20; RespirationExponent=1.5; DegreesDayForGermination=150; TargetShootRootRatio=2; MaxRootAllocation=0.45; ShootRootGlfFactor=0.6; UseReproSeasonFactor=0; ReproSeasonReferenceLatitude=41; ReproSeasonTimingCoeff=0.14; ReproSeasonDurationCoeff=2; ReproSeasonShouldersLengthFactor=1; ReproSeasonOnsetDurationFactor=0.6; ReproSeasonMaxAllocationIncrease=0.5; ReproSeasonAllocationCoeff=0.1; FractionLeafMaximum=0.6; FractionLeafMinimum=0.6; FractionLeafDMThreshold=500; FractionLeafDMFactor=2000; FractionLeafExponent=3; FractionToStolon=0; SpecificLeafArea=20; StolonEffectOnLAI=0; ShootMaxEffectOnLAI=1000; MaxStemEffectOnLAI=0.75; LiveLeavesPerTiller=3.5; TissueTurnoverRefRateShoot=0.05; TissueTurnoverRefRateRoot=0.02; RelativeTurnoverEmerging=2; DetachmentRefRateShoot=0.06; TurnoverTemperatureMin=5; TurnoverTemperatureRef=25; TurnoverTemperatureExponent=1.5; TurnoverDroughtEffectMax=1; TurnoverDroughtThreshold=0.6; TurnoverDroughtExponent=2; DetachmentDroughtCoefficient=3; DetachmentDroughtEffectMin=0.1; TurnoverStockFactor=0.01; TurnoverDefoliationMultiplier=1; TurnoverDefoliationCoefficient=0.5; TurnoverDefoliationEffectMin=0.025; TurnoverDefoliationEffectOnRoots=0.1; MinimumNFixation=0; MaximumNFixation=0; SoilSaturationEffectMax=0.1; MinimumWaterFreePorosity=-1; SoilSaturationRecoveryFactor=0.25; NDilutionCoefficient=2; GlfGeneric=1; GlfSoilFertility=1; PlantHeightMinimum=300; PlantHeightMaximum=300; PlantHeightMassForMax=12000; PlantHeightExponent=2.7; MinimumGreenWt=50; MinimumGreenLeafProp=0.8; MinimumGreenRootProp=0.5; PreferenceForGreenOverDead=1; PreferenceForLeafOverStems=1
          initialDMFractionsLegumes=[0.16, 0.23, 0.22, 0.05, 0.03, 0.05, 0.05, 0.01, 0.04, 0.08, 0.08]
          LinearInterpolationFunction FVPDFunction
          PastureAboveGroundOrgan Leaf: same as Narayen.NarayenBase.Paddock.Rhodes.Leaf
          PastureAboveGroundOrgan Stem: same as Narayen.NarayenBase.Paddock.Rhodes.Stem
          PastureAboveGroundOrgan Stolon: same as Narayen.NarayenBase.Paddock.Rhodes.Stolon
          PastureBelowGroundOrgan Root: same as Narayen.NarayenBase.Paddock.Rhodes.Root
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