Simulations: Version=80
  DataStore
    ExcelInput Observed: FileNames=[observed.xlsx]; SheetNames=[ObsCrop, ObsSoil]
    PredictedObserved: PredictedTableName=HarvestReport; ObservedTableName=ObsCrop; FieldNameUsedForMatch=Clock.Today.Year
    PredictedObserved PredictedObservedSoil: PredictedTableName=Report; ObservedTableName=ObsSoil; FieldNameUsedForMatch=Clock.Today
  Experiment Tarlee
    Factors
      Permutation
        Factor Rotation: Specification=[operations]
          Operations WW
            1978-07-18  [Wheat].Sow(cultivar:hartog, depth:30, population:100, rowSpacing:300);
            1979-06-21  [Wheat].Sow(cultivar:hartog, depth:30, population:100, rowSpacing:300);
            1980-07-16  [Wheat].Sow(cultivar:hartog, depth:30, population:100, rowSpacing:300);
            1981-07-16  [Wheat].Sow(cultivar:hartog, depth:30, population:100, rowSpacing:300);
            1982-06-07  [Wheat].Sow(cultivar:hartog, depth:30, population:100, rowSpacing:300);
            1983-06-04  [Wheat].Sow(cultivar:hartog, depth:30, population:100, rowSpacing:300);
            1984-06-26  [Wheat].Sow(cultivar:hartog, depth:30, population:100, rowSpacing:300);
            1985-06-11  [Wheat].Sow(cultivar:hartog, depth:30, population:100, rowSpacing:300);
            1986-07-21  [Wheat].Sow(cultivar:hartog, depth:30, population:100, rowSpacing:300);
            1987-06-02  [Wheat].Sow(cultivar:hartog, depth:30, population:100, rowSpacing:300);
            1988-06-23  [Wheat].Sow(cultivar:hartog, depth:30, population:100, rowSpacing:300);
            1989-06-06  [Wheat].Sow(cultivar:hartog, depth:30, population:100, rowSpacing:300);
            1990-07-23  [Wheat].Sow(cultivar:hartog, depth:30, population:100, rowSpacing:300);
            1991-06-26  [Wheat].Sow(cultivar:hartog, depth:30, population:100, rowSpacing:300);
            1992-06-01  [Wheat].Sow(cultivar:hartog, depth:30, population:100, rowSpacing:300);
            1993-06-24  [Wheat].Sow(cultivar:hartog, depth:30, population:100, rowSpacing:300);
            1994-06-24  [Wheat].Sow(cultivar:hartog, depth:30, population:100, rowSpacing:300);
            1995-06-24  [Wheat].Sow(cultivar:hartog, depth:30, population:100, rowSpacing:300);
            1996-06-23  [Wheat].Sow(cultivar:hartog, depth:30, population:100, rowSpacing:300);
          Operations WF
            1979-06-21  [Wheat].Sow(cultivar:hartog, depth:30, population:100, rowSpacing:300);
            1981-07-16  [Wheat].Sow(cultivar:hartog, depth:30, population:100, rowSpacing:300);
            1983-06-04  [Wheat].Sow(cultivar:hartog, depth:30, population:100, rowSpacing:300);
            1985-06-11  [Wheat].Sow(cultivar:hartog, depth:30, population:100, rowSpacing:300);
            1987-06-02  [Wheat].Sow(cultivar:hartog, depth:30, population:100, rowSpacing:300);
            1989-06-06  [Wheat].Sow(cultivar:hartog, depth:30, population:100, rowSpacing:300);
            1991-06-26  [Wheat].Sow(cultivar:hartog, depth:30, population:100, rowSpacing:300);
            1993-06-24  [Wheat].Sow(cultivar:hartog, depth:30, population:100, rowSpacing:300);
            1995-06-24  [Wheat].Sow(cultivar:hartog, depth:30, population:100, rowSpacing:300);
        Factor Stubble: Specification=[stubbleoperations]
          Operations Burnt
            1978-12-31  [SurfaceOrganicMatter].Incorporate(fraction: 0.90, depth: 0)
            1979-12-31  [SurfaceOrganicMatter].Incorporate(fraction: 0.90, depth: 0)
            1980-12-31  [SurfaceOrganicMatter].Incorporate(fraction: 0.90, depth: 0)
            1981-12-31  [SurfaceOrganicMatter].Incorporate(fraction: 0.90, depth: 0)
            1982-12-31  [SurfaceOrganicMatter].Incorporate(fraction: 0.90, depth: 0)
            1983-12-31  [SurfaceOrganicMatter].Incorporate(fraction: 0.90, depth: 0)
            1984-12-31  [SurfaceOrganicMatter].Incorporate(fraction: 0.90, depth: 0)
            1985-12-31  [SurfaceOrganicMatter].Incorporate(fraction: 0.90, depth: 0)
            1986-12-31  [SurfaceOrganicMatter].Incorporate(fraction: 0.90, depth: 0)
            1987-12-31  [SurfaceOrganicMatter].Incorporate(fraction: 0.90, depth: 0)
            1988-12-31  [SurfaceOrganicMatter].Incorporate(fraction: 0.90, depth: 0)
            1989-12-31  [SurfaceOrganicMatter].Incorporate(fraction: 0.90, depth: 0)
            1990-12-31  [SurfaceOrganicMatter].Incorporate(fraction: 0.90, depth: 0)
            1991-12-31  [SurfaceOrganicMatter].Incorporate(fraction: 0.90, depth: 0)
            1992-12-31  [SurfaceOrganicMatter].Incorporate(fraction: 0.90, depth: 0)
            1993-12-31  [SurfaceOrganicMatter].Incorporate(fraction: 0.90, depth: 0)
            1994-12-31  [SurfaceOrganicMatter].Incorporate(fraction: 0.90, depth: 0)
            1995-12-31  [SurfaceOrganicMatter].Incorporate(fraction: 0.90, depth: 0)
          Operations Incorporated
            1978-12-31  [SurfaceOrganicMatter].Incorporate(fraction: 0.90, depth: 100)
            1979-12-31  [SurfaceOrganicMatter].Incorporate(fraction: 0.90, depth: 100)
            1980-12-31  [SurfaceOrganicMatter].Incorporate(fraction: 0.90, depth: 100)
            1981-12-31  [SurfaceOrganicMatter].Incorporate(fraction: 0.90, depth: 100)
            1982-12-31  [SurfaceOrganicMatter].Incorporate(fraction: 0.90, depth: 100)
            1983-12-31  [SurfaceOrganicMatter].Incorporate(fraction: 0.90, depth: 100)
            1984-12-31  [SurfaceOrganicMatter].Incorporate(fraction: 0.90, depth: 100)
            1985-12-31  [SurfaceOrganicMatter].Incorporate(fraction: 0.90, depth: 100)
            1986-12-31  [SurfaceOrganicMatter].Incorporate(fraction: 0.90, depth: 100)
            1987-12-31  [SurfaceOrganicMatter].Incorporate(fraction: 0.90, depth: 100)
            1988-12-31  [SurfaceOrganicMatter].Incorporate(fraction: 0.90, depth: 100)
            1989-12-31  [SurfaceOrganicMatter].Incorporate(fraction: 0.90, depth: 100)
            1990-12-31  [SurfaceOrganicMatter].Incorporate(fraction: 0.90, depth: 100)
            1991-12-31  [SurfaceOrganicMatter].Incorporate(fraction: 0.90, depth: 100)
            1992-12-31  [SurfaceOrganicMatter].Incorporate(fraction: 0.90, depth: 100)
            1993-12-31  [SurfaceOrganicMatter].Incorporate(fraction: 0.90, depth: 100)
            1994-12-31  [SurfaceOrganicMatter].Incorporate(fraction: 0.90, depth: 100)
            1995-12-31  [SurfaceOrganicMatter].Incorporate(fraction: 0.90, depth: 100)
          Operations Retained
        Factor N: Specification=[SowingFertiliser].Script.Amount = 0,40,80
    Simulation TarleeBaseSimulation
      Weather: FileName=Tarlee.met
      Clock: Start=1978-01-01; End=1996-12-31
      Summary summaryfile
      Zone Field: Area=1; Slope=0; AspectAngle=0; Altitude=50
        Operations: same as Tarlee.Factors.Permutation.Rotation.WW
        Operations stubbleoperations
        Report: EventNames=[Clock].EndOfMonth
          VariableNames:
            [Clock].Today
            [Soil].Nutrient.TotalC[1] as TOC0_10cm
            [Soil].Nutrient.TotalC[2] as TOC10_30cm
            [Soil].Nutrient.TotalC[3] as TOC30_60cm
            ([Soil].Nutrient.TotalC[1]+[Soil].Nutrient.TotalC[2]) as TOC0_30cm
        Report HarvestReport: EventNames=[Wheat].Harvesting
          VariableNames:
            [Clock].Today.Year
            [Wheat].Grain.Wt
            [Wheat].AboveGround.Wt
            [Wheat].Grain.Size
        SurfaceOrganicMatter stubble: InitialResidueName=wheat; InitialResidueType=wheat; InitialResidueMass=1000; InitialStandingFraction=0; InitialCPR=0; InitialCNR=80; FractionFaecesAdded=1
        Plant wheat: CropType=Wheat; IsAlive=false; IsEnding=false; DaysAfterEnding=0; ResourceName=Wheat
        MicroClimate: a_interception=0; b_interception=1; c_interception=0; d_interception=0; soil_albedo=0.23; SoilHeatFluxFraction=0.4; MinimumHeightDiffForNewLayer=0; NightInterceptionFraction=0.5; ReferenceHeight=2
        Manager Harvesting
          Crop = wheat
```csharp
using System;
using Models.Core;
using Models.PMF;
using Models.Soils;
using Models.Soils.Nutrients;
using Models.Utilities;
using APSIM.Shared.Utilities;

namespace Models
{
    [Serializable] 
    public class Script : Model
    {
        [Description("Crop")]
        public IPlant Crop { get; set; }
        
        [EventSubscribe("DoManagement")]
        private void OnDoManagement(object sender, EventArgs e)
        {
            if (Crop.IsReadyForHarvesting)
            {
                Crop.Harvest();
                Crop.EndCrop();
            }
        }
    }
}
```
        Soil: ASCOrder=Sodosol; ASCSubOrder=Red; SoilType=Sand; Site=Tarlee; NearestTown=Tarlee; Region=Mid North; State=South Australia; Country=Australia; ApsoilNumber=610; Latitude=-34.276; Longitude=138.759; LocationAccuracy=+/- 20m
          DataSource=Characterisation 2008 by University of Adelaide, CSIRO Sustainable Ecosystems and Allan Mayfield Consulting, Clare, SA
          Comments=Roots: Wheat 90cm; barley and oats estimated; OC WB as measured; Strongly duplex low-moderate clay soil. Surface CEC low, moderate below. Texture change at about 7cm. Little chemical impediment to root growth, but high ESP below about 60cm may result in slaking or dispersion and high bulk density.
          Physical
            Thickness  BD    AirDry  LL15   DUL    SAT
            100        1.54  0.055   0.11   0.223  0.389
            200        1.41  0.167   0.209  0.388  0.438
            300        1.53  0.22    0.22   0.342  0.393
            300        1.57  0.22    0.22   0.293  0.378
            350        1.6   0.22    0.22   0.264  0.366
            SoilCrop WheatSoil: LL=[0.11, 0.209, 0.24, 0.225, 0.222]; KL=[0.06, 0.06, 0.06, 0.04, 0.04]; XF=[1, 1, 1, 1, 1]
          SoilWater: SummerDate=1-Nov; SummerU=6; SummerCona=3.5; WinterDate=1-Apr; WinterU=2; WinterCona=2; DiffusConst=88; DiffusSlope=35; Salb=0.13; CN2Bare=73; CNRed=20; CNCov=0.8; max_pond=0; Thickness=[100, 200, 300, 300, 350]; SWCON=[0.5, 0.5, 0.5, 0.5, 0.5]; PrecipitationInterception=0
          Organic: FOMCNRatio=40
            Thickness  Carbon  SoilCNRatio  FBiom  FInert  FOM
            100        0.96    12           0.04   0.1     2347.55
            200        0.72    12           0.02   0.15    1452.63
            300        0.38    12           0.02   0.5     707.07
            300        0.12    12           0.02   0.99    344.168
            350        0.12    12           0.01   0.99    148.581
          Chemical
            Thickness  NO3N      NH4N       PH
            100        0.356379  0.0356379  7
            200        0.356379  0.0356379  7.9
            300        0.356379  0.0356379  8.9
            300        0.356379  0.0356379  9.2
            350        0.356379  0.0356379  9.2
          InitialWater Initial water: PercentMethod=0; FractionFull=1
          Sample Initial conditions: Depth=[0-180]; Thickness=[1800]; SWUnits=Volumetric; OCUnits=Total; PHUnits=Water
          CERESSoilTemperature
          Nutrient
            DirectedGraphInfo={Nodes=[{Name=Inert, OutlineColour=Black}, {Name=SurfaceResidue, OutlineColour=Black}, {Name=FOMLignin, OutlineColour=Black}, {Name=FOMCellulose, OutlineColour=Black}, {Name=FOMCarbohydrate, OutlineColour=Black}, {Name=Microbial, OutlineColour=Black}, {Name=Humic, OutlineColour=Black}, {Name=Urea, OutlineColour=Black}, {Name=NO3, OutlineColour=Black}, {Name=NH4, OutlineColour=Black}, {Name=Atmosphere, OutlineColour=White}], Arcs=[{SourceName=SurfaceResidue, DestinationName=Microbial}, {SourceName=SurfaceResidue, DestinationName=Humic}, {SourceName=FOMLignin, DestinationName=Microbial}, {SourceName=FOMLignin, DestinationName=Humic}, {SourceName=FOMCellulose, DestinationName=Microbial}, {SourceName=FOMCellulose, DestinationName=Humic}, {SourceName=FOMCarbohydrate, DestinationName=Microbial}, {SourceName=FOMCarbohydrate, DestinationName=Humic}, {SourceName=Microbial, DestinationName=Microbial}, {SourceName=Microbial, DestinationName=Humic}, {SourceName=Humic, DestinationName=Microbial}, {SourceName=Urea, DestinationName=NH4}, {SourceName=NO3, DestinationName=Atmosphere}, {SourceName=NH4, DestinationName=NO3}]}
        Manager SowingFertiliser
          Amount = 160
          CropName = wheat
```csharp
using System;
using Models.Core;
using Models.PMF;
namespace Models
{
    [Serializable]
    public class Script : Model
    {
        [Link] Clock Clock;
        [Link] Fertiliser Fertiliser;
        [Link] Summary Summary;
        
        
        [Description("Amount of fertiliser to be applied (kg/ha)")]
        public double Amount { get; set; }
        
        [Description("Crop to be fertilised")]
        public string CropName { get; set; }
        
        
        

        [EventSubscribe("Sowing")]
        private void OnSowing(object sender, EventArgs e)
        {
            Model crop = sender as Model;
            if (crop.Name.ToLower() == CropName.ToLower())
                Fertiliser.Apply(Amount: Amount, Type: Fertiliser.Types.NO3N);
        }
        
    }
}
```
        Fertiliser
      SoilArbitrator
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