Simulations: Version=56
  DataStore
    ExcelInput: FileName=observed.xlsx; SheetNames=[Grain, Soil]
      FileName source: Excel files (*.xlsx)|*.xlsx, All files (*.*)|*.*
  Simulation Fertiliser
    Clock: StartDate=1979-01-01; EndDate=1990-12-31
    Summary SummaryFile
    Weather: FileName=Wagga.met
    Zone Field: Area=1; Slope=0
      Operations SowOperations
        1979-05-29  [Wheat].Sow(cultivar:hartog, population:180, depth:30, rowSpacing:300);
        1980-05-13  [Wheat].Sow(cultivar:hartog, population:180, depth:30, rowSpacing:300);
        1981-06-01  [Wheat].Sow(cultivar:hartog, population:180, depth:30, rowSpacing:300);
        1982-06-03  [Wheat].Sow(cultivar:hartog, population:180, depth:30, rowSpacing:300);
        1983-04-28  [Wheat].Sow(cultivar:hartog, population:180, depth:30, rowSpacing:300);
        1984-05-09  [Wheat].Sow(cultivar:hartog, population:180, depth:30, rowSpacing:300);
        1985-05-09  [Wheat].Sow(cultivar:hartog, population:180, depth:30, rowSpacing:300);
        1986-05-13  [Wheat].Sow(cultivar:hartog, population:180, depth:30, rowSpacing:300);
        1987-05-14  [Wheat].Sow(cultivar:hartog, population:180, depth:30, rowSpacing:300);
        1988-06-24  [Wheat].Sow(cultivar:hartog, population:180, depth:30, rowSpacing:300);
        1989-06-15  [Wheat].Sow(cultivar:hartog, population:180, depth:30, rowSpacing:300);
        1990-06-04  [Wheat].Sow(cultivar:hartog, population:180, depth:30, rowSpacing:300);
      Manager Fertilise at sowing
        Crop = Wheat
        Amount = 90
```csharp
using System;
using Models.Core;
using Models.PMF;
namespace Models
{
    [Serializable]
    public class Script : Model
    {
        [Link] Clock Clock;
        [Link] Fertiliser Fertiliser;
        
        [Description("Crop to be fertilised")]
        public IPlant Crop { get; set; }
    
        [Description("Amount of fertiliser to be applied (kg/ha)")]
        public double Amount { get; set; }
        
        [EventSubscribe("Sowing")]
        private void OnSowing(object sender, EventArgs e)
        {
            Model crop = sender as Model;
            if (Crop != null && crop.Name.ToLower() == (Crop as IModel).Name.ToLower())
                Fertiliser.Apply(Amount: Amount, Type: Fertiliser.Types.NO3N);
        }
        
    }
}
```
      Report: EventNames=[Clock].DoReport
        VariableNames:
          [Clock].Today
          [Clock].Today.Year
          [Wheat].Zadok.Stage
          [Wheat].Phenology.CurrentStageName
          [Wheat].AboveGround.Wt
          [Wheat].AboveGround.N
          [Wheat].Grain.Yield
          [Wheat].Grain.Protein
          [Wheat].Grain.Size
          [Wheat].Grain.GrainNo
          [Wheat].Grain.Wt
          [Wheat].Grain.N
          [Wheat].Total.Wt
          [Wheat].Total.N
          [Soil].Nutrient.NO3.kgha
          [Soil].SoilOrganicMatter.OC[1]
      Fertiliser
      SurfaceOrganicMatter: InitialResidueName=wheat_stubble; InitialResidueType=wheat; InitialResidueMass=0; InitialStandingFraction=0; InitialCPR=0; InitialCNR=100; FractionFaecesAdded=0.5
      Plant Wheat: CropType=Wheat; IsEnding=false; DaysAfterEnding=0
      MicroClimate: a_interception=0; b_interception=1; c_interception=0.55; d_interception=0; soil_albedo=0.3; SoilHeatFluxFraction=0.4; NightInterceptionFraction=0.5; ReferenceHeight=2
      Soil Red Sodosol (Wagga Wagga No550-YP): ASCOrder=Sodosol; ASCSubOrder=Red; SoilType=?; Site=Wagga Wagga; NearestTown=Wagga Wagga; Region=Riverina; State=New South Wales; Country=Australia; ApsoilNumber=550-YP; Latitude=-35.123; Longitude=147.354; LocationAccuracy=Regional Soil Type
        DataSource=PAWC estimated by A. Peake, CSIRO Sustainable Ecosystems (2005)
        Water
          Thickness  BD    AirDry  LL15  DUL   SAT
          100        1.55  0.06    0.12  0.24  0.38
          100        1.55  0.08    0.1   0.22  0.39
          200        1.5   0.12    0.12  0.24  0.4
          200        1.5   0.12    0.12  0.34  0.4
          300        1.55  0.12    0.12  0.34  0.4
          300        1.55  0.12    0.12  0.34  0.4
          300        1.55  0.12    0.12  0.34  0.4
          SoilCrop WheatSoil: LL=[0.12, 0.1, 0.12, 0.17, 0.18, 0.22, 0.29]; KL=[0.06, 0.06, 0.04, 0.04, 0.03, 0.02, 0.02]; XF=[1, 1, 1, 1, 1, 1, 1]
        SoilWater: SummerDate=1-Nov; SummerU=6; SummerCona=3.5; WinterDate=1-Apr; WinterU=2; WinterCona=2; DiffusConst=88; DiffusSlope=35; Salb=0.13; CN2Bare=78; CNRed=20; CNCov=0.8; max_pond=0; Thickness=[100, 100, 200, 200, 300, 300, 300]; SWCON=[0.6, 0.5, 0.5, 0.4, 0.3, 0.3, 0.3]; ResidueInterception=0
        SoilOrganicMatter: RootCN=45; EnrACoeff=7.4; EnrBCoeff=0.2; OCUnits=Total
          Thickness  OC         SoilCN  FBiom  FInert  RootWt
          100        1.23077    12.5    0.03   0.4     482.481
          100        0.615385   12.5    0.02   0.5     395.022
          200        0.307692   12.5    0.02   0.7     264.791
          200        0.153846   12.5    0.01   0.8     177.495
          300        0.0769231  12.5    0.01   0.9     97.4112
          300        0.0769231  12.5    0.01   1       53.4604
          300        0.0769231  12.5    0.01   1       29.3397
        Analysis: Thickness=[100, 100, 200, 200, 300, 300, 300]; PH=[6.6, 5.3, 6, 6.6, 9, 9, 9]; PHUnits=Water; BoronUnits=0
        InitialWater Initial water: PercentMethod=0; FractionFull=1
        Sample Initial conditions: Thickness=[1800]; NO3=[10]; NH4=[1]; NO3Units=kg/ha; NH4Units=kg/ha; SWUnits=Volumetric; OCUnits=Total; PHUnits=Water
        CERESSoilTemperature
        Nutrient
          DirectedGraphInfo={Nodes=[{Name=Inert, OutlineColour=Black}, {Name=SurfaceResidue, OutlineColour=Black}, {Name=FOMLignin, OutlineColour=Black}, {Name=FOMCellulose, OutlineColour=Black}, {Name=FOMCarbohydrate, OutlineColour=Black}, {Name=Microbial, OutlineColour=Black}, {Name=Humic, OutlineColour=Black}, {Name=Urea, OutlineColour=Black}, {Name=NO3, OutlineColour=Black}, {Name=NH4, OutlineColour=Black}, {Name=Atmosphere, OutlineColour=White}, {Name=PlantAvailableNO3, OutlineColour=Black}, {Name=PlantAvailableNH4, OutlineColour=Black}], Arcs=[{SourceName=SurfaceResidue, DestinationName=Microbial}, {SourceName=SurfaceResidue, DestinationName=Humic}, {SourceName=FOMLignin, DestinationName=Microbial}, {SourceName=FOMLignin, DestinationName=Humic}, {SourceName=FOMCellulose, DestinationName=Microbial}, {SourceName=FOMCellulose, DestinationName=Humic}, {SourceName=FOMCarbohydrate, DestinationName=Microbial}, {SourceName=FOMCarbohydrate, DestinationName=Humic}, {SourceName=Microbial, DestinationName=Microbial}, {SourceName=Microbial, DestinationName=Humic}, {SourceName=Humic, DestinationName=Microbial}, {SourceName=Urea, DestinationName=NH4}, {SourceName=NO3, DestinationName=Atmosphere}, {SourceName=NH4, DestinationName=NO3}]}
      Manager Harvest
```csharp
using System;
using Models.Core;
using Models.PMF;
using Models.Soils;
using Models.Soils.Nutrients;
using Models.Utilities;
using APSIM.Shared.Utilities;

namespace Models
{
    [Serializable]
    public class Script : Model
    {
        [Link] Plant Wheat;

        [EventSubscribe("DoManagement")]
        private void OnDoManagement(object sender, EventArgs e)
        {
            if (Wheat.IsReadyForHarvesting)
            {
               Wheat.Harvest();
               Wheat.EndCrop();    
            }
        
        }
        
    }
}
```
    SoilArbitrator
    MicroClimate: a_interception=0; b_interception=1; c_interception=0.55; d_interception=0; soil_albedo=0.23; SoilHeatFluxFraction=0.4; NightInterceptionFraction=0.5; ReferenceHeight=2
  Simulation NoFertiliser
    Clock: StartDate=1979-01-01; EndDate=1990-12-31
    Summary SummaryFile
    Weather: FileName=Wagga.met
    Zone Field: Area=1; Slope=0
      Operations SowOperations: same as Fertiliser.Field.SowOperations
      Report: same as Fertiliser.Field.Report
      Fertiliser
      SurfaceOrganicMatter: InitialResidueName=wheat_stubble; InitialResidueType=wheat; InitialResidueMass=0; InitialStandingFraction=0; InitialCPR=0; InitialCNR=100; FractionFaecesAdded=0.5
      Plant Wheat: CropType=Wheat; IsEnding=false; DaysAfterEnding=0
      MicroClimate: a_interception=0; b_interception=1; c_interception=0.55; d_interception=0; soil_albedo=0.3; SoilHeatFluxFraction=0.4; NightInterceptionFraction=0.5; ReferenceHeight=2
      Soil Red Sodosol (Wagga Wagga No550-YP): same as Fertiliser.Field.Red Sodosol (Wagga Wagga No550-YP)
      Manager Harvest: same as Fertiliser.Field.Harvest
    SoilArbitrator
    MicroClimate: a_interception=0; b_interception=1; c_interception=0.55; d_interception=0; soil_albedo=0.23; SoilHeatFluxFraction=0.4; NightInterceptionFraction=0.5; ReferenceHeight=2
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