Simulations: Version=150
  DataStore
    ExcelInput: FileNames=[_measured_FACTS_Kelley_NG.xlsx]; SheetNames=[Crop, Water, Nitrogen, Classic, Tile, SurfaceOM]
  Folder TileDrainageWaterTable
    Memo
      Central Iowa experiment long-term experiment (est 2009) with different cropping systems. System_13 refers to a corn-soy and System_14 refers to a soy-corn rotation. Exp data collected from 3-replications. Each plot (size 24 rows x about 30 m long) has three subsurface tiles drainage, two at the border and one at the center of each plot. Subsurface drainage and N leaching were collected approx. every 5-days (March to November). Soil moisture and WT data were collected using Decagon sesnors. WT well depth about 2.5m.

      ### Status of the sim (May 2022) - SVA notes:
      1. Weather comes a local station (on site) until 2018, after than we use data from IEM station (5 km distance from the site)
      2. Soil profile is identical to the one used in classic
      3. Management is 95% final (need to double check and verfiy as we noticed some errors in the conversion from classic to NG)
      4. Cultivars: we used a fixed corn and a fixed soy cultivar for all years, we have not yet converted all the cultivars from classic to NG
      5. Additional measured data to be added (work in progress)

      ### Relevant publications
      1. Archontoulis et al. 2020 (Crop Science) https://acsess.onlinelibrary.wiley.com/doi/full/10.1002/csc2.20039
      2. Martinez-Feria et al. 2018 (Agric, Ecos & Env) https://www.sciencedirect.com/science/article/abs/pii/S0167880918300021
      2. Martinez-Feria et al. 2016 (Field Crops Res) https://www.sciencedirect.com/science/article/abs/pii/S0378429016302027
      4. Dietzel et al. 2016 (Global Change Biology) https://onlinelibrary.wiley.com/doi/full/10.1111/gcb.13101
    Simulation System_13
      Summary summaryfile
      Zone paddock: Area=1; Slope=0; AspectAngle=0; Altitude=50
        Folder ClassicFiles
          Manager N Deposition
            PPM = 0.0078
```csharp
using Models.PMF;
using Models.Core;
using Models.Climate;
using System;
namespace Models
{
    [Serializable]
    [System.Xml.Serialization.XmlInclude(typeof(Model))]
    public class Script : Model
    {
        [Link] Clock Clock;
        [Link] Weather Weather;
        [Link] Fertiliser Fertiliser;

        [Description("Rainfall NO3N ppm.")]
        public double PPM { get; set; }

        [Description("Nitrogen deposited by rainfall.")]
        public double NDeposited { get => deposition; }
        
        private double deposition;
        [EventSubscribe("DoManagement")]
        private void OnDoManagement(object sender, EventArgs e)
        {
        	deposition = Weather.Rain * PPM;
        	if (deposition > 0)
        		Fertiliser.Apply(deposition, Fertiliser.Types.NO3N, doOutput: false); 
        }
    }
}
```
          Operations Mgt_system13
            2006-04-20  [SurfaceOrganicMatter].Incorporate(fraction:0.15, depth:250)
            2006-05-15  [Soybean].Sow(cultivar: Generic_MG2, population: 30, depth: 50, rowSpacing:750)
            2006-06-10  [Soybean].Harvest()
            2006-06-10  [Soybean].EndCrop()
            2006-06-11  [SurfaceOrganicMatter].Incorporate(fraction:0.01, depth:250)
            2007-04-20  [SurfaceOrganicMatter].Incorporate(fraction:0.15, depth:250)
            2007-04-05  [Fertiliser].Apply(Amount:168, Type: UreaN, Depth: 50)
            2007-04-05  [Maize].Sow(cultivar: Laila, population: 8, depth: 50, rowSpacing:750)
            2007-10-15  [Maize].Harvest()
            2007-10-15  [Maize].EndCrop()
            2007-11-11  [SurfaceOrganicMatter].Incorporate(fraction:0.6, depth:250)
            2008-04-20  [SurfaceOrganicMatter].Incorporate(fraction:0.15, depth:250)
            2008-05-15  [Soybean].Sow(cultivar: Generic_MG2, population: 30, depth: 50, rowSpacing:750)
            2008-09-20  [Soybean].Harvest()
            2008-09-20  [Soybean].EndCrop()
            2008-10-20  [SurfaceOrganicMatter].Incorporate(fraction:0.3, depth:250)
            2009-08-05  [Fertiliser].Apply(84, Fertiliser.Types.NH4NO3N, 150)
            2009-06-17  [Fertiliser].Apply(56, Fertiliser.Types.NH4NO3N, 150)
            2009-08-05  [Maize].Sow(cultivar: Laila, population: 8, depth: 50, rowSpacing:750)
            2009-10-10  [Maize].Harvest()
            2009-10-10  [Maize].EndCrop()
            2009-11-11  [SurfaceOrganicMatter].Incorporate(fraction:0.5, depth:250)
            2010-04-20  [SurfaceOrganicMatter].Incorporate(fraction:0.25, depth:150)
            2010-06-05  [Soybean].Sow(cultivar: Generic_MG2, population: 30, depth: 50, rowSpacing:750)
            2010-09-02  [Soybean].Harvest()
            2010-09-02  [Soybean].EndCrop()
            2011-05-11  [Fertiliser].Apply(87, Fertiliser.Types.NH4NO3N, 150)
            2011-06-29  [Fertiliser].Apply(39, Fertiliser.Types.NH4NO3N, 150)
            2011-05-11  [Maize].Sow(cultivar: Laila, population: 8, depth: 50, rowSpacing:750)
            2011-10-03  [Maize].Harvest()
            2011-10-03  [Maize].EndCrop()
            2012-04-20  [SurfaceOrganicMatter].Incorporate(fraction:0.25, depth:150)
            2012-05-11  [Soybean].Sow(cultivar: Generic_MG2, population: 30, depth: 50, rowSpacing:750)
            2012-09-04  [Soybean].Harvest()
            2012-09-04  [Soybean].EndCrop()
            2013-05-17  [Fertiliser].Apply(89, Fertiliser.Types.NH4NO3N, 150)
            2013-06-28  [Fertiliser].Apply(115, Fertiliser.Types.NH4NO3N, 150)
            2013-05-15  [Maize].Sow(cultivar: Laila, population: 8, depth: 50, rowSpacing:750)
            2013-10-01  [Maize].Harvest()
            2013-10-01  [Maize].EndCrop()
            2014-04-20  [SurfaceOrganicMatter].Incorporate(fraction:0.25, depth:150)
            2014-05-20  [Soybean].Sow(cultivar: Generic_MG2, population: 30, depth: 50, rowSpacing:750)
            2014-09-05  [Soybean].Harvest()
            2014-09-05  [Soybean].EndCrop()
            2015-05-13  [Fertiliser].Apply(78, Fertiliser.Types.UreaN, 150);
            2015-06-23  [Fertiliser].Apply(130, Fertiliser.Types.UreaN, 150);
            2015-05-13  [Maize].Sow(cultivar: Laila, population: 8, depth: 50, rowSpacing:750)
            2015-10-13  [Maize].Harvest()
            2015-10-13  [Maize].EndCrop()
            2016-04-15  [Fertiliser].Apply(Amount:29, Type: UreaN, Depth: 50)
            2016-04-22  [SurfaceOrganicMatter].Incorporate(fraction:0.01, depth:250)
            2016-05-18  [Soybean].Sow(cultivar: Generic_MG2, population: 30, depth: 50, rowSpacing:750)
            2016-10-17  [Soybean].Harvest()
            2016-10-17  [Soybean].EndCrop()
            2017-03-05  [SurfaceOrganicMatter].Incorporate(fraction:0.01, depth:150)
            2017-05-15  [Fertiliser].Apply(Amount:84, Type: UreaN, Depth: 50)
            2017-05-15  [Maize].Sow(cultivar: Laila, population: 8, depth: 50, rowSpacing:750)
            2017-10-18  [Maize].Harvest()
            2017-10-18  [Maize].EndCrop()
            2018-04-22  [SurfaceOrganicMatter].Incorporate(fraction:0.01, depth:250)
            2018-05-17  [Soybean].Sow(cultivar: Generic_MG2, population: 30, depth: 50, rowSpacing:750)
            2018-10-23  [Soybean].Harvest()
            2018-10-23  [Soybean].EndCrop()
            2019-03-05  [SurfaceOrganicMatter].Incorporate(fraction:0.01, depth:150)
            2019-04-14  [Fertiliser].Apply(30, Fertiliser.Types.NH4N, 50)
            2019-04-24  [Fertiliser].Apply(Amount:112, Type: UreaN, Depth: 50)
            2019-04-06  [Maize].Sow(cultivar: Laila, population: 8, depth: 50, rowSpacing:750)
            2019-06-28  [Fertiliser].Apply(Amount:66, Type: UreaN, Depth: 50)
            2019-11-14  [Maize].Harvest()
            2019-11-14  [Maize].EndCrop()
          Manager WaterTable script (disabled)
```csharp
using Models.PMF;
using Models.Core;
using System;
namespace Models
{
    [Serializable]
    [System.Xml.Serialization.XmlInclude(typeof(Model))]
    public class Script : Model
    {
        [Link] Clock Clock;

    }
}
```
          Manager System Variables (disabled)
            script: same as in TileDrainageWaterTable.System_13.paddock.ClassicFiles.WaterTable script
          Manager InitialiseWaterTableOnce (disabled)
          Manager InstallTileDrainage (disabled)
```csharp
using Models.PMF;
using Models.Core;
using System;
namespace Models
{
    [Serializable]
    [System.Xml.Serialization.XmlInclude(typeof(Model))]
    public class Script : Model
    {
        [Link] Clock Clock;

        [EventSubscribe("DoManagement")]
        private void OnDoManagement(object sender, EventArgs e)
        {
            /*
                ! tiles were installed in 2009

if year > 2008 then 
subsurface_drain_open = 'true' ! this means tile = open
else
subsurface_drain_open = 'false' ! this means tile = closed
endif 
            */
        }
    }
}
```
          Manager OxdefRUEDamageSoybean (disabled)
```csharp
using Models.Core;
using System.Collections.Generic;
using System;
namespace Models
{
    [Serializable]
    [System.Xml.Serialization.XmlInclude(typeof(Model))]
    public class Script : Model
    {

    /*
      
   [Link] Paddock MyPaddock; // Can be used to dynamically get access to simulation structure and variables
   [Input] DateTime Today;   // Equates to the value of the current simulation date - value comes from CLOCK
   [Param] string crop;         // Will be used to get oxdef values while crop is not out
   [Param] double threshold;
   [Param] double slope;
   [Param] double max;
   [Param] string xDayDmgStr;  //For the stage linear interpolation 
   [Param] string yDayDmgStr;
   [Param] int dmgDays;      //Days of 0 oxdef to wait to apply damage
   [Output] double oxdef_sum;
   [Output] double rue_damage;
   [Output] int day_limit;
   
   Component comp; //Hopefully the crop!
   bool damaged = false; //For if we are in a damaged state
   int days = 0; 
   
   List<double> tracker = new List<double>();
   
   double[] oldRUE; //For if the crop is maize (plant module supports RUEFactor, maize model does not...)
   bool afterSowing = false;
   
   //Linear interpolation function for doing days to set damage
   double[] xDayDmgFun;
   double[] yDayDmgFun;
   

   // The following event handler will be called once at the beginning of the simulation
   [EventHandler] public void OnInitialised()
   {
      comp = (Component) MyPaddock.LinkByName(crop);
      
      xDayDmgFun = (from a in xDayDmgStr.Split(',')
            select Convert.ToDouble(a)).ToArray();
      
      yDayDmgFun = (from a in yDayDmgStr.Split(',')
            select Convert.ToDouble(a)).ToArray();
      
   }
   
   [EventHandler] public void OnSowing()
   {
      if (crop == "maize")
         afterSowing = true;
   }

   // The following event handler will be called each day at the beginning of the day
   [EventHandler] public void OnPrepare()
   {
      //Needed for maize, unfortunately RUE cannot be read on sowing...
      if (afterSowing)
      {
         comp.Get("RUE", out oldRUE);
         afterSowing = false;
      }
      
      if (damaged)
         days++;
      
      string status;
      comp.Get("plant_status", out status);
      if (status != "out" && !damaged)
      {
         double oxdef_photo;
         comp.Get("oxdef_photo", out oxdef_photo);
         tracker.Insert(0, (1.0 - oxdef_photo));
      
         if (tracker.Take(dmgDays).Sum() == 0.0)//Check if the last 4 days have had no oxdef
         {
            double total = tracker.Sum();
            rue_damage = oxdefDmg(total);
            if (rue_damage > 0.0)
            {
               day_limit = dayLimit(total);
               doDamage(rue_damage);
               damaged = true;
            }
            
            
            tracker.Clear(); 
            oxdef_sum = 0.0;
         }
         else
            oxdef_sum = tracker.Sum();
      }
      else
         oxdef_sum = 0.0;
      
      
      
      if (days == day_limit && damaged)
      {
         damaged = false;
         days = 0;
         day_limit = 0;
         rue_damage = 0.0;
         doDamage(0.0);
      }

   }
   
   [EventHandler] public void OnHarvesting()
   {
      tracker.Clear();
   }
   
   private void doDamage(double dmg)
   {
      if (crop == "maize")
         comp.Set("RUE", oldRUE.Select(x => x * (1.0 - dmg)).ToArray());
      else //Assume Plant module if not maize. this means the script will not work on some crops
         comp.Set("RUEFactor", (1.0 - dmg));
   }
   
   private double oxdefDmg(double totalOxdef)
   {
      return MathUtility.Bound(slope * (totalOxdef - threshold), 0.0, max);
   }
   
   private int dayLimit(double totalOxdef)
   {
      double stage;
      comp.Get("stage", out stage);
      bool dum;
      double mult = MathUtility.LinearInterpReal(stage, xDayDmgFun, yDayDmgFun, out dum);
      return Convert.ToInt32(Math.Round(mult * totalOxdef));
   }


*/
    }
}
```
          Manager OxdefRUEDamagemaize (disabled): same as TileDrainageWaterTable.System_13.paddock.ClassicFiles.OxdefRUEDamageSoybean
          Manager WinterTileClose (disabled)
```csharp
using Models.PMF;
using Models.Core;
using System;
namespace Models
{
    [Serializable]
    [System.Xml.Serialization.XmlInclude(typeof(Model))]
    public class Script : Model
    {
        [Link] Clock Clock;

        [EventSubscribe("DoManagement")]
        private void OnDoManagement(object sender, EventArgs e)
        {
            /*
                ! tiles were installed in 2009

if day > 60 and day < 365 then 
subsurface_drain_open = 'true' ! this means tile = open
else
subsurface_drain_open = 'false' ! this means tile = closed
endif 
            */
        }
    }
}
```
        Fertiliser
        SurfaceOrganicMatter: InitialResidueName=soybean; InitialResidueType=soybean; InitialResidueMass=1400; InitialStandingFraction=0; InitialCPR=0; InitialCNR=36.5
        Plant maize: ResourceName=Maize
        Report Outputfile: EventNames=[Clock].EndOfDay
          VariableNames:
            [Clock].Today
            ([Maize].AboveGround.Wt + [Soybean].AboveGround.Wt)*10 as CropBiomass
            ([Maize].Grain.Wt + [Soybean].Grain.Wt)*10 as CropYield
            [SurfaceOrganicMatter].Wt
            [SWIM].WaterTable
            [SWIM].SubsurfaceDrain
            [SWIM].SubsurfaceDrainNO3
            ([SWIM].SW[3]*0.5 + [SWIM].SW[4]*0.5) as SW_15cm
            ([SWIM].SW[6]*0.65 + [SWIM].SW[7]*0.35) as SW_45cm
            [SWIM].SW[12] as SW_200cm
            [SWIM].Drainage
            sum([SoilCobs].Nutrient.NO3.kgha[1:5]) as NO3_030cm
            sum([SoilCobs].Nutrient.NO3.kgha[6:7]) as NO3_3060cm
            sum([SWIM].SWmm[1:12]) as SW_02m
            Sum of [SWIM].SubsurfaceDrain from 1-Jan to 31-Dec as Annual_tile_drainage
            Sum of [SWIM].SubsurfaceDrainNO3 from 1-Jan to 31-Dec as Annual_tile_drainage_no3
        Soil SoilCobs: DataSource=CSIRO Sustainable Ecosystems, Toowoomba
          Comments=Soil naming structure: \State\Region\Classification-Local Name (Site/district and locator number); oc and ph estimated
          Physical
            Thickness  ParticleSizeClay  ParticleSizeSand  ParticleSizeSilt  BD     AirDry  LL15   DUL    SAT    KS
            37         25.67             38.29             36.04             1.25   0.07    0.14   0.263  0.435  617
            38         25.67             38.29             36.04             1.25   0.0805  0.161  0.296  0.462  617
            50         26.43             37.95             35.65             1.25   0.055   0.11   0.256  0.443  617
            90         28.09             36.57             35.65             1.25   0.088   0.11   0.254  0.446  205
            85         28.5              36.23             35.65             1.25   0.12    0.12   0.293  0.478  205
            100        29                34                37                1.35   0.115   0.115  0.252  0.445  205
            200        29                34                37                1.35   0.122   0.122  0.252  0.4    135
            300        27                37                36                1.551  0.1     0.1    0.296  0.394  388
            300        27                37                36                1.551  0.11    0.11   0.296  0.389  388
            320        27                37                36                1.551  0.138   0.138  0.296  0.389  388
            300        27                37                36                1.551  0.165   0.165  0.296  0.349  11.872
            280        27                37                36                1.65   0.146   0.146  0.274  0.323  9.125
            300        27                37                36                1.65   0.146   0.146  0.274  0.319  6.639
            300        27                37                36                1.65   0.146   0.146  0.274  0.314  4.523
            300        27                37                36                1.65   0.146   0.146  0.274  0.31   3.255
            300        27                37                36                1.65   0.146   0.146  0.274  0.307  2.342
            300        27                37                36                1.65   0.146   0.146  0.274  0.303  1.686
            300        27                37                36                1.65   0.146   0.146  0.274  0.301  1.213
            SoilCrop MaizeSoil
              LL=[0.14, 0.161, 0.11, 0.11, 0.12, 0.148673, 0.165864, 0.192725, 0.22341386, 0.252352, 0.27151, 0.256995, 0.262, 0.262, 0.262, 0.262, 0.262, 0.262]
              KL=[0.08, 0.08, 0.08, 0.08, 0.08, 0.08, 0.08, 0.08, 0.08, 0.0420478, 0.03459, 0.029159, 0.0230232, 0.0162927, 0.0111758, 0.0067466, 0.00313554, 0.000603434]
              XF=[1, 1, 1, 1, 1, 1, 1, 1, 1, 1, 1, 1, 0.4, 0, 0, 0, 0, 0]
            SoilCrop SoybeanSoil: same as TileDrainageWaterTable.System_13.paddock.SoilCobs.Physical.MaizeSoil
            SoilCrop WheatSoil
              LL=[0.14, 0.161, 0.11, 0.11, 0.12, 0.148673, 0.165864, 0.192725, 0.22341386, 0.252352, 0.27151, 0.256995, 0.262, 0.262, 0.262, 0.262, 0.262, 0.262]
              KL=[0.1, 0.1, 0.1, 0.1, 0.1, 0.1, 0.1, 0.1, 0.1, 0.0525598, 0.0432375, 0.0364488, 0.0287791, 0.0203659, 0.0139697, 0.00843325, 0.00391942, 0.000754293]
              XF=[1, 1, 1, 1, 1, 1, 1, 1, 1, 1, 1, 1, 0.4, 0, 0, 0, 0, 0]
              LL source: Estimated based on local knowledge (layer 1, 2, 3, 4, 5, 6, 7)
          Organic: FOMCNRatio=23
            Thickness  Carbon  SoilCNRatio  FBiom       FInert     FOM
            37         3.926   11           0.1225      0.365      93.5878
            38         3.822   11           0.1225      0.365      90.8917
            50         3.38    11           0.0915855   0.365      87.4623
            90         3.029   11           0.0643885   0.42705    81.612
            85         2.73    11           0.0488732   0.4589875  76.4466
            100        1.703   11           0.0398626   0.49275    70.7865
            200        1.729   11           0.0314565   0.715      60.6927
            300        1.495   11           0.0240318   0.946575   48.1853
            300        0.637   11           0.0192202   0.965205   38.2554
            320        0.208   11           0.0161866   0.984456   29.9081
            300        0.13    11           0.0141235   0.999      23.7447
            280        0.13    11           0.0129188   0.999      19.1438
            300        0.13    11           0.0117614   0.999      15.1987
            300        0.13    11           0.0106631   0.999      12.0666
            300        0.13    11           0.00990398  0.999      9.57992
            300        0.13    11           0.0092672   0.999      7.60571
            300        0.13    11           0.00872398  0.999      6.03835
            300        0.13    11           0.0082541   0.999      4.79398
          Chemical
            Thickness=[37, 38, 50, 90, 85, 100, 200, 300, 300, 320, 300, 280, 300, 300, 300, 300, 300, 300]
            PH=[6.318, 6.318, 5.902, 5.948, 5.959, 6.7, 6.7, 7.9, 7.9, 7.9, 7.9, 7.9, 7.9, 7.9, 7.9, 7.9, 7.9, 7.9]
            PH source: Estimated based on local knowledge (layer 1, 2, 3, 4, 5, 6, 7)
          Sample InitialNitrogen: SWUnits=Volumetric; OCUnits=Total; PHUnits=Water
            Thickness  NO3  NH4  SW
            37         0.5  1.5  0.263
            38         0.8  1.5  0.296
            50         0.9  1.4  0.256
            90         2.2  0.6  0.254
            85         2.9  0.5  0.293
            100        3.6  4.2  0.252
            200        4    4.1  0.252
            300        3    4.4  0.296
            300        1    4.1  0.296
            320        1.7  0.3  0.296
            300        1.7  0.1  0.296
            280        0.9  0.8  0.274
            300        0    0    0.274
            300        0.7  1    0.274
            300        1    1    0.274
            300        1    1    0.274
            300        1    1    0.274
            300        1    1    0.274
          Swim3 Swim: PrecipitationInterception=0; ersoil=1e-06; ernode=1e-06; slcerr=1e-06; Salb=0.13; CN2Bare=65; CNRed=20; CNCov=0.8; KDul=0.3; PSIDul=-300; VC=true; DTMin=0; DTMax=1440; MaxWaterIncrement=10; SpaceWeightingFactor=0; SoluteSpaceWeightingFactor=0; Dis=15; Disp=1; A=1; DTHC=0; DTHP=1; Diagnostics=false; WaterTable=0
            SwimSubsurfaceDrain: DrainDepth=1070; DrainSpacing=13500; DrainRadius=52; Klat=1000; ImpermDepth=3900
            SwimSoluteParameters NO3: WaterTableConcentration=0; D0=0.05
              Thickness  Exco  FIP
              100        0     1
              200        0     1
              200        0     1
              200        0     1
              200        0     1
              200        0     1
              200        0     1
              200        0     1
              200        0     1
              200        0     1
              200        0     1
              200        0     1
              200        0     1
              200        0     1
              200        0     1
              200        0     1
            SwimSoluteParameters NH4: WaterTableConcentration=0; D0=0.05
              Thickness  Exco  FIP
              100        1     1
              200        1     1
              200        1     1
              200        1     1
              200        1     1
              200        1     1
              200        1     1
              200        1     1
              200        1     1
              200        1     1
              200        1     1
              200        1     1
              200        1     1
              200        1     1
              200        1     1
              200        1     1
            SwimSoluteParameters Urea: same as TileDrainageWaterTable.System_13.paddock.SoilCobs.Swim.NO3
            SwimSoluteParameters CL: same as TileDrainageWaterTable.System_13.paddock.SoilCobs.Swim.NO3
            SwimSoluteParameters PlantAvailableNH4: same as TileDrainageWaterTable.System_13.paddock.SoilCobs.Swim.NH4
            SwimSoluteParameters PlantAvailableNO3: same as TileDrainageWaterTable.System_13.paddock.SoilCobs.Swim.NO3
            SwimSoluteParameters LabileP: same as TileDrainageWaterTable.System_13.paddock.SoilCobs.Swim.NO3
            SwimSoluteParameters UnavailableP: same as TileDrainageWaterTable.System_13.paddock.SoilCobs.Swim.NO3
          CERESSoilTemperature Temperature
          Nutrient
          Manager SWIMSetLowerBC
            LowerBCType = potential
            LowerBCValue = -2700
```csharp
using Models.Climate;
using APSIM.Shared.Utilities;
using Models.Soils.Nutrients;
using Models.Soils;
using Models.PMF;
using Models.Core;
using System.Xml.Serialization;
using System;
using Models.AgPasture;
using Models.Interfaces;

namespace Models
{
    [Serializable] 
    [System.Xml.Serialization.XmlInclude(typeof(Model))]
    public class Script : Model
    {
        [Link] Clock clock;
        [Link] ISummary summary;
        [Link] private Swim3 swim;
        
        public enum LowerBCTypeOptions {gradient,seepage,potential};

        [Separator("Sets the lower boundary condition type (and value if set to 'potential' for SWIM3. The change is applied at the beginning of the first day of the simulation.")]
        [Description("What lower boundary condition is wanted?")] 
        public LowerBCTypeOptions LowerBCType { get; set; }
        
        [Description("If 'potential', then what potential? Should be negative (mm) ")]
        [Display(EnabledCallback = "IsPotential")] 
        public double LowerBCValue { get; set; }
        
        /// <summary></summary>
        public bool IsPotential => LowerBCType == LowerBCTypeOptions.potential;
        

        public double SoilWaterStart  { get; set; }
        public double SoilWaterEnd  { get; set; }

        [EventSubscribe("DoManagement")]
        private void DoDailyCalculations(object sender, EventArgs e)
        {
            if (clock.Today == clock.StartDate)
            {
                summary.WriteMessage(this, "Script is setting lower boundary condition to " + LowerBCType, MessageType.Diagnostic);
                if (LowerBCType == LowerBCTypeOptions.gradient)
                    swim.SetLowerBCForGradient(bbcGradient: 0.0);   // in cm/cm (ibbc=0) Note that this is the default setting
                else if (LowerBCType == LowerBCTypeOptions.potential)
                    swim.SetLowerBCForGivenPotential(bbcPotential: LowerBCValue /10.0 );    //  convert to cm (ibbc=1), DUL is -100 cm so values more positive will often result in inflow to the bottom of the soil profile. Input in mm so divide here.
                else if (LowerBCType == LowerBCTypeOptions.seepage)
                    swim.SetLowerBCForSeepage(bbcPotentialSeepage: 0.0);  // in cm (ibbc=3). This is for zero-tension lysimeters
                else
                	throw new Exception("Wrong lower boundary condition type");
            }
        }
    }
}
```
        Plant soybean: ResourceName=Soybean
        MicroClimate: a_interception=0; b_interception=1; c_interception=0; d_interception=0; SoilHeatFluxFraction=0.4; MinimumHeightDiffForNewLayer=0; NightInterceptionFraction=0.5; ReferenceHeight=2
      Weather: FileName=KelleyNov2021.met
      Clock: Start=2006-01-01; End=2019-12-31
      SoilArbitrator
    Simulation System_14
      Summary summaryfile
      Zone paddock: Area=1; Slope=0; AspectAngle=0; Altitude=50
        Folder Manager folder
          Manager N Deposition: same as TileDrainageWaterTable.System_13.paddock.ClassicFiles.N Deposition
          Operations Mgt_system14
            //   year
            2006-05-03  [SurfaceOrganicMatter].Incorporate(fraction: 0.01, depth: 150)
            2006-05-15  [Fertiliser].Apply(84, Fertiliser.Types.UreaN, 50)
            2006-05-15  [Maize].Sow(cultivar: Laila, population: 7, depth: 50, rowSpacing:760)
            2006-10-18  [Maize].Harvest
            2006-10-18  [Maize].EndCrop
            2006-11-11  [SurfaceOrganicMatter].Incorporate(fraction: 0.5, depth: 250)
            2007-04-15  [Fertiliser].Apply(29, Fertiliser.Types.UreaN, 50)
            2007-04-22  [SurfaceOrganicMatter].Incorporate(fraction: 0.01, depth: 150)
            2007-05-18  [Soybean].Sow(cultivar: Generic_MG2, population: 30.5, depth: 50, rowSpacing:760)
            2007-10-17  [Soybean].Harvest
            2007-10-17  [Soybean].EndCrop
            2008-05-15  [Fertiliser].Apply(72, Fertiliser.Types.NH4NO3N, 150)
            2008-06-24  [Fertiliser].Apply(101, Fertiliser.Types.NH4NO3N, 150)
            2008-05-15  [Maize].Sow(cultivar: Laila, population: 7.9, depth: 50, rowSpacing:760)
            2008-10-12  [Maize].Harvest
            2008-10-12  [Maize].EndCrop
            2008-11-11  [SurfaceOrganicMatter].Incorporate(fraction: 0.01, depth: 150)
            2009-05-08  [Soybean].Sow(cultivar: Generic_MG2, population: 30, depth: 50, rowSpacing:750)
            2009-09-25  [Soybean].Harvest
            2009-09-25  [Soybean].EndCrop
            2010-05-06  [Fertiliser].Apply(87, Fertiliser.Types.UreaN, 150)
            2010-06-17  [Fertiliser].Apply(18, Fertiliser.Types.UreaN, 150)
            2010-05-06  [Maize].Sow(cultivar: Laila, population: 7.9, depth: 50, rowSpacing:760)
            2010-09-19  [Maize].Harvest
            2010-09-19  [Maize].EndCrop
            2011-05-11  [Soybean].Sow(cultivar: Generic_MG2, population: 30, depth: 50, rowSpacing:750)
            2011-09-10  [Soybean].Harvest
            2011-09-10  [Soybean].EndCrop
            2012-05-11  [Fertiliser].Apply(87, Fertiliser.Types.UreaN, 150)
            2012-06-12  [Fertiliser].Apply(134, Fertiliser.Types.UreaN, 150)
            2012-05-11  [Maize].Sow(cultivar: Laila, population: 7.9, depth: 50, rowSpacing:760)
            2012-09-22  [Maize].Harvest
            2012-09-22  [Maize].EndCrop
            2013-04-15  [Fertiliser].Apply(29, Fertiliser.Types.UreaN, 50)
            2013-05-17  [Soybean].Sow(cultivar: Generic_MG2, population: 30, depth: 50, rowSpacing:750)
            2013-09-10  [Soybean].Harvest
            2013-09-10  [Soybean].EndCrop
            2014-05-20  [Fertiliser].Apply(78, Fertiliser.Types.UreaN, 150)
            2014-06-16  [Fertiliser].Apply(105, Fertiliser.Types.UreaN, 150)
            2014-05-20  [Maize].Sow(cultivar: Laila, population: 7.9, depth: 50, rowSpacing:760)
            2014-09-10  [Maize].Harvest
            2014-09-10  [Maize].EndCrop
            2015-06-02  [Soybean].Sow(cultivar: Generic_MG2, population: 30, depth: 50, rowSpacing:750)
            2015-10-13  [Soybean].Harvest
            2015-10-13  [Soybean].EndCrop
            2016-04-15  [Fertiliser].Apply(29, Fertiliser.Types.UreaN, 50)
            2016-05-03  [SurfaceOrganicMatter].Incorporate(fraction: 0.01, depth: 150)
            2016-05-18  [Fertiliser].Apply(84, Fertiliser.Types.UreaN, 50)
            2016-05-18  [Maize].Sow(cultivar: Laila, population: 9.4, depth: 50, rowSpacing:760)
            2016-06-15  [Fertiliser].Apply(44, Fertiliser.Types.UreaN, 50)
            2016-10-11  [Maize].Harvest
            2016-10-11  [Maize].EndCrop
            2016-11-11  [SurfaceOrganicMatter].Incorporate(fraction: 0.01, depth: 150)
            2017-04-22  [SurfaceOrganicMatter].Incorporate(fraction: 0.01, depth: 150)
            2017-05-30  [Soybean].Sow(cultivar: Generic_MG2, population: 20, depth: 50, rowSpacing:760)
            2017-10-19  [Soybean].Harvest
            2017-10-19  [Soybean].EndCrop
            2018-05-03  [SurfaceOrganicMatter].Incorporate(fraction: 0.01, depth: 150)
            2018-05-16  [Fertiliser].Apply(80, Fertiliser.Types.UreaN, 50)
            2018-05-17  [Maize].Sow(cultivar: Laila, population: 8.6, depth: 50, rowSpacing:760)
            2018-06-18  [Fertiliser].Apply(115, Fertiliser.Types.UreaN, 50)
            2018-10-17  [Maize].Harvest
            2018-10-17  [Maize].EndCrop
            2018-11-11  [SurfaceOrganicMatter].Incorporate(fraction: 0.01, depth: 250)
            2019-04-14  [Fertiliser].Apply(30, Fertiliser.Types.NH4N, 50)
            2019-04-22  [SurfaceOrganicMatter].Incorporate(fraction: 0.01, depth: 250)
            2019-06-10  [Soybean].Sow(cultivar: Generic_MG2, population: 32, depth: 50, rowSpacing:760)
            2019-10-27  [Soybean].Harvest
            2019-10-27  [Soybean].EndCrop
          Manager SpecialReporter (disabled)
```csharp
using Models.Core;
using System;
namespace Models
{
    [Serializable]
    [System.Xml.Serialization.XmlInclude(typeof(Model))]
    public class Script : Model
    {

    /*
      
   [Link] Paddock MyPaddock; // Can be used to dynamically get access to simulation structure and variables
   [Input] DateTime Today;   // Equates to the value of the current simulation date - value comes from CLOCK
   [Param] string date;         // The value for this will come from the Properties page.
   [Param] string date2;
   
   [Event] public event NullTypeDelegate SpecialReport;
   [Event] public event NullTypeDelegate SpecialReport2;

   
   // The following event handler will be called once at the beginning of the simulation
   [EventHandler] public void OnInitialised()
   {
      
   }
      
   // The following event handler will be called each day at the beginning of the day
   [EventHandler] public void OnPrepare()
   {
      if (DateUtility.DatesEqual(date, Today))
         SpecialReport.Invoke();
      
      if (DateUtility.DatesEqual(date2, Today))
         SpecialReport2.Invoke();
   }
   

*/
    }
}
```
          Manager WaterTable script (disabled)
            script: same as in TileDrainageWaterTable.System_13.paddock.ClassicFiles.WaterTable script
          Manager System Variables (disabled)
            script: same as in TileDrainageWaterTable.System_13.paddock.ClassicFiles.WaterTable script
          Manager InitialiseWaterTableOnce (disabled)
          Manager InstallTileDrainage (disabled)
            script: same as in TileDrainageWaterTable.System_13.paddock.ClassicFiles.WaterTable script
          Manager OxdefRUEDamageSoybean (disabled): same as TileDrainageWaterTable.System_13.paddock.ClassicFiles.OxdefRUEDamageSoybean
          Manager OxdefRUEDamagemaize (disabled): same as TileDrainageWaterTable.System_13.paddock.ClassicFiles.OxdefRUEDamageSoybean
          Manager WinterTileClose (disabled)
            script: same as in TileDrainageWaterTable.System_13.paddock.ClassicFiles.WaterTable script
        Fertiliser
        SurfaceOrganicMatter: InitialResidueName=soybean; InitialResidueType=soybean; InitialResidueMass=1400; InitialStandingFraction=0; InitialCPR=0; InitialCNR=36.5
        Plant maize: ResourceName=Maize
        Report Outputfile: EventNames=[Clock].EndOfDay
          VariableNames:
            [Clock].Today
            ([Maize].AboveGround.Wt + [Soybean].AboveGround.Wt)*10 as CropBiomass
            ([Maize].Grain.Wt + [Soybean].Grain.Wt)*10 as CropYield
            [SurfaceOrganicMatter].Wt
            [SWIM].WaterTable
            [SWIM].SubsurfaceDrain
            [SWIM].SubsurfaceDrainNO3
            ([SWIM].SW[3]*0.5 + [SWIM].SW[4]*0.5) as SW_15cm
            ([SWIM].SW[6]*0.65 + [SWIM].SW[7]*0.35) as SW_45cm
            [SWIM].SW[12] as SW_200cm
            [SWIM].Drainage
            sum([SoilCobs].Nutrient.NO3.kgha[1:5]) as NO3_030cm
            sum([SoilCobs].Nutrient.NO3.kgha[6:7]) as NO3_3060cm
            sum([SWIM].SWmm[1:12]) as SW_02m
            Sum of [SWIM].SubsurfaceDrain from 1-Jan to 31-Dec as Annual_tile_drainage
            Sum of [SWIM].SubsurfaceDrainNO3 from 1-Jan to 31-Dec as Annual_tile_drainage_no3
            [Clock].Today.Year
            [Clock].Today.Month
            [Clock].Today.DayOfYear
        Plant soybean: ResourceName=Soybean
        Soil SoilCobs: DataSource=CSIRO Sustainable Ecosystems, Toowoomba
          Comments=Soil naming structure: \State\Region\Classification-Local Name (Site/district and locator number); oc and ph estimated
          Physical: same as TileDrainageWaterTable.System_13.paddock.SoilCobs.Physical
          Organic: same as TileDrainageWaterTable.System_13.paddock.SoilCobs.Organic
          Chemical
            Thickness  NO3N      NH4N       PH
            37         1.08108   3.24324    6.318
            38         1.68421   3.15789    6.318
            50         1.44      2.24       5.902
            90         1.95556   0.533333   5.948
            85         2.72941   0.470588   5.959
            100        2.66667   3.11111    6.7
            200        1.48148   1.51852    6.7
            300        0.644745  0.945626   7.9
            300        0.214915  0.881152   7.9
            320        0.342521  0.0604449  7.9
            300        0.365356  0.0214915  7.9
            280        0.194805  0.17316    7.9
            300        0         0          7.9
            300        0.141414  0.20202    7.9
            300        0.20202   0.20202    7.9
            300        0.20202   0.20202    7.9
            300        0.20202   0.20202    7.9
            300        0.20202   0.20202    7.9
            PH source: Estimated based on local knowledge (layer 1, 2, 3, 4, 5, 6, 7)
          Sample InitialNitrogen: SWUnits=Volumetric; OCUnits=Total; PHUnits=Water
            Thickness=[37, 38, 50, 90, 85, 100, 200, 300, 300, 320, 300, 280, 300, 300, 300, 300, 300, 300]
            SW=[0.263, 0.296, 0.256, 0.254, 0.293, 0.252, 0.252, 0.296, 0.296, 0.296, 0.296, 0.274, 0.274, 0.274, 0.274, 0.274, 0.274, 0.274]
          Swim3 Swim: ersoil=1e-06; ernode=1e-06; slcerr=1e-06; Salb=0.13; CN2Bare=65; CNRed=20; CNCov=0.8; KDul=0.3; PSIDul=-300; VC=true; DTMax=1440; MaxWaterIncrement=10; Diagnostics=false
            zero: PrecipitationInterception, DTMin, SpaceWeightingFactor, SoluteSpaceWeightingFactor, Dis, Disp, A, DTHC, DTHP, WaterTable
            SwimSoluteParameters: WaterTableConcentration=0; D0=0; Thickness=[1000, 1000, 1000]
            SwimSubsurfaceDrain: DrainDepth=1070; DrainSpacing=13500; DrainRadius=52; Klat=1000; ImpermDepth=3900
            SwimSoluteParameters NO3: same as TileDrainageWaterTable.System_13.paddock.SoilCobs.Swim.NO3
            SwimSoluteParameters NH4: same as TileDrainageWaterTable.System_13.paddock.SoilCobs.Swim.NH4
            SwimSoluteParameters Urea: same as TileDrainageWaterTable.System_13.paddock.SoilCobs.Swim.NO3
            SwimSoluteParameters PlantAvailableNH4: same as TileDrainageWaterTable.System_13.paddock.SoilCobs.Swim.NH4
            SwimSoluteParameters PlantAvailableNO3: same as TileDrainageWaterTable.System_13.paddock.SoilCobs.Swim.NO3
            SwimSoluteParameters LabileP: same as TileDrainageWaterTable.System_13.paddock.SoilCobs.Swim.NO3
            SwimSoluteParameters UnavailableP: same as TileDrainageWaterTable.System_13.paddock.SoilCobs.Swim.NO3
          CERESSoilTemperature Temperature
          Nutrient
          Manager SWIMSetLowerBC
            LowerBCType = potential
            LowerBCValue = -2700
```csharp
using Models.Climate;
using APSIM.Shared.Utilities;
using Models.Soils.Nutrients;
using Models.Soils;
using Models.PMF;
using Models.Core;
using System.Xml.Serialization;
using System;
using Models.AgPasture;
using Models.Interfaces;

namespace Models
{
    [Serializable] 
    [System.Xml.Serialization.XmlInclude(typeof(Model))]
    public class Script : Model
    {
        [Link] Clock clock;
        [Link] ISummary summary;
        [Link] private Swim3 swim;
        
        public enum LowerBCTypeOptions {gradient,seepage,potential};

        [Separator("Sets the lower boundary condition type (and value if set to 'potential' for SWIM3. The change is applied at the beginning of the first day of the simulation.")]
        [Description("What lower boundary condition is wanted?")] 
        public LowerBCTypeOptions LowerBCType { get; set; }
        
        [Description("If 'potential', then what potential? Should be negative (mm) ")]
        [Display(EnabledCallback = "IsPotential")] 
        public double LowerBCValue { get; set; }
        
        /// <summary></summary>
        public bool IsPotential => LowerBCType == LowerBCTypeOptions.potential;
        

        public double SoilWaterStart  { get; set; }
        public double SoilWaterEnd  { get; set; }

        [EventSubscribe("DoManagement")]
        private void DoDailyCalculations(object sender, EventArgs e)
        {
            if (clock.Today == clock.StartDate)
            {
                summary.WriteMessage(this, "Script is setting lower boundary condition to " + LowerBCType, MessageType.Diagnostic);
                if (LowerBCType == LowerBCTypeOptions.gradient)
                    swim.SetLowerBCForGradient(bbcGradient: 0.0);   // in cm/cm (ibbc=0) Note that this is the default setting
                else if (LowerBCType == LowerBCTypeOptions.potential)
                //  convert to cm (ibbc=1), DUL is -100 cm so values more positive will often result in inflow to the bottom of the soil profile. Input in mm so divide here.
                    swim.SetLowerBCForGivenPotential(bbcPotential: LowerBCValue /10.0 );    
                else if (LowerBCType == LowerBCTypeOptions.seepage)
                    swim.SetLowerBCForSeepage(bbcPotentialSeepage: 0.0);  // in cm (ibbc=3). This is for zero-tension lysimeters
                else
                	throw new Exception("Wrong lower boundary condition type");
            }
        }
    }
}
```
        MicroClimate: a_interception=0; b_interception=1; c_interception=0; d_interception=0; SoilHeatFluxFraction=0.4; MinimumHeightDiffForNewLayer=0; NightInterceptionFraction=0.5; ReferenceHeight=2
      Weather: FileName=KelleyNov2021.met
      Clock: Start=2006-01-01; End=2019-12-31
      SoilArbitrator
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