Simulations: Version=150
  DataStore
    ExcelInput: FileNames=[_measured_TileDrainageSpace_NG.xlsx]; SheetNames=[DrainSpace, Classic]
  Folder Tile Drainage Spacing Exp
    Memo
      NW Indiana long-term experiment (est 1980) with different subsurface drainage spacing (5m, 10m, 20m, and 40m). Crops were corn, soybean and rye cover crop. Exp data collected from 2-replications. Large plot size.

      ### Status of the sim (May 2022) - SVA notes:
      1. Weather comes a local station (on site) and public data, synthetic file.
      2. Soil profile is identical to the one used in classic
      3. Management is 95% final (need to double check and verfiy as we noticed some errors in the conversion from classic to NG)
      4. Cultivars: we used a fixed corn and a fixed soy cultivar for all years, we have not yet converted all the cultivars from classic to NG
      5. Additional measured data to be added (work in progress)

      ### Relevant publications
      1. Pasley et al., 2021 (Env Res Letters) https://iopscience.iop.org/article/10.1088/1748-9326/abef8f
      2. Kladivko et al., 2004 (J of Envirn Quality) https://acsess.onlinelibrary.wiley.com/doi/abs/10.2134/jeq2004.1803
    Experiment Drain
      Factors Drain
        Factor Space: Specification=[SWIM].SwimSubsurfaceDrain.DrainSpacing = 5, 10, 20, 40
      Simulation Base
        Clock: Start=1987-01-01; End=1999-12-31
        Weather: FileName=00_SEPAC_1968_2000.met
        Summary summaryfile
        SoilArbitrator
        Zone paddock: Area=1; Slope=0; AspectAngle=0; Altitude=50
          Folder Manager folder
            Manager N Deposition (disabled)
              ppm = 0.0156
              varname = N_deposition
              fertmodule = fertiliser
```csharp
using Models.PMF;
using Models.Core;
using System;
namespace Models
{
    [Serializable]
    [System.Xml.Serialization.XmlInclude(typeof(Model))]
    public class Script : Model
    {
        [Link] Clock Clock;

        [Description("What to multiply rain by?")]
        public string ppm { get; set; }

        [Description("Name of the NO3_N deposition variable as seen by the model")]
        public string varname { get; set; }

        [Description("Name of module that applies nitrogen")]
        public string fertmodule { get; set; }

        [EventSubscribe("DoManagement")]
        private void OnDoManagement(object sender, EventArgs e)
        {
            /*
                
         
            [varname] = rain * [ppm]
            N_deposition_tot = N_deposition_tot + [varname]
            if (rain > 0) then
               [fertmodule] apply amount = [varname](kg/ha), depth = 0 (mm), type = NO3_N ()
            endif
      
            */
        }
    }
}
```
          Fertiliser
          SurfaceOrganicMatter: InitialResidueName=maize; InitialResidueType=maize; InitialResidueMass=2800; InitialStandingFraction=0; InitialCPR=0; InitialCNR=72
          Irrigation
          Operations Mgt
            1984-03-10  [Fertiliser].Apply(285, Fertiliser.Types.NH4N, 300)
            1984-05-10  [SurfaceOrganicMatter].Incorporate(fraction:0.5, depth:250)
            1984-05-21  [Maize].Sow(cultivar: Laila, population: 6, depth: 50, rowSpacing:750)
            1984-05-21  [Fertiliser].Apply(18, Fertiliser.Types.NH4N, 10)
            1984-05-21  [SurfaceOrganicMatter].Incorporate(fraction:0.1, depth:250)
            1984-10-30  [Maize].Harvest()
            1984-10-30  [Maize].EndCrop()
            1985-03-10  [Fertiliser].Apply(285, Fertiliser.Types.NH4N, 300)
            1985-04-10  [SurfaceOrganicMatter].Incorporate(fraction:0.5, depth:250)
            1985-04-22  [Maize].Sow(cultivar: Laila, population: 6, depth: 50, rowSpacing:750)
            1985-04-22  [Fertiliser].Apply(8, Fertiliser.Types.NH4N, 10)
            1985-04-22  [SurfaceOrganicMatter].Incorporate(fraction:0.1, depth:250)
            1985-09-23  [Maize].Harvest()
            1985-09-23  [Maize].EndCrop()
            1986-03-20  [Fertiliser].Apply(285, Fertiliser.Types.NH4N, 300)
            1986-04-20  [SurfaceOrganicMatter].Incorporate(fraction:0.5, depth:250)
            1986-04-30  [Maize].Sow(cultivar: Laila, population: 6, depth: 50, rowSpacing:750)
            1986-04-30  [Fertiliser].Apply(21, Fertiliser.Types.NH4N, 10)
            1986-04-30  [SurfaceOrganicMatter].Incorporate(fraction:0.1, depth:250)
            1986-09-23  [Maize].Harvest()
            1986-09-23  [Maize].EndCrop()
            1987-03-20  [Fertiliser].Apply(285, Fertiliser.Types.NH4N, 300)
            1987-04-27  [SurfaceOrganicMatter].Incorporate(fraction:0.5, depth:250)
            1987-04-28  [Maize].Sow(cultivar: Laila, population: 6, depth: 50, rowSpacing:750)
            1987-04-28  [Fertiliser].Apply(22, Fertiliser.Types.NH4N, 10)
            1987-04-28  [SurfaceOrganicMatter].Incorporate(fraction:0.5, depth:250)
            1987-09-15  [Maize].Harvest()
            1987-09-15  [Maize].EndCrop()
            1988-03-20  [Fertiliser].Apply(285, Fertiliser.Types.NH4N, 300)
            1988-05-01  [SurfaceOrganicMatter].Incorporate(fraction:0.5, depth:250)
            1988-05-02  [Maize].Sow(cultivar: Laila, population: 6, depth: 50, rowSpacing:750)
            1988-05-02  [Fertiliser].Apply(11, Fertiliser.Types.NH4N, 10)
            1988-05-02  [SurfaceOrganicMatter].Incorporate(fraction:0.1, depth:250)
            1988-10-03  [Maize].Harvest()
            1988-10-03  [Maize].EndCrop()
            1989-03-10  [Fertiliser].Apply(228, Fertiliser.Types.NH4N, 300)
            1989-05-17  [SurfaceOrganicMatter].Incorporate(fraction:0.5, depth:250)
            1989-05-18  [Maize].Sow(cultivar: Laila, population: 6, depth: 50, rowSpacing:750)
            1989-05-18  [Fertiliser].Apply(20, Fertiliser.Types.NH4N, 10)
            1989-05-18  [SurfaceOrganicMatter].Incorporate(fraction:0.1, depth:250)
            1989-10-12  [Maize].Harvest()
            1989-10-12  [Maize].EndCrop()
            1990-03-10  [Fertiliser].Apply(228, Fertiliser.Types.NH4N, 300)
            1990-05-28  [SurfaceOrganicMatter].Incorporate(fraction:0.5, depth:250)
            1990-05-29  [Maize].Sow(cultivar: Laila, population: 6, depth: 50, rowSpacing:750)
            1990-05-29  [Fertiliser].Apply(28, Fertiliser.Types.NH4N, 10)
            1990-05-29  [SurfaceOrganicMatter].Incorporate(fraction:0.1, depth:250)
            1990-10-29  [Maize].Harvest()
            1990-10-29  [Maize].EndCrop()
            1991-04-20  [Fertiliser].Apply(228, Fertiliser.Types.NH4N, 10)
            1991-04-30  [SurfaceOrganicMatter].Incorporate(fraction:0.5, depth:250)
            1991-05-01  [Maize].Sow(cultivar: Laila, population: 6, depth: 50, rowSpacing:750)
            1991-05-01  [Fertiliser].Apply(28, Fertiliser.Types.NH4N, 10)
            1991-05-01  [SurfaceOrganicMatter].Incorporate(fraction:0.1, depth:250)
            1991-09-17  [Maize].Harvest()
            1991-09-17  [Maize].EndCrop()
            1992-04-20  [Fertiliser].Apply(228, Fertiliser.Types.NH4N, 10)
            1992-04-05  [SurfaceOrganicMatter].Incorporate(fraction:0.5, depth:250)
            1992-05-05  [Maize].Sow(cultivar: Laila, population: 6, depth: 50, rowSpacing:750)
            1992-05-05  [Fertiliser].Apply(28, Fertiliser.Types.NH4N, 10)
            1992-05-05  [SurfaceOrganicMatter].Incorporate(fraction:0.1, depth:250)
            1992-10-05  [Maize].Harvest()
            1992-10-05  [Maize].EndCrop()
            1993-05-01  [Fertiliser].Apply(228, Fertiliser.Types.NH4N, 10)
            1993-05-09  [SurfaceOrganicMatter].Incorporate(fraction:0.5, depth:250)
            1993-05-10  [Maize].Sow(cultivar: Laila, population: 6, depth: 50, rowSpacing:750)
            1993-05-10  [Fertiliser].Apply(28, Fertiliser.Types.NH4N, 10)
            1993-05-10  [SurfaceOrganicMatter].Incorporate(fraction:0.1, depth:250)
            1993-10-13  [Maize].Harvest()
            1993-10-13  [Maize].EndCrop()
            1994-05-20  [Soybean].Sow(cultivar: Generic_MG2, population: 30, depth: 50, rowSpacing:750)
            1994-10-04  [Soybean].Harvest()
            1994-10-04  [Soybean].EndCrop()
            1995-04-06  [Fertiliser].Apply(196, Fertiliser.Types.NH4N, 200)
            1995-06-08  [Maize].Sow(cultivar: Laila, population: 6, depth: 50, rowSpacing:750)
            1995-06-08  [Fertiliser].Apply(25.08, Fertiliser.Types.UreaN, 200)
            1995-10-16  [Maize].Harvest()
            1995-10-16  [Maize].EndCrop()
            1995-10-16  [Wheat].Sow(cultivar: Yecora, population: 300, depth: 20, rowSpacing:203)
            1996-05-27  [Soybean].Sow(cultivar: Generic_MG2, population: 30, depth: 50, rowSpacing:750)
            1996-06-01  [Wheat].EndCrop()
            1996-10-25  [Soybean].Harvest()
            1996-10-25  [Soybean].EndCrop()
            1997-04-26  [Fertiliser].Apply(173.6, Fertiliser.Types.NH4N, 200)
            1997-04-29  [Maize].Sow(cultivar: Laila, population: 6, depth: 50, rowSpacing:750)
            1997-04-29  [Fertiliser].Apply(25.08, Fertiliser.Types.UreaN, 200)
            1997-11-10  [Maize].Harvest()
            1997-11-10  [Maize].EndCrop()
            1997-11-10  [Wheat].Sow(cultivar: Yecora, population: 300, depth: 20, rowSpacing:203)
            1998-04-23  [Wheat].EndCrop()
            1998-06-01  [Soybean].Sow(cultivar: Generic_MG2, population: 30, depth: 50, rowSpacing:750)
            1998-10-27  [Soybean].Harvest()
            1998-10-27  [Soybean].EndCrop()
            1999-04-28  [Fertiliser].Apply(173.6, Fertiliser.Types.NH4N, 200)
            1999-03-05  [Maize].Sow(cultivar: Laila, population: 6, depth: 50, rowSpacing:750)
            1999-03-05  [Fertiliser].Apply(25.08, Fertiliser.Types.UreaN, 200)
            1999-09-30  [Maize].Harvest()
            1999-09-30  [Maize].EndCrop()
          Soil: SoilType=AME_Webster_L107; Region=AME_Webster_L107; State=IL; Country=USA; ApsoilNumber=1; Latitude=0; Longitude=0; DataSource=ssurgo2apsim; Comments=None
            Physical
              Thickness  ParticleSizeClay  ParticleSizeSand  BD    AirDry     LL15        DUL         SAT         KS
              50         12.2              22                1.42  0.0436211  0.0872423   0.276286    0.430875    300.741
              50         12.2              22                1.42  0.0433383  0.0866765   0.275171    0.42758844  289.832
              50         12.2              22                1.42  0.043024   0.086048    0.273934    0.423939    278.007
              150        12.2              22                1.42  0.085      0.0854194   0.27269912  0.420292    266.49
              150        15.6              20                1.53  0.103      0.10286236  0.286756    0.417041    177.098
              150        19                17.7              1.53  0.121      0.121105    0.30276829  0.419339    122.923
              200        19                17.7              1.53  0.12       0.119595    0.299816    0.409671    104.52
              200        25.8              16.8              1.53  0.158      0.157737    0.32724     0.4         69.193
              200        25.8              16.8              1.53  0.158      0.157737    0.32724     0.39        69.193
              300        25.8              16.8              1.53  0.158      0.15765791  0.327092    0.38        68.424
              300        25.8              16.8              1.53  0.157      0.15738     0.326575    0.37        21.77
              300        25.8              16.8              1.53  0.157      0.15738     0.326575    0.36        17.824
              300        25.8              16.8              1.53  0.157      0.15734     0.326502    0.35        14.593
              300        25.8              16.8              1.53  0.157      0.15734     0.326502    0.35        11.948
              300        25.8              16.8              1.53  0.157      0.15734     0.326502    0.34        9.782
              300        25.8              16.8              1.64  0.157      0.15734     0.326502    0.34        8.009
              300        25.8              16.8              1.64  0.157      0.15734     0.326502    0.34        6.557
              300        25.8              16.8              1.64  0.157      0.15734     0.326502    0.34        5.368
              SoilCrop MaizeSoil
                LL=[0.0872423, 0.0866765, 0.086048, 0.0854194, 0.150971, 0.185036, 0.200262, 0.250088, 0.264513, 0.279731, 0.294086, 0.305426, 0.313691, 0.314502, 0.314502, 0.314502, 0.314502, 0.314502]
                KL=[0.08, 0.08, 0.08, 0.08, 0.08, 0.08, 0.08, 0.08, 0.08, 0.0422964, 0.0350564, 0.0282843, 0.022015, 0.0162927, 0.0111758, 0.0067466, 0.00313554, 0.000603434]
                XF=[1, 1, 1, 1, 1, 1, 1, 1, 1, 0.1, 0, 0, 0, 0, 0, 0, 0, 0]
              SoilCrop SoybeanSoil
                LL=[0.0872423, 0.0866765, 0.086048, 0.0854194, 0.150971, 0.185036, 0.200262, 0.250088, 0.264513, 0.279731, 0.294086, 0.305426, 0.313691, 0.314502, 0.314502, 0.314502, 0.314502, 0.314502]
                KL=[0.08, 0.08, 0.08, 0.08, 0.08, 0.08, 0.08, 0.08, 0.08, 0.04, 0.04, 0.03, 0.02, 0.02, 0.01, 0.01, 0, 0]
                XF=[1, 1, 1, 1, 1, 1, 1, 1, 1, 0.1, 0, 0, 0, 0, 0, 0, 0, 0]
              SoilCrop WheatSoil
                LL=[0.0872423, 0.0866765, 0.086048, 0.0854194, 0.150971, 0.185036, 0.200262, 0.250088, 0.264513, 0.279731, 0.294086, 0.305426, 0.313691, 0.314502, 0.314502, 0.314502, 0.314502, 0.314502]
                KL=[0.08, 0.08, 0.08, 0.08, 0.08, 0.08, 0.08, 0.08, 0.08, 0.04, 0.04, 0.03, 0.02, 0.02, 0.01, 0.01, 0, 0]
                XF=[1, 1, 1, 1, 1, 1, 1, 1, 1, 1, 0.1, 0, 0, 0, 0, 0, 0, 0]
            Swim3 Swim: PrecipitationInterception=0; ersoil=1e-06; ernode=1e-06; slcerr=1e-06; Salb=0.15; CN2Bare=70; CNRed=20; CNCov=0.8; KDul=0.25; PSIDul=-250; VC=true; DTMin=0; DTMax=1440; MaxWaterIncrement=10; SpaceWeightingFactor=0; SoluteSpaceWeightingFactor=0; Dis=15; Disp=0.65; A=1; DTHC=0; DTHP=1; Diagnostics=false; WaterTable=0
              SwimSubsurfaceDrain: DrainDepth=750; DrainSpacing=5000; DrainRadius=100; Klat=250; ImpermDepth=1200
              SwimSoluteParameters NO3: WaterTableConcentration=0; D0=0.05
                Thickness  Exco  FIP
                100        0     1
                200        0     1
                200        0     1
                200        0     1
                200        0     1
                200        0     1
                200        0     1
                200        0     1
                200        0     1
                200        0     1
                200        0     1
                200        0     1
                200        0     1
                200        0     1
                200        0     1
                200        0     1
              SwimSoluteParameters NH4: WaterTableConcentration=0; D0=0.05
                Thickness  Exco  FIP
                100        1     1
                200        1     1
                200        1     1
                200        1     1
                200        1     1
                200        1     1
                200        1     1
                200        1     1
                200        1     1
                200        1     1
                200        1     1
                200        1     1
                200        1     1
                200        1     1
                200        1     1
                200        1     1
              SwimSoluteParameters Urea: same as Tile Drainage Spacing Exp.Drain.Base.paddock.Soil.Swim.NO3
              SwimSoluteParameters PlantAvailableNH4: same as Tile Drainage Spacing Exp.Drain.Base.paddock.Soil.Swim.NH4
              SwimSoluteParameters PlantAvailableNO3: same as Tile Drainage Spacing Exp.Drain.Base.paddock.Soil.Swim.NO3
              SwimSoluteParameters LabileP: same as Tile Drainage Spacing Exp.Drain.Base.paddock.Soil.Swim.NO3
              SwimSoluteParameters UnavailableP: same as Tile Drainage Spacing Exp.Drain.Base.paddock.Soil.Swim.NO3
            CERESSoilTemperature Temperature
            Organic: FOMCNRatio=45
              Thickness  Carbon  SoilCNRatio  FBiom  FInert    FOM
              50         1.6125  13           0.25   0.365     125.774
              50         1.5     13           0.22   0.365     121.028
              50         1.375   13           0.2    0.365     116.462
              150        1.25    13           0.17   0.67925   103.77
              150        0.875   13           0.12   0.69875   92.4616
              150        0.625   13           0.1    0.71825   82.3855
              200        0.25    13           0.05   0.741     70.6376
              200        0.1     13           0.04   0.767     60.565
              200        0.1     13           0.019  0.96831   51.9287
              300        0.08    13           0.016  0.983835  41.2273
              300        0.01    13           0.014  0.999     32.7313
              300        0.01    13           0.013  0.999     25.9861
              300        0       13           0.012  0.999     20.631
              300        0       13           0.011  0.999     16.3794
              300        0       13           0.01   0.999     13.004
              300        0       13           0.009  0.999     10.3242
              300        0       13           0.009  0.999     8.19658
              300        0       13           0.008  0.999     6.50745
            Chemical
              Thickness  NO3N      NH4N      PH
              50         9.85915   9.85915   5.7
              50         9.85915   9.85915   5.7
              50         9.85915   9.85915   5.7
              150        2.8169    2.8169    5.7
              150        2.42424   2.42424   4.5
              150        2.40964   2.40964   4.4
              200        3         3         4.4
              200        4         4         4.4
              200        5         5         4.4
              300        5         5         4.4
              300        1.21951   1.21951   4.4
              300        1.21951   1.21951   4.4
              300        1.62602   1.62602   4.4
              300        1.21951   1.21951   4.4
              300        1.21951   1.21951   4.4
              300        0.609756  0.609756  4.4
              300        0.406504  0.406504  4.4
              300        0.203252  0.203252  4.4
            Sample Intial conditions: SWUnits=Volumetric; OCUnits=Total; PHUnits=Water
              Thickness=[50, 50, 50, 150, 150, 150, 200, 200, 200, 300, 300, 300, 300, 300, 300, 300, 300, 300]
              SW=[0.276, 0.275, 0.274, 0.273, 0.287, 0.303, 0.3, 0.327, 0.327, 0.327, 0.327, 0.327, 0.327, 0.327, 0.327, 0.327, 0.327, 0.327]
            Nutrient
          Plant maize: ResourceName=Maize
          Plant soybean: ResourceName=Soybean
          Plant wheat: ResourceName=Wheat
          Manager SWIMSetLowerBC
            LowerBCType = potential
            LowerBCValue = -2900
```csharp
using Models.Climate;
using APSIM.Shared.Utilities;
using Models.Soils.Nutrients;
using Models.Soils;
using Models.PMF;
using Models.Core;
using System.Xml.Serialization;
using System;
using Models.AgPasture;
using Models.Interfaces;

namespace Models
{
    [Serializable] 
    [System.Xml.Serialization.XmlInclude(typeof(Model))]
    public class Script : Model
    {
        [Link] Clock clock;
        [Link] ISummary summary;
        [Link] private Swim3 swim;
        
        public enum LowerBCTypeOptions {gradient,seepage,potential};

        [Separator("Sets the lower boundary condition type (and value if set to 'potential' for SWIM3. The change is applied at the beginning of the first day of the simulation.")]
        [Description("What lower boundary condition is wanted?")] 
        public LowerBCTypeOptions LowerBCType { get; set; }
        
        [Description("If 'potential', then what potential? Should be negative (mm) ")]
        [Display(EnabledCallback = "IsPotential")] 
        public double LowerBCValue { get; set; }
        
        /// <summary></summary>
        public bool IsPotential => LowerBCType == LowerBCTypeOptions.potential;
        

        public double SoilWaterStart  { get; set; }
        public double SoilWaterEnd  { get; set; }

        [EventSubscribe("DoManagement")]
        private void DoDailyCalculations(object sender, EventArgs e)
        {
            if (clock.Today == clock.StartDate)
            {
                summary.WriteMessage(this, "Script is setting lower boundary condition to " + LowerBCType, MessageType.Diagnostic);
                if (LowerBCType == LowerBCTypeOptions.gradient)
                    swim.SetLowerBCForGradient(bbcGradient: 0.0);   // in cm/cm (ibbc=0) Note that this is the default setting
                else if (LowerBCType == LowerBCTypeOptions.potential)
                    swim.SetLowerBCForGivenPotential(bbcPotential: LowerBCValue /10.0 );    //  convert to cm (ibbc=1), DUL is -100 cm so values more positive will often result in inflow to the bottom of the soil profile. Input in mm so divide here.
                else if (LowerBCType == LowerBCTypeOptions.seepage)
                    swim.SetLowerBCForSeepage(bbcPotentialSeepage: 0.0);  // in cm (ibbc=3). This is for zero-tension lysimeters
                else
                	throw new Exception("Wrong lower boundary condition type");
            }
        }
    }
}
```
          Report OutputfileDaily: EventNames=[Clock].EndOfDay
            VariableNames:
              [Clock].Today
              ([Maize].AboveGround.Wt + [Soybean].AboveGround.Wt + [Wheat].AboveGround.Wt)*10 as CropBiomass
              ([Maize].Grain.Wt + [Soybean].Grain.Wt + [Wheat].Grain.Wt)*10 as CropYield
              [SurfaceOrganicMatter].Wt
              [SWIM].WaterTable
              [SWIM].SubsurfaceDrain
              [SWIM].SubsurfaceDrainNO3
              [SWIM].SW[6] as SW_50cm
              [SWIM].SW[8] as SW_110cm
              [SWIM].Drainage
              sum([Soil].Nutrient.NO3.kgha[1:4]) as NO3_030cm
              Sum of [SWIM].SubsurfaceDrain from 1-Jan to 31-Dec as Annual_tile_drainage
              Sum of [SWIM].SubsurfaceDrainNO3 from 1-Jan to 31-Dec as Annual_tile_drainage_no3
              Mean of [SWIM].WaterTable from 1-Jan to 31-Dec as Annual_WaterTable
              Max of ([Maize].AboveGround.Wt + [Soybean].AboveGround.Wt + [Wheat].AboveGround.Wt)*10 as CropBiomass2
              Max of ([Maize].Grain.Wt + [Soybean].Grain.Wt + [Wheat].Grain.Wt)*10 as CropYield2
          Report OutputfileAnnual: EventNames=[Clock].EndOfYear
            VariableNames:
              [Clock].Today
              ([Maize].AboveGround.Wt + [Soybean].AboveGround.Wt + [Wheat].AboveGround.Wt)*10 as CropBiomass
              ([Maize].Grain.Wt + [Soybean].Grain.Wt + [Wheat].Grain.Wt)*10 as CropYield
              [SurfaceOrganicMatter].Wt
              [SWIM].WaterTable
              [SWIM].SubsurfaceDrain
              [SWIM].SubsurfaceDrainNO3
              [SWIM].SW[6] as SW_50cm
              [SWIM].SW[8] as SW_110cm
              [SWIM].Drainage
              sum([Soil].Nutrient.NO3.kgha[1:4]) as NO3_030cm
              Sum of [SWIM].SubsurfaceDrain from 1-Jan to 31-Dec as Annual_tile_drainage
              Sum of [SWIM].SubsurfaceDrainNO3 from 1-Jan to 31-Dec as Annual_tile_drainage_no3
              Mean of [SWIM].WaterTable from 1-Jan to 31-Dec as Annual_WaterTable
              Max of ([Maize].AboveGround.Wt + [Soybean].AboveGround.Wt + [Wheat].AboveGround.Wt)*10 as CropBiomass2
              Max of ([Maize].Grain.Wt + [Soybean].Grain.Wt + [Wheat].Grain.Wt)*10 as CropYield2
          MicroClimate: a_interception=0; b_interception=1; c_interception=0; d_interception=0; SoilHeatFluxFraction=0.4; MinimumHeightDiffForNewLayer=0; NightInterceptionFraction=0.5; ReferenceHeight=2
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