Simulations: Version=150
  DataStore
    ExcelInput: FileNames=[_measured_WaterTable_NG.xlsx]; SheetNames=[WT_obs, WT_classic]
    PredictedObserved: PredictedTableName=outputfile; ObservedTableName=WT_obs; FieldNameUsedForMatch=Clock.Today; AllColumns=true
    PredictedObserved PredictedObservedClassic: PredictedTableName=WT_classic; ObservedTableName=WT_obs; FieldNameUsedForMatch=Clock.Today; AllColumns=true
  Folder WaterTable
    Replacements
      Plant Bambatsi: PlantType=Bambatsi; IsAlive=false; IsEnding=false; DaysAfterEnding=0
        AccumulateFunction Age: StartStageName=Emergence; EndStageName=Old; FractionRemovedOnCut=0; FractionRemovedOnHarvest=0; FractionRemovedOnGraze=0; FractionRemovedOnPrune=0
          Constant day: FixedValue=0.00273973
        PhotoperiodFunction Photoperiod: Twilight=-6; DayLength=0
        Phenology
          StageBasedInterpolation StageCode: Stages=[Emergence, EndJuvenile, Maturity, Old]; Codes=[1, 2, 3, 4]; Proportional=true
          Constant ThermalTime: FixedValue=1
          GerminatingPhase Germinating: Start=Sowing; End=Germination
          EmergingPhase Emerging: Start=Germination; End=Emergence; TTForTimeStep=0
            VariableReference ThermalTime: VariableName=[Phenology].ThermalTime
            AddFunction Target
              Constant ShootLag: FixedValue=7
              MultiplyFunction DepthxRate
                VariableReference SowingDepth: VariableName=[Plant].SowingData.Depth
                Constant ShootRate: FixedValue=0
          GenericPhase Juvenile: Start=Emergence; End=EndJuvenile
            Constant Progression: FixedValue=1
            Constant Target: FixedValue=365
          GenericPhase Mature: Start=EndJuvenile; End=Maturity
            Constant Progression: FixedValue=1
            Constant Target: FixedValue=1825
          GenericPhase Declining: Start=Maturity; End=Old
            Constant Progression: FixedValue=1
            Constant Target: FixedValue=27010
          EndPhase Old: Start=Old; End=Unused
            Constant ThermalTime: FixedValue=1
        OrganArbitrator Arbitrator
          BiomassTypeArbitrator DMArbitration
            Folder PotentialPartitioningMethods
              ReallocationMethod
              AllocateFixationMethod
              RetranslocationMethod
              SendPotentialDMAllocationsMethod
            Folder AllocationMethods
              NutrientConstrainedAllocationMethod
              DryMatterAllocationsMethod
            RelativeAllocation ArbitrationMethod
          BiomassTypeArbitrator NArbitration
            Folder PotentialPartitioningMethods
              ReallocationMethod
            Folder ActualPartitioningMethods
              AllocateFixationMethod
              RetranslocationMethod
            Folder AllocationMethods
              NitrogenAllocationsMethod
            RelativeAllocation ArbitrationMethod
            AllocateUptakesMethod
          WaterUptakeMethod
          NitrogenUptakeMethod
        CompositeBiomass AboveGround: OrganNames=[Leaf, Stem]; IncludeLive=true; IncludeDead=true
        CompositeBiomass AboveGroundLive: OrganNames=[Leaf, Stem]; IncludeLive=true; IncludeDead=false
        CompositeBiomass AboveGroundDead: OrganNames=[Leaf, Stem]; IncludeLive=false; IncludeDead=true
        CompositeBiomass BelowGround: OrganNames=[Root]; IncludeLive=true; IncludeDead=true
        CompositeBiomass Total: OrganNames=[Leaf, Stem, Root]; IncludeLive=true; IncludeDead=true
        CompositeBiomass TotalLive: OrganNames=[Leaf, Stem, Root]; IncludeLive=true; IncludeDead=false
        CompositeBiomass TotalDead: OrganNames=[Leaf, Stem, Root]; IncludeLive=false; IncludeDead=true
        PerennialLeaf Leaf: MaintenanceRespiration=0; GrowthRespiration=0; Albedo=0.2; Gsmax350=0.0075; R50=200; LAI=0; Height=0; FRGR=0; PotentialEP=0; WaterDemand=0
          MultiplyFunction InitialWtFunction
            Constant InitialPlantWt: FixedValue=0.01; Units=g/plant
            VariableReference Population: VariableName=[Plant].Population
          MinimumFunction FRGRFunction
            HourlyInterpolation FRGRFunctionTemp: agregationMethod=0
              XYPairs Response: X=[5, 20, 25, 35]; Y=[0, 1, 1, 0]
              ThreeHourSin InterpolationMethod
          Constant ExtinctionCoefficient: FixedValue=0.57
            Memo
              Value of 0.57 from
              Radiation Interception and Growth of Planted and Coppice Stands of Four Fast-GrowingTropical Trees
              Author(s): Robin A. Harrington and James H. Fownes
              Source: Journal of Applied Ecology, Vol. 32, No. 1 (Feb., 1995), pp. 1-8

              But their data suggests a value of 0.3
          LinearInterpolationFunction HeightFunction
            XYPairs: X=[0, 100, 1000]; Y=[100, 300, 1200]
            VariableReference XValue: VariableName=[AboveGround].Wt
          Constant MaximumNConc: FixedValue=0.025
            Memo
              0.043 gN/g from R.B. Thomas 1, D.D. Richter 2, H. Ye 2, P.R. Heine z, and B.R. Strain 1 Nitrogen dynamics and growth of seedlings of an N-fixing tree
              (GKricidia sepium (Jacq.) Walp.) exposed to elevated atmospheric carbon dioxide Oecologia (1991) 88:415-421
          Constant MinimumNConc: FixedValue=0.015
          Constant NReallocationFactor: FixedValue=0
          BiomassRemoval BiomassRemovalDefaults
            OrganBiomassRemovalType Harvest: FractionLiveToRemove=0.9; FractionDeadToRemove=0.9; FractionLiveToResidue=0; FractionDeadToResidue=0
            OrganBiomassRemovalType Cut: FractionLiveToRemove=0.8; FractionDeadToRemove=0; FractionLiveToResidue=0; FractionDeadToResidue=0
            OrganBiomassRemovalType Prune: FractionLiveToRemove=0; FractionDeadToRemove=0; FractionLiveToResidue=0.6; FractionDeadToResidue=0
            OrganBiomassRemovalType Graze: FractionLiveToRemove=0.6; FractionDeadToRemove=0; FractionLiveToResidue=0.1; FractionDeadToResidue=0
          Constant LeafResidenceTime: FixedValue=130
          Constant DMConversionEfficiency: FixedValue=1
          Constant LeafDetachmentTime: FixedValue=365
          Constant DMRetranslocationFactor: FixedValue=0
          Constant NRetranslocationFactor: FixedValue=0
          RUEModel Photosynthesis
            Constant RUE: FixedValue=2
            WeightedTemperatureFunction FT: MaximumTemperatureWeighting=0.5
              XYPairs: X=[8, 20, 35, 50]; Y=[0, 1, 1, 0]
            LinearInterpolationFunction FVPD
              XYPairs: X=[0, 10, 50]; Y=[1, 1, 1]
              VariableReference XValue: VariableName=[Leaf].Photosynthesis.VPD
            LinearInterpolationFunction FN
              XYPairs: X=[0, 1, 1.5]; Y=[0, 1, 1]
              VariableReference XValue: VariableName=[Leaf].Fn
            LinearInterpolationFunction FW
              XYPairs: X=[0, 1, 1.5]; Y=[0, 1, 1]
              VariableReference XValue: VariableName=[Leaf].Fw
            RUECO2Function FCO2: PhotosyntheticPathway=C3
            Memo
              Ayaz eta 2004 presented a RUE of 1.6 g/MJ PAR during non-limiting temperature conditions for field pea.  Halving this to make it total radiation gives 0.8 g/MJ and adding 20% to account for root and  nodule production and N fixiation costs gives 1.0 g/MJ
            VariableReference RadnInt: VariableName=[Leaf].RadiationIntercepted
          LinearInterpolationFunction LeafKillFraction
            XYPairs: X=[0, 3]; Y=[1, 0]
            VariableReference XValue: VariableName=[Weather].MinT
          Constant MinimumLAI: FixedValue=0.1; Units=m2/m2
          MultiplyFunction LAIDeadFunction
            VariableReference DeadLeafWt: VariableName=[Leaf].Dead.Wt
            LinearInterpolationFunction SLA
              XYPairs: X=[0, 1]; Y=[0.015, 0.015]
              VariableReference XValue: VariableName=[Bambatsi].Age
          Constant ExtinctionCoefficientDead: same as WaterTable.Replacements.Bambatsi.Leaf.ExtinctionCoefficient
          LinearInterpolationFunction SpecificLeafAreaFunction
            XYPairs: X=[0, 1]; Y=[0.0175, 0.0125]
            VariableReference XValue: VariableName=[Bambatsi].Age
          Constant CarbonConcentration: FixedValue=0.4
          Constant LeafDevelopmentRate: FixedValue=1
          BiomassDemand DMDemands
            MultiplyFunction Structural
              PartitionFractionDemandFunction DMDemandFunction
                MultiplyFunction PartitionFraction
                  LinearInterpolationFunction PotentialFraction
                    XYPairs: X=[0, 0.5, 0.66, 5]; Y=[0.33, 0.33, 0.52, 0.52]
                    VariableReference XValue: VariableName=[Bambatsi].Age
                  LinearInterpolationFunction PhotoperiodEffect
                    XYPairs: X=[10, 12, 13, 16]; Y=[1, 1, 1, 1]
                    VariableReference XValue: VariableName=[Bambatsi].Photoperiod
              Constant StructuralFraction: FixedValue=1; Units=0-1
            Constant Metabolic: FixedValue=0
            StorageDMDemandFunction Storage
              SubtractFunction StorageFraction
                Constant One: FixedValue=1
                VariableReference StructuralFraction: VariableName=[Leaf].DMDemands.Structural.StructuralFraction
          BiomassDemand NDemands
            MultiplyFunction Structural
              VariableReference MinNconc: VariableName=[Leaf].minimumNconc
              VariableReference PotentialDMAllocation: VariableName=[Leaf].potentialDMAllocation.Structural
            MultiplyFunction Metabolic
              SubtractFunction MetabolicNconc
                VariableReference CritNconc: VariableName=[Leaf].criticalNConc
                VariableReference MinNconc: VariableName=[Leaf].minimumNconc
              VariableReference PotentialDMAllocation: VariableName=[Leaf].potentialDMAllocation.Structural
            StorageNDemandFunction Storage
              VariableReference NitrogenDemandSwitch: VariableName=[Leaf].nitrogenDemandSwitch
              VariableReference MaxNconc: VariableName=[Leaf].maximumNconc
          Constant StomatalConductanceCO2Modifier: FixedValue=1
          PhaseLookupValue NitrogenDemandSwitch: Start=Emergence; End=Old
            Constant: FixedValue=1
        Root: GrowthRespiration=0; MaintenanceRespiration=0
          RootShapeCylinder RootShape
          PhaseLookupValue NitrogenDemandSwitch: Start=Emergence; End=Old
            Constant: FixedValue=1
          Constant RootFrontVelocity: FixedValue=20
          Constant SenescenceRate: FixedValue=0.005
          Constant MaximumNConc: FixedValue=0.01
          Constant MaxDailyNUptake: FixedValue=6
          Constant MinimumNConc: FixedValue=0.008
          Constant MaximumRootDepth: FixedValue=1000000
          LinearInterpolationFunction KLModifier
            XYPairs: X=[0, 3]; Y=[1, 1]
            VariableReference XValue: VariableName=[Leaf].LAI
          LinearInterpolationFunction KNO3
            XYPairs: X=[0, 0.003]; Y=[0.03, 0.03]
            VariableReference XValue: VariableName=[Root].LengthDensity
          LinearInterpolationFunction KNH4
            XYPairs: X=[0, 0.003]; Y=[0, 0]
            VariableReference XValue: VariableName=[Root].LengthDensity
          LinearInterpolationFunction NUptakeSWFactor
            XYPairs: X=[0, 0.5, 1]; Y=[1, 1, 1]
            VariableReference XValue: VariableName=[Root].RWC
          Constant SpecificRootLength: FixedValue=100; Units=m/g
          BiomassRemoval BiomassRemovalDefaults
            OrganBiomassRemovalType Harvest: FractionLiveToRemove=0; FractionDeadToRemove=0; FractionLiveToResidue=0; FractionDeadToResidue=0
            OrganBiomassRemovalType Cut: FractionLiveToRemove=0; FractionDeadToRemove=0; FractionLiveToResidue=0.3; FractionDeadToResidue=0
            OrganBiomassRemovalType Prune: FractionLiveToRemove=0; FractionDeadToRemove=0; FractionLiveToResidue=0.1; FractionDeadToResidue=0
            OrganBiomassRemovalType Graze: FractionLiveToRemove=0; FractionDeadToRemove=0; FractionLiveToResidue=0.15; FractionDeadToResidue=0
            OrganBiomassRemovalType Thin: FractionLiveToRemove=0; FractionDeadToRemove=0; FractionLiveToResidue=0.05; FractionDeadToResidue=0
          Constant DMConversionEfficiency: FixedValue=1
          Constant MaintenanceRespirationFunction: FixedValue=1
          Constant RemobilisationCost: FixedValue=0
          Constant CarbonConcentration: FixedValue=0.4
          BiomassDemandAndPriority DMDemands
            MultiplyFunction Structural
              PartitionFractionDemandFunction DMDemandFunction
                LinearInterpolationFunction PartitionFraction
                  XYPairs: X=[0, 1, 1.1, 5]; Y=[0.5, 0.5, 0.2, 0.2]
                  VariableReference XValue: VariableName=[Bambatsi].Age
              Constant StructuralFraction: FixedValue=1
            Constant Metabolic: FixedValue=0
            StorageDMDemandFunction Storage
              SubtractFunction StorageFraction
                Constant One: FixedValue=1
                VariableReference StructuralFraction: VariableName=[Root].DMDemands.Structural.StructuralFraction
            Constant QStructuralPriority: FixedValue=1
            Constant QMetabolicPriority: FixedValue=1
            Constant QStoragePriority: FixedValue=1
          BiomassDemandAndPriority NDemands
            MultiplyFunction Structural
              VariableReference MinNconc: VariableName=[Root].minimumNconc
              VariableReference PotentialDMAllocation: VariableName=[Root].potentialDMAllocation.Structural
            MultiplyFunction Metabolic
              SubtractFunction MetabolicNconc
                VariableReference CritNconc: VariableName=[Root].criticalNConc
                VariableReference MinNconc: VariableName=[Root].minimumNconc
              VariableReference PotentialDMAllocation: VariableName=[Root].potentialDMAllocation.Structural
            StorageNDemandFunction Storage
              VariableReference NitrogenDemandSwitch: VariableName=[Root].nitrogenDemandSwitch
              VariableReference MaxNconc: VariableName=[Root].maximumNconc
            Constant QStructuralPriority: FixedValue=1
            Constant QMetabolicPriority: FixedValue=1
            Constant QStoragePriority: FixedValue=1
          VariableReference CriticalNConc: VariableName=[Root].MinimumNConc
          BiomassDemand InitialWt
            Constant Structural: FixedValue=0.02; Units=g/plant
            Constant Metabolic: FixedValue=0
            Constant Storage: FixedValue=0
          Constant RootDepthStressFactor: FixedValue=1
        GenericOrgan Stem: IsAboveGround=true
          Constant NReallocationFactor: FixedValue=0
          Constant NRetranslocationFactor: FixedValue=0.05
          PhaseLookupValue NitrogenDemandSwitch: Start=Emergence; End=Old
            Constant: FixedValue=1
          Constant DMRetranslocationFactor: FixedValue=0
          Constant SenescenceRate: FixedValue=0; Units=/d
          Constant MaximumNConc: FixedValue=0.0015
          Constant MinimumNConc: FixedValue=0.0014
          Constant DetachmentRateFunction: FixedValue=0; Units=/d
          BiomassRemoval BiomassRemovalDefaults
            OrganBiomassRemovalType Harvest: FractionLiveToRemove=0.9; FractionDeadToRemove=0.9; FractionLiveToResidue=0; FractionDeadToResidue=0
            OrganBiomassRemovalType Cut: FractionLiveToRemove=0.8; FractionDeadToRemove=0; FractionLiveToResidue=0; FractionDeadToResidue=0
            OrganBiomassRemovalType Prune: FractionLiveToRemove=0.9; FractionDeadToRemove=0.9; FractionLiveToResidue=0.1; FractionDeadToResidue=0.1
            OrganBiomassRemovalType Graze: FractionLiveToRemove=0.6; FractionDeadToRemove=0; FractionLiveToResidue=0.2; FractionDeadToResidue=0
            OrganBiomassRemovalType Thin: FractionLiveToRemove=0; FractionDeadToRemove=0; FractionLiveToResidue=0.05; FractionDeadToResidue=0
          Constant MaintenanceRespirationFunction: FixedValue=0; Units=0-1
          Constant DMConversionEfficiency: FixedValue=1; Units=0-1
          Constant DMReallocationFactor: FixedValue=0
          VariableReference CriticalNConc: VariableName=[Stem].MinimumNConc
          Constant RemobilisationCost: FixedValue=0
          Constant CarbonConcentration: FixedValue=0.4
          BiomassDemandAndPriority DMDemands
            MultiplyFunction Structural
              PartitionFractionDemandFunction DMDemandFunction
                LinearInterpolationFunction PartitionFraction
                  XYPairs: X=[0, 1, 1.1, 5]; Y=[0.17, 0.17, 0.27, 0.27]
                  VariableReference XValue: VariableName=[Bambatsi].Age
              Constant StructuralFraction: FixedValue=1; Units=g/g
            Constant Metabolic: FixedValue=0
            StorageDMDemandFunction Storage
              SubtractFunction StorageFraction
                Constant One: FixedValue=1
                VariableReference StructuralFraction: VariableName=[Stem].DMDemands.Structural.StructuralFraction
            Constant QStructuralPriority: FixedValue=1
            Constant QMetabolicPriority: FixedValue=1
            Constant QStoragePriority: FixedValue=1
          BiomassDemandAndPriority NDemands
            MultiplyFunction Structural
              VariableReference MinNconc: VariableName=[Stem].minimumNconc
              VariableReference PotentialDMAllocation: VariableName=[Stem].potentialDMAllocation.Structural
            MultiplyFunction Metabolic
              SubtractFunction MetabolicNconc
                VariableReference CritNconc: VariableName=[Stem].criticalNConc
                VariableReference MinNconc: VariableName=[Stem].minimumNconc
              VariableReference PotentialDMAllocation: VariableName=[Stem].potentialDMAllocation.Structural
            StorageNDemandFunction Storage
              VariableReference NitrogenDemandSwitch: VariableName=[Stem].nitrogenDemandSwitch
              VariableReference MaxNconc: VariableName=[Stem].maximumNconc
            Constant QStructuralPriority: FixedValue=1
            Constant QMetabolicPriority: FixedValue=1
            Constant QStoragePriority: FixedValue=1
          RetranslocateNonStructural RetranslocateNitrogen
          BiomassDemand InitialWt
            Constant Structural: FixedValue=0; Units=g/m^2
            Constant Metabolic: FixedValue=0
            Constant Storage: FixedValue=0
          Constant Photosynthesis: FixedValue=0
          VariableReference initialNConcFunction: VariableName=[Stem].MinimumNConc
        Cultivar Bambatsi
        Constant MortalityRate: FixedValue=0
        Constant SeedMortalityRate: FixedValue=0
    Memo
      long term WT measurements from permanent wells (grass crop with reqular cuts, unknown mgt). Because we couldn't get the bambatsi to work, we used a maize model to keep it going

      ### Status of the sim (May 2022) - SVA notes:
      1. Weather data come from local + public sources (synthetic file).
      2. Soil profile from ssurgo
      3. Management and crop is our best assumption
      4. Similar data from other locations to be added (work in progress)
      5. most important - replace crop.

      ### Relevant publications
      1. Archontoulis et al., in-prep
    Simulation IA_Kanawha
      Weather: FileName=IA_Kanawaha.July5.2020.met
      Clock: Start=1984-01-01; End=2018-12-31
      Summary summaryfile
      SoilArbitrator
      Zone paddock: Area=1; Slope=0; AspectAngle=0; Altitude=50
        SurfaceOrganicMatter: InitialResidueName=maize; InitialResidueType=maize; InitialResidueMass=1000; InitialStandingFraction=0; InitialCPR=0; InitialCNR=80
        Fertiliser
        Plant Bambatsi (disabled)
        Manager CuttingRule (disabled)
          hmass = 2000
          crop = [Bambatsi]
          ffraction = 0.9
          sfraction = 0.9
```csharp
using Models.PMF;
using Models.Core;
using System;
namespace Models
{
    [Serializable]
    [System.Xml.Serialization.XmlInclude(typeof(Model))]
    public class Script : Model
    {
        [Link] Clock Clock;

        [Description("Enter critical biomass for harvest (kg/ha) : ")]
        public double hmass { get; set; }

        [Description("Enter name of growth module to cut : ")]
        public IPlant crop { get; set; }

        [Description("Enter fraction of foliage removed  (0-1) : ")]
        public string ffraction { get; set; }

        [Description("Enter fraction of stem removed  (0-1) : ")]
        public string sfraction { get; set; }

        [EventSubscribe("DoManagement")]
        private void OnDoManagement(object sender, EventArgs e)
        {
        	if (crop.AboveGround.Wt * 10 > hmass)
        	{
        		crop.Harvest();
        	}
            /*
                
         if ([crop].biomass > [hmass] and [crop].plant_status = 'alive' then
               [crop]  cut foliage_remove_fr = [ffraction], adm_remove_fr = [sfraction]
         endif
            
            */
        }
    }
}
```
        Operations Op (disabled)
          1984-05-01  [Bambatsi].Sow(population: 200, cultivar: Bambatsi, depth: 100, rowSpacing: 100);
        Soil: SoilType=KRF_Webster_107; Region=KRF_Webster_107; State=IL; Country=USA; ApsoilNumber=1; Latitude=0; Longitude=0; DataSource=ssurgo2apsim; Comments=None
          Physical
            Thickness  ParticleSizeClay  ParticleSizeSand  ParticleSizeSilt  BD    AirDry  LL15  DUL   SAT       KS
            50         33                25                42                1.05  0.18    0.2   0.32  0.45      374.291
            50         33                25                42                1.05  0.18    0.2   0.32  0.45      408.155
            50         33                25                42                1.06  0.18    0.2   0.32  0.45      402.284
            150        33                25                42                1.17  0.2     0.21  0.33  0.45      342.607
            150        33                25                42                1.33  0.23    0.23  0.34  0.44      262.526
            150        33                25                42                1.37  0.21    0.21  0.33  0.43      206.417
            200        33                25                42                1.39  0.19    0.19  0.31  0.42      159.059
            200        32.8              25.4              41.8              1.43  0.17    0.17  0.3   0.41      146.94
            200        31.2              28.5              40.2              1.48  0.16    0.16  0.29  0.41      157.073
            300        29.1              32.8              38.1              1.55  0.14    0.14  0.28  0.4       171.822
            300        27                36.3              36.7              1.6   0.13    0.13  0.28  0.335661  13.691
            300        25.1              38.8              36.2              1.6   0.13    0.13  0.28  0.328793  8.877
            300        22.7              41.8              35.5              1.6   0.13    0.13  0.28  0.324691  6.65
            300        21                44                35                1.6   0.13    0.13  0.28  0.319177  4.312
            300        21                44                35                1.6   0.13    0.13  0.28  0.314343  2.796
            300        21                44                35                1.6   0.13    0.13  0.28  0.310105  1.813
            300        21                44                35                1.6   0.13    0.13  0.28  0.306391  1.175
            300        21                44                35                1.6   0.13    0.13  0.28  0.303134  0.762
            SoilCrop BambatsiSoil
              LL=[0.2, 0.2, 0.2, 0.21, 0.23, 0.21, 0.19, 0.17, 0.16, 0.14, 0.13, 0.13, 0.13, 0.13, 0.13, 0.13, 0.13, 0.13]
              KL=[0.08, 0.08, 0.08, 0.08, 0.07, 0.06, 0.06, 0.05, 0.04, 0.04, 0.03, 0.02, 0.02, 0.015, 0.01, 0.01, 0.01, 0.01]
              XF=[1, 1, 1, 1, 1, 1, 1, 1, 0, 0, 0, 0, 0, 0, 0, 0, 0, 0]
            SoilCrop MaizeSoil: same as WaterTable.IA_Kanawha.paddock.Soil.Physical.BambatsiSoil
          CERESSoilTemperature Temperature
          Organic: FOMCNRatio=45
            Thickness  Carbon  SoilCNRatio  FBiom  FInert  FOM
            50         4.07    11           0.08   0.4     125.774
            50         4.07    11           0.08   0.4     121.028
            50         4.03    11           0.072  0.42    116.462
            150        3.6     11           0.042  0.5     103.77
            150        2.92    11           0.028  0.62    92.4616
            150        2.19    11           0.022  0.74    82.3855
            200        1.32    11           0.02   0.8     70.6376
            200        0.76    11           0.02   0.8     60.565
            200        0.5     11           0.007  0.924   51.9287
            300        0.14    11           0      0.99    41.2273
            300        0.02    11           0      0.99    32.7313
            300        0.01    11           0      0.99    25.9861
            300        0       11           0      0.99    20.631
            300        0       11           0      0.99    16.3794
            300        0       11           0      0.99    13.004
            300        0       11           0      0.99    10.3242
            300        0       11           0      0.99    8.19658
            300        0       11           0      0.99    6.50745
          Chemical
            Thickness  NO3N  NH4N  PH
            50         4.07  2.03  7.41
            50         4.07  2.03  7.41
            50         4.03  2.02  7.41
            150        3.6   1.8   7.41
            150        2.92  1.46  7.41
            150        2.19  1.09  7.42
            200        1.32  0.66  7.58
            200        0.76  0.38  7.82
            200        0.5   0.25  7.98
            300        0.14  0.07  8.16
            300        0.02  0.01  8.37
            300        0.01  0     8.57
            300        0     0     8.82
            300        0     0     9
            300        0     0     9
            300        0     0     9
            300        0     0     9
            300        0     0     9
          Sample Intial conditions: SWUnits=Volumetric; OCUnits=Total; PHUnits=Water
            Thickness=[50, 50, 50, 150, 150, 150, 200, 200, 200, 300, 300, 300, 300, 300, 300, 300, 300, 300]
            SW=[0.32, 0.32, 0.32, 0.33, 0.34, 0.33, 0.31, 0.3, 0.29, 0.28, 0.28, 0.28, 0.28, 0.28, 0.28, 0.28, 0.28, 0.28]
          Swim3 Swim: PrecipitationInterception=0; ersoil=1e-06; ernode=1e-06; slcerr=1e-06; Salb=0.13; CN2Bare=70; CNRed=20; CNCov=0.8; KDul=0.25; PSIDul=-250; VC=true; DTMin=0; DTMax=1440; MaxWaterIncrement=10; SpaceWeightingFactor=0; SoluteSpaceWeightingFactor=0; Dis=15; Disp=1; A=1; DTHC=0; DTHP=1; Diagnostics=false; WaterTable=0
            SwimSoluteParameters NO3: WaterTableConcentration=0; D0=0.05
              Thickness  Exco  FIP
              50         0     1
              50         0     1
              50         0     1
              150        0     1
              150        0     1
              150        0     1
              200        0     1
              200        0     1
              200        0     1
              300        0     1
              300        0     1
              300        0     1
              300        0     1
              300        0     1
              300        0     1
              300        0     1
              300        0     1
              300        0     1
            SwimSoluteParameters NH4: WaterTableConcentration=0; D0=0.05
              Thickness  Exco  FIP
              50         1     1
              50         1     1
              50         1     1
              150        1     1
              150        1     1
              150        1     1
              200        1     1
              200        1     1
              200        1     1
              300        1     1
              300        1     1
              300        1     1
              300        1     1
              300        1     1
              300        1     1
              300        1     1
              300        0     1
              300        0     1
            SwimSoluteParameters Urea: same as WaterTable.IA_Kanawha.paddock.Soil.Swim.NO3
            SwimSoluteParameters CL: same as WaterTable.IA_Kanawha.paddock.Soil.Swim.NO3
            SwimSoluteParameters PlantAvailableNH4: same as WaterTable.IA_Kanawha.paddock.Soil.Swim.NH4
            SwimSoluteParameters PlantAvailableNO3: same as WaterTable.IA_Kanawha.paddock.Soil.Swim.NO3
            SwimSoluteParameters LabileP: same as WaterTable.IA_Kanawha.paddock.Soil.Swim.NO3
            SwimSoluteParameters UnavailableP: same as WaterTable.IA_Kanawha.paddock.Soil.Swim.NO3
          Nutrient
          Manager SWIMSetLowerBC
            LowerBCType = potential
            LowerBCValue = -2530
```csharp
using Models.Climate;
using APSIM.Shared.Utilities;
using Models.Soils.Nutrients;
using Models.Soils;
using Models.PMF;
using Models.Core;
using System.Xml.Serialization;
using System;
using Models.AgPasture;
using Models.Interfaces;

namespace Models
{
    [Serializable] 
    [System.Xml.Serialization.XmlInclude(typeof(Model))]
    public class Script : Model
    {
        [Link] Clock clock;
        [Link] ISummary summary;
        [Link] private Swim3 swim;
        
        public enum LowerBCTypeOptions {gradient,seepage,potential};

        [Separator("Sets the lower boundary condition type (and value if set to 'potential' for SWIM3. The change is applied at the beginning of the first day of the simulation.")]
        [Description("What lower boundary condition is wanted?")] 
        public LowerBCTypeOptions LowerBCType { get; set; }
        
        [Description("If 'potential', then what potential? Should be negative (mm) ")]
        [Display(EnabledCallback = "IsPotential")] 
        public double LowerBCValue { get; set; }
        
        /// <summary></summary>
        public bool IsPotential => LowerBCType == LowerBCTypeOptions.potential;
        

        public double SoilWaterStart  { get; set; }
        public double SoilWaterEnd  { get; set; }

        [EventSubscribe("DoManagement")]
        private void DoDailyCalculations(object sender, EventArgs e)
        {
            if (clock.Today == clock.StartDate)
            {
                summary.WriteMessage(this, "Script is setting lower boundary condition to " + LowerBCType, MessageType.Diagnostic);
                if (LowerBCType == LowerBCTypeOptions.gradient)
                    swim.SetLowerBCForGradient(bbcGradient: 0.0);   // in cm/cm (ibbc=0) Note that this is the default setting
                else if (LowerBCType == LowerBCTypeOptions.potential)
                    swim.SetLowerBCForGivenPotential(bbcPotential: LowerBCValue /10.0 );    //  convert to cm (ibbc=1), DUL is -100 cm so values more positive will often result in inflow to the bottom of the soil profile. Input in mm so divide here.
                else if (LowerBCType == LowerBCTypeOptions.seepage)
                    swim.SetLowerBCForSeepage(bbcPotentialSeepage: 0.0);  // in cm (ibbc=3). This is for zero-tension lysimeters
                else
                	throw new Exception("Wrong lower boundary condition type");
            }
        }
    }
}
```
        Report outputfile: EventNames=[Clock].EndOfDay
          VariableNames:
            [Clock].Today
            [SurfaceOrganicMatter].Wt
            [SWIM].WaterTable
            [SWIM].SW[12] as SW_200cm
            [SWIM].Drainage
            sum([SWIM].SWmm[1:12]) as SW_02m
            //[Bambatsi].AboveGround.Wt
            [Maize].AboveGround.Wt
            [Maize].Grain.Wt
            sum of [Maize].Leaf.Transpiration + [Soil].Swim.Es from 1-Jan to 31-Dec as Annual_ET
            sum of [Soil].Swim.Es from 1-Jan to 31-Dec as Annual_E
            sum of [Weather].Rain from 1-Jan to 31-Dec as Annual_Rain
            sum of [Soil].Swim.Runoff from 1-Jan to 31-Dec as Annual_Runoff
            sum of [Soil].Swim.Drainage from 1-Jan to 31-Dec as Annual_Drainage
        MicroClimate: a_interception=0; b_interception=1; c_interception=0; d_interception=0; SoilHeatFluxFraction=0.4; MinimumHeightDiffForNewLayer=0; NightInterceptionFraction=0.5; ReferenceHeight=2
        Plant maize: ResourceName=Maize
        Manager SowMaize
          Crop = [maize]
          SowDate = 1-may
          CultivarName = Laila
          SowingDepth = 50
          RowSpacing = 750
          Population = 6
```csharp
using APSIM.Shared.Utilities;
using Models.Utilities;
using Models.Soils;
using Models.PMF;
using Models.Core;
using System;

namespace Models
{
    [Serializable]
    public class Script : Model
    {
        [Link] Clock Clock;
        [Link] Fertiliser Fertiliser;
        [Link] Summary Summary;
        [Link] Soil Soil;
        
        [Description("Crop")]
        public IPlant Crop { get; set; }

        [Description("Sowing date (d-mmm)")]
        public string SowDate { get; set; }

        [Display(Type = DisplayType.CultivarName)]
        [Description("Cultivar to be sown")]
        public string CultivarName { get; set; }

        [Description("Sowing depth (mm)")]
        public double SowingDepth { get; set; }

        [Description("Row spacing (mm)")]
        public double RowSpacing { get; set; }

        [Description("Plant population (/m2)")]
        public double Population { get; set; }

        [EventSubscribe("DoManagement")]
        private void OnDoManagement(object sender, EventArgs e)
        {
            if (DateUtilities.WithinDates(SowDate, Clock.Today, SowDate))
            {
                Crop.Sow(population: Population, cultivar: CultivarName, depth: SowingDepth, rowSpacing: RowSpacing);    
            }
        }
    }
}
```
        Manager FertiliseMaize
          FertiliserType = NO3N
          FertiliserDates = 24-apr
          Amount = 160
          AmountType = True
```csharp
using APSIM.Shared.Utilities;
using Models.PMF;
using Models.Core;
using System;
namespace Models
{
    [Serializable]
    public class Script : Model
    {
        [Link] Clock Clock;
        [Link] Fertiliser Fertiliser;
        
        [Separator("A component to apply fertiliser on one or more dates on every year of the simulation")]

        [Description("Type of fertiliser to apply? ")] 
        public Fertiliser.Types FertiliserType { get; set; }

        [Description("Enter the fertilisation dates as dd-mmm with comma separation (any year information entered will be ignored): ")] 
        public string[] FertiliserDates { get; set; } 

        [Description("Amount of fertiliser to be applied (kg /ha)")] 
        public double Amount { get; set; }

        [Description("Is the above amount to be applied each time? (yes/ticked)? Or is it the total annual amount across all dates (no/unticked)")] 
        public bool AmountType { get; set; }
        
        [EventSubscribe("DoManagement")]
        private void OnDoManagement(object sender, EventArgs e)
        {
            foreach (string ddMMM in FertiliserDates)
            {
                if (DateUtilities.DatesEqual(ddMMM, Clock.Today))
                {
                    if (AmountType)
                        Fertiliser.Apply(Amount: Amount, Type: FertiliserType);
                    else
                        Fertiliser.Apply(Amount: Amount / FertiliserDates.Length, Type: FertiliserType);
                }
            }
        }
    }
}
```
        Manager Harvesting
          Crop = [maize]
```csharp
using APSIM.Shared.Utilities;
using Models.Utilities;
using Models.Soils;
using Models.PMF;
using Models.Core;
using System;

namespace Models
{
    [Serializable] 
    public class Script : Model
    {
        [Description("Crop")]
        public IPlant Crop { get; set; }
        
        [EventSubscribe("DoManagement")]
        private void OnDoManagement(object sender, EventArgs e)
        {
            if (Crop.IsReadyForHarvesting)
            {
                Crop.Harvest();
                Crop.EndCrop();
            }
        }
    }
}
```
        Manager Tillage on a fixed date
          TillageDate = 1-dec
          Fraction = 0.5
          Depth = 0
```csharp
using Models.Surface;
using APSIM.Shared.Utilities;
using Models.PMF;
using Models.Core;
using System;

namespace Models
{
    [Serializable]
    public class Script : Model
    {
        [Link] Clock Clock;
        [Link] SurfaceOrganicMatter SOM;
        
        [Description("Tillage Date")]
        public string TillageDate { get; set; }
        
        [Description("Fraction of Residues To Incorporate (0-1)")]
        public double Fraction { get; set; }

        [Description("Depth of Tillage (mm)")]
        public double Depth { get; set; }

        [EventSubscribe("DoManagement")]
        private void OnDoManagement(object sender, EventArgs e)
        {
            if (DateUtilities.WithinDates(TillageDate, Clock.Today, TillageDate))
                SOM.Incorporate(Fraction, Depth);
        }
    }
}
```
    Simulation IL_Stelle
      Weather: FileName=IL_Stelle_NasaPower.met
      Clock: Start=2000-01-01; End=2018-12-31
      Summary summaryfile
      SoilArbitrator
      Zone paddock: Area=1; Slope=0; AspectAngle=0; Altitude=50
        SurfaceOrganicMatter: InitialResidueName=maize; InitialResidueType=maize; InitialResidueMass=1000; InitialStandingFraction=0; InitialCPR=0; InitialCNR=80
        Fertiliser
        Plant Bambatsi (disabled)
        Manager CuttingRule (disabled): same as WaterTable.IA_Kanawha.paddock.CuttingRule
        Operations Op (disabled)
          1984-05-01  [Bambatsi].Sow(population: 200, cultivar: Bambatsi, depth: 100, rowSpacing: 100);
        Soil: SoilType=KRF_Webster_107; Region=KRF_Webster_107; State=IL; Country=USA; ApsoilNumber=1; Latitude=0; Longitude=0; DataSource=ssurgo2apsim; Comments=None
          CERESSoilTemperature Temperature
          Swim3 Swim: same as WaterTable.IA_Kanawha.paddock.Soil.Swim
          Nutrient
          Manager SWIMSetLowerBC: same as WaterTable.IA_Kanawha.paddock.Soil.SWIMSetLowerBC
          Physical
            Thickness  ParticleSizeClay  ParticleSizeSand  ParticleSizeSilt  BD     AirDry  LL15  DUL   SAT         KS
            50         35                7.5               57.5              1.401  0.22    0.24  0.35  0.47        242.32
            50         35                7.5               57.5              1.401  0.22    0.24  0.35  0.47        243.072
            50         35                7.5               57.5              1.401  0.22    0.24  0.35  0.47        243.072
            150        36.5              7.5               56                1.401  0.24    0.25  0.35  0.47        210.346
            150        41.1              7.5               51.4              1.35   0.26    0.26  0.36  0.49        137.488
            150        45.7              7.5               46.8              1.32   0.28    0.28  0.36  0.5         89.761
            200        51.2              7.5               41.3              1.27   0.29    0.29  0.37  0.52        56.47
            200        52.4              7.5               40.1              1.35   0.28    0.28  0.36  0.48        45.9
            200        49.5              7.5               43                1.35   0.26    0.26  0.34  0.44        46.082
            300        46.1              7.5               46.4              1.27   0.23    0.23  0.31  0.42        41.277
            300        45                7.5               47.5              1.27   0.22    0.22  0.3   0.353022    11.669
            300        45                7.5               47.5              1.27   0.22    0.22  0.3   0.346787    7.732
            300        45                7.5               47.5              1.27   0.22    0.22  0.3   0.34304295  5.877
            300        45                7.5               47.5              1.27   0.22    0.22  0.3   0.337981    3.894
            300        45                7.5               47.5              1.27   0.22    0.22  0.3   0.333515    2.58
            300        45                7.5               47.5              1.27   0.22    0.22  0.3   0.329574    1.709
            300        45                7.5               47.5              1.48   0.22    0.22  0.3   0.326096    1.133
            300        45                7.5               47.5              1.53   0.22    0.22  0.3   0.323027    0.751
            SoilCrop BambatsiSoil
              LL=[0.24, 0.24, 0.24, 0.25, 0.26, 0.28, 0.29, 0.28, 0.26, 0.23, 0.22, 0.22, 0.22, 0.22, 0.22, 0.22, 0.22, 0.22]
              KL=[0.08, 0.08, 0.08, 0.08, 0.07, 0.06, 0.06, 0.05, 0.04, 0.04, 0.03, 0.02, 0.02, 0.015, 0.01, 0.01, 0.01, 0.01]
              XF=[1, 1, 1, 1, 1, 1, 1, 1, 0, 0, 0, 0, 0, 0, 0, 0, 0, 0]
            SoilCrop MaizeSoil: same as WaterTable.IL_Stelle.paddock.Soil.Physical.BambatsiSoil
          Organic: FOMCNRatio=45
            Thickness  Carbon  SoilCNRatio  FBiom  FInert  FOM
            50         2.33    11           0.08   0.4     125.774
            50         2.33    11           0.08   0.4     121.028
            50         2.33    11           0.072  0.42    116.462
            150        2.19    11           0.042  0.5     103.77
            150        1.79    11           0.028  0.62    92.4616
            150        1.37    11           0.022  0.74    82.3855
            200        0.89    11           0.02   0.8     70.6376
            200        0.58    11           0.02   0.8     60.565
            200        0.47    11           0.02   0.8     51.9287
            300        0.21    11           0.02   0.852   41.2273
            300        0.07    11           0.02   0.94    32.7313
            300        0.03    11           0.02   0.99    25.9861
            300        0.005   11           0.02   0.99    20.631
            300        0       11           0.02   0.99    16.3794
            300        0       11           0.02   0.99    13.004
            300        0       11           0      0       10.3242
            300        0       11           0      0       8.19658
            300        0       11           0      0       6.50745
          Sample Intial conditions: SWUnits=Volumetric; OCUnits=Total; PHUnits=Water
            Thickness=[50, 50, 50, 150, 150, 150, 200, 200, 200, 300, 300, 300, 300, 300, 300, 300, 300, 300]
            SW=[0.35, 0.35, 0.35, 0.35, 0.36, 0.36, 0.37, 0.36, 0.34, 0.31, 0.3, 0.3, 0.3, 0.3, 0.3, 0.3, 0.3, 0.3]
          Chemical
            Thickness  NO3N   NH4N   PH
            50         2.33   1.16   7.3
            50         2.33   1.16   7.3
            50         2.33   1.16   7.3
            150        2.19   1.1    7.37
            150        1.79   0.89   7.57
            150        1.37   0.69   7.78
            200        0.89   0.45   8.03
            200        0.58   0.29   8.28
            200        0.47   0.23   8.52
            300        0.21   0.11   8.81
            300        0.07   0.03   8.89
            300        0.03   0.01   8.89
            300        0.005  0.005  8.89
            300        0      0      8.89
            300        0      0      8.89
            300        0      0      8.89
            300        0      0      8.89
            300        0      0      8.89
        Report outputfile: same as WaterTable.IA_Kanawha.paddock.outputfile
        MicroClimate: a_interception=0; b_interception=1; c_interception=0; d_interception=0; SoilHeatFluxFraction=0.4; MinimumHeightDiffForNewLayer=0; NightInterceptionFraction=0.5; ReferenceHeight=2
        Plant maize: ResourceName=Maize
        Manager SowMaize: same as WaterTable.IA_Kanawha.paddock.SowMaize
        Manager FertiliseMaize: same as WaterTable.IA_Kanawha.paddock.FertiliseMaize
        Manager Harvesting: same as WaterTable.IA_Kanawha.paddock.Harvesting
        Manager Tillage on a fixed date: same as WaterTable.IA_Kanawha.paddock.Tillage on a fixed date
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