Simulations: Version=159
  DataStore
    ExcelInput ExcelMultiInput: SheetNames=[Observed, MaxLeafSize]
      FileNames=[Observed.xlsx, LaTrobeCE_Obs.xlsx, LincolnCE_Obs.xlsx, PalmerstonNorthCE_Obs.xlsx, Gatton2014_2016.xlsx, 2020Results.xlsx, PalmerstonNorth1989.xlsx, Obs_APSIMX_NPIField2019_Wheat.xlsx, NPIValidation.xlsx, Obs_APSIMX_NPIField2020_Wheat.xlsx]
    PredictedObserved HarvestObsPred: PredictedTableName=HarvestReport; ObservedTableName=Observed; FieldNameUsedForMatch=SimulationName; FieldName2UsedForMatch=Wheat.Phenology.CurrentStageName; AllColumns=false
      Tests: POName=HarvestObsPred
        AcceptedStats:
          Name                                  n    Slope      Intercept   SEslope     SEintercept  R2          RMSE        NSE         ME           MAE         RSR
          Wheat.AboveGround.N                   67   1.12809    -1.00273    0.0391678   0.525848     0.927336    2.09151     0.875576    0.540148     1.59606     0.350095
          Wheat.AboveGround.Wt                  211  1.01911    34.1751     0.0202867   28.6588      0.923515    188.663     0.904426    58.5184      140.453     0.308417
          Wheat.Grain.N                         135  1.07639    -0.257745   0.0362834   0.353004     0.868717    1.79883     0.808865    0.415699     1.36719     0.435568
          Wheat.Grain.Nconc                     136  0.52548    0.0109277   0.0578165   0.00130116   0.381364    0.00332647  0.31597     0.000420536  0.00251003  0.824015
          Wheat.Grain.Number                    195  0.819153   2260.06     0.0213448   308.959      0.88414     2247.71     0.879203    -81.8409     1634.74     0.346666
          Wheat.Grain.Protein                   114  0.424157   7.85561     0.0562272   0.726492     0.336911    2.10436     0.263918    0.550644     1.57133     0.854181
          Wheat.Grain.Wt                        233  0.978713   11.017      0.0292591   15.5104      0.828875    103.644     0.801774    0.879252     78.6576     0.444269
          Wheat.Leaf.CohortMaxSize(1)           10   0.0270759  255.563     0.0327969   7.48653      0.078506    51.271      -0.92608    36.4016      40.5202     1.31661
          Wheat.Leaf.CohortMaxSize(10)          10   1.11919    -412.466    0.256733    521.362      0.703745    224.554     -0.300948   -171.57      207.903     1.08206
          Wheat.Leaf.CohortMaxSize(11)          10   0.825212   365.905     0.266736    598.083      0.54471     196.601     0.391552    -23.5263     115.224     0.740002
          Wheat.Leaf.CohortMaxSize(12)          10   0.848404   253.801     0.223896    493.954      0.642195    151.745     0.416747    -79.2873     105.917     0.724519
          Wheat.Leaf.CohortMaxSize(13)          10   1.09708    -403.529    1.01788     2346.69      0.126797    703.826     -7.88491    -180.887     351.071     2.82779
          Wheat.Leaf.CohortMaxSize(14)          10   1.30676    -642.351    0.429337    1019.71      0.536608    603.245     -0.59098    71.3164      415.854     1.19661
          Wheat.Leaf.CohortMaxSize(15)          9    -0.26027   2713.41     0.159916    364.78       0.274529    585.946     -0.830732   -109.076     515.056     1.27566
          Wheat.Leaf.CohortMaxSize(16)          3    -0.645839  2788.84     7.95817     13511.1      0.00654291  1245.82     -65.0428    6.01155      1116.21     6.6354
          Wheat.Leaf.CohortMaxSize(17)          2    3.1965     -3522.2732  0           0            1           590.025     -4.43529    -197.771     555.892     1.64853
          Wheat.Leaf.CohortMaxSize(18)          1    -          -           -           -            -           985.267     -           985.267      985.267     -
          Wheat.Leaf.CohortMaxSize(2)           10   0.0630555  275.197     0.29264     121.589      0.00577     139.081     -3.00585    -108.611     115.388     1.89875
          Wheat.Leaf.CohortMaxSize(3)           10   0.289291   221.125     0.270354    144.318      0.125205    181.922     -2.6244     -152.132     163.333     1.80609
          Wheat.Leaf.CohortMaxSize(4)           10   0.345581   263.167     0.345159    223.342      0.111353    208.379     -1.99176    -152.884     173.867     1.64091
          Wheat.Leaf.CohortMaxSize(5)           10   0.249259   458.154     0.277019    225.53       0.0919017   229.975     -0.868592   -139.856     146.902     1.29682
          Wheat.Leaf.CohortMaxSize(6)           10   0.345905   476.527     0.195687    187.624      0.280871    242.414     -0.0368856  -130.978     145.477     0.966021
          Wheat.Leaf.CohortMaxSize(7)           10   0.441949   501.987     0.142766    157.184      0.545013    176.986     0.296106    -101.041     122.714     0.79593
          Wheat.Leaf.CohortMaxSize(8)           10   0.589766   515.86      0.179194    229.582      0.575192    169.291     0.574802    1.17705      117.592     0.61861
          Wheat.Leaf.CohortMaxSize(9)           10   0.793068   300.515     0.327977    507.562      0.422258    241.916     0.0929616   -15.3812     161.582     0.903512
          Wheat.Phenology.FlagLeafDAS.Value()   255  0.974146   6.29479     0.00979673  1.35981      0.97505     8.03204     0.971245    2.92157      5.87059     0.16924
          Wheat.Phenology.FloweringDAS.Value()  299  0.943644   8.35638     0.00705763  1.10217      0.983658    6.98781     0.982029    0.0602007    4.93645     0.133831
        AcceptedStatsName=Name n Slope Intercept SEslope SEintercept R2 RMSE NSE ME MAE RSR
  Experiment LincolnCE
    Factors
      Permutation
        Factor Treat
          CompositeFactor LV
            Specifications:
              [Experimental].Script.TreatPp = 16
              [Experimental].Script.Vern = Full
              [Experimental].Script.EmergeDate = 31-mar
          CompositeFactor LN
            Specifications:
              [Experimental].Script.TreatPp = 16
              [Experimental].Script.Vern = Nil
              [Experimental].Script.EmergeDate = 4-jan
          CompositeFactor SV
            Specifications:
              [Experimental].Script.TreatPp = 8
              [Experimental].Script.Vern = Full
              [Experimental].Script.EmergeDate = 31-mar
          CompositeFactor SN
            Specifications:
              [Experimental].Script.TreatPp = 8
              [Experimental].Script.Vern = Nil
              [Experimental].Script.EmergeDate = 4-jan
        Factor Cv
          CompositeFactor Amarok
            Specifications:
              [Experimental].Script.CultivarName = Amarok
              [OverWriteFLNParams].Script.MinLN = 9.1363
              [OverWriteFLNParams].Script.PpLN = 2.2037
              [OverWriteFLNParams].Script.VrnLN = 5.019
              [OverWriteFLNParams].Script.VxPLN = 1.0347
          CompositeFactor BattenWinter
            Specifications:
              [Experimental].Script.CultivarName = BattenWinter
              [OverWriteFLNParams].Script.MinLN = 8.2778
              [OverWriteFLNParams].Script.PpLN = 3.7472
              [OverWriteFLNParams].Script.VrnLN = 1.475
              [OverWriteFLNParams].Script.VxPLN = 5.7472
          CompositeFactor BattenSpring
            Specifications:
              [Experimental].Script.CultivarName = BattenSpring
              [OverWriteFLNParams].Script.MinLN = 7.94737
              [OverWriteFLNParams].Script.PpLN = 3.80263
              [OverWriteFLNParams].Script.VrnLN = 0.391
              [OverWriteFLNParams].Script.VxPLN = -0.33837
          CompositeFactor Otane
            Specifications:
              [Experimental].Script.CultivarName = Otane
              [OverWriteFLNParams].Script.MinLN = 6.65217
              [OverWriteFLNParams].Script.PpLN = 2.45894
              [OverWriteFLNParams].Script.VrnLN = -0.75585
              [OverWriteFLNParams].Script.VxPLN = 1.039
          CompositeFactor Saracen
            Specifications:
              [Experimental].Script.CultivarName = Saracen
              [OverWriteFLNParams].Script.MinLN = 7.54545
              [OverWriteFLNParams].Script.PpLN = 2.71095
              [OverWriteFLNParams].Script.VrnLN = 0.8736
              [OverWriteFLNParams].Script.VxPLN = 2.29525
          CompositeFactor CRWT153
            Specifications:
              [Experimental].Script.CultivarName = CRWT153
              [OverWriteFLNParams].Script.MinLN = 14.2727
              [OverWriteFLNParams].Script.PpLN = -0.0283
              [OverWriteFLNParams].Script.VrnLN = 2.6
              [OverWriteFLNParams].Script.VxPLN = -1.6102
        Factor Durat: Specification=[Experimental].Script.TransitionWeek = 12
    Simulation LincolnUniBiotron
      Clock: Start=2000-01-01; End=2000-12-31
      Summary SummaryFile
      SoilArbitrator
      ControlledEnvironment: MaxT=23.6; MinT=23.6; Rain=0; Radn=15; PanEvap=5; VP=2; Wind=3; CO2=350; AirPressure=1010; DiffuseFraction=0; Latitude=-27; Longitude=0; DayLength=16; SunRise=0; SunSet=0
      Zone Field: Area=1; Slope=0; AspectAngle=0; Altitude=50
        Fertiliser
        Soil: ASCOrder=Vertosol; ASCSubOrder=Black; SoilType=Clay; Site=Norwin; NearestTown=Norwin; Region=Darling Downs and Granite Belt; State=Queensland; Country=Australia; NaturalVegetation=Qld. Bluegrass, possible Qld. Blue gum; ApsoilNumber=900; Latitude=-27.5818; Longitude=151.3202; LocationAccuracy=+/- 20m
          DataSource=CSIRO Sustainable Ecosystems, Toowoomba; Characteriesd as part of the GRDC funded project"Doing it better, doing it smarter, managing soil water in Australian agriculture' 2011
          Comments=OC, CLL for all crops estimated-based on Bongeen Mywybilla Soil No1
          Physical
            Thickness  BD      AirDry  LL15    DUL     SAT     KS
            150        1.0106  0.1303  0.2605  0.521   0.5887  20
            150        1.0715  0.1987  0.2484  0.4967  0.5657  20
            300        1.0939  0.28    0.28    0.4884  0.5572  20
            300        1.1586  0.28    0.28    0.4803  0.5328  20
            300        1.173   0.28    0.28    0.4716  0.5274  20
            300        1.1629  0.28    0.28    0.4571  0.5312  20
            300        1.1875  0.28    0.28    0.4523  0.5219  20
            SoilCrop WheatSoil: LL=[0.261, 0.248, 0.28, 0.306, 0.36, 0.392, 0.446]; KL=[0.06, 0.06, 0.06, 0.04, 0.04, 0.02, 0.01]; XF=[1, 1, 1, 1, 1, 1, 1]
          WaterBalance SoilWater: SummerDate=1-Nov; SummerU=5; SummerCona=5; WinterDate=1-Apr; WinterU=5; WinterCona=5; DiffusConst=40; DiffusSlope=16; Salb=0.12; CN2Bare=73; CNRed=20; CNCov=0.8; PSIDul=-100; Thickness=[150, 150, 300, 300, 300, 300, 300]; SWCON=[0.3, 0.3, 0.3, 0.3, 0.3, 0.3, 0.3]
          Organic: FOMCNRatio=40; CarbonUnits=Total
            Thickness  Carbon  SoilCNRatio  FBiom  FInert  FOM
            150        1.2     12           0.04   0.4     347.129
            150        0.96    12           0.02   0.6     270.344
            300        0.6     12           0.02   0.8     163.972
            300        0.3     12           0.02   1       99.4541
            300        0.18    12           0.01   1       60.322
            300        0.12    12           0.01   1       36.5871
            300        0.12    12           0.01   1       22.1912
          Chemical: Thickness=[150, 150, 300, 300, 300, 300, 300]; PH=[8, 8, 8, 8, 8, 8, 8]; PHUnits=Water
          Water: Thickness=[150, 150, 300, 300, 300, 300, 300]; InitialValues=[0.521, 0.4967, 0.4884, 0.4803, 0.4716, 0.4571, 0.4523]; FilledFromTop=false
          CERESSoilTemperature Temperature
          Nutrient
          Solute NO3: Thickness=[150, 150, 300, 300, 300, 300, 300]; InitialValues=[1, 1, 1, 1, 1, 1, 1]; InitialValuesUnits=ppm; WaterTableConcentration=0; D0=0; DepthConstant=0; MaxDepthSoluteAccessible=0; RunoffEffectivenessAtMovingSolute=0; MaxEffectiveRunoff=0
          Solute NH4: Thickness=[150, 150, 300, 300, 300, 300, 300]; InitialValues=[0.1, 0.1, 0.1, 0.1, 0.1, 0.1, 0.1]; InitialValuesUnits=ppm; WaterTableConcentration=0; D0=0; DepthConstant=0; MaxDepthSoluteAccessible=0; RunoffEffectivenessAtMovingSolute=0; MaxEffectiveRunoff=0
          Solute Urea: Thickness=[150, 150, 300, 300, 300, 300, 300]; InitialValues=[0, 0, 0, 0, 0, 0, 0]; InitialValuesUnits=kg/ha; WaterTableConcentration=0; D0=0; DepthConstant=0; MaxDepthSoluteAccessible=0; RunoffEffectivenessAtMovingSolute=0; MaxEffectiveRunoff=0
        SurfaceOrganicMatter: InitialResidueName=wheat_stubble; InitialResidueType=wheat; InitialResidueMass=500; InitialStandingFraction=0; InitialCPR=0; InitialCNR=100
        Plant Wheat
        MicroClimate: a_interception=0; b_interception=1; c_interception=0; d_interception=0; SoilHeatFluxFraction=0.4; MinimumHeightDiffForNewLayer=0; NightInterceptionFraction=0.5; ReferenceHeight=2
        Manager Experimental
          TreatPp = 0
          Vern =
          EmergeDate =
          CultivarName =
          TransitionWeek = 0
          SowingDepth = 20
```csharp
using Models.Climate;
using System;
using Models.Core;
using Models.PMF;
using Models.Soils;
using Models.Utilities;
using APSIM.Shared.Utilities;

namespace Models
{
    [Serializable]
    public class Script : Model
    {
        [Link] Clock clock;
        [Link] Plant wheat;
        [Link] ControlledEnvironment ci;

        [Display(Type = DisplayType.CultivarName)]
        [Description("Cultivar to be sown")]
        public string CultivarName { get; set; }
        [Description("Sowing depth (mm)")]
        public double SowingDepth { get; set; }
        [Description("Vernalisation")]
        public string Vern { get; set; }
        [Description("Treatment photoperiod (h)")]
        public double TreatPp { get; set; }
        [Description("Treatment duration (Weeks)")]
        public double TransitionWeek { get; set; }
        private double DAS {get; set;}
        private bool FirstDay = true;
        [Description("Emergence Date (d-MMM)")]
        public string EmergeDate {get; set;}

        [EventSubscribe("PreparingNewWeatherData")]
        private void OnPreparingNewWeatherData(object sender, EventArgs e)
        {
            if (FirstDay)
            {
                wheat.Sow(population: 100, cultivar: CultivarName, depth: SowingDepth, rowSpacing: 150);    
                wheat.SetEmergenceDate(EmergeDate);
                FirstDay = false;
            }
            DAS += 1;
            if ((DAS <= 90)&&(Vern=="Full"))
            {
                ci.MaxT = 1.0;
                ci.MinT = 1.0;
                ci.DayLength = 0;
            }
            else
            {
                ci.MaxT=23.6;
                ci.MinT=23.6;
                ci.DayLength = TreatPp;
                ci.Radn = ((TreatPp - 2) * 3600 * 0.000153 * 2) + (2 * 3600 * 0.000153); //Full light(Hours * s/h * MJ/m2/s * Coeff_PAR->Total) + 2 hour at half light (Hours * s/h * MJ/m2/s) 
            }
        }
    }
}
```
        Manager HarvestAtFlowering
```csharp
using Models.PMF.Phen;
using APSIM.Shared.Utilities;
using Models.Utilities;
using Models.Soils;
using Models.PMF;
using Models.Core;
using System;
using Models.Soils.Nutrients;

namespace Models
{
    [Serializable]
    public class Script : Model
    {
        [Link] private Plant Wheat;
        [Link] private Clock clock;
        [Link(Type = LinkType.Path, Path = "[Wheat].Phenology")]
        private Phenology phenology;

        [EventSubscribe("DoManagement")]
        private void OnDoManagement(object sender, EventArgs e)
        {
            if (phenology.CurrentPhase.Name=="GrainFilling")
            {
               Wheat.Harvest();
               Wheat.EndCrop();    
               clock.EndDate = clock.Today.Date;
            }
        
        }
        
    }
}
```
        Report DailyReport: EventNames=[Clock].EndOfDay
          VariableNames:
            [Clock].Today
            [Wheat].DaysAfterSowing
            [Wheat].Phenology.ThermalTime
            [Wheat].Phenology.Photoperiod
            [Wheat].Phenology.CAMP.RelCold
            [Wheat].Phenology.CAMP.RelPp
            [Wheat].Phenology.CurrentStageName
            [Wheat].Phenology.CAMP.IsGerminated
            [Wheat].Phenology.CAMP.IsEmerged
            [Wheat].Phenology.CAMP.IsVernalised
            [Wheat].Phenology.CAMP.IsReproductive
            [Wheat].Phenology.HaunStage
            [Wheat].Phenology.CAMP.dHS
            [Wheat].Phenology.AccumulatedTT
            [Wheat].Phenology.CAMP.BaseVrn
            [Wheat].Phenology.CAMP.dBaseVrn
            [Wheat].Phenology.CAMP.MaxVrn
            [Wheat].Phenology.CAMP.dMaxVrn
            [Wheat].Phenology.CAMP.Cold
            [Wheat].Phenology.CAMP.dCold
            [Wheat].Phenology.CAMP.Vrn
            [Wheat].Phenology.CAMP.MaxVrn2
            [Wheat].Phenology.CAMP.Vrn2
            [Wheat].Phenology.CAMP.Vrn1
            [Wheat].Phenology.CAMP.dVrn1
            [Wheat].Phenology.CAMP.Vrn3
            [Wheat].Phenology.CAMP.dVrn3
            [Wheat].Phenology.CAMP.VSHS
            [Wheat].Phenology.CAMP.TSHS
            [Wheat].Phenology.CAMP.FLN
            [Wheat].Phenology.CAMP.PpVrn3Fact
            [Wheat].Phenology.Phyllochron.LeafStageFactor
        Report HarvestReport: EventNames=[Wheat].Harvesting
          VariableNames:
            [Clock].Today
            [Wheat].SowingDate
            [Wheat].SowingData.Cultivar
            [Wheat].Phenology.CurrentPhase.Name
            [Wheat].Phenology.CurrentStageName
            [Wheat].Phenology.EmergenceDAS
            [Wheat].Phenology.TerminalSpikeletDAS
            [Wheat].Phenology.FlagLeafDAS
            [Wheat].Phenology.HeadingDAS
            [Wheat].Phenology.FloweringDAS
            [Wheat].Phenology.MaturityDAS
            [Wheat].Grain.Wt
            [Wheat].Grain.N
            [Wheat].Grain.Number
            [Wheat].Grain.Size
            [Wheat].Grain.Nconc
            [Wheat].AboveGround.Wt
            [Wheat].AboveGround.N
            [Wheat].Grain.Protein
            [Wheat].Grain.Size
            [Wheat].Phenology.FinalLeafNumber
            [Wheat].Structure.MainStemPopn
            [Wheat].SowingData.Cultivar
            [Wheat].SowingDate.DayOfYear
            [Wheat].Leaf.CohortMaxSize
            [Clock].StartDate
            ([Wheat].Phenology.FloweringDAS - [Wheat].Phenology.EmergenceDAS) as FloweringDAE
            [IWeather].Latitude
            [IWeather].Longitude
            [IWeather].FileName
            [IWeather].CO2
            [IWeather].Amp
            [IWeather].Tav
            [LocationInfo].Script.Country
            [LocationInfo].Script.State
            [LocationInfo].Script.Region
        Report SowingReport
        Report SupReport (disabled): EventNames=[Clock].DoReport
          VariableNames:
            [Clock].Today
            [Wheat].DaysAfterSowing
            [Wheat].Phenology.CAMP.Vrn1
            [Wheat].Phenology.CAMP.BaseVrn1
            [Wheat].Phenology.CAMP.MethColdVrn1
            [Wheat].Phenology.CAMP.ColdVrn1
            [Wheat].Phenology.CAMP.pVrn2
            [Wheat].Phenology.CAMP.Vrn2
            [Wheat].Phenology.CAMP.Vrn3
            [Wheat].Phenology.CAMP.VrnX
            [Wheat].Phenology.CAMP.dHS
            [Wheat].Phenology.AccumulatedTT
            [Wheat].Phenology.ThermalTime
            [IWeather].MinT
            [IWeather].MaxT
        Manager OverWriteFLNParams
          MinLN = 0
          PpLN = 0
          VrnLN = 0
          VxPLN = 0
```csharp
using Models.Soils;
using System;
using Models.Core;
using System.Collections.Generic;
using System.Text;
using Models.PMF;
using Models;
using System.Xml.Serialization;
using APSIM.Shared.Utilities;

namespace Models
{
    [Serializable] 
    public class Script : Model
    {
        [Link] Plant Plant;
        [Link] Clock Clock;
        [Link] Zone zone;
        
        [Description("MinLN")]
        public double MinLN { get; set; }
        [Description("PpLN")]
        public double PpLN { get; set; }
        [Description("VrnLN")]
        public double VrnLN { get; set; }
        [Description("VxPLN")]
        public double VxPLN { get; set; }
        
        [EventSubscribe("Sowing")]
        private void OnSowing(object sender, EventArgs e)
        {
            object minLN = MinLN;
            zone.Set("Wheat.Phenology.CAMP.FLNparams.MinLN", minLN);
            object ppLN = PpLN;
            zone.Set("Wheat.Phenology.CAMP.FLNparams.PpLN", ppLN);
            object vrnLN = VrnLN;
            zone.Set("Wheat.Phenology.CAMP.FLNparams.VrnLN", vrnLN);
            object vxpLN = VxPLN;
            zone.Set("Wheat.Phenology.CAMP.FLNparams.VxPLN", vxpLN);
            object vtt = 1;
            object vtd = 90;
            zone.Set("Wheat.Phenology.CAMP.EnvData.VrnTreatTemp", vtt);
            zone.Set("Wheat.Phenology.CAMP.EnvData.VrnTreatDuration", vtd);
        }
    }
}
```
      Manager LocationInfo
        Country =
        State =
        Region =
```csharp
using Models.Soils;
using System;
using Models.Core;
using Models.PMF;
using APSIM.Shared.Utilities;

namespace Models
{
    [Serializable]
    public class Script : Model
    {
        [Link] Clock Clock;
        [Link] Fertiliser Fertiliser;
        [Link] Summary Summary;
        
        [Description("Country")]
        public string Country { get; set; }

        [Description("State")]
        public string State { get; set; }

        [Description("Region")]
        public string Region { get; set; }

    }
}
```
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