Simulations: Version=188
  Memo TitlePage
    # The APSIM Wheat Model

    _Brown, H.E., Huth, N.I. and Holzworth, D.P._
  Memo Introduction
    The APSIM wheat model has been developed using the Plant Modelling Framework (PMF) of [brown_plant_2014]. This new framework provides a library of plant organ and process submodels that can be coupled, at runtime, to construct a model in much the same way that models can be coupled to construct a simulation. This means that dynamic composition of lower level process and organ classes (e.g. photosynthesis, leaf) into larger constructions (e.g. maize, wheat, sorghum) can be achieved by the model developer without additional coding.

    The wheat model consists of:

    * a phenology model to simulate development through sequential developmental phases
    * a structure model to simulate plant morphology
    * a collection of organs to simulate the various plant parts
    * an arbitrator to allocate resources (N, biomass) to the various plant organs

    This work builds upon earlier APSIM Wheat models such as NWheat ([Asseng200225], [KeatingNWheat]), NWheatS ([Asseng1998163]), Cropmod-Wheat ([Wang2002GenericCropModel]), and the earlier versions developed in Plant (<a href=\"http://www.apsim.info/Documentation/Model,CropandSoil/CropModuleDocumentation/Wheat.aspx">APSIM Wheat 7.5</a>") and then within the Plant Modelling Framework ([brown_plant_2014]).
  DataStore
    ExcelInput ExcelMultiInput: SheetNames=[Observed, MaxLeafSize]
      FileNames=[%root%\Tests\Validation\Wheat\data\Observed.xlsx, %root%\Tests\Validation\Wheat\data\LaTrobeCE_Obs.xlsx, %root%\Tests\Validation\Wheat\data\LincolnCE_Obs.xlsx, %root%\Tests\Validation\Wheat\data\PalmerstonNorthCE_Obs.xlsx, %root%\Tests\Validation\Wheat\data\Gatton2014_2016.xlsx, %root%\Tests\Validation\Wheat\data\2020Results.xlsx, %root%\Tests\Validation\Wheat\data\PalmerstonNorth1989.xlsx, %root%\Tests\Validation\Wheat\data\Obs_APSIMX_NPIField2019_Wheat.xlsx, %root%\Tests\Validation\Wheat\data\NPIValidation.xlsx, %root%\Tests\Validation\Wheat\data\Obs_APSIMX_NPIField2020_Wheat.xlsx, %root%\Tests\Validation\Wheat\data\Lincoln2021.xlsx, %root%\Tests\Validation\Wheat\data\Lincoln2023.xlsx, %root%\Tests\Validation\Wheat\data\FAR DMC W20-03.xlsx, %root%\Tests\Validation\Wheat\data\FAR DMC W20-05.xlsx, %root%\Tests\Validation\Wheat\data\FAR HYC W17-01-1.xlsx, %root%\Tests\Validation\Wheat\data\FAR HYC W17-01-2.xlsx, %root%\Tests\Validation\Wheat\data\FAR HYC W17-02-1.xlsx, %root%\Tests\Validation\Wheat\data\FAR HYC W17-02-2.xlsx, %root%\Tests\Validation\Wheat\data\FAR HYC W18-02-2.xlsx, %root%\Tests\Validation\Wheat\data\FAR HYC W18-02-2a.xlsx, %root%\Tests\Validation\Wheat\data\FAR HYC W18-08-1.xlsx, %root%\Tests\Validation\Wheat\data\FAR HYC W19-03-1.xlsx, %root%\Tests\Validation\Wheat\data\FAR HYC W19-06-1.xlsx, %root%\Tests\Validation\Wheat\data\FAR RRC W21-03.xlsx, %root%\Tests\Validation\Wheat\data\FAR RRC W22-03.xlsx, %root%\Tests\Validation\Wheat\data\FAR SAC W18-01.xlsx, %root%\Tests\Validation\Wheat\data\FAR SAC W18-02.xlsx, %root%\Tests\Validation\Wheat\data\FAR SAC W19-01.xlsx, %root%\Tests\Validation\Wheat\data\FAR SAC W19-02.xlsx, %root%\Tests\Validation\Wheat\data\FAR SAC W20-03-2.xlsx, %root%\Tests\Validation\Wheat\data\FAR SAC W20-05-1.xlsx, %root%\Tests\Validation\Wheat\data\FAR SAC W22-03-2.xlsx, %root%\Tests\Validation\Wheat\data\FAR TAS W16-01-1.xlsx, %root%\Tests\Validation\Wheat\data\FAR TAS W16-01-2.xlsx, %root%\Tests\Validation\Wheat\data\FAR TAS W16-06.xlsx, %root%\Tests\Validation\Wheat\data\FAR TAS W16-08.xlsx, %root%\Tests\Validation\Wheat\data\FAR TAS W21-03-1.xlsx, %root%\Tests\Validation\Wheat\data\FAR VIC W22-03-2.xlsx, %root%\Tests\Validation\Wheat\data\FAR WAA W20-01a.xlsx, %root%\Tests\Validation\Wheat\data\FAR WAA W20-01b.xlsx, %root%\Tests\Validation\Wheat\data\FAR WAE W21-05.xlsx, %root%\Tests\Validation\Wheat\data\FAR WAE W22-02.xlsx, %root%\Tests\Validation\Wheat\data\Triage_Phen.xlsx, %root%\Tests\Validation\Wheat\data\Maricopa.xlsx, %root%\Tests\Validation\Wheat\data\DookieWWHI2024.xlsx, %root%\Tests\Validation\Wheat\data\DookieEVA2024.xlsx]
    PredictedObserved DailyObsPred: PredictedTableName=DailyReport; ObservedTableName=Observed; FieldNameUsedForMatch=SimulationName; FieldName2UsedForMatch=Clock.Today; AllColumns=false
      Tests: POName=DailyObsPred
        AcceptedStats:
          Name                   n     Slope         Intercept   SEslope      SEintercept  R2           RMSE       NSE         ME          MAE         RSR       RMR
          ET                     123   1.13169       -0.428525   0.0437149    0.169573     0.847065     0.75711    0.750672    0.0416707   0.558234    0.497294  0
          ProfileWater           1327  0.876588      76.0389     0.0130203    5.47947      0.7738       58.7876    0.702733    25.8355     33.06       0.545016  0
          Soil.SoilWater.SW(1)   1300  0.000187106   0.209326    0.000113886  0.00216848   0.00207521   18.9789    -0.0810339  -5.20763    5.28548     1.03933   0
          Soil.SoilWater.SW(10)  8     -0.411168     0.612361    0.204164     0.087484     0.403332     0.0113816  -3.15811    0.00772724  0.00919543  1.90744   0
          Soil.SoilWater.SW(2)   1323  -9.03035e-05  0.237103    7.90585e-05  0.00185795   0.000986689  23.4358    -0.0848838  -6.54813    6.60052     1.04118   0
          Soil.SoilWater.SW(3)   1323  7.41365e-05   0.225765    6.63683e-05  0.00193967   0.000943693  29.1595    -0.0857037  -8.19945    8.22086     1.04158   0
          Soil.SoilWater.SW(4)   1323  0.00032245    0.209832    5.67479e-05  0.00181599   0.0238581    31.9313    -0.0847602  -8.95944    8.97693     1.04112   0
          Soil.SoilWater.SW(5)   1323  0.000184327   0.244192    5.45151e-05  0.00180824   0.00858025   33.0939    -0.0856543  -9.31536    9.33089     1.04155   0
          Soil.SoilWater.SW(6)   1218  0.983201      0.00665286  0.00580358   0.00166975   0.959354     0.0168556  0.958159    0.00202203  0.00893392  0.204467  0
          Soil.SoilWater.SW(7)   1194  0.995766      0.00138347  0.00547865   0.00136097   0.965173     0.0121361  0.964171    0.00036727  0.00674653  0.189207  0
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        AcceptedStatsName=Name n Slope Intercept SEslope SEintercept R2 RMSE NSE ME MAE RSR
    PredictedObserved HarvestObsPred: PredictedTableName=HarvestReport; ObservedTableName=Observed; FieldNameUsedForMatch=SimulationName; FieldName2UsedForMatch=Wheat.Phenology.CurrentStageName; AllColumns=false
      Tests: POName=HarvestObsPred
        AcceptedStats:
          Name                                  n    Slope      Intercept   SEslope     SEintercept  R2          RMSE        NSE         ME           MAE         RSR       RMR
          Wheat.AboveGround.N                   67   1.12809    -1.00273    0.0391678   0.525848     0.927336    2.09151     0.875576    0.540148     1.59606     0.350095  0
          Wheat.AboveGround.Wt                  211  1.01911    34.1751     0.0202867   28.6588      0.923515    188.663     0.904426    58.5184      140.453     0.308417  0
          Wheat.Grain.N                         135  1.07639    -0.257745   0.0362834   0.353004     0.868717    1.79883     0.808865    0.415699     1.36719     0.435568  0
          Wheat.Grain.Nconc                     136  0.52548    0.0109277   0.0578165   0.00130116   0.381364    0.00332647  0.31597     0.000420536  0.00251003  0.824015  0
          Wheat.Grain.Number                    195  0.819153   2260.06     0.0213448   308.959      0.88414     2247.71     0.879203    -81.8409     1634.74     0.346666  0
          Wheat.Grain.Protein                   114  0.424157   7.85561     0.0562272   0.726492     0.336911    2.10436     0.263918    0.550644     1.57133     0.854181  0
          Wheat.Grain.Wt                        233  0.978713   11.017      0.0292591   15.5104      0.828875    103.644     0.801774    0.879252     78.6576     0.444269  0
          Wheat.Leaf.CohortMaxSize(1)           10   0.0270759  255.563     0.0327969   7.48653      0.078506    51.271      -0.92608    36.4016      40.5202     1.31661   0
          Wheat.Leaf.CohortMaxSize(10)          10   1.11919    -412.466    0.256733    521.362      0.703745    224.554     -0.300948   -171.57      207.903     1.08206   0
          Wheat.Leaf.CohortMaxSize(11)          10   0.825212   365.905     0.266736    598.083      0.54471     196.601     0.391552    -23.5263     115.224     0.740002  0
          Wheat.Leaf.CohortMaxSize(12)          10   0.848404   253.801     0.223896    493.954      0.642195    151.745     0.416747    -79.2873     105.917     0.724519  0
          Wheat.Leaf.CohortMaxSize(13)          10   1.09708    -403.529    1.01788     2346.69      0.126797    703.826     -7.88491    -180.887     351.071     2.82779   0
          Wheat.Leaf.CohortMaxSize(14)          10   1.30676    -642.351    0.429337    1019.71      0.536608    603.245     -0.59098    71.3164      415.854     1.19661   0
          Wheat.Leaf.CohortMaxSize(15)          9    -0.26027   2713.41     0.159916    364.78       0.274529    585.946     -0.830732   -109.076     515.056     1.27566   0
          Wheat.Leaf.CohortMaxSize(16)          3    -0.645839  2788.84     7.95817     13511.1      0.00654291  1245.82     -65.0428    6.01155      1116.21     6.6354    0
          Wheat.Leaf.CohortMaxSize(17)          2    3.1965     -3522.2732  0           0            1           590.025     -4.43529    -197.771     555.892     1.64853   0
          Wheat.Leaf.CohortMaxSize(18)          1    -          -           -           -            -           985.267     -           985.267      985.267     -         0
          Wheat.Leaf.CohortMaxSize(2)           10   0.0630555  275.197     0.29264     121.589      0.00577     139.081     -3.00585    -108.611     115.388     1.89875   0
          Wheat.Leaf.CohortMaxSize(3)           10   0.289291   221.125     0.270354    144.318      0.125205    181.922     -2.6244     -152.132     163.333     1.80609   0
          Wheat.Leaf.CohortMaxSize(4)           10   0.345581   263.167     0.345159    223.342      0.111353    208.379     -1.99176    -152.884     173.867     1.64091   0
          Wheat.Leaf.CohortMaxSize(5)           10   0.249259   458.154     0.277019    225.53       0.0919017   229.975     -0.868592   -139.856     146.902     1.29682   0
          Wheat.Leaf.CohortMaxSize(6)           10   0.345905   476.527     0.195687    187.624      0.280871    242.414     -0.0368856  -130.978     145.477     0.966021  0
          Wheat.Leaf.CohortMaxSize(7)           10   0.441949   501.987     0.142766    157.184      0.545013    176.986     0.296106    -101.041     122.714     0.79593   0
          Wheat.Leaf.CohortMaxSize(8)           10   0.589766   515.86      0.179194    229.582      0.575192    169.291     0.574802    1.17705      117.592     0.61861   0
          Wheat.Leaf.CohortMaxSize(9)           10   0.793068   300.515     0.327977    507.562      0.422258    241.916     0.0929616   -15.3812     161.582     0.903512  0
          Wheat.Phenology.FlagLeafDAS.Value()   255  0.974146   6.29479     0.00979673  1.35981      0.97505     8.03204     0.971245    2.92157      5.87059     0.16924   0
          Wheat.Phenology.FloweringDAS.Value()  299  0.943644   8.35638     0.00705763  1.10217      0.983658    6.98781     0.982029    0.0602007    4.93645     0.133831  0
        AcceptedStatsName=Name n Slope Intercept SEslope SEintercept R2 RMSE NSE ME MAE RSR
  Experiment DookieWWHI2024
    Factors
      Permutation
        Factor Cv
          CompositeFactor Osprey
            Specifications:
              [Sowing].Script.SowDate = 17-Apr
              [Sowing].Script.CultivarName = Osprey
              [Sowing].Script.Population = 101
              [Sowing].Script.EmergeDate = 4-May
          CompositeFactor Rosella
            Specifications:
              [Sowing].Script.SowDate = 17-Apr
              [Sowing].Script.CultivarName = Rosella
              [Sowing].Script.Population = 108
              [Sowing].Script.EmergeDate = 2-May
          CompositeFactor Whistler
            Specifications:
              [Sowing].Script.SowDate = 17-Apr
              [Sowing].Script.CultivarName = Whistler
              [Sowing].Script.Population = 92
              [Sowing].Script.EmergeDate = 1-May
          CompositeFactor Wylah
            Specifications:
              [Sowing].Script.SowDate = 17-Apr
              [Sowing].Script.CultivarName = Wylah
              [Sowing].Script.Population = 105
              [Sowing].Script.EmergeDate = 2-May
          CompositeFactor Wedgetail
            Specifications:
              [Sowing].Script.SowDate = 17-Apr
              [Sowing].Script.CultivarName = Wedgetail
              [Sowing].Script.Population = 103
              [Sowing].Script.EmergeDate = 28-Apr
          CompositeFactor Kittyhawk
            Specifications:
              [Sowing].Script.SowDate = 17-Apr
              [Sowing].Script.CultivarName = Kittyhawk
              [Sowing].Script.Population = 103
              [Sowing].Script.EmergeDate = 27-Apr
          CompositeFactor Illabo
            Specifications:
              [Sowing].Script.SowDate = 17-Apr
              [Sowing].Script.CultivarName = Illabo
              [Sowing].Script.Population = 119
              [Sowing].Script.EmergeDate = 27-Apr
          CompositeFactor Mowhawk
            Specifications:
              [Sowing].Script.SowDate = 17-Apr
              [Sowing].Script.CultivarName = Mowhawk
              [Sowing].Script.Population = 86
              [Sowing].Script.EmergeDate = 28-Apr
          CompositeFactor Meering
            Specifications:
              [Sowing].Script.SowDate = 14-May
              [Sowing].Script.CultivarName = Meering
              [Sowing].Script.Population = 127
              [Sowing].Script.EmergeDate = 25-May
          CompositeFactor Janz
            Specifications:
              [Sowing].Script.SowDate = 14-May
              [Sowing].Script.CultivarName = Janz
              [Sowing].Script.Population = 138
              [Sowing].Script.EmergeDate = 27-May
          CompositeFactor Yitpi
            Specifications:
              [Sowing].Script.SowDate = 14-May
              [Sowing].Script.CultivarName = Yitpi
              [Sowing].Script.Population = 135
              [Sowing].Script.EmergeDate = 26-May
          CompositeFactor Wyalkatchem
            Specifications:
              [Sowing].Script.SowDate = 14-May
              [Sowing].Script.CultivarName = Wyalkatchem
              [Sowing].Script.Population = 130
              [Sowing].Script.EmergeDate = 26-May
          CompositeFactor Gregory
            Specifications:
              [Sowing].Script.SowDate = 14-May
              [Sowing].Script.CultivarName = Gregory
              [Sowing].Script.Population = 123
              [Sowing].Script.EmergeDate = 26-May
          CompositeFactor Mace
            Specifications:
              [Sowing].Script.SowDate = 14-May
              [Sowing].Script.CultivarName = Mace
              [Sowing].Script.Population = 140
              [Sowing].Script.EmergeDate = 27-May
          CompositeFactor Scepter
            Specifications:
              [Sowing].Script.SowDate = 14-May
              [Sowing].Script.CultivarName = Scepter
              [Sowing].Script.Population = 146
              [Sowing].Script.EmergeDate = 27-May
          CompositeFactor Sunmaster
            Specifications:
              [Sowing].Script.SowDate = 14-May
              [Sowing].Script.CultivarName = Sunmaster
              [Sowing].Script.Population = 131
              [Sowing].Script.EmergeDate = 27-May
    Simulation McPoyles
      Weather: Latitude=-36.333; Tav=20; Amp=15
        FileName=C:\GitHubRepos\ApsimX\Tests\Validation\Wheat\met\Dookie2024.met
      Clock: Start=2024-04-17; End=2024-11-17
      Summary
      SoilArbitrator
      MicroClimate: a_interception=0; b_interception=1; c_interception=0; d_interception=0; SoilHeatFluxFraction=0.4; MinimumHeightDiffForNewLayer=0; NightInterceptionFraction=0.5; ReferenceHeight=2
      Manager LocationInfo
        Country = Australia
        State = Western Australia
        Region = South West
```csharp
using Models.Soils;
using System;
using Models.Core;
using Models.PMF;
using APSIM.Shared.Utilities;

namespace Models
{
    [Serializable]
    public class Script : Model
    {
        [Link] Clock Clock;
        [Link] Fertiliser Fertiliser;
        [Link] Summary Summary;
        
        [Description("Country")]
        public string Country { get; set; }

        [Description("State")]
        public string State { get; set; }

        [Description("Region")]
        public string Region { get; set; }

    }
}
```
      Zone Field: Area=1; Slope=0; AspectAngle=0; Altitude=0
        Soil Soil 1150: SoilType=Sandy duplex; LocalName=Ironstone gravelly soils; Site=Tenterden; NearestTown=Tenterden; Region=Southern Region; State=Western Australia; Country=Australia; ApsoilNumber=1150; Latitude=-34.442704; Longitude=117.394537; LocationAccuracy=+/- 20m; YearOfSampling=2015; DataSource=Rob Summers DAFWA
          Comments=gravel - Wa2 - Sb diff 6 - gravelly sandy earth light clay at depth
          Physical
            Thickness  ParticleSizeSand  ParticleSizeSilt  ParticleSizeClay  Rocks   BD     AirDry  LL15   DUL    SAT
            100        87.81             6.15              6.05              15.104  1.294  0.082   0.18   0.31   0.341
            100        86.18             4.95              8.86              26.211  1.443  0.11    0.11   0.19   0.209
            200        86.18             4.95              8.86              26.211  1.513  0.27    0.27   0.371  0.408
            200        88.29             3.92              7.79              38.378  1.2    0.27    0.27   0.465  0.511
            200        88.29             3.92              7.79              38.378  1.4    0.274   0.274  0.413  0.455
            200        88.29             3.92              7.79              38.378  1.519  0.297   0.297  0.332  0.365
            200        84.27             2.96              12.77             40.153  1.417  0.275   0.275  0.328  0.361
            200        84.27             2.96              12.77             40.153  1.669  0.258   0.258  0.315  0.346
            200        84.27             2.96              12.77             40.153  1.56   0.193   0.193  0.334  0.367
            200        84.27             2.96              12.77             40.153  1.68   0.252   0.252  0.31   0.342
            SoilCrop wheatSoil
              LL=[0.18, 0.11, 0.27, 0.27, 0.274, 0.297, 0.275, 0.258, 0.193, 0.252]
              KL=[0.06, 0.06, 0.06, 0.06, 0.04, 0.04, 0.04, 0.02, 0.02, 0.01]
              XF=[1, 1, 1, 1, 1, 1, 1, 1, 1, 1]
          WaterBalance SoilWater: SummerDate=1-Nov; SummerU=6; SummerCona=3.5; WinterDate=1-Apr; WinterU=2; WinterCona=2; DiffusConst=88; DiffusSlope=35; Salb=0.12; CN2Bare=73; CNRed=20; CNCov=0.8; PSIDul=-100; Thickness=[100, 100, 100, 100, 100, 100, 100]; SWCON=[0.5, 0.5, 0.5, 0.5, 0.3, 0.3, -]
          Organic: FOMCNRatio=40; CarbonUnits=Total
            Thickness  Carbon  SoilCNRatio  FBiom  FInert  FOM
            100        1.48    12           0.035  0.4     315.5
            100        0.64    12           0.02   0.5     127.3
            200        0.4     12           0.02   0.5     127.3
            200        0.35    12           0.02   0.7     61.6
            200        0.25    12           0.02   0.7     61.6
            200        0.21    12           0.02   0.7     61.6
            200        0.1     12           0.015  0.7     60.5
            200        0.1     12           0.015  0.7     60.1
            200        0.1     12           0.015  0.867   58.2
            200        0.1     12           0.015  0.95    42.2
          Chemical: PHUnits=Water
            Thickness  PH   EC     ESP    CEC
            100        5.1  0.132  0.026  7.003
            100        5.2  0.085  0.052  4.205
            200        6.3  0.085  0.052  4.205
            200        7.2  0.065  0.064  3.411
            200        7.6  0.065  0.064  3.411
            200        7.9  0.065  0.064  3.411
            200        7.9  0.064  0.083  3.514
            200        7.9  0.064  0.083  3.514
            200        8    0.087  0.125  4.193
            200        8.1  0.098  0.146  4.533
          Nutrient
          Solute NO3: Thickness=[100, 100, 200, 200, 200, 200, 200, 200, 200, 200]; InitialValues=[25, 5.5, 3.1, 1.8, 1.4, 2.2, 3.4, 4.2, 4.1, 4.4]; InitialValuesUnits=ppm; WaterTableConcentration=0; D0=0; DepthConstant=0; MaxDepthSoluteAccessible=0; RunoffEffectivenessAtMovingSolute=0; MaxEffectiveRunoff=0
          Solute NH4: Thickness=[100, 100, 200, 200, 200, 200, 200, 200, 200, 200]; InitialValues=[1.3, 1, 1.2, 0.9, 0.9, 0.7, 0.7, 0.7, 0.5, 1.6]; InitialValuesUnits=ppm; WaterTableConcentration=0; D0=0; DepthConstant=0; MaxDepthSoluteAccessible=0; RunoffEffectivenessAtMovingSolute=0; MaxEffectiveRunoff=0
          Solute Urea: Thickness=[100, 100, 200, 200, 200, 200, 200, 200, 200, 200]; InitialValues=[0, 0, 0, 0, 0, 0, 0, 0, 0, 0]; InitialValuesUnits=kg/ha; WaterTableConcentration=0; D0=0; DepthConstant=0; MaxDepthSoluteAccessible=0; RunoffEffectivenessAtMovingSolute=0; MaxEffectiveRunoff=0
          Water: Thickness=[100, 100, 200, 200, 200, 200, 200, 200, 200, 200]; InitialPAWmm=147.5; RelativeTo=LL15; FilledFromTop=true
            InitialValues=[0.103, 0.14, 0.37, 0.46, 0.41, 0.33, 0.33, 0.31, 0.33, 0.31]
          CERESSoilTemperature
        Fertiliser
        Irrigation
        SurfaceOrganicMatter: InitialResidueName=Canola stubble; InitialResidueType=canola; InitialResidueMass=3000; InitialStandingFraction=0.7; InitialCPR=0; InitialCNR=70
        Plant Wheat
          Cultivar Mowhawk
            Command:
              [Phenology].Phyllochron.BasePhyllochron.FixedValue = 90
              [Phenology].PhyllochronPpSensitivity.FixedValue = 0.212225680614483
              [Phenology].CAMP.FLNparams.MinLN = 8
              [Phenology].CAMP.FLNparams.PpLN = 3.0
              [Phenology].CAMP.FLNparams.VrnLN = 6.0
              [Phenology].CAMP.FLNparams.VxPLN = 1.0
              [Phenology].CAMP.EnvData.VrnTreatTemp = 5.8
              [Phenology].CAMP.EnvData.VrnTreatDuration = 60
              [Phenology].HeadEmergenceLongDayBase.FixedValue = 170
              [Phenology].HeadEmergencePpSensitivity.FixedValue = 0.0
            Memo
              Placeholder cultivar Mowhawk based on DefaultCv.
          Cultivar Osprey: same as DookieWWHI2024.McPoyles.Field.Wheat.Mowhawk
          Cultivar Wylah: same as DookieWWHI2024.McPoyles.Field.Wheat.Mowhawk
          Cultivar Meering: same as DookieWWHI2024.McPoyles.Field.Wheat.Mowhawk
          Cultivar Sunmaster: same as DookieWWHI2024.McPoyles.Field.Wheat.Mowhawk
        Manager Sowing
          SowDate = 1-may
          Treat =
          CultivarName =
          SowingDepth = 30
          RowSpacing = 225
          Population = 180
          EmergeDate =
```csharp
using Newtonsoft.Json;
using System.Data;
using System.Xml.Serialization;
using Models;
using System.Text;
using System.Collections.Generic;
using Models.Interfaces;
using System;
using Models.Core;
using Models.PMF;
using Models.Soils;
using Models.Utilities;
using APSIM.Shared.Utilities;

namespace Models
{
    [Serializable]
    public class Script : Model
    {
        [Link] Clock Clock;
        [Link] Fertiliser Fertiliser;
        [Link] Summary Summary;
        [Link] Soil Soil;
        [Link(ByName = true)] Plant Wheat;
        [Link] Simulation Simulation;
        Accumulator accumulatedRain;
        
        [Description("Sowing date (d-mmm)")]
        public string SowDate { get; set; }
        [Description("Treatment Name")]
        public string Treat { get; set; }
        [Display(Type = DisplayType.CultivarName)]
        [Description("Cultivar to be sown")]
        public string CultivarName { get; set; }
        [Description("Sowing depth (mm)")]
        public double SowingDepth { get; set; }
        [Description("Row spacing (mm)")]
        public double RowSpacing { get; set; }
        [Description("Plant population (/m2)")]
        public double Population { get; set; }
        [Description("Emergence Date (d-MMM)")]
        public string EmergeDate {get; set;}



        [EventSubscribe("DoManagement")]
        private void OnDoManagement(object sender, EventArgs e)
        {

            if (DateUtilities.WithinDates(SowDate, Clock.Today, SowDate))
            {
               Wheat.Sow(population: Population, cultivar: CultivarName, depth: SowingDepth, rowSpacing: RowSpacing);   
               //Wheat.Phenology.SetEmergenceDate(EmergeDate); 
            }            
        
        }
        
    }
}
```
        Manager Fertilize
          FertiliserType = UreaN
          FertiliserDates = 26-jul, 26-aug
          FertiliseDepth = 0
          Amount = 70.5
          AmountType = True
```csharp
using Models.Soils;
using System;
using System.Linq;
using Models.Core;
using Models.PMF;
using APSIM.Shared.Utilities;
namespace Models
{
    [Serializable]
    public class Script : Model
    {
        [Link] Clock Clock;
        [Link] Fertiliser Fertiliser;
        
        [Separator("A component to apply fertiliser on one or more dates on every year of the simulation")]

        [Description("Type of fertiliser to apply? ")] 
        [Display(Type = DisplayType.FertiliserType)]public string FertiliserType { get; set; }

        [Description("Enter the fertilisation dates as dd-mmm with comma separation (any year information entered will be ignored): ")] 
        public string[] FertiliserDates { get; set; } 
        
        [Description("Fertilise depth (mm)")]
        public double FertiliseDepth { get; set; }

        [Description("Amount of fertiliser to be applied (kg /ha)")] 
        public double Amount { get; set; }

        [Description("Is the above amount to be applied each time? (yes/ticked)? Or is it the total annual amount across all dates (no/unticked)")] 
        public bool AmountType { get; set; }

        
        [EventSubscribe("DoManagement")]
        private void OnDoManagement(object sender, EventArgs e)
        {
            foreach (string ddMMM in FertiliserDates)
            {
                if (DateUtilities.DatesEqual(ddMMM, Clock.Today))
                {
                    if (AmountType)
                        Fertiliser.Apply(amount: Amount, type: FertiliserType);
                    else
                        Fertiliser.Apply(amount: Amount / FertiliserDates.Length, type: FertiliserType, depth: FertiliseDepth);
                }
            }
        }
    }
}
```
        Manager Harvest
          NoHarvestBefore = 17-Nov
```csharp
using Models.PMF.Phen;
using APSIM.Shared.Utilities;
using System.Xml.Serialization;
using Models;
using Models.PMF;
using Models.Soils;
using System.Text;
using System.Collections.Generic;
using Models.Core;
using System;
using Models.Soils.Nutrients;

namespace Models
{
	[Serializable]
	public class Script : Model
	{
		[Link(ByName = true)] Plant Wheat;
		[Link] private Simulation sim;
		[Link] private Clock clock;
		[Link] private Summary summary;
		
		[Description("Prevent harvesting before: ")]
		public string NoHarvestBefore {get; set;}
		
		[EventSubscribe("DoManagement")]
		private void OnDoManagement(object sender, EventArgs e)
		{
			if (Wheat.IsReadyForHarvesting && DateUtilities.CompareDates(NoHarvestBefore, clock.Today) >= 0)
			{
				Wheat.Harvest();
				Wheat.EndCrop();
			}
		}
		
		[EventSubscribe("EndOfDay")]
		private void OnEndOfDay(object sender, EventArgs e)
		{
			if ((clock.Today.Equals(clock.EndDate))&&(Wheat.IsAlive))
			{
				Wheat.Harvest();
				Wheat.EndCrop();
				sim.Set("Clock.EndDate", clock.Today);
			}
		}
	}
}
```
        Manager Irrigate
          IrrigateDates = 1-May
          Amount = 5
          Depth = 0
          Efficiency = 1
          WillRunoff = False
```csharp
using Models.Soils;
using System;
using System.Linq;
using Models.Core;
using Models.PMF;
using APSIM.Shared.Utilities;
namespace Models
{
    [Serializable]
    public class Script : Model
    {
        [Link] Clock Clock;
        [Link] Irrigation Irrigation;
        
        [Separator("A component to apply irrigation on one or more dates on every year of the simulation")]

        [Description("Enter the irrigation dates as dd-mmm with comma separation (any year information entered will be ignored)")] 
        public string[] IrrigateDates { get; set; }
        
        [Description("Amount of irrigation to be applied (mm)")] 
        public double Amount { get; set; }
        
        [Description("Depth in the soil to apply the  irrigation (mm)")] 
        public double Depth { get; set; }
        
        [Description("Efficiency of irrigation (0-1)")] 
        public double Efficiency { get; set; }
        
        [Description("Will the irrigation runoff?")] 
        public bool WillRunoff { get; set; }
        
        [EventSubscribe("DoManagement")]
        private void OnDoManagement(object sender, EventArgs e)
        {
            foreach (string ddMMM in IrrigateDates)
            {
                if (DateUtilities.DatesEqual(ddMMM, Clock.Today))
                    Irrigation.Apply(amount: Amount, depth: Depth, efficiency: Efficiency, willRunoff: WillRunoff);
            }
        }
    }
}
```
        Manager NDVIModel
          DrySoilNDVI = 0.11
          WetSoilNDVI = 0.15
          GreenCropNDVI = 0.75
          DeadCropNDVI = 0.15
```csharp
using System;
using Models.Core;
using Models.Interfaces;
using Models.PMF;
using APSIM.Shared.Utilities;
using Models.WaterModel;

namespace Models
{
    [Serializable]
    public class Script : Model
    {
        [Link] IClock Clock;
        [Link] ISummary Summary;
        [Link] ICanopy WheatCanopy;
        [Link] EvaporationModel EvapModel;
        
        [Description("Dry soil NDVI")]
        public double DrySoilNDVI { get; set; }
        
        [Description("Wet soil NDVI")]
        public double WetSoilNDVI { get; set; }

        [Description("Green Crop NDVI")]
        public double GreenCropNDVI { get; set; }
        
        [Description("Dead Crop NDVI")]
        public double DeadCropNDVI { get; set; }
                
        public double NDVI { get; set; }

        [EventSubscribe("DoManagement")]
        private void DoDailyCalculations(object sender, EventArgs e)
        {
            double SoilNDVI = WetSoilNDVI;
            if (EvapModel.t > 1)
               SoilNDVI = DrySoilNDVI;

            NDVI = GreenCropNDVI * WheatCanopy.CoverGreen;
            NDVI += DeadCropNDVI * (WheatCanopy.CoverTotal - WheatCanopy.CoverGreen);
            NDVI += SoilNDVI * (1 - WheatCanopy.CoverTotal);            
            
        }
    }
}
```
        Report DailyReport
        Report HarvestReport
        Report NDVIDailyReport
  Folder Replacements
    Report HarvestReport: EventNames=[Wheat].Harvesting
      VariableNames:
        [Clock].Today
        [Clock].StartDate
        [Wheat].SowingDate
        [Wheat].SowingData.Cultivar
        [Wheat].SowingDate.DayOfYear
        [IWeather].Latitude
        [IWeather].Longitude
        [IWeather].FileName
        [LocationInfo].Script.Country
        [LocationInfo].Script.State
        [LocationInfo].Script.Region
        [Wheat].AboveGround.N
        [Wheat].AboveGround.Nconc
        [Wheat].AboveGround.Wt
        [Wheat].Ear.N
        [Wheat].Ear.Nconc
        [Wheat].Ear.Wt
        [Wheat].Grain.N
        [Wheat].Grain.NConc
        [Wheat].Grain.Number
        [Wheat].Grain.Protein
        [Wheat].Grain.Size
        [Wheat].Grain.Wt
        [Wheat].Leaf.Dead.Wt
        [Wheat].Leaf.Dead.N
        [Wheat].Leaf.Live.N
        [Wheat].Leaf.Live.Wt
        [Wheat].Leaf.N
        [Wheat].Leaf.StemPopulation
        [Wheat].Leaf.Wt
        [Wheat].Phenology.CAMP.TSHS
        [Wheat].Phenology.CurrentStageName
        [Wheat].Phenology.EmergenceDAS
        [Wheat].Phenology.FinalLeafNumber
        [Wheat].Phenology.FlagLeafDAS
        [Wheat].Phenology.FloweringDAS
        [Wheat].Phenology.HeadingDAS
        [Wheat].Phenology.MaturityDAS
        [Wheat].Phenology.TerminalSpikeletDAS
        [Wheat].Spike.HeadNumber
        [Wheat].Spike.N
        [Wheat].Spike.Wt
        [Wheat].Stem.N
        [Wheat].Stem.NConc
        [Wheat].Stem.Wt
    Report DailyReport: EventNames=[Clock].DoReport
      VariableNames:
        [Clock].Today
        [IWeather].MeanT
        [IWeather].MeanT
        [IWeather].Radn
        [Simulation].Name
        [Soil].Water.Volumetric
        [Wheat].AboveGround.N
        [Wheat].AboveGround.Wt
        [Wheat].AboveGroundDead.N
        [Wheat].AboveGroundDead.Wt
        [Wheat].AboveGroundLive.N
        [Wheat].AboveGroundLive.Wt
        [Wheat].Ear.N
        [Wheat].Ear.Nconc
        [Wheat].Ear.Wt
        [Wheat].Grain.N
        [Wheat].Grain.NConc
        [Wheat].Grain.NperKernal
        [Wheat].Grain.Number
        [Wheat].Grain.Size
        [Wheat].Grain.Wt
        [Wheat].Leaf.CoverGreen
        [Wheat].Leaf.CoverTotal
        [Wheat].Leaf.Dead.N
        [Wheat].Leaf.Dead.NConc
        [Wheat].Leaf.Dead.Wt
        [Wheat].Leaf.FinalLeafNumber
        [Wheat].Leaf.Fn
        [Wheat].Leaf.Fw
        [Wheat].Leaf.Height
        [Wheat].Leaf.LAI
        [Wheat].Leaf.Ligules
        [Wheat].Leaf.Live.N
        [Wheat].Leaf.Live.NConc
        [Wheat].Leaf.Live.Wt
        [Wheat].Leaf.MainStemPopulation
        [Wheat].Leaf.Photosynthesis.FT
        [Wheat].Leaf.SpecificArea
        [Wheat].Leaf.SpecificAreaCanopy
        [Wheat].Leaf.SpecificNitrogen
        [Wheat].Leaf.StemNumberPerPlant
        [Wheat].Leaf.StemPopulation
        [Wheat].Leaf.Tips
        [Wheat].Leaf.Tips
        [Wheat].Leaf.Transpiration
        [Wheat].Phenology.AccumulatedTT
        [Wheat].Phenology.CurrentPhase.Name
        [Wheat].Phenology.CurrentStageName
        [Wheat].Phenology.EmergenceDAS
        [Wheat].Phenology.HaunStage
        [Wheat].Phenology.Photoperiod
        [Wheat].Phenology.Phyllochron
        [Wheat].Phenology.PTQ
        [Wheat].Phenology.Stage
        [Wheat].Phenology.ThermalTime
        [Wheat].Phenology.Zadok.Stage
        [Wheat].Root.Depth
        [Wheat].Root.N
        [Wheat].Root.Nconc
        [Wheat].Root.Wt
        [Wheat].SowingData.Cultivar
        [Wheat].Spike.N
        [Wheat].Spike.NConc
        [Wheat].Spike.Wt
        [Wheat].Stem.N
        [Wheat].Stem.NConc
        [Wheat].Stem.Wt
        [Wheat].StemPlusSpike.N
        [Wheat].StemPlusSpike.Wt
        [Wheat].Total.N
        [Wheat].Total.Wt
        sum([Soil].NO3.kgha)
        sum([Soil].Water.MM)
        ([Wheat].Leaf.Transpiration + [ISoilWater].Es + [MicroClimate].PrecipitationInterception)
    Manager MaxLeafSize
```csharp
using Models.Soils;
using Models.PMF.Struct;
using System;
using System.Collections.Generic;
using System.Xml.Serialization;
using Models.Core;
using Models.Interfaces;
using Models.PMF;
using Models.PMF.Organs;
using Models.Soils.Arbitrator;
using APSIM.Shared.Utilities;
using Newtonsoft.Json;



namespace Models
{
    [Serializable] 
    public class Script : Model
    {
//        [Link] private Clock Clock;
//        [Link] private Plant Wheat;
//        public  event EventHandler LeafReport;
//        [Link(Type = LinkType.Path, Path = "[Wheat].Structure")]
//        private Structure structure;
//        
//        
//        [JsonIgnore] public int LeafPosition { get; set; }
//        [JsonIgnore] public double MaxLeafSize { get; set; }
//        
//        [EventSubscribe("DoManagement")]
//        private void OnDoManagement(object sender, EventArgs e)
//        {
//            var leaf = Wheat.Leaf as Leaf;
//            if ((leaf.ExpandedCohortNo > LeafPosition) & (structure.NextLeafProportion == 1))
//            {
//                LeafPosition = (int)
//                leaf.ExpandedCohortNo;
//                MaxLeafSize = leaf.CohortSize[LeafPosition - 1];
//                LeafReport.Invoke(this, new EventArgs());
//            }
//        }
    }
}
```
    Report MaxLeafSizeReport: EventNames=//[MaxLeafSize].Script.LeafReport
      VariableNames:
        //[MaxLeafSize].Script.MaxLeafSize
        //[MaxLeafSize].Script.LeafPosition
    Manager Harvesting
```csharp
using Models.PMF.Phen;
using APSIM.Shared.Utilities;
using System.Xml.Serialization;
using Models;
using Models.PMF;
using Models.Soils;
using System.Text;
using System.Collections.Generic;
using Models.Core;
using System;
using Models.Soils.Nutrients;

namespace Models
{
    [Serializable] 
    public class Script : Model
    {
        [Link] private Plant Wheat;
        [Link] private Simulation sim;
        [Link] private Clock clock;
        [Link(Type = LinkType.Path, Path = "[Wheat].Phenology")]
        private Phenology phenology;

        [EventSubscribe("DoManagement")]
        private void OnDoManagement(object sender, EventArgs e)
        {
            if (phenology.CurrentPhase.Name == "GrainRipening")
            {
                Wheat.Harvest();
                Wheat.EndCrop();
                sim.Set("Clock.EndDate", clock.Today);  
            }
        }

        [EventSubscribe("EndOfDay")]
        private void OnEndOfDay(object sender, EventArgs e)
        {
            if ((clock.Today.Equals(clock.EndDate))&&(Wheat.IsAlive))
            {
                Wheat.Harvest();
                Wheat.EndCrop();
                sim.Set("Clock.EndDate", clock.Today);  
            }
        }

    }
}
```
    Report SowingReport: EventNames=[Wheat].Sowing
      VariableNames:
        [Simulation].Name
        [Clock].Today
        [Wheat].SowingData.Cultivar
        [IWeather].Latitude
        [IWeather].Longitude
        [LocationInfo].Script.Country
        [LocationInfo].Script.State
        [LocationInfo].Script.Region
    Report NDVIDailyReport: EventNames=[Clock].DoReport
      VariableNames:
        [Simulation].Name
        [Clock].Today
        [NDVIModel].Script.NDVI
  Experiment DookieEVA2024
    Factors
      Permutation
        Factor Sow
          CompositeFactor April_Illabo
            Specifications:
              [Sowing].Script.SowDate = 16-Apr
              [Sowing].Script.CultivarName = Illabo
              [Sowing].Script.Population = 116
              [Sowing].Script.EmergeDate = 28-Apr
          CompositeFactor April_BigRed
            Specifications:
              [Sowing].Script.SowDate = 16-Apr
              [Sowing].Script.CultivarName = BigRed
              [Sowing].Script.Population = 104
              [Sowing].Script.EmergeDate = 27-Apr
          CompositeFactor April_UOM001_3_47
            Specifications:
              [Sowing].Script.SowDate = 16-Apr
              [Sowing].Script.CultivarName = UOM001_3_47
              [Sowing].Script.Population = 96
              [Sowing].Script.EmergeDate = 27-Apr
          CompositeFactor April_UOM001_9_1
            Specifications:
              [Sowing].Script.SowDate = 16-Apr
              [Sowing].Script.CultivarName = UOM001_9_1
              [Sowing].Script.Population = 93
              [Sowing].Script.EmergeDate = 29-Apr
          CompositeFactor May_Zanzibar
            Specifications:
              [Sowing].Script.SowDate = 14-May
              [Sowing].Script.CultivarName = Zanzibar
              [Sowing].Script.Population = 139
              [Sowing].Script.EmergeDate = 26-May
          CompositeFactor May_Sunmaster
            Specifications:
              [Sowing].Script.SowDate = 14-May
              [Sowing].Script.CultivarName = SunMaster
              [Sowing].Script.Population = 147
              [Sowing].Script.EmergeDate = 27-May
          CompositeFactor May_UOM001_3_47
            Specifications:
              [Sowing].Script.SowDate = 14-May
              [Sowing].Script.CultivarName = UOM001_3_47
              [Sowing].Script.Population = 132
              [Sowing].Script.EmergeDate = 27-May
          CompositeFactor May_UOM001_9_1
            Specifications:
              [Sowing].Script.SowDate = 14-May
              [Sowing].Script.CultivarName = UOM001_9_1
              [Sowing].Script.Population = 128
              [Sowing].Script.EmergeDate = 27-May
    Simulation McPoyle
      Weather: Latitude=-36.333; Tav=20; Amp=15
        FileName=C:\GitHubRepos\ApsimX\Tests\Validation\Wheat\met\Dookie2024.met
      Clock: Start=2024-04-16; End=2024-11-17
      Summary
      SoilArbitrator
      MicroClimate: a_interception=0; b_interception=1; c_interception=0; d_interception=0; SoilHeatFluxFraction=0.4; MinimumHeightDiffForNewLayer=0; NightInterceptionFraction=0.5; ReferenceHeight=2
      Manager LocationInfo: same as DookieWWHI2024.McPoyles.LocationInfo
      Zone Field: Area=1; Slope=0; AspectAngle=0; Altitude=0
        Soil Soil 1150: same as DookieWWHI2024.McPoyles.Field.Soil 1150
        Fertiliser
        Irrigation
        SurfaceOrganicMatter: InitialResidueName=Canola stubble; InitialResidueType=canola; InitialResidueMass=3000; InitialStandingFraction=0.7; InitialCPR=0; InitialCNR=70
        Plant Wheat
          Cultivar Zanzibar: same as DookieWWHI2024.McPoyles.Field.Wheat.Mowhawk
          Cultivar UOM001_3_47: same as DookieWWHI2024.McPoyles.Field.Wheat.Mowhawk
          Cultivar UOM001_9_1: same as DookieWWHI2024.McPoyles.Field.Wheat.Mowhawk
          Cultivar Sunmaster: same as DookieWWHI2024.McPoyles.Field.Wheat.Mowhawk
          Cultivar BigRed: same as DookieWWHI2024.McPoyles.Field.Wheat.Mowhawk
        Manager Sowing
          SowDate = 1-may
          Treat =
          CultivarName =
          SowingDepth = 30
          RowSpacing = 225
          Population = 180
          EmergeDate =
```csharp
using Newtonsoft.Json;
using System.Data;
using System.Xml.Serialization;
using Models;
using System.Text;
using System.Collections.Generic;
using Models.Interfaces;
using System;
using Models.Core;
using Models.PMF;
using Models.Soils;
using Models.Utilities;
using APSIM.Shared.Utilities;

namespace Models
{
    [Serializable]
    public class Script : Model
    {
        [Link] Clock Clock;
        [Link] Fertiliser Fertiliser;
        [Link] Summary Summary;
        [Link] Soil Soil;
        [Link(ByName = true)] Plant Wheat;
        [Link] Simulation Simulation;
        Accumulator accumulatedRain;
        
        [Description("Sowing date (d-mmm)")]
        public string SowDate { get; set; }
        [Description("Treatment Name")]
        public string Treat { get; set; }
        [Display(Type = DisplayType.CultivarName)]
        [Description("Cultivar to be sown")]
        public string CultivarName { get; set; }
        [Description("Sowing depth (mm)")]
        public double SowingDepth { get; set; }
        [Description("Row spacing (mm)")]
        public double RowSpacing { get; set; }
        [Description("Plant population (/m2)")]
        public double Population { get; set; }
        [Description("Emergence Date (d-MMM)")]
        public string EmergeDate {get; set;}



        [EventSubscribe("DoManagement")]
        private void OnDoManagement(object sender, EventArgs e)
        {

            if (DateUtilities.WithinDates(SowDate, Clock.Today, SowDate))
            {
               Wheat.Sow(population: Population, cultivar: CultivarName, depth: SowingDepth, rowSpacing: RowSpacing);   
               Wheat.Phenology.SetEmergenceDate(EmergeDate); 
            }            
        
        }
        
    }
}
```
        Manager Fertilize: same as DookieWWHI2024.McPoyles.Field.Fertilize
        Manager Harvest: same as DookieWWHI2024.McPoyles.Field.Harvest
        Manager Irrigate: same as DookieWWHI2024.McPoyles.Field.Irrigate
        Manager NDVIModel: same as DookieWWHI2024.McPoyles.Field.NDVIModel
        Report DailyReport
        Report HarvestReport
        Report NDVIDailyReport
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