Simulations: Version=216
  DataStore
    ExcelInput ExcelMultiInput: SheetNames=[Observed]
      FileNames=[NDVI.xlsx, PAR.xlsx, Biomass.xlsx, LAI.xlsx, LeafAppearance.xlsx, GrainWt.xlsx, TotalSW.xlsx, SoilWater.xlsx, TillerAppearance.xlsx, LayeredSW.xlsx]
    PredictedObserved DailyObsPred: PredictedTableName=DailyReport; ObservedTableName=Observed; FieldNameUsedForMatch=SimulationName; FieldName2UsedForMatch=Clock.Today; AllColumns=false
      Tests: POName=DailyObsPred
        AcceptedStats:
          Name                   n     Slope         Intercept   SEslope      SEintercept  R2           RMSE       NSE         ME          MAE         RSR       RMR
          ET                     123   1.13169       -0.428525   0.0437149    0.169573     0.847065     0.75711    0.750672    0.0416707   0.558234    0.497294  0
          ProfileWater           1327  0.876588      76.0389     0.0130203    5.47947      0.7738       58.7876    0.702733    25.8355     33.06       0.545016  0
          Soil.SoilWater.SW(1)   1300  0.000187106   0.209326    0.000113886  0.00216848   0.00207521   18.9789    -0.0810339  -5.20763    5.28548     1.03933   0
          Soil.SoilWater.SW(10)  8     -0.411168     0.612361    0.204164     0.087484     0.403332     0.0113816  -3.15811    0.00772724  0.00919543  1.90744   0
          Soil.SoilWater.SW(2)   1323  -9.03035e-05  0.237103    7.90585e-05  0.00185795   0.000986689  23.4358    -0.0848838  -6.54813    6.60052     1.04118   0
          Soil.SoilWater.SW(3)   1323  7.41365e-05   0.225765    6.63683e-05  0.00193967   0.000943693  29.1595    -0.0857037  -8.19945    8.22086     1.04158   0
          Soil.SoilWater.SW(4)   1323  0.00032245    0.209832    5.67479e-05  0.00181599   0.0238581    31.9313    -0.0847602  -8.95944    8.97693     1.04112   0
          Soil.SoilWater.SW(5)   1323  0.000184327   0.244192    5.45151e-05  0.00180824   0.00858025   33.0939    -0.0856543  -9.31536    9.33089     1.04155   0
          Soil.SoilWater.SW(6)   1218  0.983201      0.00665286  0.00580358   0.00166975   0.959354     0.0168556  0.958159    0.00202203  0.00893392  0.204467  0
          Soil.SoilWater.SW(7)   1194  0.995766      0.00138347  0.00547865   0.00136097   0.965173     0.0121361  0.964171    0.00036727  0.00674653  0.189207  0
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        AcceptedStatsName=Name n Slope Intercept SEslope SEintercept R2 RMSE NSE ME MAE RSR
    PredictedObserved HarvestObsPred: PredictedTableName=HarvestReport; ObservedTableName=Observed; FieldNameUsedForMatch=SimulationName; FieldName2UsedForMatch=Wheat.Phenology.CurrentStageName; AllColumns=false
      Tests: POName=HarvestObsPred
        AcceptedStats:
          Name                                  n    Slope      Intercept   SEslope     SEintercept  R2          RMSE        NSE         ME           MAE         RSR       RMR
          Wheat.AboveGround.N                   67   1.12809    -1.00273    0.0391678   0.525848     0.927336    2.09151     0.875576    0.540148     1.59606     0.350095  0
          Wheat.AboveGround.Wt                  211  1.01911    34.1751     0.0202867   28.6588      0.923515    188.663     0.904426    58.5184      140.453     0.308417  0
          Wheat.Grain.N                         135  1.07639    -0.257745   0.0362834   0.353004     0.868717    1.79883     0.808865    0.415699     1.36719     0.435568  0
          Wheat.Grain.Nconc                     136  0.52548    0.0109277   0.0578165   0.00130116   0.381364    0.00332647  0.31597     0.000420536  0.00251003  0.824015  0
          Wheat.Grain.Number                    195  0.819153   2260.06     0.0213448   308.959      0.88414     2247.71     0.879203    -81.8409     1634.74     0.346666  0
          Wheat.Grain.Protein                   114  0.424157   7.85561     0.0562272   0.726492     0.336911    2.10436     0.263918    0.550644     1.57133     0.854181  0
          Wheat.Grain.Wt                        233  0.978713   11.017      0.0292591   15.5104      0.828875    103.644     0.801774    0.879252     78.6576     0.444269  0
          Wheat.Leaf.CohortMaxSize(1)           10   0.0270759  255.563     0.0327969   7.48653      0.078506    51.271      -0.92608    36.4016      40.5202     1.31661   0
          Wheat.Leaf.CohortMaxSize(10)          10   1.11919    -412.466    0.256733    521.362      0.703745    224.554     -0.300948   -171.57      207.903     1.08206   0
          Wheat.Leaf.CohortMaxSize(11)          10   0.825212   365.905     0.266736    598.083      0.54471     196.601     0.391552    -23.5263     115.224     0.740002  0
          Wheat.Leaf.CohortMaxSize(12)          10   0.848404   253.801     0.223896    493.954      0.642195    151.745     0.416747    -79.2873     105.917     0.724519  0
          Wheat.Leaf.CohortMaxSize(13)          10   1.09708    -403.529    1.01788     2346.69      0.126797    703.826     -7.88491    -180.887     351.071     2.82779   0
          Wheat.Leaf.CohortMaxSize(14)          10   1.30676    -642.351    0.429337    1019.71      0.536608    603.245     -0.59098    71.3164      415.854     1.19661   0
          Wheat.Leaf.CohortMaxSize(15)          9    -0.26027   2713.41     0.159916    364.78       0.274529    585.946     -0.830732   -109.076     515.056     1.27566   0
          Wheat.Leaf.CohortMaxSize(16)          3    -0.645839  2788.84     7.95817     13511.1      0.00654291  1245.82     -65.0428    6.01155      1116.21     6.6354    0
          Wheat.Leaf.CohortMaxSize(17)          2    3.1965     -3522.2732  0           0            1           590.025     -4.43529    -197.771     555.892     1.64853   0
          Wheat.Leaf.CohortMaxSize(18)          1    -          -           -           -            -           985.267     -           985.267      985.267     -         0
          Wheat.Leaf.CohortMaxSize(2)           10   0.0630555  275.197     0.29264     121.589      0.00577     139.081     -3.00585    -108.611     115.388     1.89875   0
          Wheat.Leaf.CohortMaxSize(3)           10   0.289291   221.125     0.270354    144.318      0.125205    181.922     -2.6244     -152.132     163.333     1.80609   0
          Wheat.Leaf.CohortMaxSize(4)           10   0.345581   263.167     0.345159    223.342      0.111353    208.379     -1.99176    -152.884     173.867     1.64091   0
          Wheat.Leaf.CohortMaxSize(5)           10   0.249259   458.154     0.277019    225.53       0.0919017   229.975     -0.868592   -139.856     146.902     1.29682   0
          Wheat.Leaf.CohortMaxSize(6)           10   0.345905   476.527     0.195687    187.624      0.280871    242.414     -0.0368856  -130.978     145.477     0.966021  0
          Wheat.Leaf.CohortMaxSize(7)           10   0.441949   501.987     0.142766    157.184      0.545013    176.986     0.296106    -101.041     122.714     0.79593   0
          Wheat.Leaf.CohortMaxSize(8)           10   0.589766   515.86      0.179194    229.582      0.575192    169.291     0.574802    1.17705      117.592     0.61861   0
          Wheat.Leaf.CohortMaxSize(9)           10   0.793068   300.515     0.327977    507.562      0.422258    241.916     0.0929616   -15.3812     161.582     0.903512  0
          Wheat.Phenology.FlagLeafDAS.Value()   255  0.974146   6.29479     0.00979673  1.35981      0.97505     8.03204     0.971245    2.92157      5.87059     0.16924   0
          Wheat.Phenology.FloweringDAS.Value()  299  0.943644   8.35638     0.00705763  1.10217      0.983658    6.98781     0.982029    0.0602007    4.93645     0.133831  0
        AcceptedStatsName=Name n Slope Intercept SEslope SEintercept R2 RMSE NSE ME MAE RSR
  Folder Replacements
    Report HarvestReport: EventNames=[Wheat].Harvesting
      VariableNames:
        [Simulation].Name
        [Clock].Today
        [Wheat].SowingDate
        [Wheat].SowingData.Cultivar
        [Wheat].Phenology.CurrentPhase.Name
        [Wheat].Phenology.CurrentStageName
        [Wheat].Phenology.EmergenceDAS
        [Wheat].Phenology.TerminalSpikeletDAS
        [Wheat].Phenology.FlagLeafDAS
        [Wheat].Phenology.HeadingDAS
        [Wheat].Phenology.FloweringDAS
        [Wheat].Phenology.MaturityDAS
        [Wheat].Grain.Wt
        [Wheat].Grain.N
        [Wheat].Grain.Number
        [Wheat].Grain.Size
        [Wheat].Grain.NConc
        [Wheat].AboveGround.Wt
        [Wheat].AboveGround.N
        [Wheat].Grain.Protein
        [Wheat].Grain.Size
        [Wheat].Phenology.FinalLeafNumber
        [Wheat].Leaf.MainStemPopulation
        [Wheat].SowingData.Cultivar
        [Wheat].SowingDate.DayOfYear
        [Clock].StartDate
        ([Wheat].Phenology.FloweringDAS - [Wheat].Phenology.EmergenceDAS) as FloweringDAE
        [IWeather].Latitude
        [IWeather].Longitude
        [IWeather].FileName
        [IWeather].CO2
        [IWeather].Amp
        [IWeather].Tav
        [LocationInfo].Script.Country
        [LocationInfo].Script.State
        [LocationInfo].Script.Region
    Report DailyReport: EventNames=[Clock].DoReport
      VariableNames:
        [Simulation].Name
        [Clock].Today
        [Wheat].Leaf.Photosynthesis.FT
        [Soil].Water.Volumetric
        [Soil].Physical.LL15
        [Soil].Physical.DUL
        sum([Soil].Water.MM)
        [Soil].SoilWater.Es
        [Soil].SoilWater.Eo
        [MicroClimate].PrecipitationInterception
        //sum([Soil].Water.MM[1:7]) as SW180cm
        //sum([Soil].Water.MM[1:4]) as SW90cm
        [SoilWaterCalculation].Script.TotalSW90cm as TotalSW90cm
        sum([Soil].NO3.kgha)
        [IWeather].Radn
        [IWeather].MeanT
        [IWeather].MaxT
        [IWeather].MinT
        [IWeather].Radn
        [IWeather].vpd
        [Wheat].Arbitrator.DM.TotalFixationSupply
        [Wheat].Arbitrator.DM.TotalPlantDemand
        [Wheat].Leaf.Allocated.Wt
        [Wheat].Stem.Allocated.Wt
        [Wheat].Root.Allocated.Wt
        [Wheat].Spike.Allocated.Wt
        [Wheat].Grain.Allocated.Wt
        [Wheat].AboveGround.N
        [Wheat].AboveGround.Wt
        [Wheat].AboveGroundLive.N
        [Wheat].AboveGroundLive.Wt
        [Wheat].AboveGroundDead.N
        [Wheat].AboveGroundDead.Wt
        [Wheat].AboveGround.StorageWt
        [Wheat].Stem.Total.StructuralWt
        [Wheat].Stem.Live.StructuralWt
        [Wheat].Stem.Total.StorageWt
        [Wheat].Stem.Total.MetabolicWt
        [Wheat].Ear.N
        [Wheat].Ear.NConc
        [Wheat].Ear.Wt
        [Wheat].Grain.N
        [Wheat].Grain.NConc
        [Wheat].Grain.Number
        [Wheat].Grain.Size
        [Wheat].Grain.Wt
        [Wheat].Grain.NperKernel
        [Wheat].Leaf.Tips
        [Wheat].Leaf.CoverGreen
        [Wheat].Leaf.CoverTotal
        [Wheat].Leaf.Dead.N
        [Wheat].Leaf.Dead.NConc
        [Wheat].Leaf.Dead.Wt
        [Wheat].Leaf.Ligules
        [Wheat].Leaf.Fn
        [Wheat].Leaf.Fw
        [Wheat].Leaf.Photosynthesis.FT
        [Wheat].Leaf.Height
        [Wheat].Leaf.LAI
        [Wheat].Leaf.Live.N
        [Wheat].Leaf.Live.NConc
        [Wheat].Leaf.Live.Wt
        [Wheat].Leaf.SpecificArea
        [Wheat].Leaf.SpecificAreaCanopy
        [Wheat].Leaf.SpecificNitrogen
        [Wheat].Leaf.Transpiration
        [Wheat].Leaf.PotentialEP
        [Wheat].Leaf.StemNumberPerPlant
        [Wheat].Phenology.CurrentPhase.Name
        [Wheat].Phenology.CurrentStageName
        [Wheat].Phenology.EmergenceDAS
        [Wheat].Phenology.Stage
        [Wheat].Phenology.ThermalTime
        [Wheat].Phenology.Zadok.Stage
        [Wheat].Root.Depth
        [Wheat].Root.N
        [Wheat].Root.Wt
        [Wheat].Root.NConc
        [Wheat].Spike.N
        [Wheat].Spike.NConc
        [Wheat].Spike.Wt
        [Wheat].Stem.N
        [Wheat].Stem.NConc
        [Wheat].Stem.Wt
        [Wheat].Stem.DMDemand.Total
        [Wheat].StemPlusSpike.Wt
        [Wheat].StemPlusSpike.N
        [Wheat].SowingData.Cultivar
        [Wheat].Phenology.HaunStage
        [Wheat].Leaf.Height
        [Wheat].Leaf.Tips
        [Wheat].Leaf.FinalLeafNumber
        [Wheat].Leaf.MainStemPopulation
        [Wheat].Leaf.StemPopulation
        [Wheat].Leaf.StemNumberPerPlant
        [Wheat].Leaf.StemNumberPerPlant
        [Wheat].Phenology.PTQ
        [Wheat].Phenology.Phyllochron
        [Wheat].Total.N
        [Wheat].Total.Wt
        [IWeather].MeanT
        [Wheat].Phenology.Photoperiod
        [Wheat].Phenology.AccumulatedTT
        ([Wheat].Leaf.Transpiration + [Soil].SoilWater.Es + [MicroClimate].PrecipitationInterception)
        [Wheat].Leaf.Photosynthesis.FT
        [Spectral].NDVI
        [Wheat].Root.WaterTensionFactor
        [Soil].Water.Volumetric
    Report NDVIDailyReport: EventNames=[Clock].DoReport
      VariableNames:
        [Simulation].Name
        [Clock].Today
        [Spectral].NDVI
    Report SowingReport: EventNames=[Wheat].Sowing
      VariableNames:
        [Simulation].Name
        [Clock].Today
        [Wheat].SowingData.Cultivar
        [IWeather].Latitude
        [IWeather].Longitude
        [LocationInfo].Script.Country
        [LocationInfo].Script.State
        [LocationInfo].Script.Region
    Manager SetPhenology
      GermDate =
      EmergDate =
      VernDate =
      TSDate =
      FlagDate =
      HeadingDate =
      AnthDate =
      RipeDate =
      Phyllochron = 100
      PhyllochronMultiplier = 0
```csharp
using Models.Soils.Nutrients;
using System;
using Models.Core;
using Models.PMF;
using Models.Soils;
using Models.Soils.Nutrients;
using Models.Utilities;
using Models.Functions;
using APSIM.Shared.Utilities;

using System.Diagnostics;

namespace Models
{
    [Serializable]
    public class Script : Model
    {
        [Link] Plant Wheat;
        [Link(Type = LinkType.Path, Path = "[Wheat].Phenology.Phyllochron.BasePhyllochron")] Constant WheatPhyllochron;
        [Link(Type = LinkType.Path, Path = "[Wheat].Phenology.Phyllochron.LeafStageFactor.XYPairs")] XYPairs PhyllochronMultipliers;
                        
        [Description("Germination Date (d-mmm)")]
        public string GermDate { get; set;} 
        [Description("Emergence Date (d-mmm)")]
        public string EmergDate { get; set;}
        [Description("Vernalisation Date (d-mmm)")]
        public string VernDate { get; set;}
        [Description("Terminal Spikelet Date (d-mmm)")]
        public string TSDate { get; set;}
        [Description("FlagLeaf Date (d-mmm)")]
        public string FlagDate { get; set;}
        [Description("Heading Date (d-mmm)")]
        public string HeadingDate { get; set;}
        [Description("Anthesis Date (d-mmm)")]
        public string AnthDate { get; set;}
        [Description("Ripe Date (d-mmm)")]
        public string RipeDate { get; set;}

        [Description("Phyllochron (oC.d)")]
        public double Phyllochron { get; set;}
        
        [Description("Phyllochron Multiplier (-)")]
        public double PhyllochronMultiplier { get; set;}
        
        
        [EventSubscribe("PlantSowing")]
        private void OnPlantSowing(object sender, SowingParameters data)
        {
            if (!String.IsNullOrEmpty(GermDate))
            {
               Wheat.Phenology.SetPhaseCompletionDate(GermDate,"Germinating");
            }
            if (!String.IsNullOrEmpty(EmergDate))
            {
               Wheat.Phenology.SetPhaseCompletionDate(EmergDate,"Emerging");
            }
            if (!String.IsNullOrEmpty(VernDate))
            {
               Wheat.Phenology.SetPhaseCompletionDate(VernDate,"LeavesInitiating");
            }
            if (!String.IsNullOrEmpty(TSDate))
            {
               Wheat.Phenology.SetPhaseCompletionDate(TSDate,"SpikeletsDifferentiating");
            }
            if (!String.IsNullOrEmpty(FlagDate))
            {
               Wheat.Phenology.SetPhaseCompletionDate(FlagDate,"StemElongating");
            }
            if (!String.IsNullOrEmpty(HeadingDate))
            {
               Wheat.Phenology.SetPhaseCompletionDate(HeadingDate,"Heading");
            }
            if (!String.IsNullOrEmpty(AnthDate))
            {
               Wheat.Phenology.SetPhaseCompletionDate(AnthDate,"Flowering");
            }
            if (!String.IsNullOrEmpty(RipeDate))
            {
               Wheat.Phenology.SetPhaseCompletionDate(RipeDate,"GrainRipening");
            }
            if (Phyllochron>0)
               WheatPhyllochron.FixedValue = Phyllochron;
               
            if (PhyllochronMultiplier>0)
            {
               //Debugger.Break();
               PhyllochronMultipliers.Y[4] = PhyllochronMultiplier;
               PhyllochronMultipliers.Y[5] = PhyllochronMultiplier;
             }  
        }
    }
}
```
    Plant Wheat: ResourceName=WinterCereal
      ModelOverrides: Overrides=[[Wheat].PlantType=Wheat]
      Folder Cultivars
        Folder New Zealand
          Cultivar Amarok
            Command:
              [Phenology].HeadEmergencePpSensitivity.FixedValue = 4
              [Phenology].Phyllochron.BasePhyllochron.FixedValue = 100.0
              [Phenology].PhyllochronPpSensitivity.FixedValue = 0.6
              [Phenology].CAMP.FLNparams.MinLN = 8
              [Phenology].CAMP.FLNparams.PpLN = 4
              [Phenology].CAMP.FLNparams.VrnLN = 5
              [Phenology].CAMP.FLNparams.VxPLN = 2
              [Phenology].HeadEmergenceLongDayBase.FixedValue = 90
              [Phenology].CAMP.EnvData.VrnTreatTemp = 6
              [Phenology].CAMP.EnvData.VrnTreatDuration = 60
          Cultivar BattenWinter
            Command:
              [Phenology].HeadEmergencePpSensitivity.FixedValue = 3.8423212708469157
              [Phenology].Phyllochron.BasePhyllochron.FixedValue = 100.0
              [Phenology].PhyllochronPpSensitivity.FixedValue = 0.6
              [Phenology].CAMP.FLNparams.MinLN = 8.15781757053076
              [Phenology].CAMP.FLNparams.PpLN = 3.6074343511019427
              [Phenology].CAMP.FLNparams.VrnLN = 3.096547775405041
              [Phenology].CAMP.FLNparams.VxPLN = 6.987099381114945
              [Phenology].HeadEmergenceLongDayBase.FixedValue = 266.0
              [Phenology].CAMP.EnvData.VrnTreatTemp = 6
              [Phenology].CAMP.EnvData.VrnTreatDuration = 60
          Cultivar BattenSpring
            Command:
              [Phenology].HeadEmergencePpSensitivity.FixedValue = 0.006727231500210627
              [Phenology].Phyllochron.BasePhyllochron.FixedValue = 100.0
              [Phenology].PhyllochronPpSensitivity.FixedValue = 0.6
              [Phenology].CAMP.FLNparams.MinLN = 8.25262475446035
              [Phenology].CAMP.FLNparams.PpLN = 7.552256317837019
              [Phenology].CAMP.FLNparams.VrnLN = 0.18541366678983096
              [Phenology].CAMP.FLNparams.VxPLN = -0.03479769923441367
              [Phenology].HeadEmergenceLongDayBase.FixedValue = 107.0
              [Phenology].CAMP.EnvData.VrnTreatTemp = 6
              [Phenology].CAMP.EnvData.VrnTreatDuration = 60
          Cultivar Claire
            Command:
              [Phenology].HeadEmergencePpSensitivity.FixedValue = 2
              [Phenology].Phyllochron.BasePhyllochron.FixedValue = 100
              [Phenology].CAMP.FLNparams.MinLN = 9
              [Phenology].CAMP.FLNparams.PpLN = 5
              [Phenology].CAMP.FLNparams.VrnLN = 4
              [Phenology].CAMP.FLNparams.VxPLN = 4
              [Phenology].HeadEmergenceLongDayBase.FixedValue = 150
              [Phenology].CAMP.EnvData.VrnTreatTemp = 6
              [Phenology].CAMP.EnvData.VrnTreatDuration = 60
            Alias Savannah
            Alias Atlanta
            Alias Istabraq
          Cultivar Conquest
            Command:
              [Phenology].Phyllochron.BasePhyllochron.FixedValue = 100
              [Phenology].CAMP.FLNparams.MinLN = 7.5
              [Phenology].CAMP.FLNparams.PpLN = 2.5
              [Phenology].CAMP.FLNparams.VrnLN = 0.0
              [Phenology].CAMP.FLNparams.VxPLN = 0.0
              [Phenology].HeadEmergenceLongDayBase.FixedValue = 100
              [Phenology].HeadEmergencePpSensitivity.FixedValue = 1.0
              [Phenology].CAMP.EnvData.VrnTreatTemp = 6
              [Phenology].CAMP.EnvData.VrnTreatDuration = 60
          Cultivar CRWT153
            Command:
              [Phenology].Phyllochron.BasePhyllochron.FixedValue = 100.0
              [Phenology].PhyllochronPpSensitivity.FixedValue = 0.6
              [Phenology].CAMP.FLNparams.MinLN = 14.27272727272727
              [Phenology].CAMP.FLNparams.PpLN = -0.028282828282829797
              [Phenology].CAMP.FLNparams.VrnLN = 2.6000000000000014
              [Phenology].CAMP.FLNparams.VxPLN = -1.2477272727272712
              [Phenology].HeadEmergenceLongDayBase.FixedValue = 200
              [Phenology].HeadEmergencePpSensitivity.FixedValue = 2.3
              [Phenology].CAMP.EnvData.VrnTreatTemp = 6
              [Phenology].CAMP.EnvData.VrnTreatDuration = 60
          Cultivar Discovery
            Command:
              [Phenology].Phyllochron.BasePhyllochron.FixedValue = 80
              [Phenology].CAMP.FLNparams.MinLN = 9.0
              [Phenology].CAMP.FLNparams.PpLN = 0.0
              [Phenology].CAMP.FLNparams.VrnLN = 0.0
              [Phenology].CAMP.FLNparams.VxPLN = 0.0
              [Phenology].HeadEmergenceLongDayBase.FixedValue = 100
              [Phenology].HeadEmergencePpSensitivity.FixedValue = 1.0
              [Phenology].CAMP.EnvData.VrnTreatTemp = 6
              [Phenology].CAMP.EnvData.VrnTreatDuration = 60
            Memo
              This is a spring wheat with a high grain number and later tillering
          Cultivar Exceed
            Command:
              [Phenology].CAMP.FLNparams.MinLN = 9
              [Phenology].CAMP.FLNparams.PpLN = 3.0
              [Phenology].CAMP.FLNparams.VrnLN = 7
              [Phenology].CAMP.FLNparams.VxPLN = 0.0
          Cultivar Option
            Command:
              [Phenology].CAMP.FLNparams.MinLN = 9
              [Phenology].CAMP.FLNparams.PpLN = 3.0
              [Phenology].CAMP.FLNparams.VrnLN = 7
              [Phenology].CAMP.FLNparams.VxPLN = 0.0
          Cultivar Otane
            Command:
              [Phenology].HeadEmergencePpSensitivity.FixedValue = 2
              [Phenology].Phyllochron.BasePhyllochron.FixedValue = 100.0
              [Phenology].PhyllochronPpSensitivity.FixedValue = 0.6
              [Phenology].CAMP.FLNparams.MinLN = 7
              [Phenology].CAMP.FLNparams.PpLN = 4
              [Phenology].CAMP.FLNparams.VrnLN = 0
              [Phenology].CAMP.FLNparams.VxPLN = 0
              [Phenology].HeadEmergenceLongDayBase.FixedValue = 150
              [Phenology].CAMP.EnvData.VrnTreatTemp = 6
              [Phenology].CAMP.EnvData.VrnTreatDuration = 60
          Cultivar Regency
            Command:
              [Phenology].CAMP.FLNparams.MinLN = 9
              [Phenology].CAMP.FLNparams.PpLN = 3.0
              [Phenology].CAMP.FLNparams.VrnLN = 7
              [Phenology].CAMP.FLNparams.VxPLN = 0.0
          Cultivar Robigus
            Command:
              [Phenology].CAMP.FLNparams.MinLN = 9
              [Phenology].CAMP.FLNparams.PpLN = 3.0
              [Phenology].CAMP.FLNparams.VrnLN = 7
              [Phenology].CAMP.FLNparams.VxPLN = 0.0
          Cultivar Rongotea
            Command:
              [Phenology].HeadEmergencePpSensitivity.FixedValue = 3.92123686073301
              [Phenology].Phyllochron.BasePhyllochron.FixedValue = 100
              [Phenology].CAMP.FLNparams.MinLN = 7.73858795204672
              [Phenology].CAMP.FLNparams.PpLN = 10.6418278399273
              [Phenology].CAMP.FLNparams.VrnLN = 0.307012432477857
              [Phenology].CAMP.FLNparams.VxPLN = -0.256935248010825
              [Phenology].HeadEmergenceLongDayBase.FixedValue = 168
              [Phenology].CAMP.EnvData.VrnTreatTemp = 6
              [Phenology].CAMP.EnvData.VrnTreatDuration = 60
          Cultivar Sage
            Command:
              [Phenology].CAMP.FLNparams.MinLN = 9
              [Phenology].CAMP.FLNparams.PpLN = 3.0
              [Phenology].CAMP.FLNparams.VrnLN = 7
              [Phenology].CAMP.FLNparams.VxPLN = 0.0
          Cultivar Saracen
            Command:
              [Phenology].Phyllochron.BasePhyllochron.FixedValue = 100.0
              [Phenology].PhyllochronPpSensitivity.FixedValue = 0.6
              [Phenology].CAMP.FLNparams.MinLN = 8
              [Phenology].CAMP.FLNparams.PpLN = 2
              [Phenology].CAMP.FLNparams.VrnLN = 1
              [Phenology].CAMP.FLNparams.VxPLN = 2
              [Phenology].HeadEmergenceLongDayBase.FixedValue = 170
              [Phenology].HeadEmergencePpSensitivity.FixedValue = 4
              [Phenology].CAMP.EnvData.VrnTreatTemp = 6
              [Phenology].CAMP.EnvData.VrnTreatDuration = 60
          Cultivar Solstice
            Command:
              [Phenology].CAMP.FLNparams.MinLN = 9
              [Phenology].CAMP.FLNparams.PpLN = 3.0
              [Phenology].CAMP.FLNparams.VrnLN = 7
              [Phenology].CAMP.FLNparams.VxPLN = 0.0
          Cultivar Tribute
            Command:
              [Phenology].CAMP.FLNparams.MinLN = 9
              [Phenology].CAMP.FLNparams.PpLN = 3.0
              [Phenology].CAMP.FLNparams.VrnLN = 7
              [Phenology].CAMP.FLNparams.VxPLN = 0.0
          Cultivar Wakanui
            Command:
              [Phenology].HeadEmergenceLongDayBase.FixedValue = 50
              [Phenology].Phyllochron.BasePhyllochron.FixedValue = 105.0
              [Phenology].PhyllochronPpSensitivity.FixedValue = 0.33
              [Phenology].CAMP.FLNparams.MinLN = 10
              [Phenology].CAMP.FLNparams.PpLN = 12
              [Phenology].CAMP.FLNparams.VrnLN = 12
              [Phenology].CAMP.FLNparams.VxPLN = 4
              [Phenology].HeadEmergencePpSensitivity.FixedValue = 8
              [Phenology].CAMP.EnvData.VrnTreatTemp = 6
              [Phenology].CAMP.EnvData.VrnTreatDuration = 60
          Cultivar Voltron
            Command:
              [Phenology].HeadEmergenceLongDayBase.FixedValue = 50
              [Phenology].Phyllochron.BasePhyllochron.FixedValue = 105.0
              [Phenology].PhyllochronPpSensitivity.FixedValue = 0.33
              [Phenology].CAMP.FLNparams.MinLN = 10
              [Phenology].CAMP.FLNparams.PpLN = 6
              [Phenology].CAMP.FLNparams.VrnLN = 4
              [Phenology].CAMP.FLNparams.VxPLN = 0
              [Phenology].HeadEmergencePpSensitivity.FixedValue = 8
              [Phenology].CAMP.EnvData.VrnTreatTemp = 6
              [Phenology].CAMP.EnvData.VrnTreatDuration = 60
              [Phenology].GrainFilling.Target.FixedValue = 700
          Cultivar Sorrial: same as Replacements.Wheat.Cultivars.New Zealand.Voltron
          Cultivar Cesario
            Command:
              [Phenology].HeadEmergenceLongDayBase.FixedValue = 50
              [Phenology].Phyllochron.BasePhyllochron.FixedValue = 105.0
              [Phenology].PhyllochronPpSensitivity.FixedValue = 0.33
              [Phenology].CAMP.FLNparams.MinLN = 8
              [Phenology].CAMP.FLNparams.PpLN = 12
              [Phenology].CAMP.FLNparams.VrnLN = 12
              [Phenology].CAMP.FLNparams.VxPLN = 4
              [Phenology].HeadEmergencePpSensitivity.FixedValue = 8
              [Phenology].CAMP.EnvData.VrnTreatTemp = 6
              [Phenology].CAMP.EnvData.VrnTreatDuration = 60
              [Phenology].GrainFilling.Target.FixedValue = 700
          Cultivar Stockade
            Command:
              [Phenology].HeadEmergenceLongDayBase.FixedValue = 50
              [Phenology].Phyllochron.BasePhyllochron.FixedValue = 105.0
              [Phenology].PhyllochronPpSensitivity.FixedValue = 0.33
              [Phenology].CAMP.FLNparams.MinLN = 8
              [Phenology].CAMP.FLNparams.PpLN = 12
              [Phenology].CAMP.FLNparams.VrnLN = 12
              [Phenology].CAMP.FLNparams.VxPLN = 4
              [Phenology].HeadEmergencePpSensitivity.FixedValue = 8
              [Phenology].CAMP.EnvData.VrnTreatTemp = 6
              [Phenology].CAMP.EnvData.VrnTreatDuration = 60
          Cultivar CRW247
            Command:
              [Phenology].HeadEmergenceLongDayBase.FixedValue = 50
              [Phenology].Phyllochron.BasePhyllochron.FixedValue = 105.0
              [Phenology].PhyllochronPpSensitivity.FixedValue = 0.33
              [Phenology].CAMP.FLNparams.MinLN = 10
              [Phenology].CAMP.FLNparams.PpLN = 8
              [Phenology].CAMP.FLNparams.VrnLN = 0
              [Phenology].CAMP.FLNparams.VxPLN = 0
              [Phenology].HeadEmergencePpSensitivity.FixedValue = 8
              [Phenology].CAMP.EnvData.VrnTreatTemp = 6
              [Phenology].CAMP.EnvData.VrnTreatDuration = 60
          Cultivar Zyatt: same as Replacements.Wheat.Cultivars.New Zealand.Wakanui
          Cultivar Graham
            Command:
              [Phenology].HeadEmergenceLongDayBase.FixedValue = 50
              [Phenology].Phyllochron.BasePhyllochron.FixedValue = 105.0
              [Phenology].PhyllochronPpSensitivity.FixedValue = 0.33
              [Phenology].CAMP.FLNparams.MinLN = 10
              [Phenology].CAMP.FLNparams.PpLN = 12
              [Phenology].CAMP.FLNparams.VrnLN = 12
              [Phenology].CAMP.FLNparams.VxPLN = 4
              [Phenology].HeadEmergencePpSensitivity.FixedValue = 8
              [Phenology].CAMP.EnvData.VrnTreatTemp = 6
              [Phenology].CAMP.EnvData.VrnTreatDuration = 60
              [Phenology].GrainFilling.Target.FixedValue = 700
          Cultivar Kerrin: same as Replacements.Wheat.Cultivars.New Zealand.Graham
        Folder Australia
          Cultivar Adv08_0008
            Command:
              [Phenology].Phyllochron.BasePhyllochron.FixedValue = 107.385378970476
              [Phenology].PhyllochronPpSensitivity.FixedValue = 0.246728222459184
              [Phenology].CAMP.EnvData.VrnTreatTemp = 5.8
              [Phenology].CAMP.EnvData.VrnTreatDuration = 60
              [Phenology].CAMP.FLNparams.MinLN = 8
              [Phenology].CAMP.FLNparams.VrnLN = 5
              [Phenology].CAMP.FLNparams.PpLN = 1
              [Phenology].CAMP.FLNparams.VxPLN = 0
              [Phenology].HeadEmergenceLongDayBase.FixedValue = 290
              [Phenology].HeadEmergencePpSensitivity.FixedValue = 0
          Cultivar Axe
            Command:
              [Phenology].HeadEmergencePpSensitivity.FixedValue = 1
              [Phenology].Phyllochron.BasePhyllochron.FixedValue = 92.9812317822162
              [Phenology].PhyllochronPpSensitivity.FixedValue = 0.268590208069814
              [Phenology].CAMP.FLNparams.MinLN = 7
              [Phenology].CAMP.FLNparams.PpLN = 2
              [Phenology].CAMP.FLNparams.VrnLN = 0
              [Phenology].CAMP.FLNparams.VxPLN = 0
              [Phenology].CAMP.EnvData.VrnTreatTemp = 5.8
              [Phenology].CAMP.EnvData.VrnTreatDuration = 60
              [Phenology].HeadEmergenceLongDayBase.FixedValue = 130
          Cultivar Batavia
            Command:
              [Phenology].Phyllochron.BasePhyllochron.FixedValue = 100
              [Phenology].CAMP.FLNparams.MinLN = 5
              [Phenology].CAMP.FLNparams.PpLN = 9
              [Phenology].CAMP.FLNparams.VrnLN = 0
              [Phenology].CAMP.FLNparams.VxPLN = 6
              [Phenology].HeadEmergenceLongDayBase.FixedValue = 130
              [Phenology].HeadEmergencePpSensitivity.FixedValue = 6
          Cultivar Beaufort
            Command:
              [Phenology].Phyllochron.BasePhyllochron.FixedValue = 102.321288321408
              [Phenology].PhyllochronPpSensitivity.FixedValue = 0.254667061341894
              [Phenology].CAMP.FLNparams.MinLN = 8
              [Phenology].CAMP.FLNparams.PpLN = 3
              [Phenology].CAMP.FLNparams.VrnLN = 3
              [Phenology].CAMP.FLNparams.VxPLN = 3
              [Phenology].CAMP.EnvData.VrnTreatTemp = 6
              [Phenology].CAMP.EnvData.VrnTreatDuration = 60
              [Phenology].HeadEmergenceLongDayBase.FixedValue = 170
              [Phenology].HeadEmergencePpSensitivity.FixedValue = 0
          Cultivar Bennett
            Command:
              [Phenology].Phyllochron.BasePhyllochron.FixedValue = 106.269847259128
              [Phenology].PhyllochronPpSensitivity.FixedValue = 0.221423439420895
              [Phenology].CAMP.FLNparams.MinLN = 8
              [Phenology].CAMP.FLNparams.PpLN = 1
              [Phenology].CAMP.FLNparams.VrnLN = 6
              [Phenology].CAMP.FLNparams.VxPLN = 1
              [Phenology].CAMP.EnvData.VrnTreatTemp = 5.8
              [Phenology].CAMP.EnvData.VrnTreatDuration = 60
              [Phenology].HeadEmergenceLongDayBase.FixedValue = 230
              [Phenology].HeadEmergencePpSensitivity.FixedValue = 2
          Cultivar Bolac
            Command:
              [Phenology].Phyllochron.BasePhyllochron.FixedValue = 99.3767047504637
              [Phenology].PhyllochronPpSensitivity.FixedValue = 0.204801292585874
              [Phenology].CAMP.FLNparams.MinLN = 7
              [Phenology].CAMP.FLNparams.PpLN = 5
              [Phenology].CAMP.FLNparams.VrnLN = 1
              [Phenology].CAMP.FLNparams.VxPLN = 0
              [Phenology].CAMP.EnvData.VrnTreatTemp = 5.8
              [Phenology].CAMP.EnvData.VrnTreatDuration = 60
              [Phenology].HeadEmergenceLongDayBase.FixedValue = 170
              [Phenology].HeadEmergencePpSensitivity.FixedValue = 1
          Cultivar Braewood
            Command:
              [Phenology].Phyllochron.BasePhyllochron.FixedValue = 92.1177406284002
              [Phenology].PhyllochronPpSensitivity.FixedValue = 0.269041869726177
              [Phenology].CAMP.FLNparams.MinLN = 8
              [Phenology].CAMP.FLNparams.PpLN = 2
              [Phenology].CAMP.FLNparams.VrnLN = 3
              [Phenology].CAMP.FLNparams.VxPLN = -3
              [Phenology].CAMP.EnvData.VrnTreatTemp = 5.8
              [Phenology].CAMP.EnvData.VrnTreatDuration = 60
              [Phenology].HeadEmergenceLongDayBase.FixedValue = 150
              [Phenology].HeadEmergencePpSensitivity.FixedValue = 2
          Cultivar Calingiri
            Command:
              [Phenology].Phyllochron.BasePhyllochron.FixedValue = 112.665706012865
              [Phenology].PhyllochronPpSensitivity.FixedValue = 0.16928704526596
              [Phenology].CAMP.FLNparams.MinLN = 7
              [Phenology].CAMP.FLNparams.PpLN = 2
              [Phenology].CAMP.FLNparams.VrnLN = 2
              [Phenology].CAMP.FLNparams.VxPLN = -1
              [Phenology].CAMP.EnvData.VrnTreatTemp = 5.8
              [Phenology].CAMP.EnvData.VrnTreatDuration = 60
              [Phenology].HeadEmergenceLongDayBase.FixedValue = 50
              [Phenology].HeadEmergencePpSensitivity.FixedValue = 4
          Cultivar Catalina
            Command:
              [Phenology].Phyllochron.BasePhyllochron.FixedValue = 93.1373432728081
              [Phenology].PhyllochronPpSensitivity.FixedValue = 0.403019826488085
              [Phenology].CAMP.FLNparams.MinLN = 7
              [Phenology].CAMP.FLNparams.PpLN = 1
              [Phenology].CAMP.FLNparams.VrnLN = 0
              [Phenology].CAMP.FLNparams.VxPLN = 0
              [Phenology].CAMP.EnvData.VrnTreatTemp = 5.8
              [Phenology].CAMP.EnvData.VrnTreatDuration = 60
              [Phenology].HeadEmergenceLongDayBase.FixedValue = 230
              [Phenology].HeadEmergencePpSensitivity.FixedValue = 1
          Cultivar Condo
            Command:
              [Phenology].Phyllochron.BasePhyllochron.FixedValue = 94.4306598856844
              [Phenology].PhyllochronPpSensitivity.FixedValue = 0.179475706868039
              [Phenology].CAMP.FLNparams.MinLN = 7
              [Phenology].CAMP.FLNparams.PpLN = 2
              [Phenology].CAMP.FLNparams.VrnLN = 3
              [Phenology].CAMP.FLNparams.VxPLN = 0
              [Phenology].CAMP.EnvData.VrnTreatTemp = 5.8
              [Phenology].CAMP.EnvData.VrnTreatDuration = 60
              [Phenology].HeadEmergenceLongDayBase.FixedValue = 190
              [Phenology].HeadEmergencePpSensitivity.FixedValue = 0
          Cultivar Corack
            Command:
              // Phenology parameters taken from Harto as it is near isogenic
              [Phenology].Phyllochron.BasePhyllochron.FixedValue = 100. //107.48
              [Grain].MaximumPotentialGrainSize.FixedValue = 0.041
              [Grain].NumberFunction.GrainNumber.GrainsPerGramOfStem.FixedValue = 24
              [Phenology].PhyllochronPpSensitivity.FixedValue = 0.247
              [Phenology].CAMP.FLNparams.MinLN = 7
              [Phenology].CAMP.FLNparams.PpLN = 4
              [Phenology].CAMP.FLNparams.VrnLN = 2
              [Phenology].CAMP.FLNparams.VxPLN = 0
              [Phenology].HeadEmergenceLongDayBase.FixedValue = 50
              [Phenology].HeadEmergencePpSensitivity.FixedValue = 5
              [Phenology].CAMP.EnvData.VrnTreatTemp = 6
              [Phenology].CAMP.EnvData.VrnTreatDuration = 60
          Cultivar Crusader
            Command:
              [Phenology].Phyllochron.BasePhyllochron.FixedValue = 100.832025052954
              [Phenology].PhyllochronPpSensitivity.FixedValue = 0.199967770650946
              [Phenology].CAMP.FLNparams.MinLN = 6
              [Phenology].CAMP.FLNparams.PpLN = 5
              [Phenology].CAMP.FLNparams.VrnLN = 3
              [Phenology].CAMP.FLNparams.VxPLN = 0
              [Phenology].CAMP.EnvData.VrnTreatTemp = 6
              [Phenology].CAMP.EnvData.VrnTreatDuration = 60
              [Phenology].HeadEmergenceLongDayBase.FixedValue = 230
              [Phenology].HeadEmergencePpSensitivity.FixedValue = 0
          Cultivar Cunningham
            Command:
              [Phenology].Phyllochron.BasePhyllochron.FixedValue = 100
              [Phenology].CAMP.FLNparams.MinLN = 7
              [Phenology].CAMP.FLNparams.PpLN = 12
              [Phenology].CAMP.FLNparams.VrnLN = 9
              [Phenology].CAMP.FLNparams.VxPLN = -9
              [Phenology].HeadEmergenceLongDayBase.FixedValue = 50
              [Phenology].HeadEmergencePpSensitivity.FixedValue = 0
          Cultivar Cutlass
            Command:
              [Phenology].Phyllochron.BasePhyllochron.FixedValue = 95.8008034182983
              [Phenology].PhyllochronPpSensitivity.FixedValue = 0.352406544577556
              [Phenology].CAMP.FLNparams.MinLN = 7
              [Phenology].CAMP.FLNparams.PpLN = 5
              [Phenology].CAMP.FLNparams.VrnLN = 1
              [Phenology].CAMP.FLNparams.VxPLN = 2
              [Phenology].CAMP.EnvData.VrnTreatTemp = 5.8
              [Phenology].CAMP.EnvData.VrnTreatDuration = 60
              [Phenology].HeadEmergenceLongDayBase.FixedValue = 130
              [Phenology].HeadEmergencePpSensitivity.FixedValue = 2
          Cultivar Derrimut
            Command:
              [Phenology].Phyllochron.BasePhyllochron.FixedValue = 94.7552823110091
              [Phenology].PhyllochronPpSensitivity.FixedValue = 0.263180943521024
              [Phenology].CAMP.FLNparams.MinLN = 7
              [Phenology].CAMP.FLNparams.PpLN = 3
              [Phenology].CAMP.FLNparams.VrnLN = 2
              [Phenology].CAMP.FLNparams.VxPLN = -2
              [Phenology].CAMP.EnvData.VrnTreatTemp = 5.8
              [Phenology].CAMP.EnvData.VrnTreatDuration = 60
              [Phenology].HeadEmergenceLongDayBase.FixedValue = 150
              [Phenology].HeadEmergencePpSensitivity.FixedValue = 1
          Cultivar Eaglehawk
            Command:
              [Phenology].Phyllochron.BasePhyllochron.FixedValue = 122.758992485634
              [Phenology].PhyllochronPpSensitivity.FixedValue = 0.119042603665788
              [Phenology].CAMP.FLNparams.MinLN = 6
              [Phenology].CAMP.FLNparams.PpLN = 3
              [Phenology].CAMP.FLNparams.VrnLN = 1
              [Phenology].CAMP.FLNparams.VxPLN = 3
              [Phenology].CAMP.EnvData.VrnTreatTemp = 5.8
              [Phenology].CAMP.EnvData.VrnTreatDuration = 60
              [Phenology].HeadEmergenceLongDayBase.FixedValue = 190
              [Phenology].HeadEmergencePpSensitivity.FixedValue = 4
          Cultivar Ellison
            Command:
              [Phenology].Phyllochron.BasePhyllochron.FixedValue = 110.512287746208
              [Phenology].PhyllochronPpSensitivity.FixedValue = 0.282156394448543
              [Phenology].CAMP.FLNparams.MinLN = 6
              [Phenology].CAMP.FLNparams.PpLN = 4
              [Phenology].CAMP.FLNparams.VrnLN = 1
              [Phenology].CAMP.FLNparams.VxPLN = 2
              [Phenology].CAMP.EnvData.VrnTreatTemp = 5.8
              [Phenology].CAMP.EnvData.VrnTreatDuration = 60
              [Phenology].HeadEmergenceLongDayBase.FixedValue = 130
              [Phenology].HeadEmergencePpSensitivity.FixedValue = 4
          Cultivar Egret
            Command:
              [Phenology].Phyllochron.BasePhyllochron.FixedValue =80
              [Phenology].CAMP.FLNparams.MinLN = 8
              [Phenology].CAMP.FLNparams.PpLN = 9
              [Phenology].CAMP.FLNparams.VrnLN = 8
              [Phenology].CAMP.FLNparams.VxPLN = -8
              [Phenology].HeadEmergenceLongDayBase.FixedValue = 110
              [Phenology].HeadEmergencePpSensitivity.FixedValue = 0
              [Phenology].CAMP.EnvData.VrnTreatTemp = 6
              [Phenology].CAMP.EnvData.VrnTreatDuration = 60
          Cultivar Emu_Rock
            Command:
              [Phenology].Phyllochron.BasePhyllochron.FixedValue = 94.7698873180009
              [Phenology].PhyllochronPpSensitivity.FixedValue = 0.358007951256312
              [Phenology].CAMP.FLNparams.MinLN = 6
              [Phenology].CAMP.FLNparams.PpLN = 1
              [Phenology].CAMP.FLNparams.VrnLN = 1
              [Phenology].CAMP.FLNparams.VxPLN = -1
              [Phenology].CAMP.EnvData.VrnTreatTemp = 5.8
              [Phenology].CAMP.EnvData.VrnTreatDuration = 60
              [Phenology].HeadEmergenceLongDayBase.FixedValue = 183.0
              [Phenology].HeadEmergencePpSensitivity.FixedValue = 1.7962741039794823
          Cultivar Forrest
            Command:
              [Phenology].Phyllochron.BasePhyllochron.FixedValue = 99.8910902837222
              [Phenology].PhyllochronPpSensitivity.FixedValue = 0.417874283738016
              [Phenology].CAMP.FLNparams.MinLN = 6
              [Phenology].CAMP.FLNparams.PpLN = 5
              [Phenology].CAMP.FLNparams.VrnLN = 2
              [Phenology].CAMP.FLNparams.VxPLN = 1
              [Phenology].CAMP.EnvData.VrnTreatTemp = 5.8
              [Phenology].CAMP.EnvData.VrnTreatDuration = 60
              [Phenology].HeadEmergenceLongDayBase.FixedValue = 370
              [Phenology].HeadEmergencePpSensitivity.FixedValue = 1
          Cultivar Gregory
            Command:
              [Phenology].Phyllochron.BasePhyllochron.FixedValue = 96.2227321902995
              [Phenology].PhyllochronPpSensitivity.FixedValue = 0.199981872553676
              [Phenology].CAMP.FLNparams.MinLN = 8
              [Phenology].CAMP.FLNparams.PpLN = 2
              [Phenology].CAMP.FLNparams.VrnLN = 4
              [Phenology].CAMP.FLNparams.VxPLN = -3
              [Phenology].CAMP.EnvData.VrnTreatTemp = 6
              [Phenology].CAMP.EnvData.VrnTreatDuration = 60
              [Phenology].HeadEmergenceLongDayBase.FixedValue = 110
              [Phenology].HeadEmergencePpSensitivity.FixedValue = 1
              [Grain].MaximumPotentialGrainSize.FixedValue = 0.041
              [Grain].NumberFunction.GrainNumber.GrainsPerGramOfStem.FixedValue = 22
          Cultivar Gamenya
            Command:
              [Phenology].Phyllochron.BasePhyllochron.FixedValue = 100
              [Phenology].PhyllochronPpSensitivity.FixedValue = 0.349562436956343
              [Phenology].CAMP.FLNparams.MinLN = 8
              [Phenology].CAMP.FLNparams.PpLN = 3
              [Phenology].CAMP.FLNparams.VrnLN = 0.5
              [Phenology].CAMP.FLNparams.VxPLN = 0
              [Phenology].CAMP.EnvData.VrnTreatTemp = 6
              [Phenology].CAMP.EnvData.VrnTreatDuration = 60
              [Phenology].HeadEmergenceLongDayBase.FixedValue = 50
              [Phenology].HeadEmergencePpSensitivity.FixedValue = 4
          Cultivar Gauntlet
            Command:
              [Phenology].Phyllochron.BasePhyllochron.FixedValue = 91.4777217640106
              [Phenology].PhyllochronPpSensitivity.FixedValue = 0.28135751778138
              [Phenology].CAMP.FLNparams.MinLN = 7
              [Phenology].CAMP.FLNparams.PpLN = 2
              [Phenology].CAMP.FLNparams.VrnLN = 4
              [Phenology].CAMP.FLNparams.VxPLN = -4
              [Phenology].CAMP.EnvData.VrnTreatTemp = 5.8
              [Phenology].CAMP.EnvData.VrnTreatDuration = 60
              [Phenology].HeadEmergenceLongDayBase.FixedValue = 230
              [Phenology].HeadEmergencePpSensitivity.FixedValue = 1
          Cultivar Gladius
            Command:
              [Phenology].Phyllochron.BasePhyllochron.FixedValue = 100
              [Phenology].CAMP.FLNparams.MinLN = 6
              [Phenology].CAMP.FLNparams.PpLN = 5.0
              [Phenology].CAMP.FLNparams.VrnLN = 0
              [Phenology].CAMP.FLNparams.VxPLN = 0.0
          Cultivar Grenade
            Command:
              [Phenology].Phyllochron.BasePhyllochron.FixedValue = 96.8120116390919
              [Phenology].PhyllochronPpSensitivity.FixedValue = 0.3478103654812
              [Phenology].CAMP.FLNparams.MinLN = 7
              [Phenology].CAMP.FLNparams.PpLN = 3
              [Phenology].CAMP.FLNparams.VrnLN = 1
              [Phenology].CAMP.FLNparams.VxPLN = 0
              [Phenology].CAMP.EnvData.VrnTreatTemp = 5.8
              [Phenology].CAMP.EnvData.VrnTreatDuration = 60
              [Phenology].HeadEmergenceLongDayBase.FixedValue = 230
              [Phenology].HeadEmergencePpSensitivity.FixedValue = 0
          Cultivar Gutha
            Command:
              [Phenology].Phyllochron.BasePhyllochron.FixedValue = 107
              [Phenology].PhyllochronPpSensitivity.FixedValue = 0.247088996399892
              [Grain].NumberFunction.GrainNumber.GrainsPerGramOfStem.FixedValue = 17
              [Phenology].CAMP.EnvData.VrnTreatTemp = 5.8
              [Phenology].CAMP.EnvData.VrnTreatDuration = 60
              [Phenology].CAMP.FLNparams.MinLN = 7
              [Phenology].CAMP.FLNparams.PpLN = 2
              [Phenology].CAMP.FLNparams.VrnLN = 1
              [Phenology].CAMP.FLNparams.VxPLN = 0
              [Phenology].HeadEmergenceLongDayBase.FixedValue = 50
              [Phenology].HeadEmergencePpSensitivity.FixedValue = 5
          Cultivar H45
            Command:
              [Phenology].Phyllochron.BasePhyllochron.FixedValue = 85.6989214218668
              [Grain].NumberFunction.GrainNumber.GrainsPerGramOfStem.FixedValue = 20
              [Phenology].PhyllochronPpSensitivity.FixedValue = 0.349562436956343
              [Phenology].CAMP.FLNparams.MinLN = 8
              [Phenology].CAMP.FLNparams.PpLN = 3
              [Phenology].CAMP.FLNparams.VrnLN = 0
              [Phenology].CAMP.FLNparams.VxPLN = 0
              [Phenology].CAMP.EnvData.VrnTreatTemp = 6
              [Phenology].CAMP.EnvData.VrnTreatDuration = 60
              [Phenology].HeadEmergenceLongDayBase.FixedValue = 50
              [Phenology].HeadEmergencePpSensitivity.FixedValue = 4
          Cultivar H46
            Command:
              [Phenology].Phyllochron.BasePhyllochron.FixedValue = 100
              [Phenology].CAMP.FLNparams.MinLN = 8
              [Phenology].CAMP.FLNparams.PpLN = 4.0
              [Phenology].CAMP.FLNparams.VrnLN = 0
              [Phenology].CAMP.FLNparams.VxPLN = 0.0
          Cultivar Hartog
            Command:
              [Phenology].Phyllochron.BasePhyllochron.FixedValue = 100. //107.48
              //[Leaf].TilleringRate.Vegetative.StressedRate.PotentialtilleringRate.GenotypeTilleringTendency.FixedValue = 1.
              //[Leaf].TilleringRate.Vegetative.StressedRate.Stresses.CoverEffect.XYPairs.X=0,0.2,0.7,1
              //[Leaf].TilleringRate.Vegetative.StressedRate.Stresses.CoverEffect.XYPairs.X=1.0,1.0,1,1
              [Grain].MaximumPotentialGrainSize.FixedValue = 0.045
              [Grain].NumberFunction.GrainNumber.GrainsPerGramOfStem.FixedValue = 18
              [Phenology].PhyllochronPpSensitivity.FixedValue = 0.247
              [Phenology].CAMP.FLNparams.MinLN = 7
              [Phenology].CAMP.FLNparams.PpLN = 4
              [Phenology].CAMP.FLNparams.VrnLN = 2
              [Phenology].CAMP.FLNparams.VxPLN = 0
              [Phenology].HeadEmergenceLongDayBase.FixedValue = 50
              [Phenology].HeadEmergencePpSensitivity.FixedValue = 5
              [Phenology].CAMP.EnvData.VrnTreatTemp = 6
              [Phenology].CAMP.EnvData.VrnTreatDuration = 60
          Cultivar Hume
            Command:
              [Phenology].Phyllochron.BasePhyllochron.FixedValue = 86.6877539944917
              [Phenology].PhyllochronPpSensitivity.FixedValue = 0.340327517277635
              [Phenology].CAMP.FLNparams.MinLN = 7
              [Phenology].CAMP.FLNparams.PpLN = 3
              [Phenology].CAMP.FLNparams.VrnLN = 1
              [Phenology].CAMP.FLNparams.VxPLN = -1
              [Phenology].CAMP.EnvData.VrnTreatTemp = 5.8
              [Phenology].CAMP.EnvData.VrnTreatDuration = 60
              [Phenology].HeadEmergenceLongDayBase.FixedValue = 190
              [Phenology].HeadEmergencePpSensitivity.FixedValue = 1
          Cultivar Illabo
            Command:
              [Phenology].Phyllochron.BasePhyllochron.FixedValue = 100.550798402656
              [Phenology].PhyllochronPpSensitivity.FixedValue = 0.238435422022958
              [Phenology].CAMP.EnvData.VrnTreatTemp = 5.8
              [Phenology].CAMP.EnvData.VrnTreatDuration = 60
              [Phenology].CAMP.FLNparams.MinLN = 8
              [Phenology].CAMP.FLNparams.VrnLN = 7
              [Phenology].CAMP.FLNparams.PpLN = 1
              [Phenology].CAMP.FLNparams.VxPLN = -1
              [Phenology].HeadEmergenceLongDayBase.FixedValue = 110
              [Phenology].HeadEmergencePpSensitivity.FixedValue = 0
          Cultivar Janz
            Command:
              [Phenology].Phyllochron.BasePhyllochron.FixedValue = 91.4460925764448
              [Phenology].PhyllochronPpSensitivity.FixedValue = 0.235020437209909
              [Phenology].CAMP.FLNparams.MinLN = 8
              [Phenology].CAMP.FLNparams.PpLN = 3
              [Phenology].CAMP.FLNparams.VrnLN = 1
              [Phenology].CAMP.FLNparams.VxPLN = -1
              [Phenology].CAMP.EnvData.VrnTreatTemp = 5.8
              [Phenology].CAMP.EnvData.VrnTreatDuration = 60
              [Phenology].HeadEmergenceLongDayBase.FixedValue = 130
              [Phenology].HeadEmergencePpSensitivity.FixedValue = 1
          Cultivar Mercury
            Command:
              [Phenology].HeadEmergenceLongDayBase.FixedValue = 100
              [Phenology].Phyllochron.BasePhyllochron.FixedValue = 80
              [Phenology].CAMP.FLNparams.MinLN = 9.0
              [Phenology].CAMP.FLNparams.PpLN = 2.0
              [Phenology].CAMP.FLNparams.VrnLN = 0.0
              [Phenology].CAMP.FLNparams.VxPLN = 0.0
              [Phenology].HeadEmergencePpSensitivity.FixedValue = 0.0
              [Phenology].CAMP.EnvData.VrnTreatTemp = 6
              [Phenology].CAMP.EnvData.VrnTreatDuration = 60
          Cultivar Kellalac
            Command:
              [Phenology].Phyllochron.BasePhyllochron.FixedValue = 88.1945544451052
              [Phenology].PhyllochronPpSensitivity.FixedValue = 0.350967201537242
              [Phenology].CAMP.FLNparams.MinLN = 7
              [Phenology].CAMP.FLNparams.PpLN = 4
              [Phenology].CAMP.FLNparams.VrnLN = 2
              [Phenology].CAMP.FLNparams.VxPLN = 0
              [Phenology].CAMP.EnvData.VrnTreatTemp = 6
              [Phenology].CAMP.EnvData.VrnTreatDuration = 60
              [Phenology].HeadEmergenceLongDayBase.FixedValue = 210
              [Phenology].HeadEmergencePpSensitivity.FixedValue = 3
          Cultivar Kennedy
            Command:
              [Phenology].Phyllochron.BasePhyllochron.FixedValue = 100
              [Phenology].CAMP.FLNparams.MinLN = 8
              [Phenology].CAMP.FLNparams.PpLN = 4.0
              [Phenology].CAMP.FLNparams.VrnLN = 0
              [Phenology].CAMP.FLNparams.VxPLN = 0.0
          Cultivar Kittyhawk
            Command:
              [Phenology].Phyllochron.BasePhyllochron.FixedValue = 93.7220123291132
              [Phenology].PhyllochronPpSensitivity.FixedValue = 0.212225680614483
              [Phenology].CAMP.FLNparams.MinLN = 10
              [Phenology].CAMP.FLNparams.PpLN = 2
              [Phenology].CAMP.FLNparams.VrnLN = 8
              [Phenology].CAMP.FLNparams.VxPLN = -1
              [Phenology].CAMP.EnvData.VrnTreatTemp = 5.8
              [Phenology].CAMP.EnvData.VrnTreatDuration = 60
              [Phenology].HeadEmergenceLongDayBase.FixedValue = 50
              [Phenology].HeadEmergencePpSensitivity.FixedValue = 4
          Cultivar Lancer
            Command:
              [Phenology].Phyllochron.BasePhyllochron.FixedValue = 85.6623042725763
              [Phenology].PhyllochronPpSensitivity.FixedValue = 0.324980109776406
              [Phenology].CAMP.FLNparams.MinLN = 8
              [Phenology].CAMP.FLNparams.PpLN = 4
              [Phenology].CAMP.FLNparams.VrnLN = 2
              [Phenology].CAMP.FLNparams.VxPLN = -2
              [Phenology].CAMP.EnvData.VrnTreatTemp = 5.8
              [Phenology].CAMP.EnvData.VrnTreatDuration = 60
              [Phenology].HeadEmergenceLongDayBase.FixedValue = 150
              [Phenology].HeadEmergencePpSensitivity.FixedValue = 1
          Cultivar Lang
            Command:
              [Phenology].Phyllochron.BasePhyllochron.FixedValue = 100
              [Phenology].CAMP.FLNparams.MinLN = 7
              [Phenology].CAMP.FLNparams.PpLN = 7
              [Phenology].CAMP.FLNparams.VrnLN = 0
              [Phenology].CAMP.FLNparams.VxPLN = 0
              [Phenology].HeadEmergenceLongDayBase.FixedValue = 70
              [Phenology].HeadEmergencePpSensitivity.FixedValue = 4
              [Phenology].CAMP.EnvData.VrnTreatTemp = 6
              [Phenology].CAMP.EnvData.VrnTreatDuration = 60
          Cultivar Livingston
            Command:
              [Phenology].Phyllochron.BasePhyllochron.FixedValue = 100
              [Phenology].CAMP.FLNparams.MinLN = 6.1
              [Phenology].CAMP.FLNparams.PpLN = 3.0
              [Phenology].CAMP.FLNparams.VrnLN = 1.8000000000000007
              [Phenology].CAMP.FLNparams.VxPLN = 4.0
              [Phenology].HeadEmergenceLongDayBase.FixedValue = 108
              [Phenology].HeadEmergencePpSensitivity.FixedValue = 1.3
              [Phenology].CAMP.EnvData.VrnTreatTemp = 6
              [Phenology].CAMP.EnvData.VrnTreatDuration = 60
              [Grain].MaximumPotentialGrainSize.FixedValue = 0.041
              [Grain].NumberFunction.GrainNumber.GrainsPerGramOfStem.FixedValue = 22
          Cultivar Lincoln
            Command:
              [Phenology].Phyllochron.BasePhyllochron.FixedValue = 100
              [Phenology].CAMP.FLNparams.MinLN = 6
              [Phenology].CAMP.FLNparams.PpLN = 4.0
              [Phenology].CAMP.FLNparams.VrnLN = 0
              [Phenology].CAMP.FLNparams.VxPLN = 0.0
          Cultivar Longsword
            Command:
              [Phenology].Phyllochron.BasePhyllochron.FixedValue = 100.389906627796
              [Phenology].PhyllochronPpSensitivity.FixedValue = 0.205225247925933
              [Phenology].CAMP.EnvData.VrnTreatTemp = 5.8
              [Phenology].CAMP.EnvData.VrnTreatDuration = 60
              [Phenology].CAMP.FLNparams.MinLN = 8
              [Phenology].CAMP.FLNparams.PpLN = 1
              [Phenology].CAMP.FLNparams.VrnLN = 7
              [Phenology].CAMP.FLNparams.VxPLN = 1
              [Phenology].HeadEmergenceLongDayBase.FixedValue = 110
              [Phenology].HeadEmergencePpSensitivity.FixedValue = 2
          Cultivar Mace
            Command:
              [Phenology].Phyllochron.BasePhyllochron.FixedValue = 100. //106.268453805677
              [Phenology].PhyllochronPpSensitivity.FixedValue = 0.137742329295879
              [Phenology].CAMP.EnvData.VrnTreatTemp = 6
              [Phenology].CAMP.EnvData.VrnTreatDuration = 60
              [Phenology].CAMP.FLNparams.MinLN = 7
              [Phenology].CAMP.FLNparams.PpLN = 2
              [Phenology].CAMP.FLNparams.VrnLN = 3
              [Phenology].CAMP.FLNparams.VxPLN = -3
              [Phenology].HeadEmergenceLongDayBase.FixedValue = 70
              [Phenology].HeadEmergencePpSensitivity.FixedValue = 1
              [Grain].MaximumPotentialGrainSize.FixedValue = 0.0041
              [Grain].NumberFunction.GrainNumber.GrainsPerGramOfStem.FixedValue = 2
          Cultivar MacKellar
            Command:
              [Phenology].HeadEmergenceLongDayBase.FixedValue = 114.0
              [Phenology].Phyllochron.BasePhyllochron.FixedValue = 100
              [Phenology].CAMP.FLNparams.MinLN = 8.664527440257086
              [Phenology].CAMP.FLNparams.PpLN = 1.0215422635640583
              [Phenology].CAMP.FLNparams.VrnLN = 10.022473345513335
              [Phenology].CAMP.FLNparams.VxPLN = -2.1045318640627455
              [Phenology].HeadEmergencePpSensitivity.FixedValue = 3.533066035654082
              [Phenology].CAMP.EnvData.VrnTreatTemp = 6
              [Phenology].CAMP.EnvData.VrnTreatDuration = 60
          Cultivar Magenta
            Command:
              [Phenology].Phyllochron.BasePhyllochron.FixedValue = 113.040956826707
              [Phenology].PhyllochronPpSensitivity.FixedValue = 0.138444741551648
              [Phenology].CAMP.EnvData.VrnTreatTemp = 5.8
              [Phenology].CAMP.EnvData.VrnTreatDuration = 60
              [Phenology].CAMP.FLNparams.MinLN = 7
              [Phenology].CAMP.FLNparams.PpLN = 3
              [Phenology].CAMP.FLNparams.VrnLN = 2
              [Phenology].CAMP.FLNparams.VxPLN = 1
              [Phenology].HeadEmergenceLongDayBase.FixedValue = 130
              [Phenology].HeadEmergencePpSensitivity.FixedValue = 0
          Cultivar Manning
            Command:
              [Phenology].Phyllochron.BasePhyllochron.FixedValue = 104.816433323058
              [Phenology].PhyllochronPpSensitivity.FixedValue = 0.253254338348875
              [Phenology].CAMP.EnvData.VrnTreatTemp = 6
              [Phenology].CAMP.EnvData.VrnTreatDuration = 60
              [Phenology].CAMP.FLNparams.MinLN = 9
              [Phenology].CAMP.FLNparams.PpLN = 6
              [Phenology].CAMP.FLNparams.VrnLN = 8
              [Phenology].CAMP.FLNparams.VxPLN = 0
              [Phenology].HeadEmergenceLongDayBase.FixedValue = 230
              [Phenology].HeadEmergencePpSensitivity.FixedValue = 0
          Cultivar Matong
            Command:
              [Phenology].Phyllochron.BasePhyllochron.FixedValue = 100
              [Grain].NumberFunction.GrainNumber.GrainsPerGramOfStem.FixedValue = 22
              [Phenology].CAMP.FLNparams.MinLN = 7
              [Phenology].CAMP.FLNparams.PpLN = 4.0
              [Phenology].CAMP.FLNparams.VrnLN = 1
              [Phenology].CAMP.FLNparams.VxPLN = 0.0
          Cultivar McCubbin
            Command:
              [Phenology].Phyllochron.BasePhyllochron.FixedValue = 90
              [Phenology].CAMP.FLNparams.MinLN = 8.0
              [Phenology].CAMP.FLNparams.PpLN = 8.0
              [Phenology].CAMP.FLNparams.VrnLN = 0.0
              [Phenology].CAMP.FLNparams.VxPLN = 3.0
              [Phenology].HeadEmergenceLongDayBase.FixedValue = 200.0
              [Phenology].HeadEmergencePpSensitivity.FixedValue = 2.0
              [Phenology].CAMP.EnvData.VrnTreatTemp = 6
              [Phenology].CAMP.EnvData.VrnTreatDuration = 60
          Cultivar Merinda
            Command:
              [Phenology].Phyllochron.BasePhyllochron.FixedValue = 98.5779272570712
              [Phenology].PhyllochronPpSensitivity.FixedValue = 0.347160824156039
              [Phenology].CAMP.EnvData.VrnTreatTemp = 5.8
              [Phenology].CAMP.EnvData.VrnTreatDuration = 60
              [Phenology].CAMP.FLNparams.MinLN = 7
              [Phenology].CAMP.FLNparams.PpLN = 1
              [Phenology].CAMP.FLNparams.VrnLN = 1
              [Phenology].CAMP.FLNparams.VxPLN = -1
              [Phenology].HeadEmergenceLongDayBase.FixedValue = 210
              [Phenology].HeadEmergencePpSensitivity.FixedValue = 1
          Cultivar Mitch
            Command:
              [Phenology].Phyllochron.BasePhyllochron.FixedValue = 90.7949886258521
              [Phenology].PhyllochronPpSensitivity.FixedValue = 0.313387918745248
              [Phenology].CAMP.EnvData.VrnTreatTemp = 5.8
              [Phenology].CAMP.EnvData.VrnTreatDuration = 60
              [Phenology].CAMP.FLNparams.MinLN = 8
              [Phenology].CAMP.FLNparams.PpLN = 2
              [Phenology].CAMP.FLNparams.VrnLN = 3
              [Phenology].CAMP.FLNparams.VxPLN = -2
              [Phenology].HeadEmergenceLongDayBase.FixedValue = 130
              [Phenology].HeadEmergencePpSensitivity.FixedValue = 1
          Cultivar Nighthawk
            Command:
              [Phenology].Phyllochron.BasePhyllochron.FixedValue = 97.5749140549815
              [Phenology].PhyllochronPpSensitivity.FixedValue = 0.234188946138953
              [Phenology].CAMP.EnvData.VrnTreatTemp = 5.8
              [Phenology].CAMP.EnvData.VrnTreatDuration = 60
              [Phenology].CAMP.FLNparams.MinLN = 8
              [Phenology].CAMP.FLNparams.VrnLN = 4
              [Phenology].CAMP.FLNparams.PpLN = 2
              [Phenology].CAMP.FLNparams.VxPLN = -1
              [Phenology].HeadEmergenceLongDayBase.FixedValue = 70
              [Phenology].HeadEmergencePpSensitivity.FixedValue = 8
          Cultivar Ouyen
            Command:
              [Phenology].Phyllochron.BasePhyllochron.FixedValue = 84.1472430387947
              [Phenology].PhyllochronPpSensitivity.FixedValue = 0.332456383177313
              [Phenology].CAMP.EnvData.VrnTreatTemp = 5.8
              [Phenology].CAMP.EnvData.VrnTreatDuration = 60
              [Phenology].CAMP.FLNparams.MinLN = 8
              [Phenology].CAMP.FLNparams.PpLN = 2
              [Phenology].CAMP.FLNparams.VrnLN = 2
              [Phenology].CAMP.FLNparams.VxPLN = -2
              [Phenology].HeadEmergenceLongDayBase.FixedValue = 190
              [Phenology].HeadEmergencePpSensitivity.FixedValue = 1
          Cultivar Peake
            Command:
              [Phenology].Phyllochron.BasePhyllochron.FixedValue = 87.7433052533018
              [Phenology].PhyllochronPpSensitivity.FixedValue = 0.44431162843274
              [Phenology].CAMP.EnvData.VrnTreatTemp = 5.8
              [Phenology].CAMP.EnvData.VrnTreatDuration = 60
              [Phenology].CAMP.FLNparams.MinLN = 7
              [Phenology].CAMP.FLNparams.PpLN = 2
              [Phenology].CAMP.FLNparams.VrnLN = 0
              [Phenology].CAMP.FLNparams.VxPLN = 0
              [Phenology].HeadEmergenceLongDayBase.FixedValue = 190
              [Phenology].HeadEmergencePpSensitivity.FixedValue = 1
          Cultivar Revenue
            Command:
              [Phenology].Phyllochron.BasePhyllochron.FixedValue = 113.782112306367
              [Phenology].PhyllochronPpSensitivity.FixedValue = 0.155926785053575
              [Phenology].CAMP.EnvData.VrnTreatTemp = 5.8
              [Phenology].CAMP.EnvData.VrnTreatDuration = 60
              [Phenology].CAMP.FLNparams.MinLN = 8
              [Phenology].CAMP.FLNparams.PpLN = 2
              [Phenology].CAMP.FLNparams.VrnLN = 7
              [Phenology].CAMP.FLNparams.VxPLN = 2
              [Phenology].HeadEmergenceLongDayBase.FixedValue = 150
              [Phenology].HeadEmergencePpSensitivity.FixedValue = 4
          Cultivar Rosella
            Command:
              [Phenology].Phyllochron.BasePhyllochron.FixedValue = 96.7111881914136
              [Phenology].PhyllochronPpSensitivity.FixedValue = 0.209478791477046
              [Phenology].CAMP.EnvData.VrnTreatTemp = 5.8
              [Phenology].CAMP.EnvData.VrnTreatDuration = 60
              [Phenology].CAMP.FLNparams.MinLN = 7
              [Phenology].CAMP.FLNparams.PpLN = 5
              [Phenology].CAMP.FLNparams.VrnLN = 8
              [Phenology].CAMP.FLNparams.VxPLN = 5
              [Phenology].HeadEmergenceLongDayBase.FixedValue = 90
              [Phenology].HeadEmergencePpSensitivity.FixedValue = 5
          Cultivar Ruby
            Command:
              [Phenology].Phyllochron.BasePhyllochron.FixedValue = 100
              [Phenology].CAMP.FLNparams.MinLN = 8
              [Phenology].CAMP.FLNparams.PpLN = 4.0
              [Phenology].CAMP.FLNparams.VrnLN = 0
              [Phenology].CAMP.FLNparams.VxPLN = 0.0
          Cultivar Scepter
            Command:
              [Phenology].Phyllochron.BasePhyllochron.FixedValue = 107.602580952482
              [Phenology].PhyllochronPpSensitivity.FixedValue = 0.23032920462638
              [Phenology].CAMP.EnvData.VrnTreatTemp = 6
              [Phenology].CAMP.EnvData.VrnTreatDuration = 60
              [Phenology].CAMP.FLNparams.MinLN = 7
              [Phenology].CAMP.FLNparams.PpLN = 2
              [Phenology].CAMP.FLNparams.VrnLN = 2
              [Phenology].CAMP.FLNparams.VxPLN = -1
              [Phenology].HeadEmergenceLongDayBase.FixedValue = 170
              [Phenology].HeadEmergencePpSensitivity.FixedValue = 0
          Cultivar Scout
            Command:
              [Phenology].Phyllochron.BasePhyllochron.FixedValue = 102.794916048683
              [Phenology].PhyllochronPpSensitivity.FixedValue = 0.192036818570067
              [Phenology].CAMP.EnvData.VrnTreatTemp = 6
              [Phenology].CAMP.EnvData.VrnTreatDuration = 60
              [Phenology].CAMP.FLNparams.MinLN = 7
              [Phenology].CAMP.FLNparams.PpLN = 2
              [Phenology].CAMP.FLNparams.VrnLN = 4
              [Phenology].CAMP.FLNparams.VxPLN = -2
              [Phenology].HeadEmergenceLongDayBase.FixedValue = 170
              [Phenology].HeadEmergencePpSensitivity.FixedValue = 0
          Cultivar Scythe
            Command:
              [Phenology].Phyllochron.BasePhyllochron.FixedValue = 106.486507449716
              [Phenology].PhyllochronPpSensitivity.FixedValue = 0.22806739407445
              [Phenology].CAMP.EnvData.VrnTreatTemp = 5.8
              [Phenology].CAMP.EnvData.VrnTreatDuration = 60
              [Phenology].CAMP.FLNparams.MinLN = 6
              [Phenology].CAMP.FLNparams.PpLN = 4
              [Phenology].CAMP.FLNparams.VrnLN = 2
              [Phenology].CAMP.FLNparams.VxPLN = 2
              [Phenology].HeadEmergenceLongDayBase.FixedValue = 90
              [Phenology].HeadEmergencePpSensitivity.FixedValue = 4
          Cultivar Spear
            Command:
              [Phenology].Phyllochron.BasePhyllochron.FixedValue = 102.794916048683
              [Phenology].PhyllochronPpSensitivity.FixedValue = 0.192036818570067
              [Grain].NumberFunction.GrainNumber.GrainsPerGramOfStem.FixedValue = 22
              [Phenology].CAMP.EnvData.VrnTreatTemp = 6
              [Phenology].CAMP.EnvData.VrnTreatDuration = 60
              [Phenology].CAMP.FLNparams.MinLN = 7
              [Phenology].CAMP.FLNparams.PpLN = 2
              [Phenology].CAMP.FLNparams.VrnLN = 4
              [Phenology].CAMP.FLNparams.VxPLN = -2
              [Phenology].HeadEmergenceLongDayBase.FixedValue = 170
              [Phenology].HeadEmergencePpSensitivity.FixedValue = 0
          Cultivar Spitfire
            Command:
              [Phenology].Phyllochron.BasePhyllochron.FixedValue = 87.8426291924597
              [Phenology].PhyllochronPpSensitivity.FixedValue = 0.226170449889058
              [Phenology].CAMP.EnvData.VrnTreatTemp = 5.8
              [Phenology].CAMP.EnvData.VrnTreatDuration = 60
              [Phenology].CAMP.FLNparams.MinLN = 8
              [Phenology].CAMP.FLNparams.PpLN = 1
              [Phenology].CAMP.FLNparams.VrnLN = 3
              [Phenology].CAMP.FLNparams.VxPLN = -3
              [Phenology].HeadEmergenceLongDayBase.FixedValue = 130
              [Phenology].HeadEmergencePpSensitivity.FixedValue = 1
            Alias Drysdale
          Cultivar Strzelecki
            Command:
              [Phenology].Phyllochron.BasePhyllochron.FixedValue = 96.5633530493006
              [Phenology].PhyllochronPpSensitivity.FixedValue = 0.245575047413057
              [Phenology].CAMP.EnvData.VrnTreatTemp = 5.8
              [Phenology].CAMP.EnvData.VrnTreatDuration = 60
              [Phenology].CAMP.FLNparams.MinLN = 7
              [Phenology].CAMP.FLNparams.PpLN = 3
              [Phenology].CAMP.FLNparams.VrnLN = 3
              [Phenology].CAMP.FLNparams.VxPLN = 0
              [Phenology].HeadEmergenceLongDayBase.FixedValue = 110
              [Phenology].HeadEmergencePpSensitivity.FixedValue = 3
          Cultivar Sunbri
            Command:
              [Phenology].Phyllochron.BasePhyllochron.FixedValue = 91.5032903672171
              [Phenology].PhyllochronPpSensitivity.FixedValue = 0.207593313150283
              [Phenology].CAMP.EnvData.VrnTreatTemp = 5.8
              [Phenology].CAMP.EnvData.VrnTreatDuration = 60
              [Phenology].CAMP.FLNparams.MinLN = 8
              [Phenology].CAMP.FLNparams.PpLN = 4
              [Phenology].CAMP.FLNparams.VrnLN = 2
              [Phenology].CAMP.FLNparams.VxPLN = -1
              [Phenology].HeadEmergenceLongDayBase.FixedValue = 170
              [Phenology].HeadEmergencePpSensitivity.FixedValue = 2
          Cultivar Sunbee
            Command:
              [Phenology].Phyllochron.BasePhyllochron.FixedValue = 97.2940011008473
              [Phenology].PhyllochronPpSensitivity.FixedValue = 0.185142054210791
              [Phenology].CAMP.EnvData.VrnTreatTemp = 5.8
              [Phenology].CAMP.EnvData.VrnTreatDuration = 60
              [Phenology].CAMP.FLNparams.MinLN = 7
              [Phenology].CAMP.FLNparams.PpLN = 1
              [Phenology].CAMP.FLNparams.VrnLN = 3
              [Phenology].CAMP.FLNparams.VxPLN = -3
              [Phenology].HeadEmergenceLongDayBase.FixedValue = 370
              [Phenology].HeadEmergencePpSensitivity.FixedValue = 0
          Cultivar Sunco
            Command:
              [Phenology].HeadEmergencePpSensitivity.FixedValue = 1
              [Phenology].Phyllochron.BasePhyllochron.FixedValue = 100
              [Phenology].CAMP.FLNparams.MinLN = 6
              [Phenology].CAMP.FLNparams.PpLN = 11
              [Phenology].CAMP.FLNparams.VrnLN = 10
              [Phenology].CAMP.FLNparams.VxPLN = -9
              [Phenology].HeadEmergenceLongDayBase.FixedValue = 170
          Cultivar Sunlamb
            Command:
              [Phenology].Phyllochron.BasePhyllochron.FixedValue = 100.382265746297
              [Phenology].PhyllochronPpSensitivity.FixedValue = 0.154235967458266
              [Phenology].CAMP.EnvData.VrnTreatTemp = 5.8
              [Phenology].CAMP.EnvData.VrnTreatDuration = 60
              [Phenology].CAMP.FLNparams.MinLN = 7
              [Phenology].CAMP.FLNparams.PpLN = 5
              [Phenology].CAMP.FLNparams.VrnLN = 10
              [Phenology].CAMP.FLNparams.VxPLN = -5
              [Phenology].HeadEmergenceLongDayBase.FixedValue = 150
              [Phenology].HeadEmergencePpSensitivity.FixedValue = 4
          Cultivar Suneca
            Command:
              [Phenology].CAMP.FLNparams.MinLN = 5
              [Phenology].CAMP.FLNparams.PpLN = 6
              [Phenology].CAMP.FLNparams.VrnLN = 3
              [Phenology].CAMP.FLNparams.VxPLN = 3
              [Phenology].HeadEmergenceLongDayBase.FixedValue = 190
              [Phenology].HeadEmergencePpSensitivity.FixedValue = 2
          Cultivar Sunstate
            Command:
              [Phenology].Phyllochron.BasePhyllochron.FixedValue = 95.0758950229683
              [Phenology].PhyllochronPpSensitivity.FixedValue = 0.225986092694718
              [Phenology].CAMP.EnvData.VrnTreatTemp = 6
              [Phenology].CAMP.EnvData.VrnTreatDuration = 60
              [Phenology].CAMP.FLNparams.MinLN = 7
              [Phenology].CAMP.FLNparams.PpLN = 1
              [Phenology].CAMP.FLNparams.VrnLN = 4
              [Phenology].CAMP.FLNparams.VxPLN = -4
              [Phenology].HeadEmergenceLongDayBase.FixedValue = 190
              [Phenology].HeadEmergencePpSensitivity.FixedValue = 1
              [Grain].MaximumPotentialGrainSize.FixedValue = 0.048
              [Grain].NumberFunction.GrainNumber.GrainsPerGramOfStem.FixedValue = 24
          Cultivar Suntop
            Command:
              [Phenology].Phyllochron.BasePhyllochron.FixedValue = 93.1036394598307
              [Phenology].PhyllochronPpSensitivity.FixedValue = 0.335203758711104
              [Phenology].CAMP.EnvData.VrnTreatTemp = 5.8
              [Phenology].CAMP.EnvData.VrnTreatDuration = 60
              [Phenology].CAMP.FLNparams.MinLN = 8
              [Phenology].CAMP.FLNparams.PpLN = 2
              [Phenology].CAMP.FLNparams.VrnLN = 0
              [Phenology].CAMP.FLNparams.VxPLN = 0
              [Phenology].HeadEmergenceLongDayBase.FixedValue = 210
              [Phenology].HeadEmergencePpSensitivity.FixedValue = 0
          Cultivar Trojan
            Command:
              [Phenology].Phyllochron.BasePhyllochron.FixedValue = 99.1351271229079
              [Phenology].PhyllochronPpSensitivity.FixedValue = 0.35511766231399
              [Phenology].CAMP.EnvData.VrnTreatTemp = 6
              [Phenology].CAMP.EnvData.VrnTreatDuration = 60
              [Phenology].CAMP.FLNparams.MinLN = 7
              [Phenology].CAMP.FLNparams.PpLN = 5
              [Phenology].CAMP.FLNparams.VrnLN = 2
              [Phenology].CAMP.FLNparams.VxPLN = 1
              [Phenology].HeadEmergenceLongDayBase.FixedValue = 50
              [Phenology].HeadEmergencePpSensitivity.FixedValue = 4
          Cultivar Ventura
            Command:
              [Phenology].Phyllochron.BasePhyllochron.FixedValue = 100
              [Phenology].CAMP.FLNparams.MinLN = 8
              [Phenology].CAMP.FLNparams.PpLN = 4.0
              [Phenology].CAMP.FLNparams.VrnLN = 0
              [Phenology].CAMP.FLNparams.VxPLN = 0.0
          Cultivar Wedgetail
            Command:
              [Phenology].Phyllochron.BasePhyllochron.FixedValue = 111.579556421375
              [Phenology].PhyllochronPpSensitivity.FixedValue = 0.217687425020179
              [Phenology].CAMP.EnvData.VrnTreatTemp = 5.8
              [Phenology].CAMP.EnvData.VrnTreatDuration = 60
              [Phenology].CAMP.FLNparams.MinLN = 7
              [Phenology].CAMP.FLNparams.PpLN = 1
              [Phenology].CAMP.FLNparams.VrnLN = 9
              [Phenology].CAMP.FLNparams.VxPLN = -1
              [Phenology].HeadEmergenceLongDayBase.FixedValue = 170
              [Phenology].HeadEmergencePpSensitivity.FixedValue = 2
          Cultivar Whistler
            Command:
              [Phenology].Phyllochron.BasePhyllochron.FixedValue = 101.152462224521
              [Phenology].PhyllochronPpSensitivity.FixedValue = 0.160519169483945
              [Phenology].CAMP.FLNparams.MinLN = 8
              [Phenology].CAMP.FLNparams.PpLN = 2
              [Phenology].CAMP.FLNparams.VrnLN = 8
              [Phenology].CAMP.FLNparams.VxPLN = -2
              [Phenology].CAMP.EnvData.VrnTreatTemp = 5.8
              [Phenology].CAMP.EnvData.VrnTreatDuration = 60
              [Phenology].HeadEmergenceLongDayBase.FixedValue = 150
              [Phenology].HeadEmergencePpSensitivity.FixedValue = 1
          Cultivar Wilgoyne
            Command:
              [Phenology].Phyllochron.BasePhyllochron.FixedValue = 100
              [Phenology].PhyllochronPpSensitivity.FixedValue = 0.349562436956343
              [Grain].NumberFunction.GrainNumber.GrainsPerGramOfStem.FixedValue = 17
              [Phenology].CAMP.FLNparams.MinLN = 8
              [Phenology].CAMP.FLNparams.PpLN = 3
              [Phenology].CAMP.FLNparams.VrnLN = 0.5
              [Phenology].CAMP.FLNparams.VxPLN = 0
              [Phenology].CAMP.EnvData.VrnTreatTemp = 6
              [Phenology].CAMP.EnvData.VrnTreatDuration = 60
              [Phenology].HeadEmergenceLongDayBase.FixedValue = 50
              [Phenology].HeadEmergencePpSensitivity.FixedValue = 4
          Cultivar Wills
            Command:
              [Phenology].Phyllochron.BasePhyllochron.FixedValue = 94.9906866085437
              [Phenology].PhyllochronPpSensitivity.FixedValue = 0.264808096779551
              [Phenology].CAMP.EnvData.VrnTreatTemp = 5.8
              [Phenology].CAMP.EnvData.VrnTreatDuration = 60
              [Phenology].CAMP.FLNparams.MinLN = 8
              [Phenology].CAMP.FLNparams.PpLN = 2
              [Phenology].CAMP.FLNparams.VrnLN = 4
              [Phenology].CAMP.FLNparams.VxPLN = -3
              [Phenology].HeadEmergenceLongDayBase.FixedValue = 110
              [Phenology].HeadEmergencePpSensitivity.FixedValue = 1
          Cultivar Wyalkatchem
            Command:
              [Phenology].Phyllochron.BasePhyllochron.FixedValue = 101.991162889267
              [Phenology].PhyllochronPpSensitivity.FixedValue = 0.203541157884576
              [Phenology].CAMP.EnvData.VrnTreatTemp = 5.8
              [Phenology].CAMP.EnvData.VrnTreatDuration = 60
              [Phenology].CAMP.FLNparams.MinLN = 7
              [Phenology].CAMP.FLNparams.PpLN = 2
              [Phenology].CAMP.FLNparams.VrnLN = 3
              [Phenology].CAMP.FLNparams.VxPLN = -3
              [Phenology].HeadEmergenceLongDayBase.FixedValue = 90
              [Phenology].HeadEmergencePpSensitivity.FixedValue = 3
          Cultivar Yitpi
            Command:
              [Phenology].Phyllochron.BasePhyllochron.FixedValue = 107.48018743345
              [Phenology].PhyllochronPpSensitivity.FixedValue = 0.247088996399892
              [Phenology].CAMP.EnvData.VrnTreatTemp = 5.8
              [Phenology].CAMP.EnvData.VrnTreatDuration = 60
              [Phenology].CAMP.FLNparams.MinLN = 7
              [Phenology].CAMP.FLNparams.PpLN = 4
              [Phenology].CAMP.FLNparams.VrnLN = 2
              [Phenology].CAMP.FLNparams.VxPLN = 0
              [Phenology].HeadEmergenceLongDayBase.FixedValue = 50
              [Phenology].HeadEmergencePpSensitivity.FixedValue = 5
          Cultivar Young
            Command:
              [Phenology].Phyllochron.BasePhyllochron.FixedValue = 86.0661362380018
              [Phenology].PhyllochronPpSensitivity.FixedValue = 0.347762945437436
              [Phenology].CAMP.EnvData.VrnTreatTemp = 5.8
              [Phenology].CAMP.EnvData.VrnTreatDuration = 60
              [Phenology].CAMP.FLNparams.MinLN = 8
              [Phenology].CAMP.FLNparams.PpLN = 1
              [Phenology].CAMP.FLNparams.VrnLN = 1
              [Phenology].CAMP.FLNparams.VxPLN = -1
              [Phenology].HeadEmergenceLongDayBase.FixedValue = 150
              [Phenology].HeadEmergencePpSensitivity.FixedValue = 1
        Folder NILs
          Cultivar CSIROW002
            Command:
              [Phenology].Phyllochron.BasePhyllochron.FixedValue = 97.1048561789481
              [Phenology].PhyllochronPpSensitivity.FixedValue = 0.330486171103675
              [Phenology].CAMP.FLNparams.MinLN = 6.658457459336699
              [Phenology].CAMP.FLNparams.PpLN = 1.9822634447408163
              [Phenology].CAMP.FLNparams.VrnLN = 2.6921517428015016
              [Phenology].CAMP.FLNparams.VxPLN = 0.012348660067480921
              [Phenology].CAMP.EnvData.VrnTreatTemp = 5.8
              [Phenology].CAMP.EnvData.VrnTreatDuration = 60
              [Phenology].HeadEmergenceLongDayBase.FixedValue = 169.0
              [Phenology].HeadEmergencePpSensitivity.FixedValue = 1.3207357239932465
          Cultivar CSIROW003
            Command:
              [Phenology].Phyllochron.BasePhyllochron.FixedValue = 97.9080402900587
              [Phenology].PhyllochronPpSensitivity.FixedValue = 0.219427317086708
              [Phenology].CAMP.FLNparams.MinLN = 5.793366821378284
              [Phenology].CAMP.FLNparams.PpLN = 0.0
              [Phenology].CAMP.FLNparams.VrnLN = 4.787965491738554
              [Phenology].CAMP.FLNparams.VxPLN = -2.8680601480674017
              [Phenology].CAMP.EnvData.VrnTreatTemp = 5.8
              [Phenology].CAMP.EnvData.VrnTreatDuration = 60
              [Phenology].HeadEmergenceLongDayBase.FixedValue = 145.0
              [Phenology].HeadEmergencePpSensitivity.FixedValue = 2.658836674667949
          Cultivar CSIROW005
            Command:
              [Phenology].Phyllochron.BasePhyllochron.FixedValue = 100.324132823901
              [Phenology].PhyllochronPpSensitivity.FixedValue = 0.16547784419225
              [Phenology].CAMP.FLNparams.MinLN = 5.759207332491177
              [Phenology].CAMP.FLNparams.PpLN = 2.4191796388445765
              [Phenology].CAMP.FLNparams.VrnLN = 3.0756722363145896
              [Phenology].CAMP.FLNparams.VxPLN = -0.2627994305564112
              [Phenology].CAMP.EnvData.VrnTreatTemp = 5.8
              [Phenology].CAMP.EnvData.VrnTreatDuration = 60
              [Phenology].HeadEmergenceLongDayBase.FixedValue = 369.0
              [Phenology].HeadEmergencePpSensitivity.FixedValue = 0.0
          Cultivar CSIROW007
            Command:
              [Phenology].Phyllochron.BasePhyllochron.FixedValue = 102.785879373288
              [Phenology].PhyllochronPpSensitivity.FixedValue = 0.18434106648197
              [Phenology].CAMP.FLNparams.MinLN = 7.326398633965955
              [Phenology].CAMP.FLNparams.PpLN = 0.0
              [Phenology].CAMP.FLNparams.VrnLN = 7.554300061869201
              [Phenology].CAMP.FLNparams.VxPLN = -1.6841419188674127
              [Phenology].CAMP.EnvData.VrnTreatTemp = 5.8
              [Phenology].CAMP.EnvData.VrnTreatDuration = 60
              [Phenology].HeadEmergenceLongDayBase.FixedValue = 193.0
              [Phenology].HeadEmergencePpSensitivity.FixedValue = 1.4807227520020911
          Cultivar CSIROW011
            Command:
              [Phenology].Phyllochron.BasePhyllochron.FixedValue = 90.109466190558
              [Phenology].PhyllochronPpSensitivity.FixedValue = 0.349636600984782
              [Phenology].CAMP.FLNparams.MinLN = 6.0
              [Phenology].CAMP.FLNparams.PpLN = 1.0
              [Phenology].CAMP.FLNparams.VrnLN = 1.0
              [Phenology].CAMP.FLNparams.VxPLN = -1.0
              [Phenology].CAMP.EnvData.VrnTreatTemp = 5.8
              [Phenology].CAMP.EnvData.VrnTreatDuration = 60
              [Phenology].HeadEmergenceLongDayBase.FixedValue = 200.0
              [Phenology].HeadEmergencePpSensitivity.FixedValue = 2.0
          Cultivar CSIROW018
            Command:
              [Phenology].Phyllochron.BasePhyllochron.FixedValue = 100.218976921681
              [Phenology].PhyllochronPpSensitivity.FixedValue = 0.305627551956816
              [Phenology].CAMP.FLNparams.MinLN = 5.0
              [Phenology].CAMP.FLNparams.PpLN = 2.0037887506286465
              [Phenology].CAMP.FLNparams.VrnLN = 3.5823533971961172
              [Phenology].CAMP.FLNparams.VxPLN = -2.0415045806529806
              [Phenology].CAMP.EnvData.VrnTreatTemp = 5.8
              [Phenology].CAMP.EnvData.VrnTreatDuration = 60
              [Phenology].HeadEmergenceLongDayBase.FixedValue = 371.0
              [Phenology].HeadEmergencePpSensitivity.FixedValue = 0.94606616045257
          Cultivar CSIROW021
            Command:
              [Phenology].Phyllochron.BasePhyllochron.FixedValue = 100.85898282236
              [Phenology].PhyllochronPpSensitivity.FixedValue = 0.228645304743823
              [Phenology].CAMP.FLNparams.MinLN = 8.0
              [Phenology].CAMP.FLNparams.PpLN = 1.333333333333334
              [Phenology].CAMP.FLNparams.VrnLN = 6.166666666666666
              [Phenology].CAMP.FLNparams.VxPLN = -0.8333333333333357
              [Phenology].CAMP.EnvData.VrnTreatTemp = 5.8
              [Phenology].CAMP.EnvData.VrnTreatDuration = 60
              [Phenology].HeadEmergenceLongDayBase.FixedValue = 200.0
              [Phenology].HeadEmergencePpSensitivity.FixedValue = 2.0
          Cultivar CSIROW023
            Command:
              [Phenology].Phyllochron.BasePhyllochron.FixedValue = 102.809488116017
              [Phenology].PhyllochronPpSensitivity.FixedValue = 0.218898108718466
              [Phenology].CAMP.FLNparams.MinLN = 7.493027691870457
              [Phenology].CAMP.FLNparams.PpLN = 2.584156511279189
              [Phenology].CAMP.FLNparams.VrnLN = 2.37442378811967
              [Phenology].CAMP.FLNparams.VxPLN = 0.28214981195795374
              [Phenology].CAMP.EnvData.VrnTreatTemp = 5.8
              [Phenology].CAMP.EnvData.VrnTreatDuration = 60
              [Phenology].HeadEmergenceLongDayBase.FixedValue = 219.0
              [Phenology].HeadEmergencePpSensitivity.FixedValue = 0.0
          Cultivar CSIROW027
            Command:
              [Phenology].Phyllochron.BasePhyllochron.FixedValue = 91.9686702262851
              [Phenology].PhyllochronPpSensitivity.FixedValue = 0.298865609355012
              [Phenology].CAMP.FLNparams.MinLN = 5.666666666666667
              [Phenology].CAMP.FLNparams.PpLN = 1.0
              [Phenology].CAMP.FLNparams.VrnLN = 1.0
              [Phenology].CAMP.FLNparams.VxPLN = -0.666666666666667
              [Phenology].CAMP.EnvData.VrnTreatTemp = 5.8
              [Phenology].CAMP.EnvData.VrnTreatDuration = 60
              [Phenology].HeadEmergenceLongDayBase.FixedValue = 200.0
              [Phenology].HeadEmergencePpSensitivity.FixedValue = 2.0
          Cultivar CSIROW029
            Command:
              [Phenology].Phyllochron.BasePhyllochron.FixedValue = 98.5813007346922
              [Phenology].PhyllochronPpSensitivity.FixedValue = 0.228833970802351
              [Phenology].CAMP.FLNparams.MinLN = 5.666666666666667
              [Phenology].CAMP.FLNparams.PpLN = 0.33333333333333304
              [Phenology].CAMP.FLNparams.VrnLN = 1.0
              [Phenology].CAMP.FLNparams.VxPLN = -0.666666666666667
              [Phenology].CAMP.EnvData.VrnTreatTemp = 5.8
              [Phenology].CAMP.EnvData.VrnTreatDuration = 60
              [Phenology].HeadEmergenceLongDayBase.FixedValue = 200.0
              [Phenology].HeadEmergencePpSensitivity.FixedValue = 2.0
          Cultivar CSIROW073
            Command:
              [Phenology].Phyllochron.BasePhyllochron.FixedValue = 95.6693440169749
              [Phenology].PhyllochronPpSensitivity.FixedValue = 0.226791235396558
              [Phenology].CAMP.FLNparams.MinLN = 8.790112770072708
              [Phenology].CAMP.FLNparams.PpLN = 0.7295023618186995
              [Phenology].CAMP.FLNparams.VrnLN = 4.373125182546708
              [Phenology].CAMP.FLNparams.VxPLN = 9.99670899443495
              [Phenology].CAMP.EnvData.VrnTreatTemp = 5.8
              [Phenology].CAMP.EnvData.VrnTreatDuration = 60
              [Phenology].HeadEmergenceLongDayBase.FixedValue = 50.0
              [Phenology].HeadEmergencePpSensitivity.FixedValue = 3.5452031099169528
          Cultivar CSIROW077
            Command:
              [Phenology].Phyllochron.BasePhyllochron.FixedValue = 89.0413135981221
              [Phenology].PhyllochronPpSensitivity.FixedValue = 0.320389882541901
              [Phenology].CAMP.FLNparams.MinLN = 5.0
              [Phenology].CAMP.FLNparams.PpLN = 0.7789007198658495
              [Phenology].CAMP.FLNparams.VrnLN = 0.9296483932829428
              [Phenology].CAMP.FLNparams.VxPLN = -0.4548378579547272
              [Phenology].CAMP.EnvData.VrnTreatTemp = 5.8
              [Phenology].CAMP.EnvData.VrnTreatDuration = 60
              [Phenology].HeadEmergenceLongDayBase.FixedValue = 201.0
              [Phenology].HeadEmergencePpSensitivity.FixedValue = 1.988848467332372
          Cultivar CSIROW087
            Command:
              [Phenology].Phyllochron.BasePhyllochron.FixedValue = 95.8407854192227
              [Phenology].PhyllochronPpSensitivity.FixedValue = 0.379363409943707
              [Phenology].CAMP.FLNparams.MinLN = 6.088762673975456
              [Phenology].CAMP.FLNparams.PpLN = 1.3098995454756082
              [Phenology].CAMP.FLNparams.VrnLN = 1.7408533665776218
              [Phenology].CAMP.FLNparams.VxPLN = -1.377321640166457
              [Phenology].CAMP.EnvData.VrnTreatTemp = 5.8
              [Phenology].CAMP.EnvData.VrnTreatDuration = 60
              [Phenology].HeadEmergenceLongDayBase.FixedValue = 214.0
              [Phenology].HeadEmergencePpSensitivity.FixedValue = 2.2429157431718143
          Cultivar CSIROW102
            Command:
              [Phenology].Phyllochron.BasePhyllochron.FixedValue = 88.798911538629
              [Phenology].PhyllochronPpSensitivity.FixedValue = 0.366324783260731
              [Phenology].CAMP.FLNparams.MinLN = 5.431828108909145
              [Phenology].CAMP.FLNparams.PpLN = 0.9159899681289015
              [Phenology].CAMP.FLNparams.VrnLN = 3.8766835434634936
              [Phenology].CAMP.FLNparams.VxPLN = -2.3613865675565133
              [Phenology].CAMP.EnvData.VrnTreatTemp = 5.8
              [Phenology].CAMP.EnvData.VrnTreatDuration = 60
              [Phenology].HeadEmergenceLongDayBase.FixedValue = 211.0
              [Phenology].HeadEmergencePpSensitivity.FixedValue = 1.796407285473646
          Cultivar CSIROW105
            Command:
              [Phenology].Phyllochron.BasePhyllochron.FixedValue = 93.3581645003809
              [Phenology].PhyllochronPpSensitivity.FixedValue = 0.233916879031932
              [Phenology].CAMP.FLNparams.MinLN = 5.0
              [Phenology].CAMP.FLNparams.PpLN = 1.0
              [Phenology].CAMP.FLNparams.VrnLN = 1.0
              [Phenology].CAMP.FLNparams.VxPLN = 0.0
              [Phenology].CAMP.EnvData.VrnTreatTemp = 5.8
              [Phenology].CAMP.EnvData.VrnTreatDuration = 60
              [Phenology].HeadEmergenceLongDayBase.FixedValue = 200.0
              [Phenology].HeadEmergencePpSensitivity.FixedValue = 2.0
        Folder APP Generic
          Cultivar Spring Very Quick-Quick
            Command:
              [Phenology].CAMP.FLNparams.MinLN = 5
              [Phenology].CAMP.FLNparams.PpLN = 0.8
              [Phenology].CAMP.FLNparams.VrnLN = 0.9
              [Phenology].CAMP.FLNparams.VxPLN = -0.5
              [Phenology].Phyllochron.BasePhyllochron.FixedValue = 89
              [Phenology].PhyllochronPpSensitivity.FixedValue = 0.3
              [Phenology].CAMP.EnvData.VrnTreatTemp = 5.8
              [Phenology].CAMP.EnvData.VrnTreatDuration = 60
              [Phenology].HeadEmergenceLongDayBase.FixedValue = 201
              [Phenology].HeadEmergencePpSensitivity.FixedValue = 2
          Cultivar Spring Quick
            Command:
              [Phenology].CAMP.FLNparams.MinLN = 6.6
              [Phenology].CAMP.FLNparams.PpLN = 1.9
              [Phenology].CAMP.FLNparams.VrnLN = 1.1
              [Phenology].CAMP.FLNparams.VxPLN = -0.6
              [Phenology].Phyllochron.BasePhyllochron.FixedValue = 91.8
              [Phenology].PhyllochronPpSensitivity.FixedValue = 0.3
              [Phenology].CAMP.EnvData.VrnTreatTemp = 5.8
              [Phenology].CAMP.EnvData.VrnTreatDuration = 60
              [Phenology].HeadEmergenceLongDayBase.FixedValue = 175.6
              [Phenology].HeadEmergencePpSensitivity.FixedValue = 1.4
          Cultivar Spring Quick-Mid
            Command:
              [Phenology].CAMP.FLNparams.MinLN = 6.9
              [Phenology].CAMP.FLNparams.PpLN = 1.9
              [Phenology].CAMP.FLNparams.VrnLN = 2.5
              [Phenology].CAMP.FLNparams.VxPLN = -1.6
              [Phenology].Phyllochron.BasePhyllochron.FixedValue = 98.6
              [Phenology].PhyllochronPpSensitivity.FixedValue = 0.2
              [Phenology].CAMP.EnvData.VrnTreatTemp = 5.8
              [Phenology].CAMP.EnvData.VrnTreatDuration = 60
              [Phenology].HeadEmergenceLongDayBase.FixedValue = 175.8
              [Phenology].HeadEmergencePpSensitivity.FixedValue = 1.2
          Cultivar Spring Mid
            Command:
              [Phenology].CAMP.FLNparams.MinLN = 7.1
              [Phenology].CAMP.FLNparams.PpLN = 3.1
              [Phenology].CAMP.FLNparams.VrnLN = 2.4
              [Phenology].CAMP.FLNparams.VxPLN = -0.9
              [Phenology].Phyllochron.BasePhyllochron.FixedValue = 96.3
              [Phenology].PhyllochronPpSensitivity.FixedValue = 0.3
              [Phenology].CAMP.EnvData.VrnTreatTemp = 5.8
              [Phenology].CAMP.EnvData.VrnTreatDuration = 60
              [Phenology].HeadEmergenceLongDayBase.FixedValue = 154
              [Phenology].HeadEmergencePpSensitivity.FixedValue = 2
          Cultivar Spring Mid-Slow
            Command:
              [Phenology].CAMP.FLNparams.MinLN = 6.8
              [Phenology].CAMP.FLNparams.PpLN = 3.2
              [Phenology].CAMP.FLNparams.VrnLN = 2.1
              [Phenology].CAMP.FLNparams.VxPLN = 0.8
              [Phenology].Phyllochron.BasePhyllochron.FixedValue = 103.3
              [Phenology].PhyllochronPpSensitivity.FixedValue = 0.2
              [Phenology].CAMP.EnvData.VrnTreatTemp = 5.8
              [Phenology].CAMP.EnvData.VrnTreatDuration = 60
              [Phenology].HeadEmergenceLongDayBase.FixedValue = 153
              [Phenology].HeadEmergencePpSensitivity.FixedValue = 2.3
          Cultivar Spring Slow
            Command:
              [Phenology].CAMP.FLNparams.MinLN = 7.3
              [Phenology].CAMP.FLNparams.PpLN = 4
              [Phenology].CAMP.FLNparams.VrnLN = 2.3
              [Phenology].CAMP.FLNparams.VxPLN = 0.8
              [Phenology].Phyllochron.BasePhyllochron.FixedValue = 95.5
              [Phenology].PhyllochronPpSensitivity.FixedValue = 0.3
              [Phenology].CAMP.EnvData.VrnTreatTemp = 5.9
              [Phenology].CAMP.EnvData.VrnTreatDuration = 60
              [Phenology].HeadEmergenceLongDayBase.FixedValue = 230
              [Phenology].HeadEmergencePpSensitivity.FixedValue = 1.5
          Cultivar Spring Slow-Very Slow
            Command:
              [Phenology].CAMP.FLNparams.MinLN =6
              [Phenology].CAMP.FLNparams.PpLN = 3
              [Phenology].CAMP.FLNparams.VrnLN = 1
              [Phenology].CAMP.FLNparams.VxPLN = 3
              [Phenology].Phyllochron.BasePhyllochron.FixedValue = 122.8
              [Phenology].PhyllochronPpSensitivity.FixedValue = 0.1
              [Phenology].CAMP.EnvData.VrnTreatTemp = 5.8
              [Phenology].CAMP.EnvData.VrnTreatDuration = 60
              [Phenology].HeadEmergenceLongDayBase.FixedValue = 190
              [Phenology].HeadEmergencePpSensitivity.FixedValue = 4
          Cultivar Spring Very Slow
            Command:
              [Phenology].CAMP.FLNparams.MinLN = 7
              [Phenology].CAMP.FLNparams.PpLN = 5
              [Phenology].CAMP.FLNparams.VrnLN = 10
              [Phenology].CAMP.FLNparams.VxPLN = -5
              [Phenology].Phyllochron.BasePhyllochron.FixedValue = 100.4
              [Phenology].PhyllochronPpSensitivity.FixedValue = 0.2
              [Phenology].CAMP.EnvData.VrnTreatTemp = 5.8
              [Phenology].CAMP.EnvData.VrnTreatDuration = 60
              [Phenology].HeadEmergenceLongDayBase.FixedValue = 150
              [Phenology].HeadEmergencePpSensitivity.FixedValue = 4
          Cultivar Winter Very-Quick
            Command:
              [Phenology].CAMP.FLNparams.MinLN = 7.3
              [Phenology].CAMP.FLNparams.PpLN = 0
              [Phenology].CAMP.FLNparams.VrnLN = 7.6
              [Phenology].CAMP.FLNparams.VxPLN = -1.7
              [Phenology].Phyllochron.BasePhyllochron.FixedValue = 102.8
              [Phenology].PhyllochronPpSensitivity.FixedValue = 0.2
              [Phenology].CAMP.EnvData.VrnTreatTemp = 5.8
              [Phenology].CAMP.EnvData.VrnTreatDuration = 60
              [Phenology].HeadEmergenceLongDayBase.FixedValue = 193
              [Phenology].HeadEmergencePpSensitivity.FixedValue = 1.5
          Cultivar Winter Quick
            Command:
              [Phenology].CAMP.FLNparams.MinLN = 8.4
              [Phenology].CAMP.FLNparams.PpLN = 0.9
              [Phenology].CAMP.FLNparams.VrnLN = 5.7
              [Phenology].CAMP.FLNparams.VxPLN = 5.5
              [Phenology].Phyllochron.BasePhyllochron.FixedValue = 98
              [Phenology].PhyllochronPpSensitivity.FixedValue = 0.2
              [Phenology].CAMP.EnvData.VrnTreatTemp = 5.8
              [Phenology].CAMP.EnvData.VrnTreatDuration = 60
              [Phenology].HeadEmergenceLongDayBase.FixedValue = 80
              [Phenology].HeadEmergencePpSensitivity.FixedValue = 2.8
          Cultivar Winter Mid
            Command:
              [Phenology].CAMP.FLNparams.MinLN = 8
              [Phenology].CAMP.FLNparams.PpLN = 2.3
              [Phenology].CAMP.FLNparams.VrnLN = 7.8
              [Phenology].CAMP.FLNparams.VxPLN = 0
              [Phenology].Phyllochron.BasePhyllochron.FixedValue = 100.8
              [Phenology].PhyllochronPpSensitivity.FixedValue = 0.2
              [Phenology].CAMP.EnvData.VrnTreatTemp = 5.8
              [Phenology].CAMP.EnvData.VrnTreatDuration = 60
              [Phenology].HeadEmergenceLongDayBase.FixedValue = 132
              [Phenology].HeadEmergencePpSensitivity.FixedValue = 2.8
          Cultivar Winter Very Slow
            Command:
              [Phenology].CAMP.FLNparams.MinLN = 8.5
              [Phenology].CAMP.FLNparams.PpLN = 4
              [Phenology].CAMP.FLNparams.VrnLN = 7.5
              [Phenology].CAMP.FLNparams.VxPLN = 1
              [Phenology].Phyllochron.BasePhyllochron.FixedValue = 109.3
              [Phenology].PhyllochronPpSensitivity.FixedValue = 0.2
              [Phenology].CAMP.EnvData.VrnTreatTemp = 5.9
              [Phenology].CAMP.EnvData.VrnTreatDuration = 60
              [Phenology].HeadEmergenceLongDayBase.FixedValue = 190
              [Phenology].HeadEmergencePpSensitivity.FixedValue = 2
        Folder Turkey
          Cultivar Konya
            Command:
              [Phenology].Phyllochron.BasePhyllochron.FixedValue = 100
              [Grain].NumberFunction.GrainNumber.GrainsPerGramOfStem.FixedValue = 13
              [Grain].MaximumPotentialGrainSize.FixedValue = 0.05
              [Phenology].GrainFilling.Target.FixedValue = 450
              //[Stem].DMRetranslocationFactor.ReproductiveGrowth.DMRetranslocationFactor.FixedValue = 0.2
              //[Stem].DMDemands.Structural.StructuralFraction.VegetativeGrowth.Fraction.FixedValue = 0.6
              //[Leaf].ExtinctionCoeff.VegetativePhase.FixedValue = 0.8
              [Phenology].CAMP.FLNparams.MinLN = 7
              [Phenology].CAMP.FLNparams.PpLN = 2.0
              [Phenology].CAMP.FLNparams.VrnLN = 2
              [Phenology].CAMP.FLNparams.VxPLN = 0.0
        Folder China
          Cultivar Keyu13
            Command:
              [Phenology].Phyllochron.BasePhyllochron.FixedValue = 100
              [Phenology].CAMP.FLNparams.MinLN = 7
              [Phenology].CAMP.FLNparams.PpLN = 3.0
              [Phenology].CAMP.FLNparams.VrnLN = 5
              [Phenology].CAMP.FLNparams.VxPLN = 0.0
        Folder USA
          Cultivar Yecora
            Command:
              [Phenology].Phyllochron.BasePhyllochron.FixedValue = 90
              //[Leaf].CohortParameters.MaxArea.AreaLargestLeaves.FixedValue = 4000
              [Phenology].CAMP.FLNparams.MinLN = 7
              [Phenology].CAMP.FLNparams.PpLN = 2
              [Phenology].CAMP.FLNparams.VrnLN = 2
              [Phenology].CAMP.FLNparams.VxPLN = 2
              [Phenology].HeadEmergenceLongDayBase.FixedValue = 110
              [Phenology].HeadEmergencePpSensitivity.FixedValue = 0
              [Phenology].CAMP.EnvData.VrnTreatTemp = 6
              [Phenology].CAMP.EnvData.VrnTreatDuration = 60
          Cultivar Rex
            Command:
              [Grain].NumberFunction.GrainNumber.GrainsPerGramOfStem.FixedValue = 18
              [Grain].MaximumNConc.FixedValue = 0.02
              [Phenology].CAMP.FLNparams.MinLN = 7
              [Phenology].CAMP.FLNparams.PpLN = 4.0
              [Phenology].CAMP.FLNparams.VrnLN = 6
              [Phenology].CAMP.FLNparams.VxPLN = 0.0
          Cultivar Nugaines
            Command:
              [Grain].NumberFunction.GrainNumber.GrainsPerGramOfStem.FixedValue = 20
              [Grain].MaximumNConc.FixedValue = 0.02
              [Phenology].CAMP.FLNparams.MinLN = 7
              [Phenology].CAMP.FLNparams.PpLN = 4.0
              [Phenology].CAMP.FLNparams.VrnLN = 6
              [Phenology].CAMP.FLNparams.VxPLN = 0.0
          Cultivar Hyslop
            Command:
              [Grain].NumberFunction.GrainNumber.GrainsPerGramOfStem.FixedValue = 22
              [Grain].MaximumNConc.FixedValue = 0.02
              [Phenology].CAMP.FLNparams.MinLN = 7
              [Phenology].CAMP.FLNparams.PpLN = 4.0
              [Phenology].CAMP.FLNparams.VrnLN = 6
              [Phenology].CAMP.FLNparams.VxPLN = 0.0
          Cultivar Stephens
            Command:
              [Grain].NumberFunction.GrainNumber.GrainsPerGramOfStem.FixedValue = 25
              [Grain].MaximumNConc.FixedValue = 0.02
              [Phenology].CAMP.FLNparams.MinLN = 7
              [Phenology].CAMP.FLNparams.PpLN = 4.0
              [Phenology].CAMP.FLNparams.VrnLN = 6
              [Phenology].CAMP.FLNparams.VxPLN = 0.0
        Folder Europe
          Cultivar Dekan
            Command:
              [Phenology].HeadEmergencePpSensitivity.FixedValue = 3
              [Phenology].Phyllochron.BasePhyllochron.FixedValue = 100.0
              //[Leaf].ExtinctionCoeff.VegetativePhase.FixedValue = 0.8
              [Phenology].PhyllochronPpSensitivity.FixedValue = 0.6
              [Phenology].CAMP.FLNparams.MinLN = 9
              [Phenology].CAMP.FLNparams.PpLN = 3.0
              [Phenology].CAMP.FLNparams.VrnLN = 7
              [Phenology].CAMP.FLNparams.VxPLN = 0.0
          Cultivar Rosario: same as Replacements.Wheat.Cultivars.Europe.Dekan
          Cultivar Ararat: same as Replacements.Wheat.Cultivars.Europe.Dekan
          Cultivar Tybalt
            Command:
              [Phenology].Phyllochron.BasePhyllochron.FixedValue = 90.0
              [Phenology].PhyllochronPpSensitivity.FixedValue = 0.6
              [Phenology].CAMP.FLNparams.MinLN = 9.0
              [Phenology].CAMP.FLNparams.PpLN = 0.0
              [Phenology].CAMP.FLNparams.VrnLN = 0.0
              [Phenology].CAMP.FLNparams.VxPLN = 0.0
              [Phenology].HeadEmergenceLongDayBase.FixedValue = 145
              [Phenology].HeadEmergencePpSensitivity.FixedValue = 0.0
              [Phenology].CAMP.EnvData.VrnTreatTemp = 6
              [Phenology].CAMP.EnvData.VrnTreatDuration = 60
        Folder Africa
          Cultivar HAR1685
            Command:
              [Phenology].Phyllochron.BasePhyllochron.FixedValue = 100
              [Grain].NumberFunction.GrainNumber.GrainsPerGramOfStem.FixedValue = 17
              [Phenology].GrainFilling.Target.FixedValue = 350
              [Phenology].CAMP.FLNparams.MinLN = 7
              [Phenology].CAMP.FLNparams.PpLN = 3.0
              [Phenology].CAMP.FLNparams.VrnLN = 0
              [Phenology].CAMP.FLNparams.VxPLN = 0.0
        Folder Iran
          Cultivar Gorgan
            Command:
              [Phenology].Phyllochron.BasePhyllochron.FixedValue = 100
              [Phenology].CAMP.FLNparams.MinLN = 7
              [Phenology].CAMP.FLNparams.PpLN = 4.0
              [Phenology].CAMP.FLNparams.VrnLN = 0
              [Phenology].CAMP.FLNparams.VxPLN = 0.0
        Folder Preliminary
          Cultivar Accroc: same as Replacements.Wheat.Cultivars.APP Generic.Winter Very Slow
          Cultivar Cesario: same as Replacements.Wheat.Cultivars.APP Generic.Winter Very Slow
          Cultivar Anapurna: same as Replacements.Wheat.Cultivars.APP Generic.Winter Very Slow
          Cultivar RockStar: same as Replacements.Wheat.Cultivars.APP Generic.Spring Mid
          Cultivar Calibro: same as Replacements.Wheat.Cultivars.APP Generic.Winter Very Slow
          Cultivar BigRed: same as Replacements.Wheat.Cultivars.APP Generic.Winter Very Slow
          Cultivar Catapult: same as Replacements.Wheat.Cultivars.APP Generic.Spring Mid
          Cultivar Stockade: same as Replacements.Wheat.Cultivars.APP Generic.Spring Slow
          Cultivar Mowhawk
            Command:
              [Phenology].CAMP.FLNparams.MinLN = 8
              [Phenology].CAMP.FLNparams.PpLN = 2.3
              [Phenology].CAMP.FLNparams.VrnLN = 7.8
              [Phenology].CAMP.FLNparams.VxPLN = 0
              [Phenology].Phyllochron.BasePhyllochron.FixedValue = 100
              [Phenology].PhyllochronPpSensitivity.FixedValue = 0.2
              [Phenology].CAMP.EnvData.VrnTreatTemp = 5.8
              [Phenology].CAMP.EnvData.VrnTreatDuration = 60
              [Phenology].HeadEmergenceLongDayBase.FixedValue = 132
              [Phenology].HeadEmergencePpSensitivity.FixedValue = 2.8
          Cultivar Waugh: same as Replacements.Wheat.Cultivars.APP Generic.Winter Very Slow
          Cultivar Einstein: same as Replacements.Wheat.Cultivars.APP Generic.Winter Very Slow
          Cultivar Zanzibar: same as Replacements.Wheat.Cultivars.APP Generic.Spring Slow
          Cultivar Longford: same as Replacements.Wheat.Cultivars.APP Generic.Winter Very Slow
          Cultivar Conqueror: same as Replacements.Wheat.Cultivars.APP Generic.Winter Very Slow
          Cultivar Genius: same as Replacements.Wheat.Cultivars.APP Generic.Winter Very Slow
          Cultivar Vixin: same as Replacements.Wheat.Cultivars.APP Generic.Spring Quick
          Cultivar Meering
            Command:
              [Phenology].CAMP.FLNparams.MinLN = 7.1
              [Phenology].CAMP.FLNparams.PpLN = 3.1
              [Phenology].CAMP.FLNparams.VrnLN = 2.4
              [Phenology].CAMP.FLNparams.VxPLN = -0.9
              [Phenology].Phyllochron.BasePhyllochron.FixedValue = 100
              [Phenology].PhyllochronPpSensitivity.FixedValue = 0.3
              [Phenology].CAMP.EnvData.VrnTreatTemp = 5.8
              [Phenology].CAMP.EnvData.VrnTreatDuration = 60
              [Phenology].HeadEmergenceLongDayBase.FixedValue = 154
              [Phenology].HeadEmergencePpSensitivity.FixedValue = 1
          Cultivar Sunmaster
            Command:
              [Phenology].CAMP.FLNparams.MinLN = 7.1
              [Phenology].CAMP.FLNparams.PpLN = 3.1
              [Phenology].CAMP.FLNparams.VrnLN = 2.4
              [Phenology].CAMP.FLNparams.VxPLN = -0.9
              [Phenology].Phyllochron.BasePhyllochron.FixedValue = 100
              [Phenology].PhyllochronPpSensitivity.FixedValue = 0.3
              [Phenology].CAMP.EnvData.VrnTreatTemp = 5.8
              [Phenology].CAMP.EnvData.VrnTreatDuration = 60
              [Phenology].HeadEmergenceLongDayBase.FixedValue = 154
              [Phenology].HeadEmergencePpSensitivity.FixedValue = 2
          Cultivar Osprey
            Command:
              [Phenology].CAMP.FLNparams.MinLN = 8
              [Phenology].CAMP.FLNparams.PpLN = 2.3
              [Phenology].CAMP.FLNparams.VrnLN = 7.8
              [Phenology].CAMP.FLNparams.VxPLN = 0
              [Phenology].Phyllochron.BasePhyllochron.FixedValue = 95
              [Phenology].PhyllochronPpSensitivity.FixedValue = 0.2
              [Phenology].CAMP.EnvData.VrnTreatTemp = 5.8
              [Phenology].CAMP.EnvData.VrnTreatDuration = 60
              [Phenology].HeadEmergenceLongDayBase.FixedValue = 132
              [Phenology].HeadEmergencePpSensitivity.FixedValue = 2.8
          Cultivar Whistler
            Command:
              [Phenology].CAMP.FLNparams.MinLN = 8
              [Phenology].CAMP.FLNparams.PpLN = 2.3
              [Phenology].CAMP.FLNparams.VrnLN = 7.8
              [Phenology].CAMP.FLNparams.VxPLN = 0
              [Phenology].Phyllochron.BasePhyllochron.FixedValue = 100
              [Phenology].PhyllochronPpSensitivity.FixedValue = 0.0
              [Phenology].CAMP.EnvData.VrnTreatTemp = 5.8
              [Phenology].CAMP.EnvData.VrnTreatDuration = 60
              [Phenology].HeadEmergenceLongDayBase.FixedValue = 132
              [Phenology].HeadEmergencePpSensitivity.FixedValue = 2.8
          Cultivar Wylah: same as Replacements.Wheat.Cultivars.Preliminary.Mowhawk
          Cultivar UOM001_3_47: same as Replacements.Wheat.Cultivars.APP Generic.Spring Mid
          Cultivar UOM001_9_1: same as Replacements.Wheat.Cultivars.APP Generic.Spring Mid
  Folder GXEXM
    Experiment Gatton2014Irrigated
      Factors
        Factor Cv
          CompositeFactor Hartog
            Specifications:
              [Sowing].Script.CultivarName = Hartog
              [SetPhenology].Script.EmergDate = 2-jun-2014
              [SetPhenology].Script.FlagDate = 7-aug-2014
              [SetPhenology].Script.HeadingDate = 4-sep-2014
              [SetPhenology].Script.AnthDate = 9-sep-2014
              [SetPhenology].Script.Phyllochron = 100
              [SetPhenology].Script.PhyllochronMultiplier = 1.3
          CompositeFactor Corack
            Specifications:
              [Sowing].Script.CultivarName = Hartog
              [SetPhenology].Script.EmergDate = 2-jun-2014
              [SetPhenology].Script.FlagDate = 9-aug-2014
              [SetPhenology].Script.HeadingDate = 4-sep-2014
              [SetPhenology].Script.AnthDate = 9-sep-2014
              [SetPhenology].Script.Phyllochron = 100
              [SetPhenology].Script.PhyllochronMultiplier = 1.1
          CompositeFactor Mace: same as GXEXM.Gatton2014Irrigated.Factors.Cv.Corack
      Simulation Gatton2014IrrigatedBase
        Clock: Start=2014-05-05; End=2014-12-31
        Summary SummaryFile
        Weather: FileName=Gatton2014-2015.met
        SoilArbitrator
        MicroClimate: a_interception=0; b_interception=1; c_interception=0; d_interception=0; SoilHeatFluxFraction=0.4; MinimumHeightDiffForNewLayer=0; NightInterceptionFraction=0.5; ReferenceHeight=2
        Zone Field: Area=1; Slope=0; AspectAngle=0; Altitude=50
          Report DailyReport: EventNames=[Wheat].Harvesting
            VariableNames:
              [Clock].Today
              [Wheat].Phenology.FloweringDAS
              [Wheat].Phenology.FlagLeafDAS
              [Wheat].Phenology.TerminalSpikeletDAS
          Report HarvestReport: EventNames=[Clock].DoReport
            VariableNames:
              [Clock].Today
              [Wheat].Phenology.Stage
              [Wheat].Phenology.Zadok.Stage
              [Wheat].Phenology.FloweringDAS
              [Wheat].Phenology.FlagLeafDAS
              [Wheat].Phenology.TerminalSpikeletDAS
          Fertiliser
          Soil: ASCOrder=Vertosol; ASCSubOrder=Black; SoilType=Clay; Site=Norwin; NearestTown=Norwin; Region=Darling Downs and Granite Belt; State=Queensland; Country=Australia; NaturalVegetation=Qld. Bluegrass, possible Qld. Blue gum; ApsoilNumber=900; Latitude=-27.5818; Longitude=151.3202; LocationAccuracy=+/- 20m
            DataSource=CSIRO Sustainable Ecosystems, Toowoomba; Characteriesd as part of the GRDC funded project"Doing it better, doing it smarter, managing soil water in Australian agriculture' 2011
            Comments=OC, CLL for all crops estimated-based on Bongeen Mywybilla Soil No1
            Physical
              Thickness  ParticleSizeSand  ParticleSizeSilt  ParticleSizeClay  Rocks  BD    AirDry  LL15  DUL    SAT    KS
              150        5                 65                30                0      1.23  0.18    0.18  0.504  0.53   20
              150        5                 65                30                0      1.21  0.22    0.22  0.51   0.54   20
              300        5                 65                30                0      1.21  0.23    0.23  0.51   0.54   20
              300        5                 65                30                0      1.25  0.26    0.26  0.5    0.525  20
              300        5                 65                30                0      1.29  0.25    0.25  0.48   0.51   20
              300        5                 65                30                0      1.35  0.26    0.26  0.46   0.49   20
              300        5                 65                30                0      1.33  0.24    0.24  0.47   0.497  20
              Rocks, ParticleSizeSand, ParticleSizeSilt, ParticleSizeClay source: Calculated
              SoilCrop WheatSoil: LL=[0.18, 0.22, 0.23, 0.26, 0.25, 0.26, 0.24]; KL=[0.06, 0.06, 0.06, 0.04, 0.04, 0.02, 0.01]; XF=[1, 1, 1, 1, 1, 1, 1]
            WaterBalance SoilWater: SummerDate=1-Nov; SummerU=6; SummerCona=3.5; WinterDate=1-Apr; WinterU=6; WinterCona=3.5; DiffusConst=40; DiffusSlope=16; Salb=0.12; CN2Bare=73; CNRed=20; CNCov=0.8; PSIDul=-100; Thickness=[150, 150, 300, 300, 300, 300, 300]; SWCON=[0.1, 0.1, 0.1, 0.1, 0.1, 0.1, 0.1]
            Organic: FOMCNRatio=40; CarbonUnits=Total
              Thickness  Carbon  SoilCNRatio  FBiom  FInert  FOM
              150        1.2     12           0.04   0.4     347.129
              150        0.96    12           0.02   0.6     270.3444
              300        0.6     12           0.02   0.8     163.9721
              300        0.3     12           0.02   1       99.4541
              300        0.18    12           0.01   1       60.322
              300        0.12    12           0.01   1       36.5871
              300        0.12    12           0.01   1       22.1912
            Chemical: Thickness=[150, 150, 300, 300, 300, 300, 300]; PH=[8, 8, 8, 8, 8, 8, 8]; PHUnits=Water
            Water: Thickness=[150, 150, 300, 300, 300, 300, 300]; InitialValues=[0.42, 0.47, 0.44, 0.49, 0.47, 0.46, 0.45]; FilledFromTop=false
            Nutrient
            Solute NO3: Thickness=[150, 150, 300, 300, 300, 300, 300]; InitialValues=[21, 25, 25, 20, 16, 15.5, 13.5]; InitialValuesUnits=ppm; WaterTableConcentration=0; D0=0; DepthConstant=0; MaxDepthSoluteAccessible=0; RunoffEffectivenessAtMovingSolute=0; MaxEffectiveRunoff=0
            Solute NH4: Thickness=[150, 150, 300, 300, 300, 300, 300]; InitialValues=[0.1, 0.1, 0.1, 0.1, 0.1, 0.1, 0.1]; InitialValuesUnits=ppm; WaterTableConcentration=0; D0=0; DepthConstant=0; MaxDepthSoluteAccessible=0; RunoffEffectivenessAtMovingSolute=0; MaxEffectiveRunoff=0
            Solute Urea: Thickness=[150, 150, 300, 300, 300, 300, 300]; InitialValues=[0, 0, 0, 0, 0, 0, 0]; InitialValuesUnits=kg/ha; WaterTableConcentration=0; D0=0; DepthConstant=0; MaxDepthSoluteAccessible=0; RunoffEffectivenessAtMovingSolute=0; MaxEffectiveRunoff=0
            SoilTemperature Temperature: InteractionsPerDay=8
          SurfaceOrganicMatter: InitialResidueName=wheat_stubble; InitialResidueType=wheat; InitialResidueMass=500; InitialStandingFraction=0; InitialCPR=0; InitialCNR=100
          Plant Wheat
          Manager SowingFertiliser
            Amount = 0
            CropName = wheat
```csharp
using Models.Soils;
using System;
using Models.Core;
using Models.PMF;
namespace Models
{
    [Serializable]
    public class Script : Model
    {
        [Link] Clock Clock;
        [Link] Fertiliser Fertiliser;
        [Link] Summary Summary;
        
        
        [Description("Amount of fertiliser to be applied (kg/ha)")]
        public double Amount { get; set;}
        
        [Description("Crop to be fertilised")]
        public string CropName { get; set;}
        
        
        

        [EventSubscribe("Sowing")]
        private void OnSowing(object sender, EventArgs e)
        {
            Model crop = sender as Model;
            if (crop.Name.ToLower()==CropName.ToLower())
                Fertiliser.Apply(amount: Amount, type: "NO3N");
        }
        
    }
}
```
          Manager Sowing
            SowDate = 29-May
            CultivarName = Hartog
            SowingDepth = 50
            RowSpacing = 250
            Population = 120
```csharp
using Models.Soils.Nutrients;
using System;
using Models.Core;
using Models.PMF;
using Models.Soils;
using Models.Soils.Nutrients;
using Models.Utilities;
using APSIM.Shared.Utilities;

namespace Models
{
    [Serializable]
    public class Script : Model
    {
        [Link] Clock Clock;
        [Link] Fertiliser Fertiliser;
        [Link] Summary Summary;
        [Link] Plant Wheat;
        [Link] Soil Soil;
        Accumulator accumulatedRain;
        
        [Description("Sowing date (d-mmm)")]
        public string SowDate { get; set; }
        [Description("Cultivar to be sown")]
        public string CultivarName { get; set; }
        [Description("Sowing depth (mm)")]
        public double SowingDepth { get; set; }
        [Description("Row spacing (mm)")]
        public double RowSpacing { get; set; }
        [Description("Plant population (/m2)")]
        public double Population { get; set; }
        
        


        [EventSubscribe("DoManagement")]
        private void OnDoManagement(object sender, EventArgs e)
        {
        
            
            if (DateUtilities.WithinDates(SowDate, Clock.Today, SowDate))
            {
                Wheat.Sow(population: Population, cultivar: CultivarName, depth: SowingDepth, rowSpacing: RowSpacing);

            }
        
        }
        
    }
}
```
          Report SowingReport
          Irrigation
          Operations
            2014-07-14  [Irrigation].Apply(40);
            2014-08-11  [Irrigation].Apply(102);
            2014-08-20  [Irrigation].Apply(75);
            2014-10-07  [Irrigation].Apply(71);
          Manager Harvesting
            NoHarvestBefore = 5-November
```csharp
using APSIM.Core;
using Models.Soils.Nutrients;
using System;
using Models.Core;
using System.Collections.Generic;
using System.Text;
using Models.Soils;
using Models.PMF;
using Models;
using System.Xml.Serialization;
using APSIM.Shared.Utilities;
using Models.PMF.Phen;

namespace Models
{
    [Serializable]
    public class Script : Model, IStructureDependency
    {
        [Link(ByName = true)] private Plant Wheat;
        [Link] private Simulation sim;
        [Link] private Clock clock;
        [Link] private Summary summary;
        public IStructure Structure { private get; set; }
        
        [Description("Prevent harvesting before: ")]
        public string NoHarvestBefore {get; set;}
        

        

        [EventSubscribe("DoManagement")]
        private void OnDoManagement(object sender, EventArgs e)
        {
            if (Wheat.IsReadyForHarvesting && DateUtilities.CompareDates(NoHarvestBefore, clock.Today) >= 0)
            {
                Wheat.Harvest();
                Wheat.EndCrop();
            }
        }
        
        [EventSubscribe("EndOfDay")]
        private void OnEndOfDay(object sender, EventArgs e)
        {
            if ((clock.Today.Equals(clock.EndDate))&&(Wheat.IsAlive))
            {
                Wheat.Harvest();
                Wheat.EndCrop();
                Structure.Set("Clock.EndDate", clock.Today, relativeTo: sim);
            }
        }
    }
}
```
          Manager SoilWaterCalculation
            Layer90cm = 4
            TotalSW90cm = 0
```csharp
using System;
using Models.Core;
using Models.Interfaces;
using Models.PMF;
using APSIM.Shared.Utilities;
using Models.WaterModel;
using Models.Soils;

namespace Models
{
    [Serializable]
    public class Script : Model
    {
        [Link] IClock Clock;
        [Link] ISummary Summary;
        [Link] Water Water;
        
              
        [Description("90cm Layer Number")]
        public int Layer90cm { get; set; }


        [Description("Total SW to 90cm")]
        public double TotalSW90cm { get; set; }


        [EventSubscribe("EndOfDay")]
        private void DoEndOfDay(object sender, EventArgs e)
        {

         TotalSW90cm = 0.0;
         for(int i=0; i<Layer90cm; i++)
            TotalSW90cm += Water.MM[i];
            
        }
    }
}
```
          Manager SetPhenology
            GermDate =
            EmergDate =
            VernDate =
            TSDate =
            FlagDate =
            AnthDate =
            RipeDate =
```csharp
using Models.Soils.Nutrients;
using System;
using Models.Core;
using Models.PMF;
using Models.Soils;
using Models.Soils.Nutrients;
using Models.Utilities;
using APSIM.Shared.Utilities;

namespace Models
{
    [Serializable]
    public class Script : Model
    {
        [Link] Plant Wheat;
        
        [Description("Germination Date (d-mmm)")]
        public string GermDate { get; set;} 
        [Description("Emergence Date (d-mmm)")]
        public string EmergDate { get; set;}
        [Description("Vernalisation Date (d-mmm)")]
        public string VernDate { get; set;}
        [Description("Terminal Spikelet Date (d-mmm)")]
        public string TSDate { get; set;}
        [Description("FlagLeaf Date (d-mmm)")]
        public string FlagDate { get; set;}
        [Description("Anthesis Date (d-mmm)")]
        public string AnthDate { get; set;}
        [Description("Ripe Date (d-mmm)")]
        public string RipeDate { get; set;}
        
        [EventSubscribe("PlantSowing")]
        private void OnPlantSowing(object sender, SowingParameters data)
        {
            if (!String.IsNullOrEmpty(GermDate))
            {
               Wheat.Phenology.SetPhaseCompletionDate(GermDate,"Germinating");
            }
            if (!String.IsNullOrEmpty(EmergDate))
            {
               Wheat.Phenology.SetPhaseCompletionDate(EmergDate,"Emerging");
            }
            if (!String.IsNullOrEmpty(VernDate))
            {
               Wheat.Phenology.SetPhaseCompletionDate(VernDate,"LeavesInitiating");
            }
            if (!String.IsNullOrEmpty(TSDate))
            {
               Wheat.Phenology.SetPhaseCompletionDate(TSDate,"SpikeletsDifferentiating");
            }
            if (!String.IsNullOrEmpty(FlagDate))
            {
               Wheat.Phenology.SetPhaseCompletionDate(FlagDate,"StemElongating");
            }
            if (!String.IsNullOrEmpty(AnthDate))
            {
               Wheat.Phenology.SetPhaseCompletionDate(AnthDate,"Flowering");
            }
            if (!String.IsNullOrEmpty(RipeDate))
            {
               Wheat.Phenology.SetPhaseCompletionDate(RipeDate,"GrainRipening");
            }
        }
    }
}
```
          Spectral: DrySoilNDVI=0.16; WetSoilNDVI=0.2; GreenCropNDVI=0.9; DeadCropNDVI=0.1
        Manager LocationInfo
          Country = Australia
          State = Queensland
          Region =
```csharp
using Models.Soils;
using System;
using Models.Core;
using Models.PMF;
using APSIM.Shared.Utilities;

namespace Models
{
    [Serializable]
    public class Script : Model
    {
        [Link] Clock Clock;
        [Link] Fertiliser Fertiliser;
        [Link] Summary Summary;
        
        [Description("Country")]
        public string Country { get; set; }

        [Description("State")]
        public string State { get; set; }

        [Description("Region")]
        public string Region { get; set; }

    }
}
```
    Experiment Gatton2014
      Factors
        Factor Cv
          CompositeFactor Hartog
            Specifications:
              [Sowing].Script.CultivarName = Hartog
              [SetPhenology].Script.EmergDate = 2-jun-2014
              [SetPhenology].Script.FlagDate = 4-aug-2014
              [SetPhenology].Script.HeadingDate = 27-aug-2014
              [SetPhenology].Script.AnthDate = 1-sep-2014
              [SetPhenology].Script.Phyllochron = 95
          CompositeFactor Corack
            Specifications:
              [Sowing].Script.CultivarName = Hartog
              [SetPhenology].Script.EmergDate = 2-jun-2014
              [SetPhenology].Script.FlagDate = 7-aug-2014
              [SetPhenology].Script.HeadingDate = 27-aug-2014
              [SetPhenology].Script.AnthDate = 1-sep-2014
              [SetPhenology].Script.Phyllochron = 95
          CompositeFactor Mace
            Specifications:
              [Sowing].Script.CultivarName = Hartog
              [SetPhenology].Script.EmergDate = 2-jun-2014
              [SetPhenology].Script.FlagDate = 29-jul-2014
              [SetPhenology].Script.HeadingDate = 4-sep-2014
              [SetPhenology].Script.AnthDate = 9-sep-2014
              [SetPhenology].Script.Phyllochron = 97
      Simulation Gatton2014Base
        Clock: Start=2014-05-05; End=2014-12-31
        Summary SummaryFile
        Weather: FileName=Gatton2014-2015.met
        SoilArbitrator
        MicroClimate: a_interception=0; b_interception=1; c_interception=0; d_interception=0; SoilHeatFluxFraction=0.4; MinimumHeightDiffForNewLayer=0; NightInterceptionFraction=0.5; ReferenceHeight=2
        Zone Field: Area=1; Slope=0; AspectAngle=0; Altitude=50
          Report DailyReport: EventNames=[Wheat].Harvesting
            VariableNames:
              [Clock].Today
              [Wheat].Phenology.FloweringDAS
              [Wheat].Phenology.FlagLeafDAS
              [Wheat].Phenology.TerminalSpikeletDAS
          Report HarvestReport: EventNames=[Clock].DoReport
            VariableNames:
              [Clock].Today
              [Wheat].Phenology.Stage
              [Wheat].Phenology.Zadok.Stage
              [Wheat].Phenology.FloweringDAS
              [Wheat].Phenology.FlagLeafDAS
              [Wheat].Phenology.TerminalSpikeletDAS
          Fertiliser
          SurfaceOrganicMatter: InitialResidueName=wheat_stubble; InitialResidueType=wheat; InitialResidueMass=500; InitialStandingFraction=0; InitialCPR=0; InitialCNR=100
          Soil: ASCOrder=Vertosol; ASCSubOrder=Black; SoilType=Clay; Site=Norwin; NearestTown=Norwin; Region=Darling Downs and Granite Belt; State=Queensland; Country=Australia; NaturalVegetation=Qld. Bluegrass, possible Qld. Blue gum; ApsoilNumber=900; Latitude=-27.5818; Longitude=151.3202; LocationAccuracy=+/- 20m
            DataSource=CSIRO Sustainable Ecosystems, Toowoomba; Characteriesd as part of the GRDC funded project"Doing it better, doing it smarter, managing soil water in Australian agriculture' 2011
            Comments=OC, CLL for all crops estimated-based on Bongeen Mywybilla Soil No1
            Physical: same as GXEXM.Gatton2014Irrigated.Gatton2014IrrigatedBase.Field.Soil.Physical
            WaterBalance SoilWater: same as GXEXM.Gatton2014Irrigated.Gatton2014IrrigatedBase.Field.Soil.SoilWater
            Organic: same as GXEXM.Gatton2014Irrigated.Gatton2014IrrigatedBase.Field.Soil.Organic
            Chemical: Thickness=[150, 150, 300, 300, 300, 300, 300]; PH=[8, 8, 8, 8, 8, 8, 8]; PHUnits=Water
            Water: Thickness=[150, 150, 300, 300, 300, 300, 300]; InitialValues=[0.42, 0.47, 0.44, 0.49, 0.47, 0.46, 0.45]; FilledFromTop=false
            Nutrient
            Solute NO3: Thickness=[150, 150, 300, 300, 300, 300, 300]; InitialValues=[1, 1, 1, 1, 1, 1, 1]; InitialValuesUnits=ppm; WaterTableConcentration=0; D0=0; DepthConstant=0; MaxDepthSoluteAccessible=0; RunoffEffectivenessAtMovingSolute=0; MaxEffectiveRunoff=0
            Solute NH4: same as GXEXM.Gatton2014Irrigated.Gatton2014IrrigatedBase.Field.Soil.NH4
            Solute Urea: same as GXEXM.Gatton2014Irrigated.Gatton2014IrrigatedBase.Field.Soil.Urea
            SoilTemperature Temperature: InteractionsPerDay=8
          Plant Wheat
          Manager SowingFertiliser
            Amount = 300
            CropName = wheat
            script: same as in GXEXM.Gatton2014Irrigated.Gatton2014IrrigatedBase.Field.SowingFertiliser
          Manager Sowing
            SowDate = 29-May
            CultivarName = Hartog
            SowingDepth = 50
            RowSpacing = 250
            Population = 120
```csharp
using Models.Soils.Nutrients;
using System;
using Models.Core;
using Models.PMF;
using Models.Soils;
using Models.Soils.Nutrients;
using Models.Utilities;
using APSIM.Shared.Utilities;

namespace Models
{
    [Serializable]
    public class Script : Model
    {
        [Link] Clock Clock;
        [Link] Fertiliser Fertiliser;
        [Link] Summary Summary;
        [Link] Plant Wheat;
        [Link] Soil Soil;
        Accumulator accumulatedRain;
        
        [Description("Sowing date (d-mmm)")]
        public string SowDate { get; set; }
        [Description("Cultivar to be sown")]
        public string CultivarName { get; set; }
        [Description("Sowing depth (mm)")]
        public double SowingDepth { get; set; }
        [Description("Row spacing (mm)")]
        public double RowSpacing { get; set; }
        [Description("Plant population (/m2)")]
        public double Population { get; set; }
        
        


        [EventSubscribe("DoManagement")]
        private void OnDoManagement(object sender, EventArgs e)
        {
        
            
            if (DateUtilities.WithinDates(SowDate, Clock.Today, SowDate))
            {
                Wheat.Sow(population: Population, cultivar: CultivarName, depth: SowingDepth, rowSpacing: RowSpacing);

                if(SowDate == "11-Apr")
                {
                    Wheat.Phenology.SetPhaseCompletionDate("16-Apr","Emerging");
                }
                if(SowDate == "13-May")
                {
                    Wheat.Phenology.SetPhaseCompletionDate("20-May","Emerging");
                }
                if(SowDate == "16-Jul")
                {
                    Wheat.Phenology.SetPhaseCompletionDate("23-Jul","Emerging");
                }
                if(SowDate == "12-Aug")
                {
                    Wheat.Phenology.SetPhaseCompletionDate("19-Aug","Emerging");
                }
            }
        
        }
        
    }
}
```
          Report SowingReport
          Manager Harvesting
            NoHarvestBefore = 29-October
            script: same as in GXEXM.Gatton2014Irrigated.Gatton2014IrrigatedBase.Field.Harvesting
          Manager SoilWaterCalculation: same as GXEXM.Gatton2014Irrigated.Gatton2014IrrigatedBase.Field.SoilWaterCalculation
          Manager SetPhenology: same as GXEXM.Gatton2014Irrigated.Gatton2014IrrigatedBase.Field.SetPhenology
          Spectral: DrySoilNDVI=0.17; WetSoilNDVI=0.17; GreenCropNDVI=0.9; DeadCropNDVI=0.1
        Manager LocationInfo: same as GXEXM.Gatton2014Irrigated.Gatton2014IrrigatedBase.LocationInfo
    Experiment Gatton2015
      Factors
        Factor Cv
          CompositeFactor Hartog
            Specifications:
              [Sowing].Script.CultivarName = Hartog
              [SetPhenology].Script.EmergDate = 25-may-2015
              [SetPhenology].Script.FlagDate = 24-jul-2015
              [SetPhenology].Script.HeadingDate = 13-aug-2015
              [SetPhenology].Script.AnthDate = 18-aug-2015
              [SetPhenology].Script.Phyllochron = 100
              [SetPhenology].Script.PhyllochronMultiplier = 1.1
          CompositeFactor Corack
            Specifications:
              [Sowing].Script.CultivarName = Hartog
              [Sowing].Script.Population = 60
              [SetPhenology].Script.EmergDate = 25-may-2015
              [SetPhenology].Script.FlagDate = 25-jul-2015
              [SetPhenology].Script.HeadingDate = 13-aug-2015
              [SetPhenology].Script.AnthDate = 18-aug-2015
              [SetPhenology].Script.Phyllochron = 100
              [SetPhenology].Script.PhyllochronMultiplier = 1.1
          CompositeFactor Mace
            Specifications:
              [Sowing].Script.CultivarName = Hartog
              [Sowing].Script.Population = 90
              [SetPhenology].Script.EmergDate = 25-may-2015
              [SetPhenology].Script.FlagDate = 31-jul-2015
              [SetPhenology].Script.HeadingDate = 13-aug-2015
              [SetPhenology].Script.AnthDate = 20-aug-2015
              [SetPhenology].Script.Phyllochron = 100
              [SetPhenology].Script.PhyllochronMultiplier = 1.1
      Simulation Gatton2015Base
        Clock: Start=2015-05-18; End=2015-10-31
        Summary SummaryFile
        Weather: FileName=Gatton2014-2015.met
        SoilArbitrator
        MicroClimate: a_interception=0; b_interception=1; c_interception=0; d_interception=0; SoilHeatFluxFraction=0.4; MinimumHeightDiffForNewLayer=0; NightInterceptionFraction=0.5; ReferenceHeight=2
        Zone Field: Area=1; Slope=0; AspectAngle=0; Altitude=50
          Report DailyReport: EventNames=[Wheat].Harvesting
            VariableNames:
              [Clock].Today
              [Wheat].Phenology.FloweringDAS
              [Wheat].Phenology.FlagLeafDAS
              [Wheat].Phenology.TerminalSpikeletDAS
          Report HarvestReport: EventNames=[Clock].DoReport
            VariableNames:
              [Clock].Today
              [Wheat].Phenology.Stage
              [Wheat].Phenology.Zadok.Stage
              [Wheat].Phenology.FloweringDAS
              [Wheat].Phenology.FlagLeafDAS
              [Wheat].Phenology.TerminalSpikeletDAS
          Fertiliser
          Soil: ASCOrder=Vertosol; ASCSubOrder=Black; SoilType=Clay; Site=Norwin; NearestTown=Norwin; Region=Darling Downs and Granite Belt; State=Queensland; Country=Australia; NaturalVegetation=Qld. Bluegrass, possible Qld. Blue gum; ApsoilNumber=900; Latitude=-27.5818; Longitude=151.3202; LocationAccuracy=+/- 20m
            DataSource=CSIRO Sustainable Ecosystems, Toowoomba; Characteriesd as part of the GRDC funded project"Doing it better, doing it smarter, managing soil water in Australian agriculture' 2011
            Comments=OC, CLL for all crops estimated-based on Bongeen Mywybilla Soil No1
            Physical
              Thickness  BD      AirDry  LL15    DUL     SAT     KS
              150        1.0106  0.1303  0.2605  0.521   0.5887  20
              150        1.0715  0.1987  0.2484  0.4967  0.5657  20
              300        1.0939  0.28    0.28    0.4884  0.5572  20
              300        1.1586  0.28    0.28    0.4803  0.5328  20
              300        1.173   0.28    0.28    0.4716  0.5274  20
              300        1.1629  0.28    0.28    0.4571  0.5312  20
              300        1.1875  0.28    0.28    0.4523  0.5219  20
              SoilCrop WheatSoil: LL=[0.261, 0.248, 0.28, 0.306, 0.36, 0.392, 0.446]; KL=[0.06, 0.06, 0.06, 0.04, 0.04, 0.02, 0.01]; XF=[1, 1, 1, 1, 1, 1, 1]
            WaterBalance SoilWater: SummerDate=1-Nov; SummerU=5; SummerCona=5; WinterDate=1-Apr; WinterU=5; WinterCona=5; DiffusConst=40; DiffusSlope=16; Salb=0.12; CN2Bare=73; CNRed=20; CNCov=0.8; PSIDul=-100; Thickness=[150, 150, 300, 300, 300, 300, 300]; SWCON=[0.3, 0.3, 0.3, 0.3, 0.3, 0.3, 0.3]
            Organic: same as GXEXM.Gatton2014Irrigated.Gatton2014IrrigatedBase.Field.Soil.Organic
            Chemical: Thickness=[150, 150, 300, 300, 300, 300, 300]; PH=[8, 8, 8, 8, 8, 8, 8]; PHUnits=Water
            Water: Thickness=[150, 150, 300, 300, 300, 300, 300]; InitialValues=[0.521, 0.4967, 0.4884, 0.4803, 0.4716, 0.4571, 0.4523]; FilledFromTop=false
            Nutrient
            Solute NO3: same as GXEXM.Gatton2014.Gatton2014Base.Field.Soil.NO3
            Solute NH4: same as GXEXM.Gatton2014Irrigated.Gatton2014IrrigatedBase.Field.Soil.NH4
            Solute Urea: same as GXEXM.Gatton2014Irrigated.Gatton2014IrrigatedBase.Field.Soil.Urea
            SoilTemperature Temperature: InteractionsPerDay=8
          SurfaceOrganicMatter: InitialResidueName=wheat_stubble; InitialResidueType=wheat; InitialResidueMass=500; InitialStandingFraction=0; InitialCPR=0; InitialCNR=100
          Plant Wheat
          Manager SowingFertiliser: same as GXEXM.Gatton2014.Gatton2014Base.Field.SowingFertiliser
          Manager Sowing
            SowDate = 19-May
            CultivarName = Hartog
            SowingDepth = 50
            RowSpacing = 310
            Population = 120
            script: same as in GXEXM.Gatton2014.Gatton2014Base.Field.Sowing
          Report SowingReport
          Manager Harvesting
            NoHarvestBefore = 8-October
            script: same as in GXEXM.Gatton2014Irrigated.Gatton2014IrrigatedBase.Field.Harvesting
          Manager SoilWaterCalculation: same as GXEXM.Gatton2014Irrigated.Gatton2014IrrigatedBase.Field.SoilWaterCalculation
          Manager SetPhenology: same as GXEXM.Gatton2014Irrigated.Gatton2014IrrigatedBase.Field.SetPhenology
          Spectral: DrySoilNDVI=0.17; WetSoilNDVI=0.17; GreenCropNDVI=0.9; DeadCropNDVI=0.1
        Manager LocationInfo: same as GXEXM.Gatton2014Irrigated.Gatton2014IrrigatedBase.LocationInfo
    Experiment Junee2014
      Factors
        Factor Cv
          CompositeFactor Hartog
            Specifications:
              [Sowing].Script.CultivarName = Hartog
              [SetPhenology].Script.EmergDate = 28-may-2014
              [SetPhenology].Script.FlagDate = 15-sep-2014
              [SetPhenology].Script.HeadingDate = 6-oct-2014
              [SetPhenology].Script.AnthDate = 11-oct-2014
              [SetPhenology].Script.Phyllochron = 97
          CompositeFactor Corack
            Specifications:
              [Sowing].Script.CultivarName = Hartog
              [SetPhenology].Script.EmergDate = 28-may-2014
              [SetPhenology].Script.FlagDate = 12-sep-2014
              [SetPhenology].Script.HeadingDate = 1-oct-2014
              [SetPhenology].Script.AnthDate = 6-oct-2014
              [SetPhenology].Script.Phyllochron = 97
          CompositeFactor Mace
            Specifications:
              [Sowing].Script.CultivarName = Hartog
              [SetPhenology].Script.EmergDate = 28-may-2014
              [SetPhenology].Script.FlagDate = 12-sep-2014
              [SetPhenology].Script.HeadingDate = 1-oct-2014
              [SetPhenology].Script.AnthDate = 6-oct-2014
              [SetPhenology].Script.Phyllochron = 93
      Simulation Junee2014Base
        Clock: Start=2014-05-21; End=2014-12-31
        Summary SummaryFile
        Weather: FileName=Junee2014.met
        SoilArbitrator
        MicroClimate: a_interception=0; b_interception=1; c_interception=0; d_interception=0; SoilHeatFluxFraction=0.4; MinimumHeightDiffForNewLayer=0; NightInterceptionFraction=0.5; ReferenceHeight=2
        Zone Field: Area=1; Slope=0; AspectAngle=0; Altitude=50
          Report DailyReport: EventNames=[Wheat].Harvesting
            VariableNames:
              [Clock].Today
              [Wheat].Phenology.FloweringDAS
              [Wheat].Phenology.FlagLeafDAS
              [Wheat].Phenology.TerminalSpikeletDAS
          Report HarvestReport: EventNames=[Clock].DoReport
            VariableNames:
              [Clock].Today
              [Wheat].Phenology.Stage
              [Wheat].Phenology.Zadok.Stage
              [Wheat].Phenology.FloweringDAS
              [Wheat].Phenology.FlagLeafDAS
              [Wheat].Phenology.TerminalSpikeletDAS
          Fertiliser
          SurfaceOrganicMatter: InitialResidueName=wheat_stubble; InitialResidueType=wheat; InitialResidueMass=500; InitialStandingFraction=0; InitialCPR=0; InitialCNR=100
          Plant Wheat
          Manager SowingFertiliser: same as GXEXM.Gatton2014.Gatton2014Base.Field.SowingFertiliser
          Manager Sowing
            SowDate = 21-May
            CultivarName = Hartog
            SowingDepth = 50
            RowSpacing = 250
            Population = 122
            script: same as in GXEXM.Gatton2014.Gatton2014Base.Field.Sowing
          Report SowingReport
          Soil: ASCOrder=Chromosol; ASCSubOrder=Red; SoilType=Other; Site=Junee Reefs; NearestTown=Junee Reefs; Region=Riverina; State=New South Wales; Country=Australia; ApsoilNumber=564-YP; Latitude=-34.718; Longitude=147.544; YearOfSampling=0
            DataSource=YP. Data provided by James Hunt, based on measurements by John Kirkegaard.
            Physical
              Thickness  ParticleSizeSand  ParticleSizeSilt  ParticleSizeClay  Rocks  BD   AirDry  LL15  DUL    SAT   KS
              100        5                 65                30                0.202  1.4  0.08    0.09  0.25   0.3   100
              100        5                 65                30                0.126  1.5  0.15    0.15  0.25   0.35  100
              100        5                 65                30                0.153  1.5  0.14    0.14  0.25   0.35  100
              100        5                 65                30                0.118  1.5  0.16    0.16  0.27   0.36  100
              100        5                 65                30                0      1.5  0.19    0.19  0.28   0.38  100
              100        5                 65                30                0      1.5  0.2     0.2   0.3    0.4   100
              100        5                 65                30                0.148  1.5  0.23    0.23  0.31   0.41  100
              100        5                 65                30                0.126  1.5  0.24    0.24  0.31   0.42  100
              100        5                 65                30                0.178  1.5  0.24    0.24  0.3    0.41  100
              100        5                 65                30                0.213  1.5  0.24    0.24  0.29   0.4   100
              100        5                 65                30                0.17   1.5  0.26    0.26  0.3    0.41  100
              100        5                 65                30                0      1.5  0.29    0.29  0.315  0.41  100
              100        5                 65                30                0      1.5  0.3     0.3   0.32   0.42  100
              100        5                 65                30                0      1.5  0.31    0.31  0.34   0.43  24
              Rocks, ParticleSizeSand, ParticleSizeSilt, ParticleSizeClay source: Calculated
              SoilCrop wheatSoil
                LL=[0.09, 0.15, 0.14, 0.16, 0.19, 0.2, 0.23, 0.24, 0.24, 0.24, 0.26, 0.29, 0.3, 0.31]
                KL=[0.06, 0.06, 0.06, 0.06, 0.06, 0.06, 0.06, 0.06, 0.06, 0.06, 0.06, 0.06, 0.06, 0.06]
                XF=[0.3, 0.3, 1, 1, 1, 1, 1, 1, 1, 1, 1, 1, 1, 1]
            WaterBalance SoilWater: SummerDate=1-Nov; SummerU=6; SummerCona=3.5; WinterDate=1-Apr; WinterU=2; WinterCona=2; DiffusConst=40; DiffusSlope=16; Salb=0.18; CN2Bare=73; CNRed=20; CNCov=0.8; PSIDul=-100
              Thickness=[100, 100, 100, 100, 100, 100, 100, 100, 100, 100, 100, 100, 100, 100]
              SWCON=[0.5, 0.5, 0.5, 0.5, 0.5, 0.5, 0.5, 0.5, 0.5, 0.5, 0.5, 0.5, 0.5, 0.5]
            Organic: FOMCNRatio=40; CarbonUnits=Total
              Thickness  Carbon  SoilCNRatio  FBiom  FInert  FOM
              100        1.3     12           0.04   0.4     233.443
              100        1.04    12           0.02   0.5     200.155
              100        1.04    12           0.02   0.5     171.613
              300        0.65    12           0.02   0.7     108.17
              150        0.33    12           0.02   1       85.8787
              200        0.33    12           0.02   1       63.133
              200        0.2     12           0.01   1       46.4117
              200        0.2     12           0.01   1       34.1192
              200        0.2     12           0.01   1       25.0824
              200        0.13    12           0.01   1       18.4391
              200        0.13    12           0.01   1       13.5554
            Chemical: PHUnits=Water
              Thickness  PH   CEC
              100        6.5  11.27
              100        5.6  10.685
              100        5.6  10.685
              100        6.7  9.8075
              100        7    9.8075
              100        7    9.8075
              100        7.5  9.0875
              100        7.5  9.0875
              100        7.5  9.0875
              100        7.5  8.94125
              100        7.5  8.795
              100        7.5  8.795
              100        7.5  8.795
              100        7.5  8.795
              CEC source: Calculated
            Water: FilledFromTop=true
              Thickness=[100, 100, 100, 100, 100, 100, 100, 100, 100, 100, 100, 100, 100, 100]
              InitialValues=[0.17, 0.23, 0.23, 0.25, 0.26, 0.28, 0.28, 0.28, 0.27, 0.26, 0.28, 0.3, 0.31, 0.32]
            Solute NO3: Thickness=[100, 100, 200, 200, 200, 200, 300, 300]; InitialValues=[5.8, 12.1, 8.1, 4.1, 1.6, 0.9, 0.8, 0.9]; InitialValuesUnits=ppm; WaterTableConcentration=0; D0=0; DepthConstant=0; MaxDepthSoluteAccessible=0; RunoffEffectivenessAtMovingSolute=0; MaxEffectiveRunoff=0
            Solute NH4: Thickness=[100, 100, 200, 200, 200, 200, 300, 300]; InitialValues=[1.5, 0.2, 0.1, 0.1, 0.1, 0.3, 0.1, 0.1]; InitialValuesUnits=ppm; WaterTableConcentration=0; D0=0; DepthConstant=0; MaxDepthSoluteAccessible=0; RunoffEffectivenessAtMovingSolute=0; MaxEffectiveRunoff=0
            Solute Urea: Thickness=[100, 100, 100, 300, 150, 200, 200, 200, 200, 200, 200]; InitialValues=[0, 0, 0, 0, 0, 0, 0, 0, 0, 0, 0]; InitialValuesUnits=ppm; WaterTableConcentration=0; D0=0; DepthConstant=0; MaxDepthSoluteAccessible=0; RunoffEffectivenessAtMovingSolute=0; MaxEffectiveRunoff=0
            Nutrient
            SoilTemperature Temperature: InteractionsPerDay=8
          Manager Harvesting
            NoHarvestBefore = 15-November
            script: same as in GXEXM.Gatton2014Irrigated.Gatton2014IrrigatedBase.Field.Harvesting
          Manager SoilWaterCalculation
            Layer90cm = 9
            TotalSW90cm = 0
            script: same as in GXEXM.Gatton2014Irrigated.Gatton2014IrrigatedBase.Field.SoilWaterCalculation
          Manager SetPhenology: same as GXEXM.Gatton2014Irrigated.Gatton2014IrrigatedBase.Field.SetPhenology
          Spectral: DrySoilNDVI=0.15; WetSoilNDVI=0.2; GreenCropNDVI=0.85; DeadCropNDVI=0.1
        Manager LocationInfo: same as GXEXM.Gatton2014Irrigated.Gatton2014IrrigatedBase.LocationInfo
    Experiment Temora2015
      Factors
        Factor Cv
          CompositeFactor Hartog
            Specifications:
              [Sowing].Script.CultivarName = Hartog
              [SetPhenology].Script.EmergDate = 20-may-2015
              [SetPhenology].Script.FlagDate = 13-sep-2015
              [SetPhenology].Script.HeadingDate = 4-oct-2015
              [SetPhenology].Script.AnthDate = 9-oct-2015
              [SetPhenology].Script.Phyllochron = 97
              [SetPhenology].Script.PhyllochronMultiplier = 1.4
          CompositeFactor Corack
            Specifications:
              [Sowing].Script.CultivarName = Hartog
              [SetPhenology].Script.EmergDate = 20-may-2015
              [SetPhenology].Script.FlagDate = 10-sep-2015
              [SetPhenology].Script.HeadingDate = 30-sep-2015
              [SetPhenology].Script.AnthDate = 4-oct-2015
              [SetPhenology].Script.Phyllochron = 95
              [SetPhenology].Script.PhyllochronMultiplier = 1.3
          CompositeFactor Mace
            Specifications:
              [Sowing].Script.CultivarName = Hartog
              [SetPhenology].Script.EmergDate = 20-may-2015
              [SetPhenology].Script.FlagDate = 14-sep-2015
              [SetPhenology].Script.HeadingDate = 30-sep-2015
              [SetPhenology].Script.AnthDate = 5-oct-2015
              [SetPhenology].Script.Phyllochron = 95
              [SetPhenology].Script.PhyllochronMultiplier = 1.3
      Simulation Temora2015Base
        Clock: Start=2015-05-11; End=2015-12-31
        Summary SummaryFile
        Weather: FileName=Temora2015.met
        SoilArbitrator
        MicroClimate: a_interception=0; b_interception=1; c_interception=0; d_interception=0; SoilHeatFluxFraction=0.4; MinimumHeightDiffForNewLayer=0; NightInterceptionFraction=0.5; ReferenceHeight=2
        Zone Field: Area=1; Slope=0; AspectAngle=0; Altitude=50
          Report DailyReport: EventNames=[Wheat].Harvesting
            VariableNames:
              [Clock].Today
              [Wheat].Phenology.FloweringDAS
              [Wheat].Phenology.FlagLeafDAS
              [Wheat].Phenology.TerminalSpikeletDAS
          Report HarvestReport: EventNames=[Clock].DoReport
            VariableNames:
              [Clock].Today
              [Wheat].Phenology.Stage
              [Wheat].Phenology.Zadok.Stage
              [Wheat].Phenology.FloweringDAS
              [Wheat].Phenology.FlagLeafDAS
              [Wheat].Phenology.TerminalSpikeletDAS
          Fertiliser
          SurfaceOrganicMatter: InitialResidueName=wheat_stubble; InitialResidueType=wheat; InitialResidueMass=500; InitialStandingFraction=0; InitialCPR=0; InitialCNR=100
          Plant Wheat
          Manager SowingFertiliser: same as GXEXM.Gatton2014.Gatton2014Base.Field.SowingFertiliser
          Manager Sowing
            SowDate = 18-May
            CultivarName = Hartog
            SowingDepth = 50
            RowSpacing = 305
            Population = 84
            script: same as in GXEXM.Gatton2014.Gatton2014Base.Field.Sowing
          Report SowingReport
          Soil: ASCOrder=Chromosol; ASCSubOrder=Red; SoilType=Loamy duplex; Site=Temora; NearestTown=Temora; Region=Central West Slopes and Plains; State=New South Wales; Country=Australia; ApsoilNumber=913; Latitude=-34.4085; Longitude=147.531; LocationAccuracy=+/- 200m; YearOfSampling=0; DataSource=Collected by Brett Cocks (CES) for NVT.
            Physical
              Thickness  ParticleSizeSand  ParticleSizeSilt  ParticleSizeClay  Rocks  BD     AirDry  LL15  DUL   SAT    KS
              100        5                 65                30                0.164  1.519  0.03    0.05  0.23  0.332  50
              100        5                 65                30                0.371  1.408  0.1     0.1   0.26  0.274  50
              100        5                 65                30                0      1.572  0.1     0.1   0.26  0.371  100
              100        5                 65                30                0      1.578  0.17    0.17  0.29  0.375  100
              100        5                 65                30                0      1.616  0.24    0.24  0.33  0.36   100
              100        5                 65                30                0      1.614  0.24    0.24  0.33  0.361  100
              100        5                 65                30                0      1.581  0.21    0.21  0.31  0.373  100
              100        5                 65                30                0      1.581  0.18    0.18  0.29  0.373  100
              100        5                 65                30                0      1.581  0.16    0.16  0.28  0.373  100
              100        5                 65                30                0      1.581  0.16    0.16  0.27  0.373  100
              100        5                 65                30                0      1.581  0.16    0.16  0.24  0.373  100
              100        5                 65                30                0      1.581  0.16    0.16  0.21  0.373  100
              100        5                 65                30                0      1.581  0.16    0.16  0.19  0.373  100
              100        5                 65                30                0      1.581  0.17    0.17  0.18  0.373  100
              100        5                 65                30                0      1.581  0.18    0.18  0.19  0.373  100
              Rocks, ParticleSizeSand, ParticleSizeSilt, ParticleSizeClay source: Calculated (layer 1, 2, 3, 4, 5, 6, 7)
              SoilCrop wheatSoil
                LL=[0.05, 0.1, 0.1, 0.17, 0.24, 0.24, 0.21, 0.18, 0.16, 0.16, 0.16, 0.16, 0.16, 0.17, 0.18]
                KL=[0.06, 0.06, 0.06, 0.06, 0.06, 0.06, 0.06, 0.06, 0.06, 0.06, 0.06, 0.06, 0.06, 0.06, 0.06]
                XF=[0.3, 0.3, 1, 1, 1, 1, 1, 1, 1, 1, 1, 1, 1, 1, 1]
            WaterBalance SoilWater: SummerDate=1-Nov; SummerU=6; SummerCona=3.5; WinterDate=1-Apr; WinterU=2; WinterCona=2; DiffusConst=40; DiffusSlope=16; Salb=0.18; CN2Bare=75; CNRed=20; CNCov=0.8; PSIDul=-100; Thickness=[150, 150, 300, 300, 300, 300, 300]; SWCON=[0.5, 0.5, 0.5, 0.5, 0.5, 0.5, 0.5]
            Organic: FOMCNRatio=40; CarbonUnits=Total
              Thickness  Carbon  SoilCNRatio  FBiom  FInert  FOM
              150        1.67    12           0.04   0.4     347.129
              150        1       12           0.02   0.5     270.344
              300        0.5     12           0.02   0.7     163.972
              300        0.3     12           0.02   1       99.4541
              300        0.2     12           0.01   1       60.322
              300        0.1     12           0.01   1       36.5871
              300        0.1     12           0.01   1       22.1912
            Chemical: PHUnits=Water
              Thickness  PH   EC   CEC
              150        5.2  0.1  12.1025
              150        5.7  0.1  10.595
              300        6.6  0.1  9.47
              300        7.4  0.1  9.02
              300        8.3  0.1  8.795
              300        8.5  0.2  8.57
              300        8.5  -    8.57
              EC, CL source: Unknown source or quality of data (layer 1, 2, 3, 4, 5, 6)
              CEC source: Calculated
              PH source: Unknown source or quality of data
            Water: FilledFromTop=true
              Thickness=[100, 100, 100, 100, 100, 100, 100, 100, 100, 100, 100, 100, 100, 100, 100]
              InitialValues=[0.11, 0.175, 0.175, 0.22, 0.25, 0.25, 0.23, 0.2, 0.175, 0.17, 0.17, 0.165, 0.165, 0.17, 0.18]
            Solute NO3: Thickness=[150, 150, 300, 300, 300, 300, 300]; InitialValues=[0, 0, 0, 0, 0, 0, 0]; InitialValuesUnits=ppm; WaterTableConcentration=0; D0=0; DepthConstant=0; MaxDepthSoluteAccessible=0; RunoffEffectivenessAtMovingSolute=0; MaxEffectiveRunoff=0
            Solute NH4: same as GXEXM.Temora2015.Temora2015Base.Field.Soil.NO3
            Solute Urea: same as GXEXM.Temora2015.Temora2015Base.Field.Soil.NO3
            Nutrient
            SoilTemperature Temperature: InteractionsPerDay=8
          Manager Harvesting
            NoHarvestBefore = 24-December
            script: same as in GXEXM.Gatton2014Irrigated.Gatton2014IrrigatedBase.Field.Harvesting
          Manager SoilWaterCalculation: same as GXEXM.Junee2014.Junee2014Base.Field.SoilWaterCalculation
          Manager SetPhenology: same as GXEXM.Gatton2014Irrigated.Gatton2014IrrigatedBase.Field.SetPhenology
          Spectral: DrySoilNDVI=0.1; WetSoilNDVI=0.1; GreenCropNDVI=0.9; DeadCropNDVI=0.1
        Manager LocationInfo: same as GXEXM.Gatton2014Irrigated.Gatton2014IrrigatedBase.LocationInfo
    Experiment Minnipa2014 (disabled)
      Factors
        Factor Cv: Specification=[Sowing].Script.CultivarName = Hartog, Corack, Mace
      Simulation Minnipa2014Base
        Clock: Start=2014-05-20; End=2014-12-31
        Summary SummaryFile
        Weather: FileName=Minnipa2014.met
        SoilArbitrator
        MicroClimate: a_interception=0; b_interception=1; c_interception=0; d_interception=0; SoilHeatFluxFraction=0.4; MinimumHeightDiffForNewLayer=0; NightInterceptionFraction=0.5; ReferenceHeight=2
        Zone Field: Area=1; Slope=0; AspectAngle=0; Altitude=50
          Report DailyReport: EventNames=[Wheat].Harvesting
            VariableNames:
              [Clock].Today
              [Wheat].Phenology.FloweringDAS
              [Wheat].Phenology.FlagLeafDAS
              [Wheat].Phenology.TerminalSpikeletDAS
          Report HarvestReport: EventNames=[Clock].DoReport
            VariableNames:
              [Clock].Today
              [Wheat].Phenology.Stage
              [Wheat].Phenology.Zadok.Stage
              [Wheat].Phenology.FloweringDAS
              [Wheat].Phenology.FlagLeafDAS
              [Wheat].Phenology.TerminalSpikeletDAS
          Fertiliser
          SurfaceOrganicMatter: InitialResidueName=wheat_stubble; InitialResidueType=wheat; InitialResidueMass=500; InitialStandingFraction=0; InitialCPR=0; InitialCNR=100
          Plant Wheat
          Manager SowingFertiliser
            Amount = 14.4
            CropName = wheat
            script: same as in GXEXM.Gatton2014Irrigated.Gatton2014IrrigatedBase.Field.SowingFertiliser
          Manager Sowing
            SowDate = 28-May
            CultivarName = Hartog
            SowingDepth = 50
            RowSpacing = 250
            Population = 106
            script: same as in GXEXM.Gatton2014Irrigated.Gatton2014IrrigatedBase.Field.Sowing
          Report SowingReport
          Soil: SoilType=Sandy clay; Site=Minnipa; NearestTown=Minnipa; Region=West Coast; State=South Australia; Country=Australia; ApsoilNumber=909; Latitude=-32.831; Longitude=135.146; LocationAccuracy=Regional soil type; YearOfSampling=0; DataSource=Collected by Brett Cocks (CES) for NVT.; Comments=Sandy clay loam -
            Physical
              Thickness  ParticleSizeSand  ParticleSizeSilt  ParticleSizeClay  Rocks     BD     AirDry  LL15   DUL    SAT
              150        5                 65                30                0.522499  1.367  0.026   0.051  0.165  0.215
              150        5                 65                30                0.533688  1.214  0.067   0.083  0.185  0.235
              300        5                 65                30                0.496561  1.235  0.109   0.109  0.2    0.25
              300        5                 65                30                0.357338  1.209  0.109   0.109  0.275  0.325
              300        5                 65                30                0.406698  1.238  0.109   0.109  0.244  0.294
              BD, DUL source: Field measured and checked for sensibility
              AirDry, LL15, SAT source: Unknown source or quality of data
              Rocks, ParticleSizeSand, ParticleSizeSilt, ParticleSizeClay source: Calculated
              SoilCrop wheatSoil: LL=[0.051, 0.083, 0.109, 0.12, 0.136]; KL=[0.03, 0.03, 0.03, 0.03, 0.01]; XF=[0.3, 0.5, 0.5, 0.4, 0.3]
                LL source: Field measured and checked for sensibility
            WaterBalance SoilWater: SummerDate=1-Nov; SummerU=6; SummerCona=3.5; WinterDate=1-Apr; WinterU=2; WinterCona=2; DiffusConst=88; DiffusSlope=35; Salb=0.13; CN2Bare=73; CNRed=20; CNCov=0.8; PSIDul=-100; Thickness=[150, 150, 300, 300, 300]; SWCON=[0.5, 0.5, 0.5, 0.5, 0.5]
            Organic: FOMCNRatio=40; CarbonUnits=Total
              Thickness  Carbon  SoilCNRatio  FBiom  FInert  FOM
              150        1.066   12           0.04   0.4     446.88
              150        0.728   12           0.02   0.5     307.136
              300        0.676   12           0.02   0.7     145.081
              300        0.559   12           0.02   1       68.5313
              300        0.338   12           0.01   1       32.3719
            Chemical: PHUnits=Water
              Thickness  PH   EC
              150        8.3  0.2
              150        8.6  0.1
              300        8.9  0.1
              300        9.5  0.3
              300        9.8  0.6
              EC, CL, PH source: Unknown source or quality of data
            Water: Thickness=[150, 150, 300, 300, 300]; InitialValues=[0.165, 0.185, 0.2, 0.21, 0.109]; FilledFromTop=true
            Solute NO3: Thickness=[150, 150, 300, 300, 300]; InitialValues=[5, 10, 10, 5, 2]; InitialValuesUnits=ppm; WaterTableConcentration=0; D0=0; DepthConstant=0; MaxDepthSoluteAccessible=0; RunoffEffectivenessAtMovingSolute=0; MaxEffectiveRunoff=0
            Solute NH4: Thickness=[150, 150, 300, 300, 300]; InitialValues=[0.5, 0.2, 0.1, 0.1, 0.1]; InitialValuesUnits=ppm; WaterTableConcentration=0; D0=0; DepthConstant=0; MaxDepthSoluteAccessible=0; RunoffEffectivenessAtMovingSolute=0; MaxEffectiveRunoff=0
            Solute Urea: Thickness=[150, 150, 300, 300, 300]; InitialValues=[0, 0, 0, 0, 0]; InitialValuesUnits=ppm; WaterTableConcentration=0; D0=0; DepthConstant=0; MaxDepthSoluteAccessible=0; RunoffEffectivenessAtMovingSolute=0; MaxEffectiveRunoff=0
            Nutrient
            SoilTemperature Temperature: InteractionsPerDay=8
          Manager Set Emergence Date
            EmergenceDate = 12-jun
```csharp
using System;
using Models.Core;
using Models.PMF;

namespace Models
{
    [Serializable]
    public class Script : Model
    {          
        [Link] Plant crop;

        [Description("Emergence Date:")]
        public string EmergenceDate { get; set; }

        [EventSubscribe("PlantSowing")]
        private void OnPlantSowing(object sender, EventArgs e)
        {
            if (!string.IsNullOrEmpty(EmergenceDate))
            {
                crop.Phenology.SetPhaseCompletionDate(EmergenceDate,"Emerging");
            }
        }
    }
}
```
          Manager Harvesting
            NoHarvestBefore = 12-November
            script: same as in GXEXM.Gatton2014Irrigated.Gatton2014IrrigatedBase.Field.Harvesting
          Manager SoilWaterCalculation
            Layer90cm = 4
            TotalSW90cm = 0
            script: same as in GXEXM.Gatton2014Irrigated.Gatton2014IrrigatedBase.Field.SoilWaterCalculation
          Spectral: DrySoilNDVI=0.13; WetSoilNDVI=0.13; GreenCropNDVI=0.85; DeadCropNDVI=0.1
        Manager LocationInfo
          Country = Australia
          State = Queensland
          Region =
          script: same as in GXEXM.Gatton2014Irrigated.Gatton2014IrrigatedBase.LocationInfo
    Experiment Minnipa2015 (disabled)
      Factors
        Factor Cv: Specification=[Sowing].Script.CultivarName = Hartog, Corack, Mace
      Simulation Minnipa2015Base
        Clock: Start=2015-05-20; End=2015-12-31
        Summary SummaryFile
        Weather: FileName=Minnipa2014.met
        SoilArbitrator
        MicroClimate: a_interception=0; b_interception=1; c_interception=0; d_interception=0; SoilHeatFluxFraction=0.4; MinimumHeightDiffForNewLayer=0; NightInterceptionFraction=0.5; ReferenceHeight=2
        Zone Field: Area=1; Slope=0; AspectAngle=0; Altitude=50
          Report DailyReport: EventNames=[Wheat].Harvesting
            VariableNames:
              [Clock].Today
              [Wheat].Phenology.FloweringDAS
              [Wheat].Phenology.FlagLeafDAS
              [Wheat].Phenology.TerminalSpikeletDAS
          Report HarvestReport: EventNames=[Clock].DoReport
            VariableNames:
              [Clock].Today
              [Wheat].Phenology.Stage
              [Wheat].Phenology.Zadok.Stage
              [Wheat].Phenology.FloweringDAS
              [Wheat].Phenology.FlagLeafDAS
              [Wheat].Phenology.TerminalSpikeletDAS
          Fertiliser
          SurfaceOrganicMatter: InitialResidueName=wheat_stubble; InitialResidueType=wheat; InitialResidueMass=500; InitialStandingFraction=0; InitialCPR=0; InitialCNR=100
          Plant Wheat
          Manager Sowing
            SowDate = 22-May
            CultivarName = Hartog
            SowingDepth = 50
            RowSpacing = 270
            Population = 114
            script: same as in GXEXM.Gatton2014.Gatton2014Base.Field.Sowing
          Report SowingReport
          Soil: SoilType=Sandy clay; Site=Minnipa; NearestTown=Minnipa; Region=West Coast; State=South Australia; Country=Australia; ApsoilNumber=909; Latitude=-32.831; Longitude=135.146; LocationAccuracy=Regional soil type; YearOfSampling=0; DataSource=Collected by Brett Cocks (CES) for NVT.; Comments=Sandy clay loam -
            Physical
              Thickness  ParticleSizeSand  ParticleSizeSilt  ParticleSizeClay  Rocks     BD     AirDry  LL15   DUL    SAT
              150        5                 65                30                0.522499  1.367  0.026   0.051  0.165  0.215
              150        5                 65                30                0.533688  1.214  0.067   0.083  0.185  0.235
              300        5                 65                30                0.496561  1.235  0.109   0.109  0.2    0.25
              300        5                 65                30                0.357338  1.209  0.109   0.109  0.275  0.325
              300        5                 65                30                0.406698  1.238  0.109   0.109  0.244  0.294
              BD, DUL source: Field measured and checked for sensibility
              AirDry, LL15, SAT source: Unknown source or quality of data
              Rocks, ParticleSizeSand, ParticleSizeSilt, ParticleSizeClay source: Calculated
              SoilCrop wheatSoil: LL=[0.051, 0.083, 0.109, 0.12, 0.136]; KL=[0.06, 0.06, 0.06, 0.04, 0.04]; XF=[0.1, 0.5, 0.5, 0.4, 0.3]
            WaterBalance SoilWater: same as GXEXM.Minnipa2014.Minnipa2014Base.Field.Soil.SoilWater
            Organic: same as GXEXM.Minnipa2014.Minnipa2014Base.Field.Soil.Organic
            Chemical: PHUnits=Water
              Thickness  PH   EC   CEC
              150        8.3  0.2  10.7435
              150        8.6  0.1  9.983
              300        8.9  0.1  9.866
              300        9.5  0.3  9.60275
              300        9.8  0.6  9.1055
              EC, CL, PH source: Unknown source or quality of data
              CEC source: Calculated
            Water: Thickness=[150, 150, 300, 300, 300]; InitialValues=[0.165, 0.083, 0.109, 0.109, 0.109]; FilledFromTop=true
            Solute NO3: Thickness=[150, 150, 300, 300, 300]; InitialValues=[5, 2, 1, 1, 1]; InitialValuesUnits=ppm; WaterTableConcentration=0; D0=0; DepthConstant=0; MaxDepthSoluteAccessible=0; RunoffEffectivenessAtMovingSolute=0; MaxEffectiveRunoff=0
            Solute NH4: same as GXEXM.Minnipa2014.Minnipa2014Base.Field.Soil.Urea
            Solute Urea: same as GXEXM.Minnipa2014.Minnipa2014Base.Field.Soil.Urea
            Nutrient
            SoilTemperature Temperature: InteractionsPerDay=8
          Manager Set Emergence Date
            EmergenceDate = 10-jun
            script: same as in GXEXM.Minnipa2014.Minnipa2014Base.Field.Set Emergence Date
          Manager Harvesting: same as GXEXM.Minnipa2014.Minnipa2014Base.Field.Harvesting
          Operations
            2015-05-22  [Fertiliser].Apply(80,"DAP");
            2015-07-29  [Fertiliser].Apply(50,"UreaGranular");
          Manager SoilWaterCalculation: same as GXEXM.Minnipa2014.Minnipa2014Base.Field.SoilWaterCalculation
          Spectral: DrySoilNDVI=0.11; WetSoilNDVI=0.13; GreenCropNDVI=0.85; DeadCropNDVI=0.1
        Manager LocationInfo: same as GXEXM.Minnipa2014.Minnipa2014Base.LocationInfo
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