Simulations: Version=191
  Memo TitlePage
    # The APSIM Wheat Model

    _Brown, H.E., Huth, N.I. and Holzworth, D.P._
  Memo Introduction
    The APSIM wheat model has been developed using the Plant Modelling Framework (PMF) of [brown_plant_2014]. This new framework provides a library of plant organ and process submodels that can be coupled, at runtime, to construct a model in much the same way that models can be coupled to construct a simulation. This means that dynamic composition of lower level process and organ classes (e.g. photosynthesis, leaf) into larger constructions (e.g. maize, wheat, sorghum) can be achieved by the model developer without additional coding.

    The wheat model consists of:

    * a phenology model to simulate development through sequential developmental phases
    * a structure model to simulate plant morphology
    * a collection of organs to simulate the various plant parts
    * an arbitrator to allocate resources (N, biomass) to the various plant organs

    This work builds upon earlier APSIM Wheat models such as NWheat ([Asseng200225], [KeatingNWheat]), NWheatS ([Asseng1998163]), Cropmod-Wheat ([Wang2002GenericCropModel]), and the earlier versions developed in Plant (<a href=\"http://www.apsim.info/Documentation/Model,CropandSoil/CropModuleDocumentation/Wheat.aspx">APSIM Wheat 7.5</a>") and then within the Plant Modelling Framework ([brown_plant_2014]).
  DataStore
    ExcelInput ExcelMultiInput: FileNames=[..\Data\Lincoln2024.xlsx]; SheetNames=[Observed, MaxLeafSize]
    PredictedObserved DailyObsPred: PredictedTableName=DailyReport; ObservedTableName=Observed; FieldNameUsedForMatch=SimulationName; FieldName2UsedForMatch=Clock.Today; AllColumns=false
      Tests: POName=DailyObsPred
        AcceptedStats:
          Name                   n     Slope         Intercept   SEslope      SEintercept  R2           RMSE       NSE         ME          MAE         RSR       RMR
          ET                     123   1.13169       -0.428525   0.0437149    0.169573     0.847065     0.75711    0.750672    0.0416707   0.558234    0.497294  0
          ProfileWater           1327  0.876588      76.0389     0.0130203    5.47947      0.7738       58.7876    0.702733    25.8355     33.06       0.545016  0
          Soil.SoilWater.SW(1)   1300  0.000187106   0.209326    0.000113886  0.00216848   0.00207521   18.9789    -0.0810339  -5.20763    5.28548     1.03933   0
          Soil.SoilWater.SW(10)  8     -0.411168     0.612361    0.204164     0.087484     0.403332     0.0113816  -3.15811    0.00772724  0.00919543  1.90744   0
          Soil.SoilWater.SW(2)   1323  -9.03035e-05  0.237103    7.90585e-05  0.00185795   0.000986689  23.4358    -0.0848838  -6.54813    6.60052     1.04118   0
          Soil.SoilWater.SW(3)   1323  7.41365e-05   0.225765    6.63683e-05  0.00193967   0.000943693  29.1595    -0.0857037  -8.19945    8.22086     1.04158   0
          Soil.SoilWater.SW(4)   1323  0.00032245    0.209832    5.67479e-05  0.00181599   0.0238581    31.9313    -0.0847602  -8.95944    8.97693     1.04112   0
          Soil.SoilWater.SW(5)   1323  0.000184327   0.244192    5.45151e-05  0.00180824   0.00858025   33.0939    -0.0856543  -9.31536    9.33089     1.04155   0
          Soil.SoilWater.SW(6)   1218  0.983201      0.00665286  0.00580358   0.00166975   0.959354     0.0168556  0.958159    0.00202203  0.00893392  0.204467  0
          Soil.SoilWater.SW(7)   1194  0.995766      0.00138347  0.00547865   0.00136097   0.965173     0.0121361  0.964171    0.00036727  0.00674653  0.189207  0
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        AcceptedStatsName=Name n Slope Intercept SEslope SEintercept R2 RMSE NSE ME MAE RSR
    PredictedObserved HarvestObsPred (disabled): PredictedTableName=HarvestReport; ObservedTableName=Observed; FieldNameUsedForMatch=SimulationName; FieldName2UsedForMatch=Wheat.Phenology.CurrentStageName; AllColumns=false
      Tests: POName=HarvestObsPred
        AcceptedStats:
          Name                                  n    Slope      Intercept   SEslope     SEintercept  R2          RMSE        NSE         ME           MAE         RSR       RMR
          Wheat.AboveGround.N                   67   1.12809    -1.00273    0.0391678   0.525848     0.927336    2.09151     0.875576    0.540148     1.59606     0.350095  0
          Wheat.AboveGround.Wt                  211  1.01911    34.1751     0.0202867   28.6588      0.923515    188.663     0.904426    58.5184      140.453     0.308417  0
          Wheat.Grain.N                         135  1.07639    -0.257745   0.0362834   0.353004     0.868717    1.79883     0.808865    0.415699     1.36719     0.435568  0
          Wheat.Grain.Nconc                     136  0.52548    0.0109277   0.0578165   0.00130116   0.381364    0.00332647  0.31597     0.000420536  0.00251003  0.824015  0
          Wheat.Grain.Number                    195  0.819153   2260.06     0.0213448   308.959      0.88414     2247.71     0.879203    -81.8409     1634.74     0.346666  0
          Wheat.Grain.Protein                   114  0.424157   7.85561     0.0562272   0.726492     0.336911    2.10436     0.263918    0.550644     1.57133     0.854181  0
          Wheat.Grain.Wt                        233  0.978713   11.017      0.0292591   15.5104      0.828875    103.644     0.801774    0.879252     78.6576     0.444269  0
          Wheat.Leaf.CohortMaxSize(1)           10   0.0270759  255.563     0.0327969   7.48653      0.078506    51.271      -0.92608    36.4016      40.5202     1.31661   0
          Wheat.Leaf.CohortMaxSize(10)          10   1.11919    -412.466    0.256733    521.362      0.703745    224.554     -0.300948   -171.57      207.903     1.08206   0
          Wheat.Leaf.CohortMaxSize(11)          10   0.825212   365.905     0.266736    598.083      0.54471     196.601     0.391552    -23.5263     115.224     0.740002  0
          Wheat.Leaf.CohortMaxSize(12)          10   0.848404   253.801     0.223896    493.954      0.642195    151.745     0.416747    -79.2873     105.917     0.724519  0
          Wheat.Leaf.CohortMaxSize(13)          10   1.09708    -403.529    1.01788     2346.69      0.126797    703.826     -7.88491    -180.887     351.071     2.82779   0
          Wheat.Leaf.CohortMaxSize(14)          10   1.30676    -642.351    0.429337    1019.71      0.536608    603.245     -0.59098    71.3164      415.854     1.19661   0
          Wheat.Leaf.CohortMaxSize(15)          9    -0.26027   2713.41     0.159916    364.78       0.274529    585.946     -0.830732   -109.076     515.056     1.27566   0
          Wheat.Leaf.CohortMaxSize(16)          3    -0.645839  2788.84     7.95817     13511.1      0.00654291  1245.82     -65.0428    6.01155      1116.21     6.6354    0
          Wheat.Leaf.CohortMaxSize(17)          2    3.1965     -3522.2732  0           0            1           590.025     -4.43529    -197.771     555.892     1.64853   0
          Wheat.Leaf.CohortMaxSize(18)          1    -          -           -           -            -           985.267     -           985.267      985.267     -         0
          Wheat.Leaf.CohortMaxSize(2)           10   0.0630555  275.197     0.29264     121.589      0.00577     139.081     -3.00585    -108.611     115.388     1.89875   0
          Wheat.Leaf.CohortMaxSize(3)           10   0.289291   221.125     0.270354    144.318      0.125205    181.922     -2.6244     -152.132     163.333     1.80609   0
          Wheat.Leaf.CohortMaxSize(4)           10   0.345581   263.167     0.345159    223.342      0.111353    208.379     -1.99176    -152.884     173.867     1.64091   0
          Wheat.Leaf.CohortMaxSize(5)           10   0.249259   458.154     0.277019    225.53       0.0919017   229.975     -0.868592   -139.856     146.902     1.29682   0
          Wheat.Leaf.CohortMaxSize(6)           10   0.345905   476.527     0.195687    187.624      0.280871    242.414     -0.0368856  -130.978     145.477     0.966021  0
          Wheat.Leaf.CohortMaxSize(7)           10   0.441949   501.987     0.142766    157.184      0.545013    176.986     0.296106    -101.041     122.714     0.79593   0
          Wheat.Leaf.CohortMaxSize(8)           10   0.589766   515.86      0.179194    229.582      0.575192    169.291     0.574802    1.17705      117.592     0.61861   0
          Wheat.Leaf.CohortMaxSize(9)           10   0.793068   300.515     0.327977    507.562      0.422258    241.916     0.0929616   -15.3812     161.582     0.903512  0
          Wheat.Phenology.FlagLeafDAS.Value()   255  0.974146   6.29479     0.00979673  1.35981      0.97505     8.03204     0.971245    2.92157      5.87059     0.16924   0
          Wheat.Phenology.FloweringDAS.Value()  299  0.943644   8.35638     0.00705763  1.10217      0.983658    6.98781     0.982029    0.0602007    4.93645     0.133831  0
        AcceptedStatsName=Name n Slope Intercept SEslope SEintercept R2 RMSE NSE ME MAE RSR
  Experiment Lincoln2024
    DisabledSimNames=[Lincoln2023SD19-AprCvCesario, Lincoln2023SD27-MarCvCesario, Lincoln2023SD19-AprCvStockade, Lincoln2023SD27-MarCvStockade]
    Factors
      Permutation
        Factor SD
          CompositeFactor 20Mar
            Specifications:
              [Sowing].Script.SowDate = 20-Mar
              [Sowing].Script.EmergeDate = 29-Mar
              [ApplyFertiliser].Script.FertiliserDates = 17-May,7-Aug, 27-Aug, 25-Oct
              [IrrigationEvents]
            Operations IrrigationEvents
              2024-04-06  [Irrigation].Apply (12);
              2024-05-06  [Irrigation].Apply (11);
              2024-08-27  [Irrigation].Apply (5);
              2024-09-06  [Irrigation].Apply (10);
              2024-09-20  [Irrigation].Apply (10);
              2024-10-09  [Irrigation].Apply (20);
              2024-10-12  [Irrigation].Apply (20);
              2024-10-25  [Irrigation].Apply (7.5);
              2024-11-01  [Irrigation].Apply (7.5);
              2024-11-09  [Irrigation].Apply (45);
              2024-11-17  [Irrigation].Apply (40);
              2024-11-24  [Irrigation].Apply (40);
              2024-12-01  [Irrigation].Apply (30);
              2024-12-07  [Irrigation].Apply (40);
              2024-12-15  [Irrigation].Apply (50);
          CompositeFactor 16Apr
            Specifications:
              [Sowing].Script.SowDate = 16-Apr
              [Sowing].Script.EmergeDate = 30-Apr
              [ApplyFertiliser].Script.FertiliserDates = 25-Jun, 6-Sep, 20-Sep, 1-Nov
              [IrrigationEvents]
            Operations IrrigationEvents
              2024-04-06  [Irrigation].Apply (12);
              2024-05-06  [Irrigation].Apply (11);
              2024-08-27  [Irrigation].Apply (5);
              2024-09-06  [Irrigation].Apply (10);
              2024-09-20  [Irrigation].Apply (10);
              2024-10-09  [Irrigation].Apply (10);
              2024-10-13  [Irrigation].Apply (30);
              2024-11-01  [Irrigation].Apply (7.5);
              2024-11-09  [Irrigation].Apply (45);
              2024-11-17  [Irrigation].Apply (40);
              2024-11-24  [Irrigation].Apply (40);
              2024-12-01  [Irrigation].Apply (30);
              2024-12-07  [Irrigation].Apply (40);
              2024-12-15  [Irrigation].Apply (50);
        Factor N
          CompositeFactor Nil: Specifications=[ApplyFertiliser].Script.NFrac = 0
          CompositeFactor Low: Specifications=[ApplyFertiliser].Script.NFrac = 33.3
          CompositeFactor Mid: Specifications=[ApplyFertiliser].Script.NFrac = 66.6
          CompositeFactor High: Specifications=[ApplyFertiliser].Script.NFrac = 100
    Simulation Lincoln24Base
      Weather: Latitude=-43.65; Tav=1.47083; Amp=0
        FileName=C:\GitHubRepos\ApsimX\Tests\Validation\Wheat\met\Lincoln2024.met
      Clock: Start=2024-03-15; End=2025-01-20
      Summary
      SoilArbitrator
      MicroClimate: a_interception=0; b_interception=1; c_interception=0; d_interception=0; SoilHeatFluxFraction=0.4; MinimumHeightDiffForNewLayer=0; NightInterceptionFraction=0.5; ReferenceHeight=2
      Manager LocationInfo
        Country = New Zealand
        State = Canterbury Region
        Region = Canterbury Region
```csharp
using Models.Soils;
using System;
using Models.Core;
using Models.PMF;
using APSIM.Shared.Utilities;

namespace Models
{
    [Serializable]
    public class Script : Model
    {
        [Link] Clock Clock;
        [Link] Fertiliser Fertiliser;
        [Link] Summary Summary;
        
        [Description("Country")]
        public string Country { get; set; }

        [Description("State")]
        public string State { get; set; }

        [Description("Region")]
        public string Region { get; set; }

    }
}
```
      Zone Field: Area=1; Slope=0; AspectAngle=0; Altitude=50
        Soil: Site=I12; NearestTown=Lincoln; Region=Canterbury; Country=New Zealand; Comments=I12 Lincoln University
          Physical
            Thickness  ParticleSizeSand  ParticleSizeSilt  ParticleSizeClay  Rocks     BD    AirDry  LL15   DUL   SAT
            100        5                 65                30                0.22101   1.26  0.05    0.075  0.35  0.38
            100        5                 65                30                0.22101   1.26  0.06    0.078  0.35  0.38
            100        5                 65                30                0.200511  1.26  0.07    0.07   0.32  0.39
            100        5                 65                30                0.246423  1.44  0.07    0.07   0.29  0.32
            100        5                 65                30                0.293522  1.44  0.069   0.07   0.27  0.3
            100        5                 65                30                0.246423  1.44  0.07    0.07   0.31  0.32
            100        5                 65                30                0.102947  1.57  0.07    0.07   0.33  0.34
            100        5                 65                30                0         1.57  0.07    0.07   0.35  0.35
            100        5                 65                30                0         1.57  0.07    0.07   0.34  0.35
            100        5                 65                30                0         1.58  0.07    0.07   0.34  0.35
            100        5                 65                30                0         1.58  0.07    0.07   0.34  0.35
            100        5                 65                30                0         1.58  0.07    0.07   0.34  0.35
            100        5                 65                30                0         1.58  0.08    0.08   0.34  0.35
            100        5                 65                30                0         1.59  0.078   0.08   0.33  0.35
            100        5                 65                30                0         1.59  0.08    0.08   0.33  0.35
            100        5                 65                30                0         1.59  0.087   0.09   0.32  0.34
            100        5                 65                30                0.112903  1.59  0.09    0.09   0.3   0.33
            100        5                 65                30                0.112903  1.59  0.09    0.09   0.3   0.33
            100        5                 65                30                0.112903  1.59  0.09    0.09   0.3   0.33
            100        5                 65                30                0.112903  1.59  0.08    0.08   0.31  0.33
            100        5                 65                30                0.112903  1.59  0.09    0.09   0.31  0.33
            100        5                 65                30                0         1.59  0.09    0.09   0.32  0.34
            100        5                 65                30                0         1.59  0.09    0.09   0.35  0.38
            Rocks, ParticleSizeSand, ParticleSizeSilt, ParticleSizeClay source: Calculated
            SoilCrop WheatSoil
              LL=[0.075, 0.078, 0.07, 0.07, 0.07, 0.07, 0.07, 0.07, 0.07, 0.07, 0.07, 0.07, 0.08, 0.08, 0.08, 0.09, 0.09, 0.09, 0.09, 0.08, 0.09, 0.09, 0.09]
              KL=[0.06, 0.06, 0.06, 0.06, 0.06, 0.06, 0.04, 0.03, 0.03, 0.02, 0.02, 0.02, 0.02, 0.02, 0.02, 0.01, 0.01, 0.01, 0.01, 0.01, 0, 0, 0]
              XF=[1, 1, 1, 1, 1, 1, 1, 1, 1, 1, 1, 1, 1, 1, 1, 0.5, 0.5, 0, 0, 0, 0, 0, 0]
          WaterBalance SoilWater: SummerDate=1-Nov; SummerU=5; SummerCona=5; WinterDate=1-Apr; WinterU=5; WinterCona=5; DiffusConst=40; DiffusSlope=16; Salb=0.12; CN2Bare=73; CNRed=20; CNCov=0.8; PSIDul=-100
          Organic: FOMCNRatio=40; CarbonUnits=Total
            Thickness  Carbon  SoilCNRatio  FBiom  FInert  FOM
            150        1.2     12           0.04   0.4     347.129
            150        0.96    12           0.02   0.6     270.344
            300        0.6     12           0.02   0.8     163.972
            300        0.3     12           0.02   1       99.4541
            300        0.18    12           0.01   1       60.322
            300        0.12    12           0.01   1       36.5871
            300        0.12    12           0.01   1       22.1912
          Chemical: PHUnits=Water
            Thickness  PH  CEC
            150        6   11.045
            150        6   10.505
            150        6   9.695
            150        6   9.695
            600        6   8.885
            300        6   8.615
            300        6   8.615
            CEC source: Calculated
          Water: InitialPAWmm=563.7; RelativeTo=LL15; FilledFromTop=false
            Thickness=[100, 100, 100, 100, 100, 100, 100, 100, 100, 100, 100, 100, 100, 100, 100, 100, 100, 100, 100, 100, 100, 100, 100]
            InitialValues=[0.35, 0.35, 0.32, 0.29, 0.27, 0.31, 0.33, 0.35, 0.34, 0.34, 0.34, 0.34, 0.34, 0.33, 0.33, 0.32, 0.3, 0.3, 0.3, 0.31, 0.31, 0.32, 0.35]
          Nutrient
          Solute NO3: Thickness=[200, 200, 200, 200, 400, 300, 300]; InitialValues=[14, 9, 1, 0, 0, 0, 0]; InitialValuesUnits=ppm; WaterTableConcentration=0; D0=0; DepthConstant=0; MaxDepthSoluteAccessible=0; RunoffEffectivenessAtMovingSolute=0; MaxEffectiveRunoff=0
          Solute NH4: Thickness=[200, 200, 200, 200, 400, 300, 300]; InitialValues=[2, 2, 1, 0, 0, 0, 0]; InitialValuesUnits=ppm; WaterTableConcentration=0; D0=0; DepthConstant=0; MaxDepthSoluteAccessible=0; RunoffEffectivenessAtMovingSolute=0; MaxEffectiveRunoff=0
          Solute Urea: Thickness=[150, 150, 150, 150, 600, 300, 300]; InitialValues=[0, 0, 0, 0, 0, 0, 0]; InitialValuesUnits=kg/ha; WaterTableConcentration=0; D0=0; DepthConstant=0; MaxDepthSoluteAccessible=0; RunoffEffectivenessAtMovingSolute=0; MaxEffectiveRunoff=0
          SoilTemperature Temperature
        Fertiliser
        Irrigation
        SurfaceOrganicMatter: InitialResidueName=wheat_stubble; InitialResidueType=wheat; InitialResidueMass=500; InitialStandingFraction=0; InitialCPR=0; InitialCNR=100
        Plant Wheat
        Operations FertiliserEvents
        Operations IrrigationEvents
        Manager Sowing
          SowDate = 24-Jul
          CultivarName = Kerrin
          SowingDepth = 50
          RowSpacing = 150
          Population = 150
          EmergeDate =
```csharp
using APSIM.Shared.Utilities;
using Models.Utilities;
using Models.Soils;
using Models.PMF;
using Models.Core;
using System;

namespace Models
{
    [Serializable]
    public class Script : Model
    {
        [Link] Clock Clock;
        [Link] Fertiliser Fertiliser;
        [Link] Summary Summary;
        [Link] Soil Soil;
        
        [Link] Plant wheat;

        [Description("Sowing date (d-mmm)")]
        public string SowDate { get; set; }

        [Display(Type = DisplayType.CultivarName)]
        [Description("Cultivar to be sown")]
        public string CultivarName { get; set; }

        [Description("Sowing depth (mm)")]
        public double SowingDepth { get; set; }

        [Description("Row spacing (mm)")]
        public double RowSpacing { get; set; }

        [Description("Plant population (/m2)")]
        public double Population { get; set; }
        
        [Description("Emergence Date (d-MMM)")]
        public string EmergeDate {get; set;}

        [EventSubscribe("DoManagement")]
        private void OnDoManagement(object sender, EventArgs e)
        {
            if (DateUtilities.WithinDates(SowDate, Clock.Today, SowDate))
            {
                wheat.Sow(population: Population, cultivar: CultivarName, depth: SowingDepth, rowSpacing: RowSpacing);    
                wheat.Phenology.SetEmergenceDate(EmergeDate);
            }
        }
    }
}
```
        Manager ApplyFertiliser
          FertiliserType = UreaN
          FertiliserDates =
          Amount = 116
          NFrac = -
```csharp
using Models.Soils;
using System;
using System.Linq;
using Models.Core;
using Models.PMF;
using APSIM.Shared.Utilities;
namespace Models
{
    [Serializable]
    public class Script : Model
    {
        [Link] Clock Clock;
        [Link] Fertiliser Fertiliser;
        
        [Separator("A component to apply fertiliser on one or more dates on every year of the simulation")]

        [Description("Type of fertiliser to apply? ")] 
        [Display(Type = DisplayType.FertiliserType)]public string FertiliserType { get; set; }

        [Description("Dates to apply fertiliser ")] 
        public string[] FertiliserDates { get; set; } 

        [Description("Amount of fertiliser to be applied (kg /ha)")] 
        public double Amount { get; set; }

        [Description("Fraction of max applied")] 
        public double NFrac { get; set; }
        
        [EventSubscribe("DoManagement")]
        private void OnDoManagement(object sender, EventArgs e)
        {
            foreach (string ddMMM in FertiliserDates)
            {
                if (DateUtilities.DatesEqual(ddMMM, Clock.Today))
                {
                   Fertiliser.Apply(amount: Amount*NFrac/100, type: FertiliserType);

                }
            }
        }
    }
}
```
        Manager NDVIModel
          DrySoilNDVI = 0.12
          WetSoilNDVI = 0.2
          GreenCropNDVI = 0.82
          DeadCropNDVI = 0.1
```csharp
using System;
using Models.Core;
using Models.Interfaces;
using Models.PMF;
using APSIM.Shared.Utilities;
using Models.WaterModel;

namespace Models
{
    [Serializable]
    public class Script : Model
    {
        [Link] IClock Clock;
        [Link] ISummary Summary;
        [Link] ICanopy WheatCanopy;
        [Link] EvaporationModel EvapModel;
        
        [Description("Dry soil NDVI")]
        public double DrySoilNDVI { get; set; }
        
        [Description("Wet soil NDVI")]
        public double WetSoilNDVI { get; set; }

        [Description("Green Crop NDVI")]
        public double GreenCropNDVI { get; set; }
        
        [Description("Dead Crop NDVI")]
        public double DeadCropNDVI { get; set; }
                
        public double NDVI { get; set; }

        [EventSubscribe("DoManagement")]
        private void DoDailyCalculations(object sender, EventArgs e)
        {
            double SoilNDVI = WetSoilNDVI;
            if (EvapModel.t > 1)
               SoilNDVI = DrySoilNDVI;

            NDVI = GreenCropNDVI * WheatCanopy.CoverGreen;
            NDVI += DeadCropNDVI * (WheatCanopy.CoverTotal - WheatCanopy.CoverGreen);
            NDVI += SoilNDVI * (1 - WheatCanopy.CoverTotal);            
            
        }
    }
}
```
        Manager Harvesting
```csharp
using Models.PMF.Phen;
using APSIM.Shared.Utilities;
using System.Xml.Serialization;
using Models;
using Models.PMF;
using Models.Soils;
using System.Text;
using System.Collections.Generic;
using Models.Core;
using System;
using Models.Soils.Nutrients;

namespace Models
{
    [Serializable] 
    public class Script : Model
    {
        [Link] private Plant Wheat;
        [Link] private Simulation sim;
        [Link] private Clock clock;
        [Link(Type = LinkType.Path, Path = "[Wheat].Phenology")]
        private Phenology phenology;

        [EventSubscribe("DoManagement")]
        private void OnDoManagement(object sender, EventArgs e)
        {
            if (phenology.CurrentPhase.Name == "GrainRipening")
            {
                Wheat.Harvest();
                Wheat.EndCrop();
                sim.Set("Clock.EndDate", clock.Today);  
            }
        }

        [EventSubscribe("EndOfDay")]
        private void OnEndOfDay(object sender, EventArgs e)
        {
            if ((clock.Today.Equals(clock.EndDate))&&(Wheat.IsAlive))
            {
                Wheat.Harvest();
                Wheat.EndCrop();
                sim.Set("Clock.EndDate", clock.Today);  
            }
        }

    }
}
```
        Report: EventNames=[Clock].EndOfDay
          VariableNames:
            [Clock].Today
            [NDVIModel].Script.NDVI
            [Fertiliser].NitrogenApplied
        Report HarvestReport: EventNames=[Wheat].Harvesting
          VariableNames:
            [Simulation].Name
            [Clock].Today
            [Wheat].SowingDate
            [Wheat].SowingData.Cultivar
            [Wheat].Phenology.CurrentPhase.Name
            [Wheat].Phenology.CurrentStageName
            [Wheat].Phenology.EmergenceDAS
            [Wheat].Phenology.TerminalSpikeletDAS
            [Wheat].Phenology.FlagLeafDAS
            [Wheat].Phenology.HeadingDAS
            [Wheat].Phenology.FloweringDAS
            [Wheat].Phenology.MaturityDAS
            [Wheat].Grain.Wt
            [Wheat].Grain.N
            [Wheat].Grain.Number
            [Wheat].Grain.Size
            [Wheat].Grain.NConc
            [Wheat].AboveGround.Wt
            [Wheat].AboveGround.N
            [Wheat].Grain.Protein
            [Wheat].Grain.Size
            [Wheat].Phenology.FinalLeafNumber
            [Wheat].Leaf.MainStemPopulation
            [Wheat].SowingData.Cultivar
            [Wheat].SowingDate.DayOfYear
            [Clock].StartDate
            ([Wheat].Phenology.FloweringDAS - [Wheat].Phenology.EmergenceDAS) as FloweringDAE
            [IWeather].Latitude
            [IWeather].Longitude
            [IWeather].FileName
            [IWeather].CO2
            [IWeather].Amp
            [IWeather].Tav
            [LocationInfo].Script.Country
            [LocationInfo].Script.State
            [LocationInfo].Script.Region
        Report DailyReport: EventNames=[Clock].DoReport
          VariableNames:
            [Simulation].Name
            [Clock].Today
            [Soil].Water.Volumetric
            sum([Soil].Water.MM)
            sum([Soil].NO3.kgha)
            [IWeather].Radn
            [IWeather].MeanT
            [Wheat].AboveGround.N
            [Wheat].AboveGround.Wt
            [Wheat].AboveGroundLive.N
            [Wheat].AboveGroundLive.Wt
            [Wheat].AboveGroundDead.N
            [Wheat].AboveGroundDead.Wt
            [Wheat].Ear.N
            [Wheat].Ear.NConc
            [Wheat].Ear.Wt
            [Wheat].Grain.N
            [Wheat].Grain.NConc
            [Wheat].Grain.Number
            [Wheat].Grain.Size
            [Wheat].Grain.Wt
            [Wheat].Grain.NperKernal
            [Wheat].Leaf.Tips
            [Wheat].Leaf.CoverGreen
            [Wheat].Leaf.CoverTotal
            [Wheat].Leaf.Dead.N
            [Wheat].Leaf.Dead.NConc
            [Wheat].Leaf.Dead.Wt
            [Wheat].Leaf.Ligules
            [Wheat].Leaf.Fn
            [Wheat].Leaf.Fw
            [Wheat].Leaf.Height
            [Wheat].Leaf.LAI
            [Wheat].Leaf.Live.N
            [Wheat].Leaf.Live.NConc
            [Wheat].Leaf.Live.Wt
            [Wheat].Leaf.SpecificArea
            [Wheat].Leaf.SpecificAreaCanopy
            [Wheat].Leaf.SpecificNitrogen
            [Wheat].Leaf.Transpiration
            [Wheat].Phenology.CurrentPhase.Name
            [Wheat].Phenology.CurrentStageName
            [Wheat].Phenology.EmergenceDAS
            [Wheat].Phenology.Stage
            [Wheat].Phenology.ThermalTime
            [Wheat].Phenology.Zadok.Stage
            [Wheat].Root.Depth
            [Wheat].Root.N
            [Wheat].Root.Wt
            [Wheat].Root.NConc
            [Wheat].Spike.N
            [Wheat].Spike.NConc
            [Wheat].Spike.Wt
            [Wheat].Stem.N
            [Wheat].Stem.NConc
            [Wheat].Stem.Wt
            [Wheat].StemPlusSpike.Wt
            [Wheat].StemPlusSpike.N
            [Wheat].SowingData.Cultivar
            [Wheat].Phenology.HaunStage
            [Wheat].Leaf.Height
            [Wheat].Leaf.Tips
            [Wheat].Leaf.FinalLeafNumber
            [Wheat].Leaf.MainStemPopulation
            [Wheat].Leaf.StemPopulation
            [Wheat].Leaf.StemNumberPerPlant
            [Wheat].Phenology.PTQ
            [Wheat].Phenology.Phyllochron
            [Wheat].Total.N
            [Wheat].Total.Wt
            [IWeather].MeanT
            [Wheat].Phenology.Photoperiod
            [Wheat].Phenology.AccumulatedTT
            ([Wheat].Leaf.Transpiration + [Soil].SoilWater.Es + [MicroClimate].PrecipitationInterception)
            [Wheat].Leaf.Photosynthesis.FT
        Report SowingReport: EventNames=[Wheat].Sowing
          VariableNames:
            [Simulation].Name
            [Clock].Today
            [Wheat].SowingData.Cultivar
            [IWeather].Latitude
            [IWeather].Longitude
            [LocationInfo].Script.Country
            [LocationInfo].Script.State
            [LocationInfo].Script.Region
        Manager MaxLeafSize
```csharp
using Models.Soils;
using Models.PMF.Struct;
using System;
using System.Collections.Generic;
using System.Xml.Serialization;
using Models.Core;
using Models.Interfaces;
using Models.PMF;
using Models.PMF.Organs;
using Models.Soils.Arbitrator;
using APSIM.Shared.Utilities;
using Newtonsoft.Json;



namespace Models
{
    [Serializable] 
    public class Script : Model
    {
        [Link] private Clock Clock;
        [Link] private Plant Wheat;
        public  event EventHandler LeafReport;
        [Link(Type = LinkType.Path, Path = "[Wheat].Structure")]
        private Structure structure;
        
        
        [JsonIgnore] public int LeafPosition { get; set; }
        [JsonIgnore] public double LeafSize { get; set; }
        [JsonIgnore] public double MaxLeafSize { get; set; }
        
        [EventSubscribe("DoManagement")]
        private void OnDoManagement(object sender, EventArgs e)
        {
            var leaf = Wheat.Leaf as Leaf;
            if ((leaf.ExpandedCohortNo > LeafPosition) & (structure.NextLeafProportion == 1))
            {
                LeafPosition = (int)leaf.ExpandedCohortNo;
                LeafSize = leaf.CohortSize[LeafPosition];
                MaxLeafSize = leaf.CohortMaxArea[LeafPosition];
                LeafReport.Invoke(this, new EventArgs());
            }
        }
    }
}
```
        Report MaxLeafSizeReport: EventNames=[MaxLeafSize].Script.LeafReport
          VariableNames:
            [MaxLeafSize].Script.LeafSize
            [MaxLeafSize].Script.LeafPosition
            [MaxLeafSize].Script.MaxLeafSize
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