Simulations: Version=182
  DataStore
  Memo
    _Bruce Kimball, Jeff White, and Pierre Martre_

    **Introduction**

    This dataset corresponds to four free-air CO2 enrichment (FACE) experiments conducted in Maricopa, AZ from 1993 to 1997. A single wheat cultivar (Yecora Rojo) was used. Additiol treatments were two levels of irrigation ("Wet" vs "Dry") in 1993 and 1994 and two levels of nitogen ("High-N" vs. "Low-N") in 1996 and 1997.

    **Data source**

    Besides the growth and yield data, included are hourly or 15-minute data collected by Bruce A. Kimball that include canopy temperature from stationary infrared thermometers, as well as soil temperatures and components of the energy balance. Also included in the dataset are NDVI, absorbed PAR, and canopy temperatures collected by P.J. Pinter, Jr. using hand-held infrared thermometers. Pinter's data were collected once a day shortly after noon several times a week from all plots, whereas Kimball's instruments were not in all plots, particularly missing the Dry plots in 1993 and 1994. This dataset also contains gas exchange data (net C02 assimilation and stomatal conductance) collected by G.W. Wall.

    This dataset also contains gas exchange data (net C02 assimilation and stomatal conductance) collected by G.W. Wall.

    Soil moisture data from neutron probes were collected by Douglas J. Hunsaker, and they are also included with this dataset.

    Besides Kimball, Pinter, White, Wall, and Hunsaker (all associated with the USDA-ARS U.S. Arid-Land Agricultural Research Center at Maricopa, Arizo, USA; Kimball and Pinter are retired), other persons who were heavily involved with conduction of these FACE experiments and should be considered for co-authorship on publications using these data include Robert L. LaMorte (ALARC) and Steven W. Leavitt (University of Arizona, Tucson, Arizo).

    **References**

    Hunsaker D.J., Kimball B.A., Pinter Jr P.J., Wall G.W., LaMorte R.L., Adamsen F.J., Leavitt S.W., Thompson T.L., Matthias A.D., Brooks T.J. 2000. CO2 enrichment and soil nitrogen effects on wheat evapotranspiration and water use efficiency. Agricultural and Forest Meteorology 104:85-105.

    Kimball B.A., Pinter Jr. P.J., Garcia R.L., LaMorte R.L., Wall G.W., Hunsaker D.J., Wechsung G., Wechsung F., Kartschall T. 1995. Productivity and water use of wheat under free-air CO2 enrichment. Global Change Biology 1:429-442.

    Kimball BA, Pinter Jr PJ, LaMorte RL, Leavitt SW, Hunsaker DJ, Wall GW, Wechsung F, Wechsung G, Bloom AJ, White JW. 2017. Data from the Arizona FACE (Free-Air CO2 Enrichment) experiments on wheat at ample and limiting levels of water and nitrogen. Open Data Journal for Agricultural Research 3, 29-38.
  Memo Problems
    * On the Treatments sheet, the simulation_start_date dates don't exist in the weather files - should the dates be December instead of November?
    * On the Initial_condition_layers sheet, there are negative values at the bottom of the profile for some variables (e.g. initial_NO3_mass_layer) in some treatments (e.g. 906). Are they missing values?
    * On the Soil_profile_layers sheet, the units for soil_silt_fraction look like a fraction rather than a percent like sand and clay.
    * On the Env_modifications work sheet, there are no CO2 values specified for treatments 909, 910, 913, 914.

    * I'm unsure how to define 500kg/ha of root_wt from the previous crop. Initialise Organic.FOM pool to 500kg/ha?
  Experiment MAR
    Factors
      CompositeFactor 901
        Specifications:
          [Weather].FileName = MARA1992-1993.met
          [Operations]
        Operations
          1993-01-01  [Weather].CO2 = 370
          1992-12-15  [SurfaceOrganicMatter].Add(mass:1100, N:5.83, P:0, type:Wheat, name:Wheat)
          1992-12-15  [SurfaceOrganicMatter].Incorporate(fraction: 1, depth: 300)
          1992-12-15  [Water].InitialValues = 0.22, 0.223, 0.223, 0.228, 0.202, 0.202, 0.198, 0.192, 0.185, 0.185, 0.189, 0.19, 0.198, 0.196
          1992-12-15  [NO3].InitialValues = 16.3, 31.623, 30.48, 25.48, 14.406, 3.087, 6.594, 6.594, 3.297, 0.314, 0.628, 0.628, 0.628, 0.628
          1992-12-15  [NH4].InitialValues = 0.52, 1.02, 1.14, 1.04, 0.59, 0.29, 0.63, 0.63, 0.31, 0.31, 0.63, 0.63, 0.63, 0.63
          1992-12-15  [Wheat].Sow(cultivar:Yecora, rowSpacing:25.4, depth:40, population:130)
          1993-05-26  [Wheat].Harvest()
          1992-12-26  [Irrigation].Apply(amount:317, depth:230)
          1993-01-30  [Irrigation].Apply(amount:30, depth:230)
          1993-01-31  [Irrigation].Apply(amount:7, depth:230)
          1993-03-18  [Irrigation].Apply(amount:17, depth:230)
          1993-03-25  [Irrigation].Apply(amount:15, depth:230)
          1993-04-05  [Irrigation].Apply(amount:27, depth:230)
          1993-04-06  [Irrigation].Apply(amount:4, depth:230)
          1993-04-12  [Irrigation].Apply(amount:18, depth:230)
          1993-04-17  [Irrigation].Apply(amount:16, depth:230)
          1993-04-18  [Irrigation].Apply(amount:6, depth:230)
          1993-04-21  [Irrigation].Apply(amount:18, depth:230)
          1993-04-26  [Irrigation].Apply(amount:24, depth:230)
          1993-04-27  [Irrigation].Apply(amount:6, depth:230)
          1993-04-30  [Irrigation].Apply(amount:21, depth:230)
          1993-05-05  [Irrigation].Apply(amount:20.5, depth:230)
          1993-05-10  [Irrigation].Apply(amount:20.5, depth:230)
          1993-05-11  [Irrigation].Apply(amount:4.5, depth:230)
          1993-05-14  [Irrigation].Apply(amount:20.5, depth:230)
          1992-12-16  [Fertiliser].Apply(Amount:54, Type: Fertiliser.Types.NO3N, Depth:10)
          1993-01-30  [Fertiliser].Apply(Amount:92, Type: Fertiliser.Types.NO3N, Depth:20)
          1993-03-18  [Fertiliser].Apply(Amount:59, Type: Fertiliser.Types.NO3N, Depth:20)
          1993-04-05  [Fertiliser].Apply(Amount:72, Type: Fertiliser.Types.NO3N, Depth:20)
      CompositeFactor 902
        Specifications:
          [Weather].FileName = MARA1992-1993.met
          [Operations]
        Operations
          1993-01-01  [Weather].CO2 = 370
          1992-12-15  [SurfaceOrganicMatter].Add(mass:1100, N:5.83, P:0, type:Wheat, name:Wheat)
          1992-12-15  [SurfaceOrganicMatter].Incorporate(fraction: 1, depth: 300)
          1992-12-15  [Water].InitialValues = 0.22, 0.19, 0.19, 0.228, 0.216, 0.216, 0.167, 0.169, 0.181, 0.181, 0.174, 0.184, 0.178, 0.175
          1992-12-15  [NO3].InitialValues = 17.161, 33.274, 27.432, 14.82, 8.379, 2.646, 5.652, 5.652, 2.826, 0.314, 0.628, 0.628, 0.628, 0.628
          1992-12-15  [NH4].InitialValues = 0.46, 0.89, 1.14, 0.78, 0.44, 0.29, 0.63, 0.63, 0.31, 0.31, 0.63, 0.63, 0.63, 0.63
          1992-12-15  [Wheat].Sow(cultivar:Yecora, rowSpacing:25.4, depth:40, population:130)
          1993-05-26  [Wheat].Harvest()
          1992-12-26  [Irrigation].Apply(amount:317, depth:230)
          1993-01-30  [Irrigation].Apply(amount:30, depth:230)
          1993-01-31  [Irrigation].Apply(amount:7, depth:230)
          1993-03-01  [Irrigation].Apply(amount:12.5, depth:230)
          1993-03-09  [Irrigation].Apply(amount:60, depth:230)
          1993-03-18  [Irrigation].Apply(amount:34, depth:230)
          1993-03-25  [Irrigation].Apply(amount:50, depth:230)
          1993-04-05  [Irrigation].Apply(amount:54, depth:230)
          1993-04-06  [Irrigation].Apply(amount:4, depth:230)
          1993-04-12  [Irrigation].Apply(amount:47, depth:230)
          1993-04-17  [Irrigation].Apply(amount:38, depth:230)
          1993-04-18  [Irrigation].Apply(amount:6, depth:230)
          1993-04-21  [Irrigation].Apply(amount:36, depth:230)
          1993-04-26  [Irrigation].Apply(amount:48, depth:230)
          1993-04-27  [Irrigation].Apply(amount:6, depth:230)
          1993-04-30  [Irrigation].Apply(amount:42, depth:230)
          1993-05-05  [Irrigation].Apply(amount:41, depth:230)
          1993-05-10  [Irrigation].Apply(amount:41, depth:230)
          1993-05-11  [Irrigation].Apply(amount:4.5, depth:230)
          1993-05-14  [Irrigation].Apply(amount:41, depth:230)
          1992-12-16  [Fertiliser].Apply(Amount:54, Type: Fertiliser.Types.NO3N, Depth:10)
          1993-01-30  [Fertiliser].Apply(Amount:92, Type: Fertiliser.Types.NO3N, Depth:20)
          1993-03-18  [Fertiliser].Apply(Amount:59, Type: Fertiliser.Types.NO3N, Depth:20)
          1993-04-05  [Fertiliser].Apply(Amount:72, Type: Fertiliser.Types.NO3N, Depth:20)
      CompositeFactor 903
        Specifications:
          [Weather].FileName = MARC1992-1993.met
          [Operations]
        Operations
          1993-01-01  [Weather].CO2 = 550
          1993-05-16  [Weather].CO2 = 370
          1992-12-15  [SurfaceOrganicMatter].Add(mass:1100, N:5.83, P:0, type:Wheat, name:Wheat)
          1992-12-15  [SurfaceOrganicMatter].Incorporate(fraction: 1, depth: 300)
          1992-12-15  [Water].InitialValues = 0.227, 0.227, 0.227, 0.247, 0.23, 0.23, 0.148, 0.107, 0.101, 0.101, 0.116, 0.132, 0.139, 0.133
          1992-12-15  [NO3].InitialValues = 12.969, 25.146, 25.7175, 16.12, 9.114, 1.764, 3.768, 3.768, 1.884, 0.157, 0.314, 0.314, 0.314, 0.314
          1992-12-15  [NH4].InitialValues = 0.46, 0.89, 1.14, 1.04, 0.59, 0.29, 0.63, 0.63, 0.31, 0.16, 0.31, 0.31, 0.31, 0.31
          1992-12-15  [Wheat].Sow(cultivar:Yecora, rowSpacing:25.4, depth:40, population:130)
          1993-05-26  [Wheat].Harvest()
          1992-12-26  [Irrigation].Apply(amount:317, depth:230)
          1993-01-30  [Irrigation].Apply(amount:30, depth:230)
          1993-01-31  [Irrigation].Apply(amount:7, depth:230)
          1993-03-18  [Irrigation].Apply(amount:17, depth:230)
          1993-03-25  [Irrigation].Apply(amount:15, depth:230)
          1993-04-05  [Irrigation].Apply(amount:27, depth:230)
          1993-04-06  [Irrigation].Apply(amount:4, depth:230)
          1993-04-12  [Irrigation].Apply(amount:18, depth:230)
          1993-04-17  [Irrigation].Apply(amount:16, depth:230)
          1993-04-18  [Irrigation].Apply(amount:6, depth:230)
          1993-04-21  [Irrigation].Apply(amount:18, depth:230)
          1993-04-26  [Irrigation].Apply(amount:24, depth:230)
          1993-04-27  [Irrigation].Apply(amount:6, depth:230)
          1993-04-30  [Irrigation].Apply(amount:21, depth:230)
          1993-05-05  [Irrigation].Apply(amount:20.5, depth:230)
          1993-05-10  [Irrigation].Apply(amount:20.5, depth:230)
          1993-05-11  [Irrigation].Apply(amount:4.5, depth:230)
          1993-05-14  [Irrigation].Apply(amount:20.5, depth:230)
          1992-12-16  [Fertiliser].Apply(Amount:54, Type: Fertiliser.Types.NO3N, Depth:10)
          1993-01-30  [Fertiliser].Apply(Amount:92, Type: Fertiliser.Types.NO3N, Depth:20)
          1993-03-18  [Fertiliser].Apply(Amount:59, Type: Fertiliser.Types.NO3N, Depth:20)
          1993-04-05  [Fertiliser].Apply(Amount:72, Type: Fertiliser.Types.NO3N, Depth:20)
      CompositeFactor 904
        Specifications:
          [Weather].FileName = MARC1992-1993.met
          [Operations]
        Operations
          1993-01-01  [Weather].CO2 = 550
          1993-05-16  [Weather].CO2 = 370
          1992-12-15  [SurfaceOrganicMatter].Add(mass:1100, N:5.83, P:0, type:Wheat, name:Wheat)
          1992-12-15  [SurfaceOrganicMatter].Incorporate(fraction: 1, depth: 300)
          1992-12-15  [Water].InitialValues = 0.204, 0.204, 0.204, 0.252, 0.231, 0.231, 0.152, 0.119, 0.104, 0.104, 0.12, 0.142, 0.152, 0.139
          1992-12-15  [NO3].InitialValues = 15.851, 30.734, 20.574, 15.34, 8.673, 1.176, 2.512, 2.512, 1.256, 0.157, 0.314, 0.314, 0.628, 0.314
          1992-12-15  [NH4].InitialValues = 0.52, 1.02, 1.14, 1.04, 0.59, 0.29, 0.63, 0.63, 0.31, 0.16, 0.31, 0.31, 0.63, 0.31
          1992-12-15  [Wheat].Sow(cultivar:Yecora, rowSpacing:25.4, depth:40, population:130)
          1993-05-26  [Wheat].Harvest()
          1992-12-26  [Irrigation].Apply(amount:317, depth:230)
          1993-01-30  [Irrigation].Apply(amount:30, depth:230)
          1993-01-31  [Irrigation].Apply(amount:7, depth:230)
          1993-03-01  [Irrigation].Apply(amount:12.5, depth:230)
          1993-03-09  [Irrigation].Apply(amount:60, depth:230)
          1993-03-18  [Irrigation].Apply(amount:34, depth:230)
          1993-03-25  [Irrigation].Apply(amount:50, depth:230)
          1993-04-05  [Irrigation].Apply(amount:54, depth:230)
          1993-04-06  [Irrigation].Apply(amount:4, depth:230)
          1993-04-12  [Irrigation].Apply(amount:47, depth:230)
          1993-04-17  [Irrigation].Apply(amount:38, depth:230)
          1993-04-18  [Irrigation].Apply(amount:6, depth:230)
          1993-04-21  [Irrigation].Apply(amount:36, depth:230)
          1993-04-26  [Irrigation].Apply(amount:48, depth:230)
          1993-04-27  [Irrigation].Apply(amount:6, depth:230)
          1993-04-30  [Irrigation].Apply(amount:42, depth:230)
          1993-05-05  [Irrigation].Apply(amount:41, depth:230)
          1993-05-10  [Irrigation].Apply(amount:41, depth:230)
          1993-05-11  [Irrigation].Apply(amount:4.5, depth:230)
          1993-05-14  [Irrigation].Apply(amount:41, depth:230)
          1992-12-16  [Fertiliser].Apply(Amount:54, Type: Fertiliser.Types.NO3N, Depth:10)
          1993-01-30  [Fertiliser].Apply(Amount:92, Type: Fertiliser.Types.NO3N, Depth:20)
          1993-03-18  [Fertiliser].Apply(Amount:59, Type: Fertiliser.Types.NO3N, Depth:20)
          1993-04-05  [Fertiliser].Apply(Amount:72, Type: Fertiliser.Types.NO3N, Depth:20)
      CompositeFactor 905
        Specifications:
          [Weather].FileName = MARA1993-1994.met
          [Operations]
        Operations
          1993-12-28  [Weather].CO2 = 370
          1993-12-09  [SurfaceOrganicMatter].Add(mass:1100, N:5.83, P:0, type:Wheat, name:Wheat)
          1993-12-09  [SurfaceOrganicMatter].Incorporate(fraction: 1, depth: 300)
          1993-12-09  [Water].InitialValues = 0.313, 0.313, 0.313, 0.281, 0.226, 0.226, 0.217, 0.211, 0.206, 0.206, 0.211, 0.214, 0.224, 0.237
          1993-12-09  [NO3].InitialValues = 3.93, 7.62, 53.9115, 49.4, 27.93, 12.936, 27.632, 27.632, 13.816
          1993-12-09  [NH4].InitialValues = 0.46, 0.89, 1.14, 0.78, 0.44, 0.29, 0.63, 0.63, 0.31
          1993-12-07  [Wheat].Sow(cultivar:Yecora, rowSpacing:25.4, depth:40, population:152)
          1994-06-01  [Wheat].Harvest()
          1993-12-13  [Irrigation].Apply(amount:13, depth:230)
          1993-12-17  [Irrigation].Apply(amount:17, depth:230)
          1994-02-03  [Irrigation].Apply(amount:30, depth:230)
          1994-03-15  [Irrigation].Apply(amount:30, depth:230)
          1994-03-27  [Irrigation].Apply(amount:30, depth:230)
          1994-04-07  [Irrigation].Apply(amount:50, depth:230)
          1994-04-18  [Irrigation].Apply(amount:50, depth:230)
          1994-04-29  [Irrigation].Apply(amount:7, depth:230)
          1994-05-03  [Irrigation].Apply(amount:60, depth:230)
          1993-12-02  [Fertiliser].Apply(Amount:54, Type: Fertiliser.Types.NO3N, Depth:10)
          1994-02-03  [Fertiliser].Apply(Amount:92, Type: Fertiliser.Types.NO3N, Depth:10)
          1994-03-16  [Fertiliser].Apply(Amount:69, Type: Fertiliser.Types.NO3N, Depth:10)
          1994-04-08  [Fertiliser].Apply(Amount:46, Type: Fertiliser.Types.NO3N, Depth:11)
      CompositeFactor 906
        Specifications:
          [Weather].FileName = MARA1993-1994.met
          [Operations]
        Operations
          1993-12-28  [Weather].CO2 = 370
          1993-12-09  [SurfaceOrganicMatter].Add(mass:1100, N:5.83, P:0, type:Wheat, name:Wheat)
          1993-12-09  [SurfaceOrganicMatter].Incorporate(fraction: 1, depth: 300)
          1993-12-09  [Water].InitialValues = 0.302, 0.302, 0.302, 0.286, 0.217, 0.217, 0.186, 0.2, 0.199, 0.199, 0.197, 0.204, 0.208, 0.209
          1993-12-09  [NO3].InitialValues = 2.751, 5.334, 22.86, 27.56, 15.582, 4.998, 10.676, 10.676, 5.338
          1993-12-09  [NH4].InitialValues = 0.46, 0.89, 1.14, 0.78, 0.44, 0.29, 0.63, 0.63, 0.31
          1993-12-07  [Wheat].Sow(cultivar:Yecora, rowSpacing:25.4, depth:40, population:152)
          1994-06-01  [Wheat].Harvest()
          1993-12-13  [Irrigation].Apply(amount:13, depth:230)
          1993-12-17  [Irrigation].Apply(amount:17, depth:230)
          1994-01-21  [Irrigation].Apply(amount:30, depth:230)
          1994-02-03  [Irrigation].Apply(amount:30, depth:230)
          1994-02-23  [Irrigation].Apply(amount:35, depth:230)
          1994-03-03  [Irrigation].Apply(amount:30, depth:230)
          1994-03-15  [Irrigation].Apply(amount:36, depth:230)
          1994-03-20  [Irrigation].Apply(amount:25, depth:230)
          1994-03-27  [Irrigation].Apply(amount:30, depth:230)
          1994-04-03  [Irrigation].Apply(amount:30, depth:230)
          1994-04-07  [Irrigation].Apply(amount:50, depth:230)
          1994-04-13  [Irrigation].Apply(amount:50, depth:230)
          1994-04-18  [Irrigation].Apply(amount:50, depth:230)
          1994-04-24  [Irrigation].Apply(amount:50, depth:230)
          1994-04-29  [Irrigation].Apply(amount:7, depth:230)
          1994-05-03  [Irrigation].Apply(amount:60, depth:230)
          1994-05-09  [Irrigation].Apply(amount:48, depth:230)
          1994-05-15  [Irrigation].Apply(amount:38, depth:230)
          1993-12-02  [Fertiliser].Apply(Amount:54, Type: Fertiliser.Types.NO3N, Depth:10)
          1994-02-03  [Fertiliser].Apply(Amount:92, Type: Fertiliser.Types.NO3N, Depth:10)
          1994-03-16  [Fertiliser].Apply(Amount:69, Type: Fertiliser.Types.NO3N, Depth:10)
          1994-04-08  [Fertiliser].Apply(Amount:46, Type: Fertiliser.Types.NO3N, Depth:11)
      CompositeFactor 907
        Specifications:
          [Weather].FileName = MARC1993-1994.met
          [Operations]
        Operations
          1993-12-28  [Weather].CO2 = 550
          1994-05-18  [Weather].CO2 = 370
          1993-12-09  [SurfaceOrganicMatter].Add(mass:1100, N:5.83, P:0, type:Wheat, name:Wheat)
          1993-12-09  [SurfaceOrganicMatter].Incorporate(fraction: 1, depth: 300)
          1993-12-09  [Water].InitialValues = 0.295, 0.295, 0.295, 0.287, 0.235, 0.235, 0.145, 0.126, 0.126, 0.126, 0.16, 0.158, 0.173, 0.174
          1993-12-09  [NO3].InitialValues = 4.716, 9.144, 22.479, 28.34, 16.023, 8.085, 17.27, 17.27, 8.635
          1993-12-09  [NH4].InitialValues = 0.46, 0.89, 1.14, 0.78, 0.44, 0.29, 0.63, 0.63, 0.31
          1993-12-07  [Wheat].Sow(cultivar:Yecora, rowSpacing:25.4, depth:40, population:152)
          1994-06-01  [Wheat].Harvest()
          1993-12-13  [Irrigation].Apply(amount:13, depth:230)
          1993-12-17  [Irrigation].Apply(amount:17, depth:230)
          1994-02-03  [Irrigation].Apply(amount:30, depth:230)
          1994-03-15  [Irrigation].Apply(amount:30, depth:230)
          1994-03-27  [Irrigation].Apply(amount:30, depth:230)
          1994-04-07  [Irrigation].Apply(amount:50, depth:230)
          1994-04-18  [Irrigation].Apply(amount:50, depth:230)
          1994-04-29  [Irrigation].Apply(amount:7, depth:230)
          1994-05-03  [Irrigation].Apply(amount:60, depth:230)
          1993-12-02  [Fertiliser].Apply(Amount:54, Type: Fertiliser.Types.NO3N, Depth:10)
          1994-02-03  [Fertiliser].Apply(Amount:92, Type: Fertiliser.Types.NO3N, Depth:10)
          1994-03-16  [Fertiliser].Apply(Amount:69, Type: Fertiliser.Types.NO3N, Depth:10)
          1994-04-08  [Fertiliser].Apply(Amount:46, Type: Fertiliser.Types.NO3N, Depth:11)
      CompositeFactor 908
        Specifications:
          [Weather].FileName = MARC1993-1994.met
          [Operations]
        Operations
          1993-12-28  [Weather].CO2 = 550
          1994-05-18  [Weather].CO2 = 370
          1993-12-09  [SurfaceOrganicMatter].Add(mass:1100, N:5.83, P:0, type:Wheat, name:Wheat)
          1993-12-09  [SurfaceOrganicMatter].Incorporate(fraction: 1, depth: 300)
          1993-12-09  [Water].InitialValues = 0.31, 0.31, 0.31, 0.296, 0.242, 0.242, 0.163, 0.142, 0.129, 0.129, 0.151, 0.155, 0.166, 0.166
          1993-12-09  [NO3].InitialValues = 6.943, 13.462, 28.194, 37.18, 21.021, 10.437, 22.294, 22.294, 11.147
          1993-12-09  [NH4].InitialValues = 0.46, 0.89, 1.14, 0.78, 0.44, 0.29, 0.63, 0.63, 0.31
          1993-12-07  [Wheat].Sow(cultivar:Yecora, rowSpacing:25.4, depth:40, population:152)
          1994-06-01  [Wheat].Harvest()
          1993-12-13  [Irrigation].Apply(amount:13, depth:230)
          1993-12-17  [Irrigation].Apply(amount:17, depth:230)
          1994-01-21  [Irrigation].Apply(amount:30, depth:230)
          1994-02-03  [Irrigation].Apply(amount:30, depth:230)
          1994-02-23  [Irrigation].Apply(amount:35, depth:230)
          1994-03-03  [Irrigation].Apply(amount:30, depth:230)
          1994-03-15  [Irrigation].Apply(amount:36, depth:230)
          1994-03-20  [Irrigation].Apply(amount:25, depth:230)
          1994-03-27  [Irrigation].Apply(amount:30, depth:230)
          1994-04-03  [Irrigation].Apply(amount:30, depth:230)
          1994-04-07  [Irrigation].Apply(amount:50, depth:230)
          1994-04-13  [Irrigation].Apply(amount:50, depth:230)
          1994-04-18  [Irrigation].Apply(amount:50, depth:230)
          1994-04-24  [Irrigation].Apply(amount:50, depth:230)
          1994-04-29  [Irrigation].Apply(amount:7, depth:230)
          1994-05-03  [Irrigation].Apply(amount:60, depth:230)
          1994-05-09  [Irrigation].Apply(amount:48, depth:230)
          1994-05-15  [Irrigation].Apply(amount:38, depth:230)
          1993-12-02  [Fertiliser].Apply(Amount:54, Type: Fertiliser.Types.NO3N, Depth:10)
          1994-02-03  [Fertiliser].Apply(Amount:92, Type: Fertiliser.Types.NO3N, Depth:10)
          1994-03-16  [Fertiliser].Apply(Amount:69, Type: Fertiliser.Types.NO3N, Depth:10)
          1994-04-08  [Fertiliser].Apply(Amount:46, Type: Fertiliser.Types.NO3N, Depth:11)
      CompositeFactor 909
        Specifications:
          [Weather].FileName = MARB1995-1996.met
          [Operations]
        Operations
          1996-01-01  [Weather].CO2 =
          1995-12-18  [SurfaceOrganicMatter].Add(mass:500, N:5, P:0, type:Wheat, name:Wheat)
          1995-12-18  [SurfaceOrganicMatter].Incorporate(fraction: 1, depth: 100)
          1995-12-18  [Water].InitialValues = 0.292, 0.292, 0.292, 0.271, 0.224, 0.224, 0.165, 0.179, 0.189, 0.189, 0.19, 0.188, 0.171, 0.164
          1995-12-18  [NO3].InitialValues = 2.29905, 4.4577, 12.9921, 16.172, 9.1434, 5.8947, 12.5914, 6.4998, 3.2499, 4.2233, 8.4466, 7.7558, 5.5264, 5.5264
          1995-12-18  [NH4].InitialValues = 1.7, 3.3, 4.21, 3.64, 2.06, 1.26, 2.7, 2.23, 1.11, 1, 2.01, 3.55, 1.26, 1.26
          1995-12-15  [Wheat].Sow(cultivar:Yecora, rowSpacing:25, depth:15, population:186)
          1996-05-29  [Wheat].Harvest()
          1995-12-21  [Irrigation].Apply(amount:30, depth:230)
          1996-01-30  [Irrigation].Apply(amount:30, depth:230)
          1996-01-31  [Irrigation].Apply(amount:25, depth:230)
          1996-02-22  [Irrigation].Apply(amount:40, depth:230)
          1996-03-05  [Irrigation].Apply(amount:33, depth:230)
          1996-03-11  [Irrigation].Apply(amount:45, depth:230)
          1996-03-22  [Irrigation].Apply(amount:45, depth:230)
          1996-03-30  [Irrigation].Apply(amount:54, depth:230)
          1996-03-31  [Irrigation].Apply(amount:2, depth:230)
          1996-04-05  [Irrigation].Apply(amount:45, depth:230)
          1996-04-10  [Irrigation].Apply(amount:45, depth:230)
          1996-04-15  [Irrigation].Apply(amount:30, depth:230)
          1996-04-18  [Irrigation].Apply(amount:43, depth:230)
          1996-04-22  [Irrigation].Apply(amount:43, depth:230)
          1996-04-26  [Irrigation].Apply(amount:42, depth:230)
          1996-05-01  [Irrigation].Apply(amount:40, depth:230)
          1995-12-21  [Fertiliser].Apply(Amount:0.1, Type: Fertiliser.Types.NO3N, Depth:20)
          1995-12-21  [Fertiliser].Apply(Amount:1.79, Type: Fertiliser.Types.NO3N, Depth:20)
          1996-01-30  [Fertiliser].Apply(Amount:15, Type: Fertiliser.Types.NO3N, Depth:20)
          1996-01-31  [Fertiliser].Apply(Amount:0.04, Type: Fertiliser.Types.NO3N, Depth:20)
          1996-01-31  [Fertiliser].Apply(Amount:1.72, Type: Fertiliser.Types.NO3N, Depth:20)
          1996-02-22  [Fertiliser].Apply(Amount:30, Type: Fertiliser.Types.NO3N, Depth:20)
          1996-02-22  [Fertiliser].Apply(Amount:0.05, Type: Fertiliser.Types.NO3N, Depth:20)
          1996-02-22  [Fertiliser].Apply(Amount:2.24, Type: Fertiliser.Types.NO3N, Depth:20)
          1996-03-05  [Fertiliser].Apply(Amount:0.04, Type: Fertiliser.Types.NO3N, Depth:20)
          1996-03-05  [Fertiliser].Apply(Amount:1.85, Type: Fertiliser.Types.NO3N, Depth:20)
          1996-03-11  [Fertiliser].Apply(Amount:0.05, Type: Fertiliser.Types.NO3N, Depth:20)
          1996-03-11  [Fertiliser].Apply(Amount:2.52, Type: Fertiliser.Types.NO3N, Depth:20)
          1996-03-22  [Fertiliser].Apply(Amount:0.05, Type: Fertiliser.Types.NO3N, Depth:20)
          1996-03-22  [Fertiliser].Apply(Amount:2.52, Type: Fertiliser.Types.NO3N, Depth:20)
          1996-03-30  [Fertiliser].Apply(Amount:25, Type: Fertiliser.Types.NO3N, Depth:20)
          1996-03-31  [Fertiliser].Apply(Amount:0.05, Type: Fertiliser.Types.NO3N, Depth:20)
          1996-03-31  [Fertiliser].Apply(Amount:2.44, Type: Fertiliser.Types.NO3N, Depth:20)
          1996-04-06  [Fertiliser].Apply(Amount:0.04, Type: Fertiliser.Types.NO3N, Depth:20)
          1996-04-06  [Fertiliser].Apply(Amount:1.29, Type: Fertiliser.Types.NO3N, Depth:20)
          1996-04-10  [Fertiliser].Apply(Amount:0.03, Type: Fertiliser.Types.NO3N, Depth:20)
          1996-04-10  [Fertiliser].Apply(Amount:1.56, Type: Fertiliser.Types.NO3N, Depth:20)
          1996-04-15  [Fertiliser].Apply(Amount:0.01, Type: Fertiliser.Types.NO3N, Depth:20)
          1996-04-15  [Fertiliser].Apply(Amount:1.13, Type: Fertiliser.Types.NO3N, Depth:20)
          1996-04-19  [Fertiliser].Apply(Amount:0.01, Type: Fertiliser.Types.NO3N, Depth:20)
          1996-04-19  [Fertiliser].Apply(Amount:2.16, Type: Fertiliser.Types.NO3N, Depth:20)
          1996-04-23  [Fertiliser].Apply(Amount:0.04, Type: Fertiliser.Types.NO3N, Depth:20)
          1996-04-23  [Fertiliser].Apply(Amount:3.38, Type: Fertiliser.Types.NO3N, Depth:20)
          1996-04-26  [Fertiliser].Apply(Amount:0.03, Type: Fertiliser.Types.NO3N, Depth:20)
          1996-04-26  [Fertiliser].Apply(Amount:2.94, Type: Fertiliser.Types.NO3N, Depth:20)
          1996-05-02  [Fertiliser].Apply(Amount:0.05, Type: Fertiliser.Types.NO3N, Depth:20)
          1996-05-02  [Fertiliser].Apply(Amount:1.55, Type: Fertiliser.Types.NO3N, Depth:20)
      CompositeFactor 910
        Specifications:
          [Weather].FileName = MARB1995-1996.met
          [Operations]
        Operations
          1996-01-01  [Weather].CO2 =
          1995-12-18  [SurfaceOrganicMatter].Add(mass:500, N:5, P:0, type:Wheat, name:Wheat)
          1995-12-18  [SurfaceOrganicMatter].Incorporate(fraction: 1, depth: 100)
          1995-12-18  [Water].InitialValues = 0.281, 0.281, 0.281, 0.277, 0.246, 0.246, 0.202, 0.189, 0.186, 0.186, 0.195, 0.191, 0.169, 0.148
          1995-12-18  [NO3].InitialValues = 4.74875, 9.2075, 19.29765, 20.28, 11.466, 5.3949, 11.5238, 4.8984, 2.4492, 1.1932, 2.3864, 1.099, 2.7632, 2.7632
          1995-12-18  [NH4].InitialValues = 1.3, 2.53, 3.56, 4.6, 2.6, 1.25, 2.67, 1.35, 0.68, 1.52, 3.05, 1.22, 2.17, 2.17
          1995-12-15  [Wheat].Sow(cultivar:Yecora, rowSpacing:25, depth:15, population:186)
          1996-05-29  [Wheat].Harvest()
          1995-12-21  [Irrigation].Apply(amount:30, depth:230)
          1996-01-30  [Irrigation].Apply(amount:30, depth:230)
          1996-01-31  [Irrigation].Apply(amount:25, depth:230)
          1996-02-22  [Irrigation].Apply(amount:40, depth:230)
          1996-03-05  [Irrigation].Apply(amount:33, depth:230)
          1996-03-11  [Irrigation].Apply(amount:45, depth:230)
          1996-03-22  [Irrigation].Apply(amount:45, depth:230)
          1996-03-30  [Irrigation].Apply(amount:54, depth:230)
          1996-03-31  [Irrigation].Apply(amount:2, depth:230)
          1996-04-05  [Irrigation].Apply(amount:45, depth:230)
          1996-04-10  [Irrigation].Apply(amount:45, depth:230)
          1996-04-15  [Irrigation].Apply(amount:30, depth:230)
          1996-04-18  [Irrigation].Apply(amount:43, depth:230)
          1996-04-22  [Irrigation].Apply(amount:43, depth:230)
          1996-04-26  [Irrigation].Apply(amount:42, depth:230)
          1996-05-01  [Irrigation].Apply(amount:54, depth:230)
          1996-05-06  [Irrigation].Apply(amount:47, depth:230)
          1995-12-21  [Fertiliser].Apply(Amount:0.1, Type: Fertiliser.Types.NO3N, Depth:20)
          1995-12-21  [Fertiliser].Apply(Amount:1.79, Type: Fertiliser.Types.NO3N, Depth:20)
          1996-01-30  [Fertiliser].Apply(Amount:50, Type: Fertiliser.Types.NO3N, Depth:20)
          1996-01-31  [Fertiliser].Apply(Amount:0.04, Type: Fertiliser.Types.NO3N, Depth:20)
          1996-01-31  [Fertiliser].Apply(Amount:1.72, Type: Fertiliser.Types.NO3N, Depth:20)
          1996-02-22  [Fertiliser].Apply(Amount:125, Type: Fertiliser.Types.NO3N, Depth:20)
          1996-02-22  [Fertiliser].Apply(Amount:0.05, Type: Fertiliser.Types.NO3N, Depth:20)
          1996-02-22  [Fertiliser].Apply(Amount:2.24, Type: Fertiliser.Types.NO3N, Depth:20)
          1996-03-05  [Fertiliser].Apply(Amount:0.04, Type: Fertiliser.Types.NO3N, Depth:20)
          1996-03-05  [Fertiliser].Apply(Amount:1.85, Type: Fertiliser.Types.NO3N, Depth:20)
          1996-03-11  [Fertiliser].Apply(Amount:0.05, Type: Fertiliser.Types.NO3N, Depth:20)
          1996-03-11  [Fertiliser].Apply(Amount:2.52, Type: Fertiliser.Types.NO3N, Depth:20)
          1996-03-22  [Fertiliser].Apply(Amount:0.05, Type: Fertiliser.Types.NO3N, Depth:20)
          1996-03-22  [Fertiliser].Apply(Amount:2.52, Type: Fertiliser.Types.NO3N, Depth:20)
          1996-03-30  [Fertiliser].Apply(Amount:125, Type: Fertiliser.Types.NO3N, Depth:20)
          1996-03-31  [Fertiliser].Apply(Amount:0.05, Type: Fertiliser.Types.NO3N, Depth:20)
          1996-03-31  [Fertiliser].Apply(Amount:2.44, Type: Fertiliser.Types.NO3N, Depth:20)
          1996-04-06  [Fertiliser].Apply(Amount:0.04, Type: Fertiliser.Types.NO3N, Depth:20)
          1996-04-06  [Fertiliser].Apply(Amount:1.29, Type: Fertiliser.Types.NO3N, Depth:20)
          1996-04-10  [Fertiliser].Apply(Amount:0.03, Type: Fertiliser.Types.NO3N, Depth:20)
          1996-04-10  [Fertiliser].Apply(Amount:1.56, Type: Fertiliser.Types.NO3N, Depth:20)
          1996-04-15  [Fertiliser].Apply(Amount:0.01, Type: Fertiliser.Types.NO3N, Depth:20)
          1996-04-15  [Fertiliser].Apply(Amount:1.13, Type: Fertiliser.Types.NO3N, Depth:20)
          1996-04-18  [Fertiliser].Apply(Amount:50, Type: Fertiliser.Types.NO3N, Depth:20)
          1996-04-19  [Fertiliser].Apply(Amount:0.01, Type: Fertiliser.Types.NO3N, Depth:20)
          1996-04-19  [Fertiliser].Apply(Amount:2.16, Type: Fertiliser.Types.NO3N, Depth:20)
          1996-04-23  [Fertiliser].Apply(Amount:0.04, Type: Fertiliser.Types.NO3N, Depth:20)
          1996-04-23  [Fertiliser].Apply(Amount:3.38, Type: Fertiliser.Types.NO3N, Depth:20)
          1996-04-26  [Fertiliser].Apply(Amount:0.03, Type: Fertiliser.Types.NO3N, Depth:20)
          1996-04-26  [Fertiliser].Apply(Amount:2.94, Type: Fertiliser.Types.NO3N, Depth:20)
          1996-05-02  [Fertiliser].Apply(Amount:0.07, Type: Fertiliser.Types.NO3N, Depth:20)
          1996-05-02  [Fertiliser].Apply(Amount:2.1, Type: Fertiliser.Types.NO3N, Depth:20)
          1996-05-06  [Fertiliser].Apply(Amount:0.05, Type: Fertiliser.Types.NO3N, Depth:20)
          1996-05-06  [Fertiliser].Apply(Amount:2.63, Type: Fertiliser.Types.NO3N, Depth:20)
      CompositeFactor 911
        Specifications:
          [Weather].FileName = MARC1995-1996.met
          [Operations]
        Operations
          1996-01-01  [Weather].CO2 = 185
          1995-12-18  [SurfaceOrganicMatter].Add(mass:500, N:5, P:0, type:Wheat, name:Wheat)
          1995-12-18  [SurfaceOrganicMatter].Incorporate(fraction: 1, depth: 100)
          1995-12-18  [Water].InitialValues = 0.288, 0.288, 0.288, 0.263, 0.235, 0.235, 0.186, 0.138, 0.118, 0.118, 0.127, 0.125, 0.131, 0.158
          1995-12-18  [NO3].InitialValues = 4.18545, 8.1153, 12.36345, 15.392, 8.7024, 4.1454, 8.8548, 3.3284, 1.6642, 2.1509, 4.3018, 6.6254, 4.1134, 4.1134
          1995-12-18  [NH4].InitialValues = 1.4, 2.71, 4.34, 3.8, 2.15, 1.21, 2.57, 1.54, 0.77, 0.85, 1.7, 1.22, 0.97, 0.97
          1995-12-15  [Wheat].Sow(cultivar:Yecora, rowSpacing:25, depth:15, population:186)
          1996-05-29  [Wheat].Harvest()
          1995-12-21  [Irrigation].Apply(amount:30, depth:230)
          1996-01-30  [Irrigation].Apply(amount:30, depth:230)
          1996-01-31  [Irrigation].Apply(amount:25, depth:230)
          1996-02-22  [Irrigation].Apply(amount:40, depth:230)
          1996-03-05  [Irrigation].Apply(amount:33, depth:230)
          1996-03-11  [Irrigation].Apply(amount:45, depth:230)
          1996-03-22  [Irrigation].Apply(amount:45, depth:230)
          1996-03-30  [Irrigation].Apply(amount:54, depth:230)
          1996-03-31  [Irrigation].Apply(amount:2, depth:230)
          1996-04-05  [Irrigation].Apply(amount:45, depth:230)
          1996-04-10  [Irrigation].Apply(amount:45, depth:230)
          1996-04-15  [Irrigation].Apply(amount:30, depth:230)
          1996-04-18  [Irrigation].Apply(amount:43, depth:230)
          1996-04-22  [Irrigation].Apply(amount:43, depth:230)
          1996-04-26  [Irrigation].Apply(amount:42, depth:230)
          1996-05-01  [Irrigation].Apply(amount:40, depth:230)
          1995-12-21  [Fertiliser].Apply(Amount:0.1, Type: Fertiliser.Types.NO3N, Depth:20)
          1995-12-21  [Fertiliser].Apply(Amount:1.79, Type: Fertiliser.Types.NO3N, Depth:20)
          1996-01-30  [Fertiliser].Apply(Amount:15, Type: Fertiliser.Types.NO3N, Depth:20)
          1996-01-31  [Fertiliser].Apply(Amount:0.04, Type: Fertiliser.Types.NO3N, Depth:20)
          1996-01-31  [Fertiliser].Apply(Amount:1.72, Type: Fertiliser.Types.NO3N, Depth:20)
          1996-02-22  [Fertiliser].Apply(Amount:30, Type: Fertiliser.Types.NO3N, Depth:20)
          1996-02-22  [Fertiliser].Apply(Amount:0.05, Type: Fertiliser.Types.NO3N, Depth:20)
          1996-02-22  [Fertiliser].Apply(Amount:2.24, Type: Fertiliser.Types.NO3N, Depth:20)
          1996-03-05  [Fertiliser].Apply(Amount:0.04, Type: Fertiliser.Types.NO3N, Depth:20)
          1996-03-05  [Fertiliser].Apply(Amount:1.85, Type: Fertiliser.Types.NO3N, Depth:20)
          1996-03-11  [Fertiliser].Apply(Amount:0.05, Type: Fertiliser.Types.NO3N, Depth:20)
          1996-03-11  [Fertiliser].Apply(Amount:2.52, Type: Fertiliser.Types.NO3N, Depth:20)
          1996-03-22  [Fertiliser].Apply(Amount:0.05, Type: Fertiliser.Types.NO3N, Depth:20)
          1996-03-22  [Fertiliser].Apply(Amount:2.52, Type: Fertiliser.Types.NO3N, Depth:20)
          1996-03-30  [Fertiliser].Apply(Amount:25, Type: Fertiliser.Types.NO3N, Depth:20)
          1996-03-31  [Fertiliser].Apply(Amount:0.05, Type: Fertiliser.Types.NO3N, Depth:20)
          1996-03-31  [Fertiliser].Apply(Amount:2.44, Type: Fertiliser.Types.NO3N, Depth:20)
          1996-04-06  [Fertiliser].Apply(Amount:0.04, Type: Fertiliser.Types.NO3N, Depth:20)
          1996-04-06  [Fertiliser].Apply(Amount:1.29, Type: Fertiliser.Types.NO3N, Depth:20)
          1996-04-10  [Fertiliser].Apply(Amount:0.03, Type: Fertiliser.Types.NO3N, Depth:20)
          1996-04-10  [Fertiliser].Apply(Amount:1.56, Type: Fertiliser.Types.NO3N, Depth:20)
          1996-04-15  [Fertiliser].Apply(Amount:0.01, Type: Fertiliser.Types.NO3N, Depth:20)
          1996-04-15  [Fertiliser].Apply(Amount:1.13, Type: Fertiliser.Types.NO3N, Depth:20)
          1996-04-19  [Fertiliser].Apply(Amount:0.01, Type: Fertiliser.Types.NO3N, Depth:20)
          1996-04-19  [Fertiliser].Apply(Amount:2.16, Type: Fertiliser.Types.NO3N, Depth:20)
          1996-04-23  [Fertiliser].Apply(Amount:0.04, Type: Fertiliser.Types.NO3N, Depth:20)
          1996-04-23  [Fertiliser].Apply(Amount:3.38, Type: Fertiliser.Types.NO3N, Depth:20)
          1996-04-26  [Fertiliser].Apply(Amount:0.03, Type: Fertiliser.Types.NO3N, Depth:20)
          1996-04-26  [Fertiliser].Apply(Amount:2.94, Type: Fertiliser.Types.NO3N, Depth:20)
          1996-05-02  [Fertiliser].Apply(Amount:0.05, Type: Fertiliser.Types.NO3N, Depth:20)
          1996-05-02  [Fertiliser].Apply(Amount:1.55, Type: Fertiliser.Types.NO3N, Depth:20)
      CompositeFactor 912
        Specifications:
          [Weather].FileName = MARC1995-1996.met
          [Operations]
        Operations
          1996-01-01  [Weather].CO2 = 185
          1995-12-18  [SurfaceOrganicMatter].Add(mass:500, N:5, P:0, type:Wheat, name:Wheat)
          1995-12-18  [SurfaceOrganicMatter].Incorporate(fraction: 1, depth: 100)
          1995-12-18  [Water].InitialValues = 0.296, 0.296, 0.296, 0.259, 0.233, 0.233, 0.175, 0.137, 0.143, 0.143, 0.141, 0.125, 0.103, 0.106
          1995-12-18  [NO3].InitialValues = 3.76625, 7.3025, 16.5735, 20.176, 11.4072, 6.1152, 13.0624, 6.0288, 3.0144, 1.1461, 2.2922, 1.3502, 1.6642, 1.6642
          1995-12-18  [NH4].InitialValues = 1.48, 2.87, 4.51, 5.17, 2.93, 1.4, 2.98, 2.2, 1.1, 1.02, 2.04, 1, 1.32, 1.32
          1995-12-15  [Wheat].Sow(cultivar:Yecora, rowSpacing:25, depth:15, population:186)
          1996-05-29  [Wheat].Harvest()
          1995-12-21  [Irrigation].Apply(amount:30, depth:230)
          1996-01-30  [Irrigation].Apply(amount:30, depth:230)
          1996-01-31  [Irrigation].Apply(amount:25, depth:230)
          1996-02-22  [Irrigation].Apply(amount:40, depth:230)
          1996-03-05  [Irrigation].Apply(amount:33, depth:230)
          1996-03-11  [Irrigation].Apply(amount:45, depth:230)
          1996-03-22  [Irrigation].Apply(amount:45, depth:230)
          1996-03-30  [Irrigation].Apply(amount:54, depth:230)
          1996-03-31  [Irrigation].Apply(amount:2, depth:230)
          1996-04-05  [Irrigation].Apply(amount:45, depth:230)
          1996-04-10  [Irrigation].Apply(amount:45, depth:230)
          1996-04-15  [Irrigation].Apply(amount:30, depth:230)
          1996-04-18  [Irrigation].Apply(amount:43, depth:230)
          1996-04-22  [Irrigation].Apply(amount:43, depth:230)
          1996-04-26  [Irrigation].Apply(amount:42, depth:230)
          1996-05-01  [Irrigation].Apply(amount:54, depth:230)
          1996-05-06  [Irrigation].Apply(amount:47, depth:230)
          1995-12-21  [Fertiliser].Apply(Amount:0.1, Type: Fertiliser.Types.NO3N, Depth:20)
          1995-12-21  [Fertiliser].Apply(Amount:1.79, Type: Fertiliser.Types.NO3N, Depth:20)
          1996-01-30  [Fertiliser].Apply(Amount:50, Type: Fertiliser.Types.NO3N, Depth:20)
          1996-01-31  [Fertiliser].Apply(Amount:0.04, Type: Fertiliser.Types.NO3N, Depth:20)
          1996-01-31  [Fertiliser].Apply(Amount:1.72, Type: Fertiliser.Types.NO3N, Depth:20)
          1996-02-22  [Fertiliser].Apply(Amount:125, Type: Fertiliser.Types.NO3N, Depth:20)
          1996-02-22  [Fertiliser].Apply(Amount:0.05, Type: Fertiliser.Types.NO3N, Depth:20)
          1996-02-22  [Fertiliser].Apply(Amount:2.24, Type: Fertiliser.Types.NO3N, Depth:20)
          1996-03-05  [Fertiliser].Apply(Amount:0.04, Type: Fertiliser.Types.NO3N, Depth:20)
          1996-03-05  [Fertiliser].Apply(Amount:1.85, Type: Fertiliser.Types.NO3N, Depth:20)
          1996-03-11  [Fertiliser].Apply(Amount:0.05, Type: Fertiliser.Types.NO3N, Depth:20)
          1996-03-11  [Fertiliser].Apply(Amount:2.52, Type: Fertiliser.Types.NO3N, Depth:20)
          1996-03-22  [Fertiliser].Apply(Amount:0.05, Type: Fertiliser.Types.NO3N, Depth:20)
          1996-03-22  [Fertiliser].Apply(Amount:2.52, Type: Fertiliser.Types.NO3N, Depth:20)
          1996-03-30  [Fertiliser].Apply(Amount:125, Type: Fertiliser.Types.NO3N, Depth:20)
          1996-03-31  [Fertiliser].Apply(Amount:0.05, Type: Fertiliser.Types.NO3N, Depth:20)
          1996-03-31  [Fertiliser].Apply(Amount:2.44, Type: Fertiliser.Types.NO3N, Depth:20)
          1996-04-06  [Fertiliser].Apply(Amount:0.04, Type: Fertiliser.Types.NO3N, Depth:20)
          1996-04-06  [Fertiliser].Apply(Amount:1.29, Type: Fertiliser.Types.NO3N, Depth:20)
          1996-04-10  [Fertiliser].Apply(Amount:0.03, Type: Fertiliser.Types.NO3N, Depth:20)
          1996-04-10  [Fertiliser].Apply(Amount:1.56, Type: Fertiliser.Types.NO3N, Depth:20)
          1996-04-15  [Fertiliser].Apply(Amount:0.01, Type: Fertiliser.Types.NO3N, Depth:20)
          1996-04-15  [Fertiliser].Apply(Amount:1.13, Type: Fertiliser.Types.NO3N, Depth:20)
          1996-04-18  [Fertiliser].Apply(Amount:50, Type: Fertiliser.Types.NO3N, Depth:20)
          1996-04-19  [Fertiliser].Apply(Amount:0.01, Type: Fertiliser.Types.NO3N, Depth:20)
          1996-04-19  [Fertiliser].Apply(Amount:2.16, Type: Fertiliser.Types.NO3N, Depth:20)
          1996-04-23  [Fertiliser].Apply(Amount:0.04, Type: Fertiliser.Types.NO3N, Depth:20)
          1996-04-23  [Fertiliser].Apply(Amount:3.38, Type: Fertiliser.Types.NO3N, Depth:20)
          1996-04-26  [Fertiliser].Apply(Amount:0.03, Type: Fertiliser.Types.NO3N, Depth:20)
          1996-04-26  [Fertiliser].Apply(Amount:2.94, Type: Fertiliser.Types.NO3N, Depth:20)
          1996-05-02  [Fertiliser].Apply(Amount:0.07, Type: Fertiliser.Types.NO3N, Depth:20)
          1996-05-02  [Fertiliser].Apply(Amount:2.1, Type: Fertiliser.Types.NO3N, Depth:20)
          1996-05-06  [Fertiliser].Apply(Amount:0.05, Type: Fertiliser.Types.NO3N, Depth:20)
          1996-05-06  [Fertiliser].Apply(Amount:2.63, Type: Fertiliser.Types.NO3N, Depth:20)
      CompositeFactor 913
        Specifications:
          [Weather].FileName = MARB1996-1997.met
          [Operations]
        Operations
          1997-01-03  [Weather].CO2 =
          1996-12-19  [SurfaceOrganicMatter].Add(mass:4300, N:43, P:0, type:Wheat, name:Wheat)
          1996-12-19  [SurfaceOrganicMatter].Incorporate(fraction: 1, depth: 100)
          1996-12-19  [Water].InitialValues = 0.267, 0.267, 0.267, 0.279, 0.273, 0.267, 0.188, 0.176, 0.185, 0.195, 0.197, 0.18, 0.175, 0.183
          1996-12-19  [NO3].InitialValues = 1.1004, 2.1336, 1.31445, 1.768, 0.6909, 0.5145, 0.6908, 0.8478, 0.5024, 0.5024, 1.0048, 1.0048, 1.0048, 1.0048
          1996-12-19  [NH4].InitialValues = 0.13, 0.25, 0.27, 0.39, 0.16, 0.1, 0.13, 0.09, 0.05, 0.05, 0.09, 0.09, 0.09, 0.09
          1996-12-15  [Wheat].Sow(cultivar:Yecora, rowSpacing:25, depth:15, population:194)
          1997-05-28  [Wheat].Harvest()
          1996-12-28  [Irrigation].Apply(amount:30, depth:230)
          1997-01-30  [Irrigation].Apply(amount:25, depth:230)
          1997-02-19  [Irrigation].Apply(amount:40, depth:230)
          1997-03-05  [Irrigation].Apply(amount:35, depth:230)
          1997-03-13  [Irrigation].Apply(amount:40, depth:230)
          1997-03-18  [Irrigation].Apply(amount:30, depth:230)
          1997-03-27  [Irrigation].Apply(amount:66, depth:230)
          1997-04-02  [Irrigation].Apply(amount:42, depth:230)
          1997-04-07  [Irrigation].Apply(amount:22, depth:230)
          1997-04-12  [Irrigation].Apply(amount:43, depth:230)
          1997-04-17  [Irrigation].Apply(amount:38, depth:230)
          1997-04-22  [Irrigation].Apply(amount:44, depth:230)
          1997-04-29  [Irrigation].Apply(amount:60, depth:230)
          1997-05-03  [Irrigation].Apply(amount:30, depth:230)
          1997-05-09  [Irrigation].Apply(amount:3, depth:230)
          1996-12-28  [Fertiliser].Apply(Amount:4.87, Type: Fertiliser.Types.NO3N, Depth:20)
          1997-01-30  [Fertiliser].Apply(Amount:5, Type: Fertiliser.Types.NO3N, Depth:20)
          1997-01-30  [Fertiliser].Apply(Amount:2.4, Type: Fertiliser.Types.NO3N, Depth:20)
          1997-02-19  [Fertiliser].Apply(Amount:0.42, Type: Fertiliser.Types.NO3N, Depth:20)
          1997-03-05  [Fertiliser].Apply(Amount:5, Type: Fertiliser.Types.NO3N, Depth:20)
          1997-03-05  [Fertiliser].Apply(Amount:1.56, Type: Fertiliser.Types.NO3N, Depth:20)
          1997-03-13  [Fertiliser].Apply(Amount:2.11, Type: Fertiliser.Types.NO3N, Depth:20)
          1997-03-18  [Fertiliser].Apply(Amount:0.26, Type: Fertiliser.Types.NO3N, Depth:20)
          1997-03-27  [Fertiliser].Apply(Amount:5, Type: Fertiliser.Types.NO3N, Depth:20)
          1997-03-27  [Fertiliser].Apply(Amount:2.36, Type: Fertiliser.Types.NO3N, Depth:20)
          1997-04-02  [Fertiliser].Apply(Amount:3.03, Type: Fertiliser.Types.NO3N, Depth:20)
          1997-04-07  [Fertiliser].Apply(Amount:1.59, Type: Fertiliser.Types.NO3N, Depth:20)
          1997-04-12  [Fertiliser].Apply(Amount:3.1, Type: Fertiliser.Types.NO3N, Depth:20)
          1997-04-17  [Fertiliser].Apply(Amount:5.9, Type: Fertiliser.Types.NO3N, Depth:20)
          1997-04-22  [Fertiliser].Apply(Amount:3.06, Type: Fertiliser.Types.NO3N, Depth:20)
          1997-04-29  [Fertiliser].Apply(Amount:4.59, Type: Fertiliser.Types.NO3N, Depth:20)
          1997-05-03  [Fertiliser].Apply(Amount:2.1, Type: Fertiliser.Types.NO3N, Depth:20)
          1997-05-09  [Fertiliser].Apply(Amount:0.22, Type: Fertiliser.Types.NO3N, Depth:20)
      CompositeFactor 914
        Specifications:
          [Weather].FileName = MARB1996-1997.met
          [Operations]
        Operations
          1997-01-03  [Weather].CO2 =
          1996-12-19  [SurfaceOrganicMatter].Add(mass:4300, N:43, P:0, type:Wheat, name:Wheat)
          1996-12-19  [SurfaceOrganicMatter].Incorporate(fraction: 1, depth: 100)
          1996-12-19  [Water].InitialValues = 0.266, 0.266, 0.266, 0.28, 0.264, 0.247, 0.209, 0.194, 0.193, 0.192, 0.19, 0.19, 0.173, 0.178
          1996-12-19  [NO3].InitialValues = 3.80555, 7.3787, 2.5908, 2.73, 0.6174, 0.5733, 1.1618, 1.2874, 0.7222, 0.7222, 1.4444, 1.4444, 1.4444, 1.4444
          1996-12-19  [NH4].InitialValues = 0.12, 0.24, 0.4, 0.44, 0.16, 0.13, 0.22, 0.22, 0.11, 0.11, 0.22, 0.22, 0.22, 0.22
          1996-12-15  [Wheat].Sow(cultivar:Yecora, rowSpacing:25, depth:15, population:194)
          1997-05-28  [Wheat].Harvest()
          1996-12-28  [Irrigation].Apply(amount:30, depth:230)
          1997-01-30  [Irrigation].Apply(amount:25, depth:230)
          1997-02-19  [Irrigation].Apply(amount:40, depth:230)
          1997-03-05  [Irrigation].Apply(amount:35, depth:230)
          1997-03-13  [Irrigation].Apply(amount:40, depth:230)
          1997-03-18  [Irrigation].Apply(amount:30, depth:230)
          1997-03-27  [Irrigation].Apply(amount:66, depth:230)
          1997-04-02  [Irrigation].Apply(amount:42, depth:230)
          1997-04-07  [Irrigation].Apply(amount:22, depth:230)
          1997-04-12  [Irrigation].Apply(amount:43, depth:230)
          1997-04-17  [Irrigation].Apply(amount:38, depth:230)
          1997-04-22  [Irrigation].Apply(amount:44, depth:230)
          1997-04-29  [Irrigation].Apply(amount:60, depth:230)
          1997-05-03  [Irrigation].Apply(amount:68, depth:230)
          1997-05-08  [Irrigation].Apply(amount:35, depth:230)
          1997-05-09  [Irrigation].Apply(amount:3, depth:230)
          1996-12-28  [Fertiliser].Apply(Amount:4.87, Type: Fertiliser.Types.NO3N, Depth:20)
          1997-01-30  [Fertiliser].Apply(Amount:50, Type: Fertiliser.Types.NO3N, Depth:20)
          1997-01-30  [Fertiliser].Apply(Amount:2.4, Type: Fertiliser.Types.NO3N, Depth:20)
          1997-02-19  [Fertiliser].Apply(Amount:0.42, Type: Fertiliser.Types.NO3N, Depth:20)
          1997-03-05  [Fertiliser].Apply(Amount:125, Type: Fertiliser.Types.NO3N, Depth:20)
          1997-03-05  [Fertiliser].Apply(Amount:1.56, Type: Fertiliser.Types.NO3N, Depth:20)
          1997-03-13  [Fertiliser].Apply(Amount:2.11, Type: Fertiliser.Types.NO3N, Depth:20)
          1997-03-18  [Fertiliser].Apply(Amount:0.26, Type: Fertiliser.Types.NO3N, Depth:20)
          1997-03-27  [Fertiliser].Apply(Amount:125, Type: Fertiliser.Types.NO3N, Depth:20)
          1997-04-02  [Fertiliser].Apply(Amount:3.03, Type: Fertiliser.Types.NO3N, Depth:20)
          1997-04-07  [Fertiliser].Apply(Amount:1.59, Type: Fertiliser.Types.NO3N, Depth:20)
          1997-04-12  [Fertiliser].Apply(Amount:3.1, Type: Fertiliser.Types.NO3N, Depth:20)
          1997-04-17  [Fertiliser].Apply(Amount:5.9, Type: Fertiliser.Types.NO3N, Depth:20)
          1997-04-22  [Fertiliser].Apply(Amount:50, Type: Fertiliser.Types.NO3N, Depth:20)
          1997-04-22  [Fertiliser].Apply(Amount:3.06, Type: Fertiliser.Types.NO3N, Depth:20)
          1997-04-29  [Fertiliser].Apply(Amount:4.59, Type: Fertiliser.Types.NO3N, Depth:20)
          1997-05-03  [Fertiliser].Apply(Amount:4.75, Type: Fertiliser.Types.NO3N, Depth:20)
          1997-05-08  [Fertiliser].Apply(Amount:2.93, Type: Fertiliser.Types.NO3N, Depth:20)
          1997-05-09  [Fertiliser].Apply(Amount:0.22, Type: Fertiliser.Types.NO3N, Depth:20)
      CompositeFactor 915
        Specifications:
          [Weather].FileName = MARC1996-1997.met
          [Operations]
        Operations
          1997-01-03  [Weather].CO2 = 185
          1996-12-19  [SurfaceOrganicMatter].Add(mass:4300, N:43, P:0, type:Wheat, name:Wheat)
          1996-12-19  [SurfaceOrganicMatter].Incorporate(fraction: 1, depth: 100)
          1996-12-19  [Water].InitialValues = 0.268, 0.268, 0.268, 0.279, 0.269, 0.259, 0.212, 0.162, 0.156, 0.15, 0.145, 0.144, 0.159, 0.169
          1996-12-19  [NO3].InitialValues = 3.4191, 6.6294, 1.6002, 2.496, 0.6321, 0.4998, 0.785, 0.8164, 0.4239, 0.4239, 0.8478, 0.8478, 0.8478, 0.8478
          1996-12-19  [NH4].InitialValues = 0.19, 0.37, 0.3, 0.44, 0.22, 0.13, 0.13, 0.06, 0.02, 0.02, 0.03, 0.03, 0.03, 0.03
          1996-12-15  [Wheat].Sow(cultivar:Yecora, rowSpacing:25, depth:15, population:194)
          1997-05-28  [Wheat].Harvest()
          1996-12-28  [Irrigation].Apply(amount:30, depth:230)
          1997-01-30  [Irrigation].Apply(amount:25, depth:230)
          1997-02-19  [Irrigation].Apply(amount:40, depth:230)
          1997-03-05  [Irrigation].Apply(amount:35, depth:230)
          1997-03-13  [Irrigation].Apply(amount:40, depth:230)
          1997-03-18  [Irrigation].Apply(amount:30, depth:230)
          1997-03-27  [Irrigation].Apply(amount:66, depth:230)
          1997-04-02  [Irrigation].Apply(amount:42, depth:230)
          1997-04-07  [Irrigation].Apply(amount:22, depth:230)
          1997-04-12  [Irrigation].Apply(amount:43, depth:230)
          1997-04-17  [Irrigation].Apply(amount:38, depth:230)
          1997-04-22  [Irrigation].Apply(amount:44, depth:230)
          1997-04-29  [Irrigation].Apply(amount:60, depth:230)
          1997-05-03  [Irrigation].Apply(amount:30, depth:230)
          1997-05-09  [Irrigation].Apply(amount:3, depth:230)
          1996-12-28  [Fertiliser].Apply(Amount:4.87, Type: Fertiliser.Types.NO3N, Depth:20)
          1997-01-30  [Fertiliser].Apply(Amount:5, Type: Fertiliser.Types.NO3N, Depth:20)
          1997-01-30  [Fertiliser].Apply(Amount:2.4, Type: Fertiliser.Types.NO3N, Depth:20)
          1997-02-19  [Fertiliser].Apply(Amount:0.42, Type: Fertiliser.Types.NO3N, Depth:20)
          1997-03-05  [Fertiliser].Apply(Amount:5, Type: Fertiliser.Types.NO3N, Depth:20)
          1997-03-05  [Fertiliser].Apply(Amount:1.56, Type: Fertiliser.Types.NO3N, Depth:20)
          1997-03-13  [Fertiliser].Apply(Amount:2.11, Type: Fertiliser.Types.NO3N, Depth:20)
          1997-03-18  [Fertiliser].Apply(Amount:0.26, Type: Fertiliser.Types.NO3N, Depth:20)
          1997-03-27  [Fertiliser].Apply(Amount:5, Type: Fertiliser.Types.NO3N, Depth:20)
          1997-03-27  [Fertiliser].Apply(Amount:2.36, Type: Fertiliser.Types.NO3N, Depth:20)
          1997-04-02  [Fertiliser].Apply(Amount:3.03, Type: Fertiliser.Types.NO3N, Depth:20)
          1997-04-07  [Fertiliser].Apply(Amount:1.59, Type: Fertiliser.Types.NO3N, Depth:20)
          1997-04-12  [Fertiliser].Apply(Amount:3.1, Type: Fertiliser.Types.NO3N, Depth:20)
          1997-04-17  [Fertiliser].Apply(Amount:5.9, Type: Fertiliser.Types.NO3N, Depth:20)
          1997-04-22  [Fertiliser].Apply(Amount:3.06, Type: Fertiliser.Types.NO3N, Depth:20)
          1997-04-29  [Fertiliser].Apply(Amount:4.59, Type: Fertiliser.Types.NO3N, Depth:20)
          1997-05-03  [Fertiliser].Apply(Amount:2.1, Type: Fertiliser.Types.NO3N, Depth:20)
          1997-05-09  [Fertiliser].Apply(Amount:0.22, Type: Fertiliser.Types.NO3N, Depth:20)
      CompositeFactor 916
        Specifications:
          [Weather].FileName = MARC1996-1997.met
          [Operations]
        Operations
          1997-01-03  [Weather].CO2 = 185
          1996-12-19  [SurfaceOrganicMatter].Add(mass:4300, N:43, P:0, type:Wheat, name:Wheat)
          1996-12-19  [SurfaceOrganicMatter].Incorporate(fraction: 1, depth: 100)
          1996-12-19  [Water].InitialValues = 0.273, 0.273, 0.273, 0.276, 0.261, 0.246, 0.209, 0.193, 0.181, 0.17, 0.17, 0.186, 0.171, 0.18
          1996-12-19  [NO3].InitialValues = 2.751, 5.334, 2.00025, 5.278, 1.029, 0.9702, 1.9468, 1.6642, 0.6908, 0.6908, 1.3816, 1.3816, 1.3816, 1.3816
          1996-12-19  [NH4].InitialValues = 0.12, 0.23, 0.34, 0.47, 0.16, 0.15, 0.25, 0.31, 0.19, 0.19, 0.38, 0.38, 0.38, 0.38
          1996-12-15  [Wheat].Sow(cultivar:Yecora, rowSpacing:25, depth:15, population:194)
          1997-05-28  [Wheat].Harvest()
          1996-12-28  [Irrigation].Apply(amount:30, depth:230)
          1997-01-30  [Irrigation].Apply(amount:25, depth:230)
          1997-02-19  [Irrigation].Apply(amount:40, depth:230)
          1997-03-05  [Irrigation].Apply(amount:35, depth:230)
          1997-03-13  [Irrigation].Apply(amount:40, depth:230)
          1997-03-18  [Irrigation].Apply(amount:30, depth:230)
          1997-03-27  [Irrigation].Apply(amount:66, depth:230)
          1997-04-02  [Irrigation].Apply(amount:42, depth:230)
          1997-04-07  [Irrigation].Apply(amount:22, depth:230)
          1997-04-12  [Irrigation].Apply(amount:43, depth:230)
          1997-04-17  [Irrigation].Apply(amount:38, depth:230)
          1997-04-22  [Irrigation].Apply(amount:44, depth:230)
          1997-04-29  [Irrigation].Apply(amount:60, depth:230)
          1997-05-03  [Irrigation].Apply(amount:68, depth:230)
          1997-05-08  [Irrigation].Apply(amount:35, depth:230)
          1997-05-09  [Irrigation].Apply(amount:3, depth:230)
          1996-12-28  [Fertiliser].Apply(Amount:4.87, Type: Fertiliser.Types.NO3N, Depth:20)
          1997-01-30  [Fertiliser].Apply(Amount:50, Type: Fertiliser.Types.NO3N, Depth:20)
          1997-01-30  [Fertiliser].Apply(Amount:2.4, Type: Fertiliser.Types.NO3N, Depth:20)
          1997-02-19  [Fertiliser].Apply(Amount:0.42, Type: Fertiliser.Types.NO3N, Depth:20)
          1997-03-05  [Fertiliser].Apply(Amount:125, Type: Fertiliser.Types.NO3N, Depth:20)
          1997-03-05  [Fertiliser].Apply(Amount:1.56, Type: Fertiliser.Types.NO3N, Depth:20)
          1997-03-13  [Fertiliser].Apply(Amount:2.11, Type: Fertiliser.Types.NO3N, Depth:20)
          1997-03-18  [Fertiliser].Apply(Amount:0.26, Type: Fertiliser.Types.NO3N, Depth:20)
          1997-03-27  [Fertiliser].Apply(Amount:125, Type: Fertiliser.Types.NO3N, Depth:20)
          1997-03-27  [Fertiliser].Apply(Amount:2.36, Type: Fertiliser.Types.NO3N, Depth:20)
          1997-04-02  [Fertiliser].Apply(Amount:3.03, Type: Fertiliser.Types.NO3N, Depth:20)
          1997-04-07  [Fertiliser].Apply(Amount:1.59, Type: Fertiliser.Types.NO3N, Depth:20)
          1997-04-12  [Fertiliser].Apply(Amount:3.1, Type: Fertiliser.Types.NO3N, Depth:20)
          1997-04-17  [Fertiliser].Apply(Amount:5.9, Type: Fertiliser.Types.NO3N, Depth:20)
          1997-04-22  [Fertiliser].Apply(Amount:50, Type: Fertiliser.Types.NO3N, Depth:20)
          1997-04-22  [Fertiliser].Apply(Amount:3.06, Type: Fertiliser.Types.NO3N, Depth:20)
          1997-04-29  [Fertiliser].Apply(Amount:4.59, Type: Fertiliser.Types.NO3N, Depth:20)
          1997-05-03  [Fertiliser].Apply(Amount:4.75, Type: Fertiliser.Types.NO3N, Depth:20)
          1997-05-08  [Fertiliser].Apply(Amount:2.93, Type: Fertiliser.Types.NO3N, Depth:20)
          1997-05-09  [Fertiliser].Apply(Amount:0.22, Type: Fertiliser.Types.NO3N, Depth:20)
    Simulation Base
      Clock
      Summary
      Weather: FileName=MARA1992-1993.met
      SoilArbitrator
      MicroClimate: a_interception=0; b_interception=1; c_interception=0; d_interception=0; SoilHeatFluxFraction=0.4; MinimumHeightDiffForNewLayer=0; NightInterceptionFraction=0.5; ReferenceHeight=2
      Zone Field: Area=1; Slope=0; AspectAngle=0; Altitude=50
        Operations
        Soil: SoilType=Black Vertosol; Region=Maricopa, AZ; Country=USA; ApsoilNumber=AZMC920001; Latitude=0; Longitude=0
          Physical
            Thickness  ParticleSizeSand  ParticleSizeSilt  ParticleSizeClay  Rocks     BD    AirDry  LL15   DUL    SAT    KS
            50         31                31                34                0.113264  1.31  0.1     0.202  0.32   0.417  1032
            100        31                31                34                0.124513  1.27  0.1     0.201  0.319  0.424  1032
            150        31                31                34                0.124513  1.27  0.15    0.199  0.319  0.424  1032
            200        31                31                34                0.115611  1.3   0.198   0.198  0.318  0.419  1032
            100        31                31                34                0         1.47  0.198   0.198  0.318  0.387  1032
            100        31                31                34                0         1.47  0.198   0.198  0.318  0.387  1032
            200        25                25                30                0         1.57  0.186   0.186  0.299  0.359  1032
            200        20                20                25                0         1.57  0.159   0.159  0.275  0.347  1032
            100        20                20                25                0         1.57  0.159   0.159  0.275  0.347  1032
            100        20                20                25                0         1.57  0.159   0.159  0.275  0.347  1032
            200        20                20                20                0.113501  1.57  0.136   0.136  0.254  0.336  1032
            200        20                20                20                0.113501  1.57  0.136   0.136  0.254  0.336  1032
            200        17                17                18                0.126693  1.57  0.128   0.128  0.244  0.331  1032
            200        17                17                18                0.126693  1.57  0.128   0.128  0.244  0.331  1032
            Rocks source: Calculated
            SoilCrop WheatSoil
              LL=[0.202, 0.201, 0.199, 0.198, 0.198, 0.198, 0.186, 0.159, 0.159, 0.159, 0.136, 0.136, 0.128, 0.128]
              KL=[0.06, 0.06, 0.06, 0.06, 0.06, 0.06, 0.05, 0.03, 0.01, 0.01, 0.01, 0.01, 0.01, 0.01]
              XF=[1, 0.741, 0.607, 0.449, 0.301, 0.301, 0.183, 0.1, 0.1, 0.1, 0.055, 0, 0.03, 0.03]
          LayerStructure: Thickness=[5, 50, 50, 50, 50, 50, 50, 50, 50, 50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]
          WaterBalance SoilWater: SummerDate=1-Apr; SummerU=6; SummerCona=3.5; WinterDate=1-Nov; WinterU=6; WinterCona=3.5; DiffusConst=40; DiffusSlope=16; Salb=0.13; CN2Bare=73; CNRed=20; CNCov=0.8; PSIDul=-100
            Thickness=[50, 100, 150, 200, 100, 100, 200, 200, 100, 100, 200, 200, 200, 200]
            SWCON=[0.3, 0.3, 0.3, 0.3, 0.3, 0.3, 0.3, 0.3, 0.3, 0.3, 0.3, 0.3, 0.3, 0.3]
          CERESSoilTemperature Temperature
          Solute NO3: InitialValuesUnits=ppm; WaterTableConcentration=0; D0=0; DepthConstant=0; MaxDepthSoluteAccessible=0; RunoffEffectivenessAtMovingSolute=0; MaxEffectiveRunoff=0
            Thickness=[50, 100, 150, 200, 100, 100, 200, 200, 100, 100, 200, 200, 200, 200]
            InitialValues=[24.9, 24.9, 16, 9.8, 9.8, 2.1, 2.1, 2.1, 2.1, 0.2, 0.2, 0.2, 0.2, 0.2]
          Solute NH4: InitialValuesUnits=ppm; WaterTableConcentration=0; D0=0; DepthConstant=0; MaxDepthSoluteAccessible=0; RunoffEffectivenessAtMovingSolute=0; MaxEffectiveRunoff=0
            Thickness=[50, 100, 150, 200, 100, 100, 200, 200, 100, 100, 200, 200, 200, 200]
            InitialValues=[0.8, 0.8, 0.6, 0.4, 0.4, 0.2, 0.2, 0.2, 0.2, 0.2, 0.2, 0.2, 0.2, 0.2]
          Solute Urea: InitialValues=[0, 0, 0, 0, 0, 0, 0, 0, 0, 0, 0, 0, 0, 0]; InitialValuesUnits=kg/ha; WaterTableConcentration=0; D0=0; DepthConstant=0; MaxDepthSoluteAccessible=0; RunoffEffectivenessAtMovingSolute=0; MaxEffectiveRunoff=0
            Thickness=[50, 100, 150, 200, 100, 100, 200, 200, 100, 100, 200, 200, 200, 200]
          Water: InitialPAWmm=202.9; RelativeTo=LL15; FilledFromTop=false
            Thickness=[50, 100, 150, 200, 100, 100, 200, 200, 100, 100, 200, 200, 200, 200]
            InitialValues=[0.15, 0.15, 0.199, 0.318, 0.318, 0.318, 0.299, 0.275, 0.275, 0.275, 0.254, 0.254, 0.244, 0.244]
          Organic: FOMCNRatio=40; CarbonUnits=Total
            Thickness  Carbon  SoilCNRatio  FBiom  FInert  FOM
            50         0.41    8            0.025  0.4     924
            100        0.35    8            0.02   0.6     765
            150        0.27    8            0.015  0.8     590
            200        0.24    8            0.01   0.9     537
            100        0.16    8            0.01   0.95    405
            100        0.16    8            0.01   0.95    405
            200        0.3     8            0.01   0.95    810
            200        0.1     8            0.01   0.95    270
            100        0.1     8            0.01   0.95    270
            100        0.1     8            0.01   0.95    270
            200        0.01    8            0.01   0.95    0
            200        0.01    8            0.01   0.95    0
            200        0.01    8            0.01   0.95    0
            200        0.01    8            0.01   0.95    0
          Chemical: PHUnits=Water
            Thickness  PH   CEC
            50         8.2  255
            100        8.2  255
            150        8.2  255
            200        8.2  245
            100        8.2  235
            100        8.2  235
            200        8.2  207
            200        8.2  173
            100        8.2  173
            100        8.2  173
            200        8.2  138
            200        8.2  138
            200        8.2  124
            200        8.2  124
          Nutrient
        SurfaceOrganicMatter: InitialResidueName=wheat_stubble; InitialResidueType=wheat; InitialResidueMass=0; InitialStandingFraction=0; InitialCPR=0; InitialCNR=60
        Irrigation
        Fertiliser
        Plant Wheat
        Manager Harvest
          Crop = [Wheat]
```csharp
using APSIM.Shared.Utilities;
using Models.Utilities;
using Models.Soils;
using Models.PMF;
using Models.Core;
using System;
using System.Linq;

namespace Models
{
    [Serializable] 
    public class Script : Model
    {
        [Description("Crop")]
        public IPlant Crop { get; set; }
        
        [EventSubscribe("DoManagement")]
        private void OnDoManagement(object sender, EventArgs e)
        {
            if (Crop.IsReadyForHarvesting)
            {
                Crop.Harvest();
                Crop.EndCrop();
            }
        }
    }
}
```
        Report: EventNames=[Clock].EndOfDay
          VariableNames:
            [Clock].Today
            [Weather].CO2
            [Wheat].LAI
            [Wheat].Phenology.Zadok.Stage
            [Wheat].Phenology.CurrentStageName
            [Wheat].AboveGround.Wt
            [Wheat].AboveGround.N
            [Wheat].Grain.Total.Wt*10 as Yield
            [Wheat].Grain.Protein
            [Wheat].Grain.Size
            [Wheat].Grain.Number
            [Wheat].Grain.Total.Wt
            [Wheat].Grain.Total.N
            [Wheat].Total.Wt
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