Simulations: Version=130
  Memo TitlePage
    # The APSIM Wheat Model

    _Brown, H.E., Huth, N.I. and Holzworth, D.P._
  Memo Introduction
    The APSIM wheat model has been developed using the Plant Modelling Framework (PMF) of [brown_plant_2014]. This new framework provides a library of plant organ and process submodels that can be coupled, at runtime, to construct a model in much the same way that models can be coupled to construct a simulation. This means that dynamic composition of lower level process and organ classes (e.g. photosynthesis, leaf) into larger constructions (e.g. maize, wheat, sorghum) can be achieved by the model developer without additional coding.

    The wheat model consists of:

    * a phenology model to simulate development through sequential developmental phases
    * a structure model to simulate plant morphology
    * a collection of organs to simulate the various plant parts
    * an arbitrator to allocate resources (N, biomass) to the various plant organs

    This work builds upon earlier APSIM Wheat models such as NWheat ([Asseng200225], [KeatingNWheat]), NWheatS ([Asseng1998163]), Cropmod-Wheat ([Wang2002GenericCropModel]), and the earlier versions developed in Plant (<a href=\"http://www.apsim.info/Documentation/Model,CropandSoil/CropModuleDocumentation/Wheat.aspx">APSIM Wheat 7.5</a>") and then within the Plant Modelling Framework ([brown_plant_2014]).
  Replacements
    Report HarvestReport: EventNames=[Wheat].Harvesting
      VariableNames:
        [Clock].Today
        [Wheat].SowingDate
        [Wheat].SowingData.Cultivar
        [Wheat].Phenology.CurrentPhase.Name
        [Wheat].Phenology.CurrentStageName
        [Wheat].Phenology.EmergenceDAS
        [Wheat].Phenology.TerminalSpikeletDAS
        [Wheat].Phenology.FlagLeafDAS
        [Wheat].Phenology.HeadingDAS
        [Wheat].Phenology.FloweringDAS
        [Wheat].Phenology.MaturityDAS
        [Wheat].Grain.Wt
        [Wheat].Grain.N
        [Wheat].Grain.Number
        [Wheat].Grain.Size
        [Wheat].Grain.Nconc
        [Wheat].AboveGround.Wt
        [Wheat].AboveGround.N
        [Wheat].Grain.Protein
        [Wheat].Grain.Size
        [Wheat].Phenology.FinalLeafNumber
        [Wheat].Structure.MainStemPopn
        [Wheat].SowingData.Cultivar
        [Wheat].SowingDate.DayOfYear
        [Wheat].Leaf.CohortMaxSize
        [Clock].StartDate
        ([Wheat].Phenology.FloweringDAS - [Wheat].Phenology.EmergenceDAS) as FloweringDAE
        [IWeather].Latitude
        [IWeather].Longitude
        [IWeather].FileName
        [IWeather].CO2
        [IWeather].Amp
        [IWeather].Tav
        [IWeather].MinT
        [Wheat].Phenology.Photoperiod
        [Wheat].Phenology.CAMP.TSHS
        [Wheat].Phenology.CAMP.VSHS
    Report DailyReport: EventNames=[Clock].DoReport
      VariableNames:
        [Clock].Today
        [IWeather].Radn
        [IWeather].MeanT
        [Wheat].Leaf.AppearedCohortNo
        [Wheat].Leaf.DeadCohortNo
        [Wheat].Leaf.SenescingCohortNo
        [Wheat].Leaf.ExpandedCohortNo
        [Wheat].Phenology.CurrentPhase.Name
        [Wheat].Phenology.CurrentStageName
        [Wheat].Phenology.EmergenceDAS
        [Wheat].Phenology.Stage
        [Wheat].Phenology.ThermalTime
        [Wheat].Phenology.Zadok.Stage
        [Wheat].SowingData.Cultivar
        [Wheat].Phenology.HaunStage
        [IWeather].MeanT
        [IWeather].MinT
        [Wheat].Phenology.Photoperiod
        [Wheat].Phenology.AccumulatedTT
        [Wheat].Phenology.CAMP.TSHS
        [Wheat].Phenology.CAMP.VSHS
        [Wheat].Phenology.CAMP.Vrn1
        [Wheat].Phenology.CAMP.Vrn2
        [Wheat].Phenology.CAMP.Vrn3
        [Wheat].Phenology.CAMP.VrnX
    Manager Harvesting
```csharp
using Models.PMF.Phen;
using APSIM.Shared.Utilities;
using System.Xml.Serialization;
using Models;
using Models.PMF;
using Models.Soils;
using System.Text;
using System.Collections.Generic;
using Models.Core;
using System;
using Models.Soils.Nutrients;

namespace Models
{
    [Serializable] 
    public class Script : Model
    {
        [Link] private Plant Wheat;
        [Link] private Simulation sim;
        [Link] private Clock clock;
        [Link(Type = LinkType.Path, Path = "[Wheat].Phenology")]
        private Phenology phenology;

        [EventSubscribe("DoManagement")]
        private void OnDoManagement(object sender, EventArgs e)
        {
            if (phenology.CurrentPhase.Name == "Maturing")
            {
                Wheat.Harvest();
                Wheat.EndCrop();
                sim.Set("Clock.EndDate", clock.Today.AddDays(1));  
            }
        }

        [EventSubscribe("EndOfDay")]
        private void OnEndOfDay(object sender, EventArgs e)
        {
        	if ((clock.Today.Equals(clock.EndDate))&&(Wheat.IsAlive))
        	{
        		Wheat.Harvest();
                Wheat.EndCrop();
                sim.Set("Clock.EndDate", clock.Today);  
        	}
        }

    }
}
```
    Report SowingReport: EventNames=[Wheat].Sowing
      VariableNames:
        [Clock].Today
        [Wheat].SowingData.Cultivar
        [IWeather].Latitude
        [IWeather].Longitude
        [LocationInfo].Script.Country
        [LocationInfo].Script.State
        [LocationInfo].Script.Region
  DataStore
  Folder Validation
    Memo
      A test dataset has been developed to test the APSIM Wheat model for a range of environmental (soil and climate) conditions, management options (sowing dates, populations, nitrogen rates, row spacing, irrigation), genetic backgrounds (different regions, cultivar types) and for special considerations such as crop damage.  These tests have been grouped into various geographical regions to allow the user to evaluate the suitability of the model for their particular region of interest.  Graphs of model performance are provided for yield, biomass production, canopy development, phenological development, water and nitrogen uptake, and grain yield components.
    Experiment SenseTestOutDoorSowing
      Factors
        Permutation
          Factor Sow
            Specification=[Clock].StartDate = 2005-03-01,2005-04-01,2005-05-01,2005-06-01,2005-07-01,2005-08-01,2005-09-01,2005-10-01,2005-11-01,2005-12-01
          Factor Cultivar
            Specification:
              [SowAndHarvest].Script.Cultivar = Wakanui,
              Rongotea
              ,Short,
              Intermediate
              ,Long,
              FastPhylo
              ,MidPhylo,
              SlowPhylo
              ,PpSensitive
              ,VrnSensitive
              ,Both
              ,SDVern
              ,LDVern
      Simulation SenseBase
        Clock: Start=1991-06-08; End=2013-07-01
        Summary summaryfile
        ControlledEnvironment (disabled): MaxT=23.6; MinT=23.6; Rain=0; Radn=17.64; PanEvap=5; VP=2; Wind=3; CO2=350; AirPressure=1010; DiffuseFraction=0; Latitude=0; Longitude=0; DayLength=8; SunRise=0; SunSet=0
        Weather: FileName=lincoln.met
        Zone paddock: Area=1; Slope=0; AspectAngle=0; Altitude=50
          Irrigation
          Soil: SoilType=LincolnSoil; LocalName=Lincoln; Site=Lincoln; NearestTown=Unknown; Region=NZ; NaturalVegetation=Unknown; Latitude=0; Longitude=0
            Physical
              Thickness  BD   AirDry  LL15  DUL   SAT
              100        1.3  0.05    0.08  0.31  0.44
              200        1.3  0.05    0.07  0.3   0.44
              200        1.3  0.05    0.07  0.28  0.44
              200        1.3  0.05    0.09  0.31  0.44
              200        1.3  0.05    0.11  0.3   0.44
              200        1.3  0.05    0.16  0.28  0.44
              200        1.3  0.05    0.15  0.3   0.44
              200        1.3  0.05    0.12  0.34  0.44
              SoilCrop WheatSoil: LL=[0.08, 0.07, 0.07, 0.09, 0.11, 0.16, 0.15, 0.12]; KL=[0.06, 0.06, 0.06, 0.04, 0.03, 0.02, 0.02, 0.02]; XF=[1, 1, 1, 1, 0.6, 0.4, 0.4, 0.4]
            WaterBalance SoilWater: SummerDate=1-Nov; SummerU=7; SummerCona=3; WinterDate=1-Apr; WinterU=7; WinterCona=3; DiffusConst=40; DiffusSlope=16; Salb=0.2; CN2Bare=75; CNRed=20; CNCov=0.8; DischargeWidth=0; CatchmentArea=0
              Thickness  SWCON  KLAT
              100        0.6    0
              200        0.6    0
              200        0.6    0
              200        0.6    0
              200        0.6    0
              200        0.6    0
              200        0.6    0
              200        0.6    0
            Organic: FOMCNRatio=0
              Thickness  Carbon  SoilCNRatio  FBiom  FInert  FOM
              100        0.35    0            0.04   0.31    0
              200        0.27    0            0.03   0.31    0
              200        0.24    0            0.02   0.31    0
              200        0.16    0            0.01   0.31    0
              200        0.16    0            0.01   0.31    0
              200        0.3     0            0.01   0.25    0
              200        0.1     0            0.01   0.2     0
              200        0.1     0            0.01   0.2     0
            Chemical
              Thickness  NO3N  NH4N  PH
              100        24.9  1.3   8.5
              200        16    1     8.5
              200        9.8   1     8.6
              200        9.8   0.8   8.6
              200        2.1   0.8   8.6
              200        2.1   0.5   8.6
              200        2.1   0.5   8.6
              200        2.1   0.5   8.6
            Sample Initial water: Thickness=[100, 200, 200, 200, 200, 200, 200, 200]; SW=[0.27, 0.3, 0.28, 0.25, 0.24, 0.27, 0.27, 0.21]; SWUnits=Volumetric; OCUnits=Total; PHUnits=Water
            CERESSoilTemperature Temperature
            Nutrient
          SurfaceOrganicMatter Surface Organic Matter: InitialResidueName=wheat_stubble; InitialResidueType=wheat; InitialResidueMass=1000; InitialStandingFraction=0; InitialCPR=0; InitialCNR=80
          Fertiliser
          MicroClimate: a_interception=0; b_interception=1; c_interception=0; d_interception=0; soil_albedo=0.23; SoilHeatFluxFraction=0.4; MinimumHeightDiffForNewLayer=0; NightInterceptionFraction=0.5; ReferenceHeight=2
          Plant Wheat
          Report HarvestReport
          Manager SowAndHarvest
            Cultivar = Wakanui
            Sown = False
            Harvested = False
            EndSet = False
```csharp
using Models.PMF.Phen;
using System;
using Models.Core;
using Models.PMF;
using APSIM.Shared.Utilities;
using System.Xml.Serialization;
        
namespace Models
{
    [Serializable] 
    [System.Xml.Serialization.XmlInclude(typeof(Model))]
    public class Script : Model
    {
        [Link] private Plant Wheat;
        [Link] private Clock Clock;
        [Link] private Simulation sim;
        [Link] private Summary Summary;
        [Link(Type = LinkType.Path, Path = "[Wheat].Phenology")]
        private Phenology phenology;
        
        [Description("Cultivar")]
        public string Cultivar { get; set; }
        
        [XmlIgnore] public bool Sown { get; set; }
        [XmlIgnore] public bool Harvested { get; set; }
        [XmlIgnore] public bool EndSet { get; set; }
        
        [EventSubscribe("StartOfSimulation")]
        private void OnSimulationCommencing(object sender, EventArgs e)
        {
            Sown = false;
            Harvested = false;
            EndSet = false;
        }
        
        [EventSubscribe("DoManagement")]
        private void OnDoManagement(object sender, EventArgs e)
        {
            if (Sown == false)
            {
                Wheat.Sow(population: 200, cultivar: Cultivar, depth: 15, rowSpacing: 150, budNumber: 1);
                Sown = true;
            }
            
            if (phenology.CurrentPhase.Name == "ReadyForHarvesting")
            {
                Wheat.Harvest();
                Wheat.EndCrop();
                Harvested = true;
                Summary.WriteMessage(this, "Flowering reached so setting end date to stop simulation");
            }
            
            if ((Harvested == true) && (EndSet == false))
            {
                sim.Set("Clock.EndDate", Clock.Today.AddDays(1));
                EndSet = true;
            }
        }
    }
}
```
          Report SowingReport
          Manager SetCropParameters
          Manager SetCropParameters
          Manager SetCropParameters
          Manager SetCropParameters
          Manager SetCropParameters
          Manager SetCropParameters
          Manager SetCropParameters
          Manager SetCropParameters
          Manager SetCropParameters
          Manager SetCropParameters
          Manager SetCropParameters
          Manager SetCropParameters
          Manager SetCropParameters
          Manager SetCropParameters
          Manager SetCropParameters
          Manager SetCropParameters
          Manager SetCropParameters
          Manager SetCropParameters
          Manager SetCropParameters
          Manager SetCropParameters
          Manager SetCropParameters
          Manager SetCropParameters
          Manager SetCropParameters
          Manager SetCropParameters
          Manager SetCropParameters
          Manager SetCropParameters
          Manager SetCropParameters
          Manager SetCropParameters
          Manager SetCropParameters
          Manager SetCropParameters
          Manager SetCropParameters
          Manager SetCropParameters
          Manager SetCropParameters
          Manager SetCropParameters
          Manager SetCropParameters
          Manager SetCropParameters
          Manager SetCropParameters
          Manager SetCropParameters
          Manager SetCropParameters
          Manager SetCropParameters
          Manager SetCropParameters
          Manager SetCropParameters
          Manager SetCropParameters
          Manager SetCropParameters
          Manager SetCropParameters
          Manager SetCropParameters
          Manager SetCropParameters
          Manager SetCropParameters
          Manager SetCropParameters
          Manager SetCropParameters
          Manager SetCropParameters
          Manager SetCropParameters
          Manager SetCropParameters
          Manager SetCropParameters
          Manager SetCropParameters
          Manager SetCropParameters
          Manager SetCropParameters
          Manager SetCropParameters
          Manager SetCropParameters
          Manager SetCropParameters
          Manager SetCropParameters
          Manager SetCropParameters
          Manager SetCropParameters
          Manager SetCropParameters
          Manager SetCropParameters
          Manager SetCropParameters
          Manager SetCropParameters
          Manager SetCropParameters
          Manager SetCropParameters
          Manager SetCropParameters
          Manager SetCropParameters
          Manager SetCropParameters
          Manager SetCropParameters
          Manager SetCropParameters
          Manager SetCropParameters
          Manager SetCropParameters
          Manager SetCropParameters
          Manager SetCropParameters
          Manager SetCropParameters
          Manager SetCropParameters
          Manager SetCropParameters
          Manager SetCropParameters
          Manager SetCropParameters
          Manager SetCropParameters
          Manager SetCropParameters
          Manager SetCropParameters
          Manager SetCropParameters
          Manager SetCropParameters
          Manager SetCropParameters
          Manager SetCropParameters
          Manager SetCropParameters
          Manager SetCropParameters
          Manager SetCropParameters
          Manager SetCropParameters
          Manager SetCropParameters
          Manager SetCropParameters
          Manager SetCropParameters
          Manager SetCropParameters
          Manager SetCropParameters
          Manager SetCropParameters
          Manager SetCropParameters
          Report DailyReport (disabled): EventNames=[Clock].DoReport
            VariableNames:
              [Clock].Today
              [IWeather].Radn
              [IWeather].MeanT
              [Wheat].Leaf.AppearedCohortNo
              [Wheat].Leaf.DeadCohortNo
              [Wheat].Leaf.SenescingCohortNo
              [Wheat].Leaf.ExpandedCohortNo
              [Wheat].Phenology.CurrentPhase.Name
              [Wheat].Phenology.CurrentStageName
              [Wheat].Phenology.EmergenceDAS
              [Wheat].Phenology.Stage
              [Wheat].Phenology.ThermalTime
              [Wheat].Phenology.Zadok.Stage
              [Wheat].SowingData.Cultivar
              [Wheat].Phenology.HaunStage
              [IWeather].MeanT
              [Wheat].Phenology.Photoperiod
              [Wheat].Phenology.AccumulatedTT
              [Wheat].Phenology.CAMP.TSHS
              [Wheat].Phenology.CAMP.VSHS
              [Wheat].Phenology.CAMP.Vrn1
              [Wheat].Phenology.CAMP.Vrn2
              [Wheat].Phenology.CAMP.Vrn3
              [Wheat].Phenology.CAMP.VrnX
        SoilArbitrator Soil Arbitrator
        Manager LocationInfo
          Country = New Zealand
          State = Canterbury Region
          Region =
```csharp
using APSIM.Shared.Utilities;
using Models.PMF;
using Models.Core;
using System;

namespace Models
{
    [Serializable]
    public class Script : Model
    {
        [Link] Clock Clock;
        [Link] Fertiliser Fertiliser;
        [Link] Summary Summary;
        
        [Description("Country")]
        public string Country { get; set; }

        [Description("State")]
        public string State { get; set; }

        [Description("Region")]
        public string Region { get; set; }

    }
}
```
    Experiment SenseTestVrn
      Factors
        Permutation
          Factor Vrn: Specification=[ControlledEnvironment].MinT = 1,3,5,7,9,11,13,15,17,19,21
          Factor Cultivar
            Specification:
              [SowAndHarvest].Script.Cultivar = Wakanui,
              Rongotea
              ,Short,
              Intermediate
              ,Long,
              FastPhylo
              ,MidPhylo,
              SlowPhylo
              ,PpSensitive
              ,VrnSensitive
              ,Both
              ,SDVern
              ,LDVern
      Simulation SenseBaseVrn
        Clock: Start=1991-06-08; End=2013-07-01
        Summary summaryfile
        ControlledEnvironment: MaxT=23.6; MinT=23.6; Rain=0; Radn=17.64; PanEvap=5; VP=2; Wind=3; CO2=350; AirPressure=1010; DiffuseFraction=0; Latitude=0; Longitude=0; DayLength=8; SunRise=0; SunSet=0
        Weather (disabled): FileName=lincoln.met
        Zone paddock: same as Validation.SenseTestOutDoorSowing.SenseBase.paddock
        SoilArbitrator Soil Arbitrator
        Manager LocationInfo: same as Validation.SenseTestOutDoorSowing.SenseBase.LocationInfo
    Experiment SenseTestPp
      Factors
        Permutation
          Factor Cultivar
            Specification:
              [SowAndHarvest].Script.Cultivar = Wakanui,
              Rongotea
              ,Short,
              Intermediate
              ,Long,
              FastPhylo
              ,MidPhylo,
              SlowPhylo
              ,PpSensitive
              ,VrnSensitive
              ,Both
              ,SDVern
              ,LDVern
          Factor Pp: Specification=[ControlledEnvironment].DayLength = 4,6,8,10,12,14,16,18,20
      Simulation SenseBasePp: same as Validation.SenseTestVrn.SenseBaseVrn
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