Simulations: Version=205
  Memo TitlePage
    # The APSIM Wheat Model

    _Brown, H.E., Huth, N.I. and Holzworth, D.P._
  Memo Introduction
    The APSIM wheat model has been developed using the Plant Modelling Framework (PMF) of [brown_plant_2014]. This new framework provides a library of plant organ and process submodels that can be coupled, at runtime, to construct a model in much the same way that models can be coupled to construct a simulation. This means that dynamic composition of lower level process and organ classes (e.g. photosynthesis, leaf) into larger constructions (e.g. maize, wheat, sorghum) can be achieved by the model developer without additional coding.

    The wheat model consists of:

    * a phenology model to simulate development through sequential developmental phases
    * a structure model to simulate plant morphology
    * a collection of organs to simulate the various plant parts
    * an arbitrator to allocate resources (N, biomass) to the various plant organs

    This work builds upon earlier APSIM Wheat models such as NWheat ([Asseng200225], [KeatingNWheat]), NWheatS ([Asseng1998163]), Cropmod-Wheat ([Wang2002GenericCropModel]), and the earlier versions developed in Plant (<a href=\"http://www.apsim.info/Documentation/Model,CropandSoil/CropModuleDocumentation/Wheat.aspx">APSIM Wheat 7.5</a>") and then within the Plant Modelling Framework ([brown_plant_2014]).
  DataStore
    ExcelInput ExcelMultiInput: FileNames=[DookieWWHI2024.xlsx, DookieEVA2024.xlsx]; SheetNames=[Observed]
    PredictedObserved DailyObsPred: PredictedTableName=DailyReport; ObservedTableName=Observed; FieldNameUsedForMatch=SimulationName; FieldName2UsedForMatch=Clock.Today; AllColumns=false
      Tests: POName=DailyObsPred
        AcceptedStats:
          Name                   n     Slope         Intercept   SEslope      SEintercept  R2           RMSE       NSE         ME          MAE         RSR       RMR
          ET                     123   1.13169       -0.428525   0.0437149    0.169573     0.847065     0.75711    0.750672    0.0416707   0.558234    0.497294  0
          ProfileWater           1327  0.876588      76.0389     0.0130203    5.47947      0.7738       58.7876    0.702733    25.8355     33.06       0.545016  0
          Soil.SoilWater.SW(1)   1300  0.000187106   0.209326    0.000113886  0.00216848   0.00207521   18.9789    -0.0810339  -5.20763    5.28548     1.03933   0
          Soil.SoilWater.SW(10)  8     -0.411168     0.612361    0.204164     0.087484     0.403332     0.0113816  -3.15811    0.00772724  0.00919543  1.90744   0
          Soil.SoilWater.SW(2)   1323  -9.03035e-05  0.237103    7.90585e-05  0.00185795   0.000986689  23.4358    -0.0848838  -6.54813    6.60052     1.04118   0
          Soil.SoilWater.SW(3)   1323  7.41365e-05   0.225765    6.63683e-05  0.00193967   0.000943693  29.1595    -0.0857037  -8.19945    8.22086     1.04158   0
          Soil.SoilWater.SW(4)   1323  0.00032245    0.209832    5.67479e-05  0.00181599   0.0238581    31.9313    -0.0847602  -8.95944    8.97693     1.04112   0
          Soil.SoilWater.SW(5)   1323  0.000184327   0.244192    5.45151e-05  0.00180824   0.00858025   33.0939    -0.0856543  -9.31536    9.33089     1.04155   0
          Soil.SoilWater.SW(6)   1218  0.983201      0.00665286  0.00580358   0.00166975   0.959354     0.0168556  0.958159    0.00202203  0.00893392  0.204467  0
          Soil.SoilWater.SW(7)   1194  0.995766      0.00138347  0.00547865   0.00136097   0.965173     0.0121361  0.964171    0.00036727  0.00674653  0.189207  0
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        AcceptedStatsName=Name n Slope Intercept SEslope SEintercept R2 RMSE NSE ME MAE RSR
    PredictedObserved HarvestObsPred: PredictedTableName=HarvestReport; ObservedTableName=Observed; FieldNameUsedForMatch=SimulationName; FieldName2UsedForMatch=Wheat.Phenology.CurrentStageName; AllColumns=false
      Tests: POName=HarvestObsPred
        AcceptedStats:
          Name                                  n    Slope      Intercept   SEslope     SEintercept  R2          RMSE        NSE         ME           MAE         RSR       RMR
          Wheat.AboveGround.N                   67   1.12809    -1.00273    0.0391678   0.525848     0.927336    2.09151     0.875576    0.540148     1.59606     0.350095  0
          Wheat.AboveGround.Wt                  211  1.01911    34.1751     0.0202867   28.6588      0.923515    188.663     0.904426    58.5184      140.453     0.308417  0
          Wheat.Grain.N                         135  1.07639    -0.257745   0.0362834   0.353004     0.868717    1.79883     0.808865    0.415699     1.36719     0.435568  0
          Wheat.Grain.Nconc                     136  0.52548    0.0109277   0.0578165   0.00130116   0.381364    0.00332647  0.31597     0.000420536  0.00251003  0.824015  0
          Wheat.Grain.Number                    195  0.819153   2260.06     0.0213448   308.959      0.88414     2247.71     0.879203    -81.8409     1634.74     0.346666  0
          Wheat.Grain.Protein                   114  0.424157   7.85561     0.0562272   0.726492     0.336911    2.10436     0.263918    0.550644     1.57133     0.854181  0
          Wheat.Grain.Wt                        233  0.978713   11.017      0.0292591   15.5104      0.828875    103.644     0.801774    0.879252     78.6576     0.444269  0
          Wheat.Leaf.CohortMaxSize(1)           10   0.0270759  255.563     0.0327969   7.48653      0.078506    51.271      -0.92608    36.4016      40.5202     1.31661   0
          Wheat.Leaf.CohortMaxSize(10)          10   1.11919    -412.466    0.256733    521.362      0.703745    224.554     -0.300948   -171.57      207.903     1.08206   0
          Wheat.Leaf.CohortMaxSize(11)          10   0.825212   365.905     0.266736    598.083      0.54471     196.601     0.391552    -23.5263     115.224     0.740002  0
          Wheat.Leaf.CohortMaxSize(12)          10   0.848404   253.801     0.223896    493.954      0.642195    151.745     0.416747    -79.2873     105.917     0.724519  0
          Wheat.Leaf.CohortMaxSize(13)          10   1.09708    -403.529    1.01788     2346.69      0.126797    703.826     -7.88491    -180.887     351.071     2.82779   0
          Wheat.Leaf.CohortMaxSize(14)          10   1.30676    -642.351    0.429337    1019.71      0.536608    603.245     -0.59098    71.3164      415.854     1.19661   0
          Wheat.Leaf.CohortMaxSize(15)          9    -0.26027   2713.41     0.159916    364.78       0.274529    585.946     -0.830732   -109.076     515.056     1.27566   0
          Wheat.Leaf.CohortMaxSize(16)          3    -0.645839  2788.84     7.95817     13511.1      0.00654291  1245.82     -65.0428    6.01155      1116.21     6.6354    0
          Wheat.Leaf.CohortMaxSize(17)          2    3.1965     -3522.2732  0           0            1           590.025     -4.43529    -197.771     555.892     1.64853   0
          Wheat.Leaf.CohortMaxSize(18)          1    -          -           -           -            -           985.267     -           985.267      985.267     -         0
          Wheat.Leaf.CohortMaxSize(2)           10   0.0630555  275.197     0.29264     121.589      0.00577     139.081     -3.00585    -108.611     115.388     1.89875   0
          Wheat.Leaf.CohortMaxSize(3)           10   0.289291   221.125     0.270354    144.318      0.125205    181.922     -2.6244     -152.132     163.333     1.80609   0
          Wheat.Leaf.CohortMaxSize(4)           10   0.345581   263.167     0.345159    223.342      0.111353    208.379     -1.99176    -152.884     173.867     1.64091   0
          Wheat.Leaf.CohortMaxSize(5)           10   0.249259   458.154     0.277019    225.53       0.0919017   229.975     -0.868592   -139.856     146.902     1.29682   0
          Wheat.Leaf.CohortMaxSize(6)           10   0.345905   476.527     0.195687    187.624      0.280871    242.414     -0.0368856  -130.978     145.477     0.966021  0
          Wheat.Leaf.CohortMaxSize(7)           10   0.441949   501.987     0.142766    157.184      0.545013    176.986     0.296106    -101.041     122.714     0.79593   0
          Wheat.Leaf.CohortMaxSize(8)           10   0.589766   515.86      0.179194    229.582      0.575192    169.291     0.574802    1.17705      117.592     0.61861   0
          Wheat.Leaf.CohortMaxSize(9)           10   0.793068   300.515     0.327977    507.562      0.422258    241.916     0.0929616   -15.3812     161.582     0.903512  0
          Wheat.Phenology.FlagLeafDAS.Value()   255  0.974146   6.29479     0.00979673  1.35981      0.97505     8.03204     0.971245    2.92157      5.87059     0.16924   0
          Wheat.Phenology.FloweringDAS.Value()  299  0.943644   8.35638     0.00705763  1.10217      0.983658    6.98781     0.982029    0.0602007    4.93645     0.133831  0
        AcceptedStatsName=Name n Slope Intercept SEslope SEintercept R2 RMSE NSE ME MAE RSR
  Folder Replacements
    Report HarvestReport: EventNames=[Wheat].Harvesting
      VariableNames:
        [Clock].Today
        [Clock].StartDate
        [Wheat].SowingDate
        [Wheat].SowingData.Cultivar
        [Wheat].SowingDate.DayOfYear
        [IWeather].Latitude
        [IWeather].Longitude
        [IWeather].FileName
        [LocationInfo].Script.Country
        [LocationInfo].Script.State
        [LocationInfo].Script.Region
        [Wheat].AboveGround.N
        [Wheat].AboveGround.NConc
        [Wheat].AboveGround.Wt
        [Wheat].Ear.N
        [Wheat].Ear.NConc
        [Wheat].Ear.Wt
        [Wheat].Grain.N
        [Wheat].Grain.NConc
        [Wheat].Grain.Number
        [Wheat].Grain.Protein
        [Wheat].Grain.Size
        [Wheat].Grain.Wt
        [Wheat].Leaf.Dead.Wt
        [Wheat].Leaf.Dead.N
        [Wheat].Leaf.Live.N
        [Wheat].Leaf.Live.Wt
        [Wheat].Leaf.N
        [Wheat].Leaf.StemPopulation
        [Wheat].Leaf.Wt
        [Wheat].Phenology.CAMP.TSHS
        [Wheat].Phenology.CurrentStageName
        [Wheat].Phenology.EmergenceDAS
        [Wheat].Phenology.FinalLeafNumber
        [Wheat].Phenology.FlagLeafDAS
        [Wheat].Phenology.FloweringDAS
        [Wheat].Phenology.HeadingDAS
        [Wheat].Phenology.MaturityDAS
        [Wheat].Phenology.TerminalSpikeletDAS
        [Wheat].Spike.HeadNumber
        [Wheat].Spike.N
        [Wheat].Spike.Wt
        [Wheat].Stem.N
        [Wheat].Stem.NConc
        [Wheat].Stem.Wt
    Report DailyReport: EventNames=[Clock].DoReport
      VariableNames:
        [Clock].Today
        [IWeather].MeanT
        [IWeather].MeanT
        [IWeather].Radn
        [Simulation].Name
        [Soil].Water.Volumetric
        [Wheat].AboveGround.N
        [Wheat].AboveGround.Wt
        [Wheat].AboveGroundDead.N
        [Wheat].AboveGroundDead.Wt
        [Wheat].AboveGroundLive.N
        [Wheat].AboveGroundLive.Wt
        [Wheat].Ear.N
        [Wheat].Ear.NConc
        [Wheat].Ear.Wt
        [Wheat].Grain.N
        [Wheat].Grain.NConc
        [Wheat].Grain.NperKernal
        [Wheat].Grain.Number
        [Wheat].Grain.Size
        [Wheat].Grain.Wt
        [Wheat].Leaf.CoverGreen
        [Wheat].Leaf.CoverTotal
        [Wheat].Leaf.Dead.N
        [Wheat].Leaf.Dead.NConc
        [Wheat].Leaf.Dead.Wt
        [Wheat].Leaf.FinalLeafNumber
        [Wheat].Leaf.Fn
        [Wheat].Leaf.Fw
        [Wheat].Leaf.Height
        [Wheat].Leaf.LAI
        [Wheat].Leaf.Ligules
        [Wheat].Leaf.Live.N
        [Wheat].Leaf.Live.NConc
        [Wheat].Leaf.Live.Wt
        [Wheat].Leaf.MainStemPopulation
        [Wheat].Leaf.Photosynthesis.FT
        [Wheat].Leaf.SpecificArea
        [Wheat].Leaf.SpecificAreaCanopy
        [Wheat].Leaf.SpecificNitrogen
        [Wheat].Leaf.StemNumberPerPlant
        [Wheat].Leaf.StemPopulation
        [Wheat].Leaf.Tips
        [Wheat].Leaf.Tips
        [Wheat].Leaf.Transpiration
        [Wheat].Phenology.AccumulatedTT
        [Wheat].Phenology.CurrentPhase.Name
        [Wheat].Phenology.CurrentStageName
        [Wheat].Phenology.EmergenceDAS
        [Wheat].Phenology.HaunStage
        [Wheat].Phenology.Photoperiod
        [Wheat].Phenology.Phyllochron
        [Wheat].Phenology.PTQ
        [Wheat].Phenology.Stage
        [Wheat].Phenology.ThermalTime
        [Wheat].Phenology.Zadok.Stage
        [Wheat].Root.Depth
        [Wheat].Root.N
        [Wheat].Root.NConc
        [Wheat].Root.Wt
        [Wheat].SowingData.Cultivar
        [Wheat].Spike.N
        [Wheat].Spike.NConc
        [Wheat].Spike.Wt
        [Wheat].Stem.N
        [Wheat].Stem.NConc
        [Wheat].Stem.Wt
        [Wheat].StemPlusSpike.N
        [Wheat].StemPlusSpike.Wt
        [Wheat].Total.N
        [Wheat].Total.Wt
        sum([Soil].NO3.kgha)
        sum([Soil].Water.MM)
        ([Wheat].Leaf.Transpiration + [ISoilWater].Es + [MicroClimate].PrecipitationInterception)
    Manager MaxLeafSize
```csharp
using Models.Soils;
using Models.PMF.Struct;
using System;
using System.Collections.Generic;
using System.Xml.Serialization;
using Models.Core;
using Models.Interfaces;
using Models.PMF;
using Models.PMF.Organs;
using Models.Soils.Arbitrator;
using APSIM.Shared.Utilities;
using Newtonsoft.Json;



namespace Models
{
    [Serializable] 
    public class Script : Model
    {
//        [Link] private Clock Clock;
//        [Link] private Plant Wheat;
//        public  event EventHandler LeafReport;
//        [Link(Type = LinkType.Path, Path = "[Wheat].Structure")]
//        private Structure structure;
//        
//        
//        [JsonIgnore] public int LeafPosition { get; set; }
//        [JsonIgnore] public double MaxLeafSize { get; set; }
//        
//        [EventSubscribe("DoManagement")]
//        private void OnDoManagement(object sender, EventArgs e)
//        {
//            var leaf = Wheat.Leaf as Leaf;
//            if ((leaf.ExpandedCohortNo > LeafPosition) & (structure.NextLeafProportion == 1))
//            {
//                LeafPosition = (int)
//                leaf.ExpandedCohortNo;
//                MaxLeafSize = leaf.CohortSize[LeafPosition - 1];
//                LeafReport.Invoke(this, new EventArgs());
//            }
//        }
    }
}
```
    Report MaxLeafSizeReport: EventNames=//[MaxLeafSize].Script.LeafReport
      VariableNames:
        //[MaxLeafSize].Script.MaxLeafSize
        //[MaxLeafSize].Script.LeafPosition
    Manager Harvesting
```csharp
using APSIM.Core;
using Models.Soils.Nutrients;
using System;
using Models.Core;
using System.Collections.Generic;
using System.Text;
using Models.Soils;
using Models.PMF;
using Models;
using System.Xml.Serialization;
using APSIM.Shared.Utilities;
using Models.PMF.Phen;

namespace Models
{
    [Serializable] 
    public class Script : Model, IStructureDependency
    {
        [Link] private Plant Wheat;
        [Link] private Simulation sim;
        [Link] private Clock clock;
        [Link(Type = LinkType.Path, Path = "[Wheat].Phenology")]
        private Phenology phenology;
        public IStructure Structure { private get; set; }


        

        [EventSubscribe("DoManagement")]
        private void OnDoManagement(object sender, EventArgs e)
        {
            if (phenology.CurrentPhase.Name == "GrainRipening")
            {
                Wheat.Harvest();
                Wheat.EndCrop();
                Structure.Set("Clock.EndDate", clock.Today, relativeTo: sim);  
            }
        }

        [EventSubscribe("EndOfDay")]
        private void OnEndOfDay(object sender, EventArgs e)
        {
            if ((clock.Today.Equals(clock.EndDate))&&(Wheat.IsAlive))
            {
                Wheat.Harvest();
                Wheat.EndCrop();
                Structure.Set("Clock.EndDate", clock.Today, relativeTo: sim);  
            }
        }

    }
}
```
    Report SowingReport: EventNames=[Wheat].Sowing
      VariableNames:
        [Simulation].Name
        [Clock].Today
        [Wheat].SowingData.Cultivar
        [IWeather].Latitude
        [IWeather].Longitude
        [LocationInfo].Script.Country
        [LocationInfo].Script.State
        [LocationInfo].Script.Region
    Report NDVIDailyReport: EventNames=[Clock].DoReport
      VariableNames:
        [Simulation].Name
        [Clock].Today
        [NDVIModel].Script.NDVI
    Plant Wheat (disabled): PlantType=Wheat
      Memo Introduction
        _Brown, H.E., Huth, N.I. and Holzworth, D.P._

        The APSIM wheat model has been developed using the Plant Modelling Framework (PMF) of [brown_plant_2014]. This new framework provides a library of plant organ and process submodels that can be coupled, at runtime, to construct a model in much the same way that models can be coupled to construct a simulation. This means that dynamic composition of lower level process and organ classes (e.g. photosynthesis, leaf) into larger constructions (e.g. maize, wheat, sorghum) can be achieved by the model developer without additional coding.

        The wheat model consists of:

        * a phenology model to simulate development through sequential developmental phases
        * a structure model to simulate plant morphology
        * a collection of organs to simulate the various plant parts
        * an arbitrator to allocate resources (N, biomass) to the various plant organs

        This work builds upon earlier APSIM Wheat models such as NWheat ([Asseng200225], [KeatingNWheat]), NWheatS ([Asseng1998163]), Cropmod-Wheat ([Wang2002GenericCropModel]), and the earlier versions developed in Plant (<a href=\"http://www.apsim.info/Documentation/Model,CropandSoil/CropModuleDocumentation/Wheat.aspx">APSIM Wheat 7.5</a>") and then within the Plant Modelling Framework ([brown_plant_2014]).
      OrganArbitrator Arbitrator
        BiomassTypeArbitrator DMArbitration
          Folder PotentialPartitioningMethods
            ReallocationMethod
            AllocateFixationMethod
            RetranslocationMethod
            SendPotentialDMAllocationsMethod
          Folder AllocationMethods
            NutrientConstrainedAllocationMethod
            DryMatterAllocationsMethod
          RelativeAllocation ArbitrationMethod
        BiomassTypeArbitrator NArbitration
          Folder PotentialPartitioningMethods
            ReallocationMethod
          Folder ActualPartitioningMethods
            AllocateFixationMethod
            RetranslocationMethod
          Folder AllocationMethods
            NitrogenAllocationsMethod
          RelativeAllocation ArbitrationMethod
          AllocateUptakesMethod
        WaterUptakeMethod
        NitrogenUptakeMethod
      Phenology
        Memo PCDS (development stages)
          The wheat models outputs of phase names (Phenology.CurrentPhase.Name), stage names (Phenology.CurrentStageName) and decimal stage (Phenology.Stage) are consistent with the population culm development score (PCSD) as described by [Celestina2023].
          Observations recorded following the protocole outlined by [Celestina2023] are suitable for testing model accuracy and calibrating cultivar coefficients.
        Memo Environmental responses
          Wheat exhibits a range of developmental responses to environment and these are strongly influenced by genotype characteristics.
          Temperature is the primary driver of development, increasing development rates and decreasing phase durations as it increases.  These affects are captured by thermal time.  However, wheat also exhibits cold and photoperiod sensitivities in its Vernalisaing phase and further photoperiod sensitivity in the SpikeletDifferenation and HeadEmergence phases.  Photoperiod responses are seen as a reduction in the length of a phase for a photoperiod sensitive genotype in response to a longer photoperiod.  Vernalisation responses are more complicated as they are driven by cool temperature but interact with photoperiod.  For vernalisation sensitive varieties (Winter types), exposure to cool temperatures and/or short photoperiods during the Vernalising phase may reduce its thermal time duration.

          APSIM wheat implements the Cereal Anthesis Molecular Phenology (CAMP) model to simulate development.  It is based on the Kirby Framework which assumes the timing of anthesis is a result of the timing of flag leaf and an additional thermal time passage from there to heading then anthesis.  It also assumes the timing of flag leaf is a result of the Final Leaf Number (which sets a target) and leaf appearance rate (which sets the rate of progress toward the target).  Leaf appearance rate is a function of Thermal time and a genotype specific Phyllochron which changes with Haun stage as described by [Jamieson_LeafAppearance_1995].

          Final Leaf Number (FLN) is set on the day that terminal spikelet occurs as:

          FLN = 2.85 + 1.1 * TSHS

          Where TSHS is the Haun stage on the day terminal spikelet stage occurs.  Terminal spikelet is at the end of the SpikeletDifferentaiation phase which is preceeded by the Emerging and Vernalising phases.  The mechanisums for progress through each of these phase are described below
        SubDailyInterpolation ThermalTime: agregationMethod=0
          XYPairs Response: X=[0, 26, 37]; Y=[0, 26, 0]
          Memo
            Thermal time determines the rate of developmental progress through many of the crops phases and is used by organs to determing potential growth rates.
          ThreeHourAirTemperature InterpolationMethod
        PhotoperiodFunction Photoperiod: Twilight=-6; DayLength=0
        AccumulateFunction HaunStage: StartStageName=Emergence; EndStageName=FlagLeafAppearance; FractionRemovedOnCut=0; FractionRemovedOnHarvest=0; FractionRemovedOnGraze=0; FractionRemovedOnPrune=0
          PhaseLookup Delta
            PhaseLookupValue Growing: Start=Germination; End=HarvestRipe
              DivideFunction Value
                VariableReference ThermalTime: VariableName=[Phenology].ThermalTime
                VariableReference Phyllochron: VariableName=[Phenology].Phyllochron
        MultiplyFunction Phyllochron
          Memo Rational
            This is the thermal time between the emergence of leaf tips.  The model used here is based on [Jamieson_SIRIUS_1998] where leaf appearace could be described by a base phyllochron determined between leaves 2 and 7 and a phyllochron that was 70% of base phyllochron for leaves < 2 and 130% of base phyllochron for leaves > 7
          LinearInterpolationFunction LeafStageFactor
            XYPairs: X=[0, 2, 3, 7, 8, 11]; Y=[0.75, 0.75, 1, 1, 1.4, 1.4]
            VariableReference XValue: VariableName=[Leaf].AppearedCohortNo
          Constant BasePhyllochron: FixedValue=120; Units=oC.d
          AddFunction PhotoperiodEffect
            Constant One: FixedValue=1; Units=oC.d
            MultiplyFunction PhotoperiodResponse
              VariableReference PhotoperiodSensitivity: VariableName=[Phenology].PhyllochronPpSensitivity
              LinearInterpolationFunction PhotoPeriodResponseShape
                XYPairs: X=[8, 12, 20]; Y=[1, 0, 0]
                VariableReference XValue: VariableName=[Phenology].Photoperiod
        VariableReference FinalLeafNumber: VariableName=[Phenology].CAMP.FLN
        Constant HeadEmergencePpSensitivity: FixedValue=2
          Memo
            The phyllochrons duration for the plant to go from flag leaf ligual appearance at 16 h Pp compared to the phyllochron duration for the same phase at 8 h Pp.
        Constant HeadEmergenceLongDayBase: FixedValue=200
          Memo
            The phyllochrons duration for the plant to go from flag leaf ligual appearance at 16 h Pp.
        GerminatingPhase Germinating: Start=Sowing; End=Germination; IsEmerged=false
          Constant MinSoilTemperature: FixedValue=0
        EmergingPhase Emerging: Start=Germination; End=Emergence; IsEmerged=false; TTForTimeStep=0
          VariableReference ThermalTime: VariableName=[Phenology].ThermalTime
          AddFunction Target
            Constant ShootLag: FixedValue=40
            MultiplyFunction DepthxRate
              VariableReference SowingDepth: VariableName=[Plant].SowingData.Depth
              Constant ShootRate: FixedValue=1.5
        VernalisationPhase LeavesInitiating: Start=Emergence; End=DoubleRidge; IsEmerged=true; Target=1
          Memo
            Progress through the vernalising phase is determined by the apparent expression of Vrn1 and Vrn2 genes.  The CAMP model predicts the expression of these two genes.
            Vrn1 is the gene that orchestrates cold temperature responses in development.  To complete the vernalising stage firstly apparent Vrn1 expression must reach a value of at least 1.0.  In warm temperatures (>18oC), Vrn1 is expressed at a base rate that is genotype dependent.  This base rate is lower for vernalisation sensitive genotypes which will develop slower in the warm.  Vrn1 expression (relative to Haun stage increment) increases as temperature decreases so exposure to cold conditions will cause vernalisation sensitive varieties to develop faster (i.e. reach vernalisation at a lower Haun stage).  Vrn2 is up-regulated by longer photoperiods.  It blocks the expression of Vrn3 (which is required for progression through the spikelet differentiation phase) and must be down regulated completely before the vernalising phase is complete.  Vrn1 blocks Vrn2 expression so in effect the expression of Vrn2 raises the target for Vrn1 expression above 1.0.  The longer the photoperiod the greater the target increase so exposure to short days will reduce the target and length of the vernalising phase, a phenomena some times called short day vernalisation.  Vrn3 may also be active and accelerate the expression of Vrn1 during the vernalisation phase.  This effect is currently captured by VrnX in CAMP.
            The duration of the vernalising phase will be the result of a complex interaction between temperature, photoperiod and the genotypes tendency to express Vrn1 at warm temperatures (baseDeltaVrn1) and Vrn2 and Vrn3 under long photoperiods (MaxDpVrn2, MaxDVrnX).  These three rates are derived internally by the CAMP model from the genotypes FLNparams.
        GenericPhase SpikeletsDifferentiating: Start=DoubleRidge; End=MaximumSpikeletPrimordia; IsEmerged=true
          VariableReference Progression: VariableName=[Phenology].CAMP.dVrn
          Constant Target: FixedValue=1
          Memo
            Progress through the Spike differentiation phase is determined by the apparent expression of Vrn3 as predicted by CAMP.
            Vrn3 is a photoperiod sensitive gene that promotes expression of Vrn1.  Vrn1 is not able to express to adequate levels to achieve reproductive transition without Vrn3 upregulation.   Here we assume an apparent Vrn3 expression of 1.0 is sufficient to upregulate Vrn1 enough to trigger terminal spikelet.
             Each genotype has a base rate of Vrn3 expression (baseDVrn3) at low photoperiods and a maximum rate of Vrn3 expression (maxDVrn3) under long photoperiods.  These two rates are derived internally by the CAMP model from the genotypes FLNparams.
        LeafAppearancePhase StemElongating: Start=MaximumSpikeletPrimordia; End=FlagLeafAppearance; IsEmerged=true
          Memo
            The Final leaf number is fixed at Terminal Spikelet and leaves contune to appear at a rate set by thermal time and phyllochron until flag leaf liguale appears and this phase is completed.
          VariableReference ThermalTime: VariableName=[Phenology].ThermalTime
          VariableReference FinalLeafNumber: VariableName=[Structure].FinalLeafNumber
          ExpressionFunction LeafNumber
            Expression=[Leaf].ExpandedCohortNo + [Leaf].NextExpandingLeafProportion
          VariableReference FullyExpandedLeafNo: VariableName=[Leaf].ExpandedCohortNo
          VariableReference InitialisedLeafNumber: VariableName=[Leaf].InitialisedCohortNo
        GenericPhase Heading: Start=FlagLeafAppearance; End=HeadEmergence; IsEmerged=true
          VariableReference Progression: VariableName=[Phenology].ThermalTime
          AddFunction Target
            VariableReference LongPpBase: VariableName=[Phenology].HeadEmergenceLongDayBase.FixedValue
            MultiplyFunction ShortPpExtension
              VariableReference LongPpBase: VariableName=[Phenology].HeadEmergenceLongDayBase.FixedValue
              VariableReference PpSens: VariableName=[Phenology].HeadEmergencePpSensitivity.FixedValue
              LinearInterpolationFunction PpResponse
                XYPairs: X=[6, 8, 20, 22]; Y=[1, 1, 0, 0]
                VariableReference XValue: VariableName=[Phenology].Photoperiod
        GenericPhase Flowering: Start=HeadEmergence; End=Anthesis; IsEmerged=true
          VariableReference Progression: VariableName=[Phenology].ThermalTime
          Constant Target: FixedValue=80; Units=oCd
        GenericPhase GrainExpanding: Start=Anthesis; End=MaximumGrainLength; IsEmerged=true
          Constant Target: FixedValue=120
          VariableReference Progression: VariableName=[Phenology].ThermalTime
        GenericPhase GrainFilling: Start=MaximumGrainLength; End=EndGrainFill; IsEmerged=true
          Constant Target: FixedValue=545
          VariableReference Progression: VariableName=[Phenology].ThermalTime
        GenericPhase GrainRipening: Start=EndGrainFill; End=HarvestRipe; IsEmerged=true
          Constant Target: FixedValue=335
          VariableReference Progression: VariableName=[Phenology].ThermalTime
        EndPhase ReadyForHarvesting: Start=HarvestRipe; End=Unused; IsEmerged=true
          VariableReference ThermalTime: VariableName=[Phenology].ThermalTime
        ZadokPMFWheat Zadok
          VariableReference HaunStage: VariableName=[Phenology].HaunStage
          VariableReference TillerNumber: VariableName=[Structure].TillerNumber
        OnEventFunction TerminalSpikeletDAS: SetEvent=MaximumSpikeletPrimordia; ReSetEvent=never
          Memo
            A function is used to provide terminal spikelet date as days after sowing(DAS).
          Constant PreEventValue: FixedValue=0
          VariableReference PostEventValue: VariableName=[Plant].DaysAfterSowing
        OnEventFunction FlagLeafDAS: SetEvent=FlagLeafAppearance; ReSetEvent=never
          Memo
            A function is used to provide flowering date as days after sowing(DAS).
          Constant PreEventValue: FixedValue=0
          VariableReference PostEventValue: VariableName=[Plant].DaysAfterSowing
        OnEventFunction HeadingDAS: SetEvent=HeadEmergence; ReSetEvent=never
          Memo
            A function is used to provide heading date as days after sowing(DAS).
          Constant PreEventValue: FixedValue=0
          VariableReference PostEventValue: VariableName=[Plant].DaysAfterSowing
        OnEventFunction FloweringDAS: SetEvent=Anthesis; ReSetEvent=Germination
          Memo
            A function is used to provide flowering date as days after sowing(DAS).
          Constant PreEventValue: FixedValue=0
          VariableReference PostEventValue: VariableName=[Plant].DaysAfterSowing
        OnEventFunction MaturityDAS: SetEvent=HarvestRipe; ReSetEvent=never
          Memo
            A function is used to provide maturity date as days after sowing(DAS).
          Constant PreEventValue: FixedValue=0
          VariableReference PostEventValue: VariableName=[Plant].DaysAfterSowing
        OnEventFunction EmergenceDAS: SetEvent=Emergence; ReSetEvent=never
          Memo
            A function is used to provide flowering date as days after sowing(DAS).
          Constant PreEventValue: FixedValue=0
          VariableReference PostEventValue: VariableName=[Plant].DaysAfterSowing
        DivideFunction PTQ
          MultiplyFunction Radn_mol_per_m2
            VariableReference SolarRadiation: VariableName=[IWeather].Radn
            Constant: FixedValue=2.285
            VariableReference RUE Temp factor: VariableName=[Leaf].Photosynthesis.FT
            Memo
              Multiply Radn (MJ/m2/d) by 4.57 to convert to mol/m2/day and divide by 2 to convert to mol PAR/m2/d
          VariableReference ThermalTime: VariableName=[Phenology].ThermalTime
        Constant PhyllochronPpSensitivity: FixedValue=0.6
        CAMP
          VariableReference Tt: VariableName=[Phenology].ThermalTime
          VariableReference HaunStage: VariableName=[Phenology].HaunStage
          VariableReference BasePhyllochron: VariableName=[Phenology].Phyllochron.BasePhyllochron
          VariableReference DeltaHaunStage: VariableName=[Phenology].HaunStage.Delta
          LinearInterpolationFunction PpResponse
            XYPairs: X=[0, 8, 16, 24]; Y=[0, 0, 1, 1]
            VariableReference XValue: VariableName=[Phenology].Photoperiod
          SubDailyInterpolation ColdVrnResponse: agregationMethod=1
            ColdVrnResponse Response
              Constant k: FixedValue=-0.17; Units=/oCd
              Constant DeVernalisationTemp: FixedValue=20; Units=/oCd
              Constant DeVernalisationRate: FixedValue=0; Units=/oCd
            HourlySinPpAdjusted InterpolationMethod
          FinalLeafNumberSet FLNparams: MinLN=8.3; PpLN=3.8; VrnLN=5; VxPLN=-2
          FLNParameterEnvironment EnvData: VrnTreatTemp=6; VrnTreatDuration=60; TreatmentPp_L=16; TtEmerge=90
          CalcCAMPVrnRates
            VariableReference BasePhyllochron: VariableName=[Phenology].Phyllochron.BasePhyllochron
          Memo
            The CAMP model was derived to integrate molecular and physiological models of cereal flowering time to better capture G x E x M interactions and to provide a framework for linking genetic data to field behaviour.  It calculates the current levels of expression of Vrn1, 2 and 3 genes from daily deltas that are all calculated relative to haun stage deltas in addition to temperature (Vrn1) and photoperiod (Vrn 2 and 3).  To reach the vernalisation stage Vrn1 must be upregulated to a value of at least 1.0.  Where Vrn2 is also being expressed the target for Vrn1 expression increases in parallel as more Vrn1 expression is needed to block Vrn2 and allow Vrn3 expression.  Once Vrn2 expression is blocked Vrn3 will be upregulated and terminal spikelet occurs when its apparent expression reaches 1.0.  CAMP also predicts expression of VrnX which represents the relative contributions of Vrn2 and Vrn3 prior to vernalisation.  The genotype specific rates of gene expression are derived from final leaf number parameters (FLNparams):

            MinLN - The final leaf number (FLN) of the genotype when fully vernalised early and grown under long (>=16) photoperiod following vernalisation (FLN_LV).  These conditions maximise the expression of vernalisation and photoperiod genes and this parameter provides a measure of inherent earliness of the genotype. It may vary between 5 and 15 leaves (7 is typical).

            PpLN - The difference between MinLN and the FLN of a genotype when fully vernalised early and grown under short (<=8h) photoperiod following vernalisation (FLN_SV).  These conditions maximise Vrn1 expression but minimise Vrn2 and 3 expression and PpLN provides a measure of photoperiod sensitivity of the genotype.  It may vary between 0 and 8 leaves with 1 being typical of a low sensitivity genotype and 4 being typical of a high sensitivity genotype.

            VrnLN - The difference between MinLN and the FLN – PpLN of the genotype when not vernalised and grown under short photoperiod (FLN_SN).  These conditions minimise Vrn and Pp gene expression to base (minimal) values and VrnLN is a measure of vernalisation sensitivity of the genotype.  It may vary between 0 and 9 leaves with 1 being typical for an insensitive variety and 5 being typical for a sensitive variety.

            VxPLN - The difference between MinLN + VrnLN and the FLN of the genotype when not vernalised and grown under long photoperiod (FLN_LN).  These conditions minimise upregulation of Vrn1 and maximise upregulation of Vrn2 and 3 and this parameter provides a measure of the relative activities of Vrn2 and Vrn3 during the vernalisation phase. A positive value shows short days accelerate vernalisation and a negative value shows short days slow vernalisation.  The value of VxPLN should be greater than the negative of VrnLN and typically varies between +2 and -4.
      Structure: CohortInitialisationStage=Germination; LeafInitialisationStage=Emergence
        VariableReference ThermalTime: VariableName=[Phenology].ThermalTime
        MultiplyFunction BranchingRate
          Memo
            Potential branching rate is determined by the commonly observed pattern of tillering in wheat, in which each tiller emerges with the third leaf on its parent axis (e.g. first tiller emerges at the same time as the third leaf on the main stem, the first secondary tiller appears with the third leaf on tiller 1).  This is described as a simple function of main stem leaf number.
          PhaseLookup PotentialBranchingRate
            PhaseLookupValue Vegetative: Start=Emergence; End=MaximumSpikeletPrimordia
              LinearInterpolationFunction PotentialBranchingRate
                XYPairs: X=[1, 2, 3, 4, 5, 6, 7, 8]; Y=[0, 0, 1, 2, 4, 7, 12, 20]
                VariableReference XValue: VariableName=[Structure].LeafTipsAppeared
            PhaseLookupValue Reproductive: Start=MaximumSpikeletPrimordia; End=HarvestRipe
              Constant Zero: FixedValue=0
          MinimumFunction StressFactors
            LinearInterpolationFunction NitrogenEffect
              Memo
                Inadequate Nitrogen supply is assumed to affect tillering prior to any effect on photosynthesis or leaf size.
              XYPairs: X=[0.5, 2, 3]; Y=[0, 1, 1]
              VariableReference XValue: VariableName=[Arbitrator].FN
            LinearInterpolationFunction CoverEffect
              Memo
                Tillering is said to cease once a threshold fraction of incoming radiation has been achieved.  This captures shading effects on tillering described by [evers2006cessation].
              XYPairs: X=[0, 0.1, 0.25]; Y=[1, 1, 0]
              VariableReference XValue: VariableName=[Leaf].CoverTotal
            LinearInterpolationFunction WaterStressEffect
              XYPairs: X=[0, 1]; Y=[0, 1]
              VariableReference XValue: VariableName=[Root].WaterTensionFactor
        PhaseLookup BranchMortality
          PhaseLookupValue MortalityPhase: Start=FlagLeafAppearance; End=Anthesis
            MultiplyFunction Mortality
              LinearInterpolationFunction MortalityPerDegDay
                XYPairs: X=[0, 0.005]; Y=[0.002, 0]
                VariableReference XValue: VariableName=[Structure].MeanTillerGrowthRate
              VariableReference ThermalTime: VariableName=[Phenology].ThermalTime
        HeightFunction HeightModel
          LinearInterpolationFunction PotentialHeight
            XYPairs: X=[3, 4, 5, 6, 8]; Y=[10, 200, 200, 600, 1000]
            VariableReference XValue: VariableName=[Phenology].Stage
          LinearInterpolationFunction WaterStress
            XYPairs: X=[0.3, 1]; Y=[0, 1]
            VariableReference XValue: VariableName=[Leaf].Fw
        MovingAverageFunction MeanTillerGrowthRate: NumberOfDays=5; StageToStartMovingAverage=Emergence
          Memo
            This is calculated to represent the supply of asslimilate to individual tillers over the past 5 days to use as an index to determine tiller mortality.  When tiller numbers are high or total crop assimilate supply is small there will not be enough assimilate to maintain all of the tillers so the model will senesce some.
          DivideFunction TillerGrowthRate
            VariableReference DailyGrowth: VariableName=[Arbitrator].DM.TotalFixationSupply
            VariableReference ThermalTime: VariableName=[Phenology].ThermalTime
            VariableReference StemPopulation: VariableName=[Structure].TotalStemPopn
        MovingAverageFunction MeanPhyllochron: NumberOfDays=300; StageToStartMovingAverage=Emergence
          VariableReference Phyllochron: VariableName=[Phenology].Phyllochron
        Constant StemSenescenceAge: FixedValue=0
        Constant MaxLAR: FixedValue=0.021
        VariableReference FinalLeafNumber: VariableName=[Phenology].FinalLeafNumber
        VariableReference Phyllochron: VariableName=[Phenology].Phyllochron
      ReproductiveOrgan Grain: GrowthRespiration=0; MaintenanceRespiration=0; RipeStage=Ripe
        Biomass Live
        Biomass Dead
        HoldFunction NumberFunction: WhenToHold=Anthesis
          MultiplyFunction GrainNumber
            Constant GrainsPerGramOfStem: FixedValue=26; Units=grains
            VariableReference StemMass: VariableName=[StemPlusSpike].Wt
        Constant DMConversionEfficiency: FixedValue=1
        Constant RemobilisationCost: FixedValue=0
        Constant InitialGrainProportion: FixedValue=0.1
        Constant MaximumPotentialGrainSize: FixedValue=0.05; Units=g
        PhaseLookup DMDemandFunction
          PhaseLookupValue PreFlowering: Start=Sowing; End=Anthesis
            Constant Demand: FixedValue=0
          PhaseLookupValue GrainGrowthPhase: Start=Anthesis; End=EndGrainFill
            MinimumFunction Rate
              MultiplyFunction Actual
                PhaseLookup PotentialRate
                  PhaseLookupValue InitialPhase: Start=Anthesis; End=MaximumGrainLength
                    DivideFunction Rate
                      MultiplyFunction PotentialSizeIncrease
                        VariableReference InitialProportion: VariableName=[Grain].InitialGrainProportion
                        VariableReference MaximumSize: VariableName=[Grain].MaximumPotentialGrainSize
                      VariableReference FillingDuration: VariableName=[Phenology].GrainExpanding.Target
                  PhaseLookupValue LinearPhase: Start=MaximumGrainLength; End=EndGrainFill
                    DivideFunction Rate
                      MultiplyFunction PotentialSizeIncrease
                        SubtractFunction ProportionLinearPhase
                          Constant One: FixedValue=1
                          VariableReference InitialProportion: VariableName=[Grain].InitialGrainProportion
                        VariableReference MaximumSize: VariableName=[Grain].MaximumPotentialGrainSize
                      VariableReference FillingDuration: VariableName=[Phenology].GrainFilling.Target
                VariableReference ThermalTime: VariableName=[Phenology].ThermalTime
                VariableReference NumberFunction: VariableName=[Grain].NumberFunction
              MultiplyFunction Maximum
                MaximumFunction RemainingGrowth
                  Constant Zero: FixedValue=0
                  SubtractFunction Difference
                    VariableReference MaxSize: VariableName=[Grain].MaximumPotentialGrainSize
                    VariableReference CurrentSize: VariableName=[Grain].Size
                VariableReference NumberFunction: VariableName=[Grain].NumberFunction
        PhaseLookup NFillingRate
          PhaseLookupValue PreFlowering: Start=Sowing; End=Anthesis
            Constant Demand: FixedValue=0
          PhaseLookupValue GrainGrowthPhase: Start=Anthesis; End=EndGrainFill
            MultiplyFunction Demand
              DivideFunction Rate
                Constant PotentialKernalN: FixedValue=0.0011; Units=g
                AddFunction FillingDuration
                  VariableReference EarlyFillingDuration: VariableName=[Phenology].GrainExpanding.Target
                  VariableReference GrainFillingDuration: VariableName=[Phenology].GrainFilling.Target
              VariableReference ThermalTime: VariableName=[Phenology].ThermalTime
              VariableReference NumberFunction: VariableName=[Grain].NumberFunction
        Constant MinimumNConc: FixedValue=0.0123
        Constant MaxNConcDailyGrowth: FixedValue=0.035
        Constant MaximumNConc: FixedValue=0.0463
        Constant WaterContent: FixedValue=0.12
        AccumulateFunction AccumThermalTime: StartStageName=Anthesis; EndStageName=HarvestRipe; FractionRemovedOnCut=0; FractionRemovedOnHarvest=0; FractionRemovedOnGraze=0; FractionRemovedOnPrune=0
          VariableReference DailyThermalTimeValue: VariableName=[Phenology].ThermalTime
        ExpressionFunction Protein
          Expression=divide(([Grain].Live.N + [Grain].Dead.N),([Grain].Live.Wt + [Grain].Dead.Wt)) * 100 * 5.71
        BiomassRemoval BiomassRemovalDefaults: HarvestFractionLiveToRemove=1; HarvestFractionDeadToRemove=0; HarvestFractionLiveToResidue=0; HarvestFractionDeadToResidue=0
        Constant CarbonConcentration: FixedValue=0.4
        NutrientPoolFunctions DMDemandPriorityFactors
          Constant Structural: FixedValue=1
          Constant Metabolic: FixedValue=1
          Constant Storage: FixedValue=1
        NutrientPoolFunctions NDemandPriorityFactors: same as Replacements.Wheat.Grain.DMDemandPriorityFactors
        DivideFunction NperKernal
          VariableReference GrainN: VariableName=[Grain].N
          VariableReference GrainNumber: VariableName=[Grain].NumberFunction
      Root: GrowthRespiration=0; MaintenanceRespiration=0
        RootShapeCylinder RootShape
        Constant DMConversionEfficiency: FixedValue=1
        Constant RemobilisationCost: FixedValue=0
        Constant KLModifier: FixedValue=1
        Constant SoilWaterEffect: FixedValue=1
        Constant MaxDailyNUptake: FixedValue=20
        Constant SenescenceRate: FixedValue=0.005
        Constant MaximumRootDepth: FixedValue=1000000
        Constant MaximumNConc: FixedValue=0.01
        Constant MinimumNConc: FixedValue=0.01
        PhaseLookupValue NitrogenDemandSwitch: Start=Germination; End=EndGrainFill
          Constant: FixedValue=1
        BiomassRemoval BiomassRemovalDefaults: HarvestFractionLiveToRemove=0; HarvestFractionDeadToRemove=0; HarvestFractionLiveToResidue=0.2; HarvestFractionDeadToResidue=0
        Constant KNO3: FixedValue=0.02
        Constant KNH4: FixedValue=0.01
        Constant SpecificRootLength: FixedValue=105; Units=m/g
        MultiplyFunction RootFrontVelocity
          PhaseLookup PotentialRootFrontVelocity
            PhaseLookupValue PreEmergence: Start=Germination; End=Emergence
              Constant Value: FixedValue=5; Units=mm/d
            PhaseLookupValue PostEmergence: Start=Emergence; End=MaximumGrainLength
              Constant Value: FixedValue=20; Units=mm/d
          WeightedTemperatureFunction TemperatureFactor: MaximumTemperatureWeighting=0.5
            XYPairs: X=[0, 15, 25, 35]; Y=[0, 1, 1, 0]
          LinearInterpolationFunction WaterFactor
            SoilWaterScale XValue: LLModel=0
            XYPairs: X=[0, 0.25, 1]; Y=[0, 1, 1]
        MinimumFunction NUptakeSWFactor
          SoilWaterScale: LLModel=1
          Constant One: FixedValue=1
        Constant CarbonConcentration: FixedValue=0.4
        Constant MaintenanceRespirationFunction: FixedValue=0
        NutrientDemandFunctions DMDemands
          MultiplyFunction Structural
            PartitionFractionDemandFunction DMDemandFunction
              PhaseLookup PartitionFraction
                PhaseLookupValue PreEmergence: Start=Germination; End=Emergence
                  Constant Value: FixedValue=0
                PhaseLookupValue PreFlowering: Start=Emergence; End=Anthesis
                  LinearInterpolationFunction AgeFactor
                    XYPairs: X=[3, 5, 6]; Y=[0.5, 0.2, 0.2]
                    VariableReference XValue: VariableName=[Phenology].Stage
                PhaseLookupValue PostFlowering: Start=Anthesis; End=EndGrainFill
                  Constant Value: FixedValue=0.2
            Constant StructuralFraction: FixedValue=1
          Constant Metabolic: FixedValue=0
          StorageDMDemandFunction Storage
            SubtractFunction StorageFraction
              Constant One: FixedValue=1
              VariableReference StructuralFraction: VariableName=[Root].DMDemands.Structural.StructuralFraction
          Constant QStructuralPriority: FixedValue=1
          Constant QMetabolicPriority: FixedValue=1
          Constant QStoragePriority: FixedValue=1
        NutrientDemandFunctions NDemands
          MultiplyFunction Structural
            VariableReference MinNconc: VariableName=[Root].minimumNconc
            VariableReference PotentialDMAllocation: VariableName=[Root].potentialDMAllocation.Structural
          MultiplyFunction Metabolic
            SubtractFunction MetabolicNconc
              VariableReference CritNconc: VariableName=[Root].criticalNConc
              VariableReference MinNconc: VariableName=[Root].minimumNconc
            VariableReference PotentialDMAllocation: VariableName=[Root].potentialDMAllocation.Structural
          StorageNDemandFunction Storage
            VariableReference NitrogenDemandSwitch: VariableName=[Root].nitrogenDemandSwitch
            VariableReference MaxNconc: VariableName=[Root].maximumNconc
          Constant QStructuralPriority: FixedValue=1
          Constant QMetabolicPriority: FixedValue=1
          Constant QStoragePriority: FixedValue=1
        VariableReference CriticalNConc: VariableName=[Root].MinimumNConc
        NutrientPoolFunctions InitialWt
          Constant Structural: FixedValue=0.005; Units=g/plant
          Constant Metabolic: FixedValue=0
          Constant Storage: FixedValue=0
      Leaf: MaxCover=1; Albedo=0.25; Gsmax350=0.011; R50=150; KDead=0.1; MaximumMainStemLeafNumber=30
        zero: CurrentExpandingLeaf, StartFractionExpanded, FractionNextleafExpanded, DeadNodesYesterday, GrowthRespiration, LAI, Depth, Width, PotentialEP, WaterDemand, TipsAtEmergence, CohortsAtInitialisation, FractionDied
        StomatalConductanceCO2Modifier
          VariableReference PhotosynthesisCO2Modifier: VariableName=[Leaf].Photosynthesis.FCO2
        LeafCohort InitialLeaves[1]: Rank=1; Area=200
          zero: NReallocationFactor, DMReallocationFactor, NRetranslocationFactor, DMRetranslocationFactor, ShadeInducedSenRate, SenescedFrac, DeltaPotentialArea, DeltaStressConstrainedArea, DeltaCarbonConstrainedArea, PotentialStructuralDMAllocation, PotentialMetabolicDMAllocation, MetabolicNReallocated, MetabolicWtReallocated, StorageNReallocated, StorageWtReallocated, MetabolicNRetranslocated, StorageNRetrasnlocated, DMRetranslocated, MetabolicNAllocation, StructuralDMAllocation, MetabolicDMAllocation
        LeafCohort InitialLeaves[2]: Rank=2
          zero: NReallocationFactor, DMReallocationFactor, NRetranslocationFactor, DMRetranslocationFactor, ShadeInducedSenRate, SenescedFrac, DeltaPotentialArea, DeltaStressConstrainedArea, DeltaCarbonConstrainedArea, PotentialStructuralDMAllocation, PotentialMetabolicDMAllocation, MetabolicNReallocated, MetabolicWtReallocated, StorageNReallocated, StorageWtReallocated, MetabolicNRetranslocated, StorageNRetrasnlocated, DMRetranslocated, MetabolicNAllocation, StructuralDMAllocation, MetabolicDMAllocation, Area
        LeafCohortParameters CohortParameters: ExpansionStressValue=0; CellDivisionStressValue=0; LagAccelerationValue=0; SenescenceAccelerationValue=0; ShadeInducedSenescenceRateValue=0; SenessingLeafRelativeSizeValue=0
          Constant NReallocationFactor: FixedValue=1
          Constant RemobilisationCost: FixedValue=0
          Constant MaintenanceRespirationFunction: FixedValue=0
          Constant NRetranslocationFactor: FixedValue=0.03
          Constant DMReallocationFactor: FixedValue=1
          Constant DMRetranslocationFactor: FixedValue=1
          MinimumFunction CellDivisionStress
            LinearInterpolationFunction WaterStressEffect
              XYPairs: X=[0.5, 1]; Y=[0.1, 1]
              VariableReference XValue: VariableName=[Leaf].Fw
            LinearInterpolationFunction NitrogenStressEffect
              XYPairs: X=[0, 0.5, 1]; Y=[0.1, 0.1, 1]
              VariableReference XValue: VariableName=[Leaf].Fn
          MinimumFunction ExpansionStress
            LinearInterpolationFunction WaterStressEffect
              XYPairs: X=[0.1, 1.1, 1.3]; Y=[0, 1, 1]
              VariableReference XValue: VariableName=[Root].WaterTensionFactor
            LinearInterpolationFunction TemperatureEffect
              XYPairs: X=[0, 12, 14]; Y=[0, 1, 1]
              VariableReference XValue: VariableName=[IWeather].MeanT
            LinearInterpolationFunction NitrogenStressEffect
              XYPairs: X=[0, 0.5, 1]; Y=[0.1, 0.1, 1]
              VariableReference XValue: VariableName=[Leaf].Fn
          MultiplyFunction MaxArea
            Constant AreaLargestLeaves: FixedValue=2600; Units=mm^2
            LinearInterpolationFunction AgeFactor
              XYPairs: X=[3, 4, 5, 6]; Y=[0.1, 0.5, 1, 1]
              VariableReference XValue: VariableName=[Phenology].Stage
          MultiplyFunction GrowthDuration
            Constant: FixedValue=1.3
            VariableReference Phyllochron: VariableName=[Phenology].Phyllochron
          MultiplyFunction LagDuration
            LinearInterpolationFunction AgeFactor
              XYPairs: X=[3, 4, 5]; Y=[0.4, 0.7, 1]
              VariableReference XValue: VariableName=[Phenology].Stage
            SubtractFunction LastLeafDuration
              AddFunction ThermalTimeToRipe
                VariableReference HeadEmergence: VariableName=[Phenology].Heading.Target
                VariableReference Flowering: VariableName=[Phenology].Flowering.Target
                VariableReference GrainExpanding: VariableName=[Phenology].GrainExpanding.Target
                VariableReference GrainFilling: VariableName=[Phenology].GrainFilling.Target
                VariableReference Ripening: VariableName=[Phenology].GrainRipening.Target
              VariableReference SenescenceDuration: VariableName=[Leaf].CohortParameters.SenescenceDuration
          MultiplyFunction SenescenceDuration
            Constant: FixedValue=3
            VariableReference Phyllochron: VariableName=[Phenology].Phyllochron
          Constant DetachmentLagDuration: FixedValue=1000000
          Constant DetachmentDuration: FixedValue=1000000
          Constant RelativeBranchLeafSize: FixedValue=1
          LinearInterpolationFunction MaximumNConc
            XYPairs: X=[3, 4.5, 6, 8]; Y=[0.05, 0.05, 0.035, 0.02]
            VariableReference XValue: VariableName=[Phenology].Stage
          MultiplyFunction CriticalNConc
            LinearInterpolationFunction CriticalNConcAt350ppm
              XYPairs: X=[3, 4, 5, 6, 7, 8]; Y=[0.04, 0.04, 0.04, 0.0275, 0.015, 0.015]
              VariableReference XValue: VariableName=[Phenology].Stage
            LinearInterpolationFunction CO2Factor
              XYPairs: X=[350, 700]; Y=[1, 0.93]
              VariableReference XValue: VariableName=[IWeather].CO2
          LinearInterpolationFunction MinimumNConc
            XYPairs: X=[3, 4, 5, 6, 7, 8]; Y=[0.01, 0.01, 0.01, 0.01, 0.01, 0.01]
            VariableReference XValue: VariableName=[Phenology].Stage
          AddFunction LagAcceleration
            Constant One: FixedValue=1
            MultiplyFunction Stress
              Constant StressResponseCoefficient: FixedValue=1
              LinearInterpolationFunction StressFactor
                XYPairs: X=[0, 1]; Y=[2, 0]
                VariableReference XValue: VariableName=[Leaf].Fw
          AddFunction SenescenceAcceleration: same as Replacements.Wheat.Leaf.CohortParameters.LagAcceleration
          LinearInterpolationFunction SpecificLeafAreaMax
            XYPairs: X=[3, 5, 6, 8, 9, 10]; Y=[17000, 20000, 20000, 18500, 17000, 17000]
            VariableReference XValue: VariableName=[Phenology].Stage
          LinearInterpolationFunction SpecificLeafAreaMin
            XYPairs: X=[0.4, 1]; Y=[14000, 14000]
            VariableReference XValue: VariableName=[Leaf].Fn
          Constant InitialNConc: FixedValue=0
          Constant StructuralFraction: FixedValue=0.5
          Constant StorageFraction: FixedValue=0.3
          Constant LeafSizeShapeParameter: FixedValue=0.3
          Constant SenessingLeafRelativeSize: FixedValue=1; Units=0-1
          Constant ShadeInducedSenescenceRate: FixedValue=0
          ArrayFunction LagDurationAgeMultiplier: Values=1 1 1
          ArrayFunction SenescenceDurationAgeMultiplier: Values=1 1 1
          ArrayFunction LeafSizeAgeMultiplier: Values=1 1 1 1 1 1 1 1 1 1 1 1
        RUEModel Photosynthesis
          Constant RUE: FixedValue=1.5
          WeightedTemperatureFunction FT: MaximumTemperatureWeighting=0.75
            XYPairs: X=[0, 15, 25, 35]; Y=[0, 1, 1, 0]
          LinearInterpolationFunction FN
            XYPairs: X=[0, 1, 1.5]; Y=[0, 1, 1]
            VariableReference XValue: VariableName=[Leaf].Fn
          LinearInterpolationFunction FW
            XYPairs: X=[0, 1, 1]; Y=[0, 1, 1]
            VariableReference XValue: VariableName=[Leaf].Fw
          LinearInterpolationFunction FVPD
            DailyMeanVPD DailyVPD: MaximumVPDWeight=0.66
            XYPairs: X=[0, 10, 40]; Y=[1, 1, 0]
            VariableReference XValue: VariableName=[DailyVPD]
          RUECO2Function FCO2: PhotosyntheticPathway=C3
          VariableReference RadnInt: VariableName=[Leaf].RadiationIntercepted
        Constant FrostFraction: FixedValue=0
        Constant RemobilisationCost: FixedValue=0
        VariableReference ThermalTime: VariableName=[Phenology].ThermalTime
        MinimumFunction FRGRFunction
          WeightedTemperatureFunction FT: MaximumTemperatureWeighting=0.75
            XYPairs: X=[0, 15, 25, 35]; Y=[0, 1, 1, 0]
          LinearInterpolationFunction FN
            XYPairs: X=[0, 1, 1.5]; Y=[0, 1, 1]
            VariableReference XValue: VariableName=[Leaf].Fn
          LinearInterpolationFunction FVPD: same as Replacements.Wheat.Leaf.Photosynthesis.FVPD
        BiomassRemoval BiomassRemovalDefaults: HarvestFractionLiveToRemove=0; HarvestFractionDeadToRemove=0; HarvestFractionLiveToResidue=0.3; HarvestFractionDeadToResidue=0.3
        MultiplyFunction ExtinctionCoeff
          Constant VegetativePhase: FixedValue=0.5
          LinearInterpolationFunction DevelopmentFactor
            XYPairs: X=[3, 4, 5, 5.7, 6]; Y=[1, 1, 1, 1, 1.2]
            Memo
              Exntiction coefficient increases at stem extension as leaves become more prostrate
            VariableReference XValue: VariableName=[Phenology].Stage
        Constant StructuralFraction: FixedValue=0.5
        Constant DMConversionEfficiency: FixedValue=1
        Constant CarbonConcentration: FixedValue=0.4
        Constant WidthFunction: FixedValue=0
        VariableReference DepthFunction: VariableName=[Leaf].Height
        NutrientPoolFunctions DMDemandPriorityFactors: same as Replacements.Wheat.Grain.DMDemandPriorityFactors
        NutrientPoolFunctions NDemandPriorityFactors: same as Replacements.Wheat.Grain.DMDemandPriorityFactors
        VariableReference Tips: VariableName=[Structure].LeafTipsAppeared
        VariableReference Ligules: VariableName=[Leaf].ExpandedCohortNo
        VariableReference FinalLeafNumber: VariableName=[Structure].FinalLeafNumber
        VariableReference StemPopulation: VariableName=[Structure].TotalStemPopn
        VariableReference StemNumberPerPlant: VariableName=[Structure].BranchNumber
        VariableReference MainStemPopulation: VariableName=[Plant].SowingData.Population
      GenericOrgan Spike: IsAboveGround=true
        Constant NReallocationFactor: FixedValue=0
        Constant RemobilisationCost: FixedValue=0
        PhaseLookup NRetranslocationFactor
          PhaseLookupValue EarlyGrowth: Start=Emergence; End=MaximumGrainLength
            Constant ValueDuringEarlyGrowth: FixedValue=0
          PhaseLookupValue ReproductiveGrowth: Start=MaximumGrainLength; End=EndGrainFill
            Constant ValueDuringGrainFill: FixedValue=0.5
        LinearInterpolationFunction MaximumNConc
          XYPairs: X=[3, 4, 5, 5.5, 6.5, 7, 8]; Y=[0.01, 0.01, 0.01, 0.01, 0.025, 0.025, 0.025]
          VariableReference XValue: VariableName=[Phenology].Stage
        Constant MinimumNConc: FixedValue=0.004
        BiomassRemoval BiomassRemovalDefaults: HarvestFractionLiveToRemove=0.5; HarvestFractionDeadToRemove=0; HarvestFractionLiveToResidue=0.1; HarvestFractionDeadToResidue=0
        PhaseLookupValue NitrogenDemandSwitch: Start=Emergence; End=MaximumGrainLength
          Constant: FixedValue=1
        PhaseLookup DMRetranslocationFactor
          PhaseLookupValue VegetativeGrowth: Start=Emergence; End=MaximumGrainLength
            Constant DMRetranslocationFactor: FixedValue=0
          PhaseLookupValue ReproductiveGrowth: Start=MaximumGrainLength; End=EndGrainFill
            Constant DMRetranslocationFactor: FixedValue=0.5
        Constant DetachmentRateFunction: FixedValue=0; Units=/d
        Constant MaintenanceRespirationFunction: FixedValue=0; Units=0-1
        Constant DMConversionEfficiency: FixedValue=1; Units=0-1
        VariableReference HeadNumber: VariableName=[Structure].TotalStemPopn
        Constant DMReallocationFactor: FixedValue=0
        AddFunction CriticalNConc
          VariableReference MinimumNConc: VariableName=[Spike].MinimumNConc
          MultiplyFunction MetabolicNconc
            SubtractFunction NonStructuralN
              VariableReference MaximumNConc: VariableName=[Spike].MaximumNConc
              VariableReference MinimumNConc: VariableName=[Spike].MinimumNConc
            Constant Proportion: FixedValue=0.8
        LinearInterpolationFunction SenescenceRate
          XYPairs: X=[3, 4, 5, 6, 7, 8]; Y=[0.07, 0.04, 0.04, 0.015, 0.012, 0.012]
          VariableReference XValue: VariableName=[Phenology].Stage
        Constant CarbonConcentration: FixedValue=0.4
        NutrientDemandFunctions DMDemands
          MultiplyFunction Structural
            PartitionFractionDemandFunction DMDemandFunction
              LinearInterpolationFunction PartitionFraction
                XYPairs: X=[5, 6, 6.01, 8, 9]; Y=[0, 0.01, 0.9, 0.9, 0]
                VariableReference XValue: VariableName=[Phenology].Stage
            PhaseLookup StructuralFraction
              PhaseLookupValue VegetativeGrowth: Start=Emergence; End=MaximumGrainLength
                Constant StructuralFractionEG: FixedValue=0.3
              PhaseLookupValue ReproductiveGrowth: Start=MaximumGrainLength; End=EndGrainFill
                Constant StructuralFractionGF: FixedValue=0
          Constant Metabolic: FixedValue=0
          StorageDMDemandFunction Storage
            SubtractFunction StorageFraction
              Constant One: FixedValue=1
              VariableReference StructuralFraction: VariableName=[Spike].DMDemands.Structural.StructuralFraction
          Constant QStructuralPriority: FixedValue=1
          Constant QMetabolicPriority: FixedValue=1
          Constant QStoragePriority: FixedValue=1
        NutrientDemandFunctions NDemands
          MultiplyFunction Structural
            VariableReference MinNconc: VariableName=[Spike].minimumNconc
            VariableReference PotentialDMAllocation: VariableName=[Spike].potentialDMAllocation.Structural
          MultiplyFunction Metabolic
            SubtractFunction MetabolicNconc
              VariableReference CritNconc: VariableName=[Spike].criticalNConc
              VariableReference MinNconc: VariableName=[Spike].minimumNconc
            VariableReference PotentialDMAllocation: VariableName=[Spike].potentialDMAllocation.Structural
          StorageNDemandFunction Storage
            VariableReference NitrogenDemandSwitch: VariableName=[Spike].nitrogenDemandSwitch
            VariableReference MaxNconc: VariableName=[Spike].maximumNconc
          Constant QStructuralPriority: FixedValue=1
          Constant QMetabolicPriority: FixedValue=1
          Constant QStoragePriority: FixedValue=1
        RetranslocateNonStructural RetranslocateNitrogen
        NutrientPoolFunctions InitialWt
          Constant Structural: FixedValue=0; Units=g/m^2
          Constant Metabolic: FixedValue=0
          Constant Storage: FixedValue=0
        Constant Photosynthesis: FixedValue=0
        VariableReference initialNConcFunction: VariableName=[Spike].MinimumNConc
      GenericOrgan Stem: IsAboveGround=true
        LinearInterpolationFunction SenescenceRate
          XYPairs: X=[3, 4, 5, 6, 7, 8, 9, 10, 11]; Y=[0, 0, 0, 0, 0, 0, 0, 0.2, 0.5]
          VariableReference XValue: VariableName=[Phenology].Stage
        Constant RemobilisationCost: FixedValue=0
        LinearInterpolationFunction MaximumNConc
          XYPairs: X=[3, 4, 5, 6, 7, 8]; Y=[0.07, 0.04, 0.04, 0.015, 0.012, 0.012]
          VariableReference XValue: VariableName=[Phenology].Stage
        Constant MinimumNConc: FixedValue=0.0025
        PhaseLookupValue NitrogenDemandSwitch: Start=Emergence; End=MaximumGrainLength
          Constant: FixedValue=1
        Constant NReallocationFactor: FixedValue=0
        PhaseLookup NRetranslocationFactor
          PhaseLookupValue VegetativeGrowth: Start=Sowing; End=Anthesis
            Constant Fraction: FixedValue=0
          PhaseLookupValue ReproductiveGrowth: Start=Anthesis; End=HarvestRipe
            Constant Fraction: FixedValue=0.5
        PhaseLookup DMRetranslocationFactor: same as Replacements.Wheat.Spike.DMRetranslocationFactor
        BiomassRemoval BiomassRemovalDefaults: HarvestFractionLiveToRemove=0.5; HarvestFractionDeadToRemove=0; HarvestFractionLiveToResidue=0.1; HarvestFractionDeadToResidue=0
        DivideFunction PercentWSC
          VariableReference WSC: VariableName=[Stem].Live.StorageWt
          VariableReference StemWt: VariableName=[Stem].Live.Wt
        Constant DetachmentRateFunction: FixedValue=0; Units=/d
        Constant MaintenanceRespirationFunction: FixedValue=0; Units=0-1
        Constant DMConversionEfficiency: FixedValue=1; Units=0-1
        Constant DMReallocationFactor: FixedValue=0
        AddFunction CriticalNConc
          VariableReference MinimumNConc: VariableName=[Stem].MinimumNConc
          MultiplyFunction MetabolicNconc
            SubtractFunction NonStructuralN
              VariableReference MaximumNConc: VariableName=[Stem].MaximumNConc
              VariableReference MinimumNConc: VariableName=[Stem].MinimumNConc
            Constant Proportion: FixedValue=0.5
        Constant CarbonConcentration: FixedValue=0.4
        NutrientDemandFunctions DMDemands
          MultiplyFunction Structural
            PartitionFractionDemandFunction DMDemandFunction
              PhaseLookup PartitionFraction
                PhaseLookupValue PreStemElongation: Start=Emergence; End=MaximumSpikeletPrimordia
                  Constant StemFraction: FixedValue=0.2
                PhaseLookupValue StemElongation: Start=MaximumSpikeletPrimordia; End=MaximumGrainLength
                  Constant StemFraction: FixedValue=0.7; Units=0
                PhaseLookupValue EarEmergence: Start=MaximumGrainLength; End=HarvestRipe
                  Constant StemFraction: FixedValue=0
            PhaseLookup StructuralFraction
              PhaseLookupValue VegetativeGrowth: Start=Sowing; End=MaximumGrainLength
                Constant Fraction: FixedValue=0.3
              PhaseLookupValue ReproductiveGrowth: Start=MaximumGrainLength; End=HarvestRipe
                Constant Fraction: FixedValue=0.01
          Constant Metabolic: FixedValue=0
          StorageDMDemandFunction Storage
            SubtractFunction StorageFraction
              Constant One: FixedValue=1
              VariableReference StructuralFraction: VariableName=[Stem].DMDemands.Structural.StructuralFraction
          Constant QStructuralPriority: FixedValue=1
          Constant QMetabolicPriority: FixedValue=1
          Constant QStoragePriority: FixedValue=1
        NutrientDemandFunctions NDemands
          MultiplyFunction Structural
            VariableReference MinNconc: VariableName=[Stem].minimumNconc
            VariableReference PotentialDMAllocation: VariableName=[Stem].potentialDMAllocation.Structural
          MultiplyFunction Metabolic
            SubtractFunction MetabolicNconc
              VariableReference CritNconc: VariableName=[Stem].criticalNConc
              VariableReference MinNconc: VariableName=[Stem].minimumNconc
            VariableReference PotentialDMAllocation: VariableName=[Stem].potentialDMAllocation.Structural
          StorageNDemandFunction Storage
            VariableReference NitrogenDemandSwitch: VariableName=[Stem].nitrogenDemandSwitch
            VariableReference MaxNconc: VariableName=[Stem].maximumNconc
          Constant QStructuralPriority: FixedValue=1
          Constant QMetabolicPriority: FixedValue=1
          Constant QStoragePriority: FixedValue=1
        RetranslocateNonStructural RetranslocateNitrogen
        NutrientPoolFunctions InitialWt: same as Replacements.Wheat.Spike.InitialWt
        Constant Photosynthesis: FixedValue=0
        VariableReference initialNConcFunction: VariableName=[Stem].MinimumNConc
      CompositeBiomass AboveGround: OrganNames=[Leaf, Stem, Spike, Grain]; IncludeLive=true; IncludeDead=true
      CompositeBiomass AboveGroundLive: OrganNames=[Leaf, Stem, Spike, Grain]; IncludeLive=true; IncludeDead=false
      CompositeBiomass AboveGroundDead: OrganNames=[Leaf, Stem, Spike, Grain]; IncludeLive=false; IncludeDead=true
      CompositeBiomass BelowGround: OrganNames=[Root]; IncludeLive=true; IncludeDead=true
      CompositeBiomass Total: OrganNames=[Leaf, Stem, Root, Spike, Grain]; IncludeLive=true; IncludeDead=true
      CompositeBiomass TotalLive: OrganNames=[Leaf, Stem, Root, Spike, Grain]; IncludeLive=true; IncludeDead=false
      CompositeBiomass TotalDead: OrganNames=[Leaf, Stem, Root, Spike, Grain]; IncludeLive=false; IncludeDead=true
      CompositeBiomass Ear: OrganNames=[Spike, Grain]; IncludeLive=true; IncludeDead=true
        Memo
          The Ear composite biomass object includes the Live and dead pools of all organs within the Ear to allow output for total dry matter and Nutrient contents, including total structural, non-structural and metabolic pools.
      CompositeBiomass StemPlusSpike: OrganNames=[Stem, Spike]; IncludeLive=true; IncludeDead=true
      Folder Cultivars
        Folder New Zealand
          Cultivar Amarok
            Command:
              [Phenology].HeadEmergencePpSensitivity.FixedValue = 4
              [Phenology].Phyllochron.BasePhyllochron.FixedValue = 100.0
              [Phenology].PhyllochronPpSensitivity.FixedValue = 0.6
              [Phenology].CAMP.FLNparams.MinLN = 8
              [Phenology].CAMP.FLNparams.PpLN = 4
              [Phenology].CAMP.FLNparams.VrnLN = 5
              [Phenology].CAMP.FLNparams.VxPLN = 2
              [Phenology].HeadEmergenceLongDayBase.FixedValue = 90
              [Phenology].CAMP.EnvData.VrnTreatTemp = 6
              [Phenology].CAMP.EnvData.VrnTreatDuration = 60
          Cultivar BattenWinter
            Command:
              [Phenology].HeadEmergencePpSensitivity.FixedValue = 3.8423212708469157
              [Phenology].Phyllochron.BasePhyllochron.FixedValue = 100.0
              [Leaf].ExtinctionCoeff.VegetativePhase.FixedValue = 0.7
              [Grain].NumberFunction.GrainNumber.GrainsPerGramOfStem.FixedValue = 18
              [Phenology].PhyllochronPpSensitivity.FixedValue = 0.6
              [Phenology].CAMP.FLNparams.MinLN = 8.15781757053076
              [Phenology].CAMP.FLNparams.PpLN = 3.6074343511019427
              [Phenology].CAMP.FLNparams.VrnLN = 3.096547775405041
              [Phenology].CAMP.FLNparams.VxPLN = 6.987099381114945
              [Phenology].HeadEmergenceLongDayBase.FixedValue = 266.0
              [Phenology].CAMP.EnvData.VrnTreatTemp = 6
              [Phenology].CAMP.EnvData.VrnTreatDuration = 60
          Cultivar BattenSpring
            Command:
              [Phenology].HeadEmergencePpSensitivity.FixedValue = 0.006727231500210627
              [Phenology].Phyllochron.BasePhyllochron.FixedValue = 100.0
              [Leaf].ExtinctionCoeff.VegetativePhase.FixedValue = 0.7
              [Grain].NumberFunction.GrainNumber.GrainsPerGramOfStem.FixedValue = 22
              [Phenology].PhyllochronPpSensitivity.FixedValue = 0.6
              [Phenology].CAMP.FLNparams.MinLN = 8.25262475446035
              [Phenology].CAMP.FLNparams.PpLN = 7.552256317837019
              [Phenology].CAMP.FLNparams.VrnLN = 0.18541366678983096
              [Phenology].CAMP.FLNparams.VxPLN = -0.03479769923441367
              [Phenology].HeadEmergenceLongDayBase.FixedValue = 107.0
              [Phenology].CAMP.EnvData.VrnTreatTemp = 6
              [Phenology].CAMP.EnvData.VrnTreatDuration = 60
          Cultivar Claire
            Command:
              [Phenology].HeadEmergencePpSensitivity.FixedValue = 2
              [Phenology].Phyllochron.BasePhyllochron.FixedValue = 100
              [Phenology].CAMP.FLNparams.MinLN = 9
              [Phenology].CAMP.FLNparams.PpLN = 5
              [Phenology].CAMP.FLNparams.VrnLN = 4
              [Phenology].CAMP.FLNparams.VxPLN = 4
              [Phenology].HeadEmergenceLongDayBase.FixedValue = 150
              [Phenology].CAMP.EnvData.VrnTreatTemp = 6
              [Phenology].CAMP.EnvData.VrnTreatDuration = 60
          Cultivar Conquest
            Command:
              [Phenology].Phyllochron.BasePhyllochron.FixedValue = 100
              [Phenology].CAMP.FLNparams.MinLN = 7.5
              [Phenology].CAMP.FLNparams.PpLN = 2.5
              [Phenology].CAMP.FLNparams.VrnLN = 0.0
              [Phenology].CAMP.FLNparams.VxPLN = 0.0
              [Phenology].HeadEmergenceLongDayBase.FixedValue = 100
              [Phenology].HeadEmergencePpSensitivity.FixedValue = 1.0
              [Phenology].CAMP.EnvData.VrnTreatTemp = 6
              [Phenology].CAMP.EnvData.VrnTreatDuration = 60
          Cultivar CRWT153
            Command:
              [Phenology].Phyllochron.BasePhyllochron.FixedValue = 100.0
              [Phenology].PhyllochronPpSensitivity.FixedValue = 0.6
              [Phenology].CAMP.FLNparams.MinLN = 14.27272727272727
              [Phenology].CAMP.FLNparams.PpLN = -0.028282828282829797
              [Phenology].CAMP.FLNparams.VrnLN = 2.6000000000000014
              [Phenology].CAMP.FLNparams.VxPLN = -1.2477272727272712
              [Phenology].HeadEmergenceLongDayBase.FixedValue = 200
              [Phenology].HeadEmergencePpSensitivity.FixedValue = 2.3
              [Phenology].CAMP.EnvData.VrnTreatTemp = 6
              [Phenology].CAMP.EnvData.VrnTreatDuration = 60
          Cultivar Discovery
            Command:
              [Phenology].Phyllochron.BasePhyllochron.FixedValue = 80
              [Leaf].CohortParameters.MaxArea.AreaLargestLeaves.FixedValue = 1600
              [Grain].MaximumPotentialGrainSize.FixedValue = 0.051
              [Grain].NumberFunction.GrainNumber.GrainsPerGramOfStem.FixedValue = 26
              [Leaf].ExtinctionCoeff.VegetativePhase.FixedValue = 0.5
              [Structure].BranchingRate.PotentialBranchingRate.Vegetative.PotentialBranchingRate.XYPairs.Y = 0,0,0,0,4,7,12,20
              [Grain].MaximumNConc.FixedValue = 0.025
              [Grain].MaxNConcDailyGrowth.FixedValue = 0.025
              [Leaf].ExtinctionCoeff.DevelopmentFactor.XYPairs.Y = 1,1,1,1,1.4
              [Leaf].CohortParameters.MinimumNConc.XYPairs.Y = 0.01,0.008, 0.008,0.008, 0.008, 0.008
              [Stem].MinimumNConc.FixedValue = 0.006
              [Spike].DMRetranslocationFactor.ReproductiveGrowth.DMRetranslocationFactor.FixedValue = 0.05
              [Phenology].CAMP.FLNparams.MinLN = 9.0
              [Phenology].CAMP.FLNparams.PpLN = 0.0
              [Phenology].CAMP.FLNparams.VrnLN = 0.0
              [Phenology].CAMP.FLNparams.VxPLN = 0.0
              [Phenology].HeadEmergenceLongDayBase.FixedValue = 100
              [Phenology].HeadEmergencePpSensitivity.FixedValue = 1.0
              [Phenology].CAMP.EnvData.VrnTreatTemp = 6
              [Phenology].CAMP.EnvData.VrnTreatDuration = 60
            Memo
              This is a spring wheat with a high grain number and later tillering
          Cultivar Exceed
            Command:
              [Phenology].CAMP.FLNparams.MinLN = 9
              [Phenology].CAMP.FLNparams.PpLN = 3.0
              [Phenology].CAMP.FLNparams.VrnLN = 7
              [Phenology].CAMP.FLNparams.VxPLN = 0.0
          Cultivar Option
            Command:
              [Phenology].CAMP.FLNparams.MinLN = 9
              [Phenology].CAMP.FLNparams.PpLN = 3.0
              [Phenology].CAMP.FLNparams.VrnLN = 7
              [Phenology].CAMP.FLNparams.VxPLN = 0.0
          Cultivar Otane
            Command:
              [Phenology].HeadEmergencePpSensitivity.FixedValue = 2
              [Phenology].Phyllochron.BasePhyllochron.FixedValue = 100.0
              [Phenology].PhyllochronPpSensitivity.FixedValue = 0.6
              [Phenology].CAMP.FLNparams.MinLN = 7
              [Phenology].CAMP.FLNparams.PpLN = 4
              [Phenology].CAMP.FLNparams.VrnLN = 0
              [Phenology].CAMP.FLNparams.VxPLN = 0
              [Phenology].HeadEmergenceLongDayBase.FixedValue = 150
              [Phenology].CAMP.EnvData.VrnTreatTemp = 6
              [Phenology].CAMP.EnvData.VrnTreatDuration = 60
          Cultivar Regency
            Command:
              [Phenology].CAMP.FLNparams.MinLN = 9
              [Phenology].CAMP.FLNparams.PpLN = 3.0
              [Phenology].CAMP.FLNparams.VrnLN = 7
              [Phenology].CAMP.FLNparams.VxPLN = 0.0
          Cultivar Robigus
            Command:
              [Phenology].CAMP.FLNparams.MinLN = 9
              [Phenology].CAMP.FLNparams.PpLN = 3.0
              [Phenology].CAMP.FLNparams.VrnLN = 7
              [Phenology].CAMP.FLNparams.VxPLN = 0.0
          Cultivar Rongotea
            Command:
              [Phenology].HeadEmergencePpSensitivity.FixedValue = 3.92123686073301
              [Phenology].Phyllochron.BasePhyllochron.FixedValue = 100
              [Phenology].CAMP.FLNparams.MinLN = 7.73858795204672
              [Phenology].CAMP.FLNparams.PpLN = 10.6418278399273
              [Phenology].CAMP.FLNparams.VrnLN = 0.307012432477857
              [Phenology].CAMP.FLNparams.VxPLN = -0.256935248010825
              [Phenology].HeadEmergenceLongDayBase.FixedValue = 168
              [Phenology].CAMP.EnvData.VrnTreatTemp = 6
              [Phenology].CAMP.EnvData.VrnTreatDuration = 60
          Cultivar Sage
            Command:
              [Phenology].CAMP.FLNparams.MinLN = 9
              [Phenology].CAMP.FLNparams.PpLN = 3.0
              [Phenology].CAMP.FLNparams.VrnLN = 7
              [Phenology].CAMP.FLNparams.VxPLN = 0.0
          Cultivar Saracen
            Command:
              [Phenology].Phyllochron.BasePhyllochron.FixedValue = 100.0
              [Phenology].PhyllochronPpSensitivity.FixedValue = 0.6
              [Phenology].CAMP.FLNparams.MinLN = 8
              [Phenology].CAMP.FLNparams.PpLN = 2
              [Phenology].CAMP.FLNparams.VrnLN = 1
              [Phenology].CAMP.FLNparams.VxPLN = 2
              [Phenology].HeadEmergenceLongDayBase.FixedValue = 170
              [Phenology].HeadEmergencePpSensitivity.FixedValue = 4
              [Phenology].CAMP.EnvData.VrnTreatTemp = 6
              [Phenology].CAMP.EnvData.VrnTreatDuration = 60
          Cultivar Solstice
            Command:
              [Phenology].CAMP.FLNparams.MinLN = 9
              [Phenology].CAMP.FLNparams.PpLN = 3.0
              [Phenology].CAMP.FLNparams.VrnLN = 7
              [Phenology].CAMP.FLNparams.VxPLN = 0.0
          Cultivar Tribute
            Command:
              [Phenology].CAMP.FLNparams.MinLN = 9
              [Phenology].CAMP.FLNparams.PpLN = 3.0
              [Phenology].CAMP.FLNparams.VrnLN = 7
              [Phenology].CAMP.FLNparams.VxPLN = 0.0
          Cultivar Wakanui
            Command:
              [Phenology].HeadEmergenceLongDayBase.FixedValue = 50
              [Phenology].Phyllochron.BasePhyllochron.FixedValue = 105.0
              [Leaf].ExtinctionCoeff.VegetativePhase.FixedValue = 0.75
              [Grain].NumberFunction.GrainNumber.GrainsPerGramOfStem.FixedValue = 26
              [Grain].MaximumPotentialGrainSize.FixedValue = 0.045
              [Leaf].CohortParameters.MaxArea.AreaLargestLeaves.FixedValue = 3000
              [Phenology].PhyllochronPpSensitivity.FixedValue = 0.33
              [Phenology].CAMP.FLNparams.MinLN = 10
              [Phenology].CAMP.FLNparams.PpLN = 12
              [Phenology].CAMP.FLNparams.VrnLN = 12
              [Phenology].CAMP.FLNparams.VxPLN = 4
              [Phenology].HeadEmergencePpSensitivity.FixedValue = 8
              [Phenology].CAMP.EnvData.VrnTreatTemp = 6
              [Phenology].CAMP.EnvData.VrnTreatDuration = 60
          Cultivar Voltron: same as Replacements.Wheat.Cultivars.New Zealand.Wakanui
          Cultivar Sorrial: same as Replacements.Wheat.Cultivars.New Zealand.Wakanui
          Cultivar Cesario: same as Replacements.Wheat.Cultivars.New Zealand.Wakanui
          Cultivar Stockade: same as Replacements.Wheat.Cultivars.New Zealand.Wakanui
          Cultivar CRW247
            Command:
              [Phenology].HeadEmergenceLongDayBase.FixedValue = 50
              [Phenology].Phyllochron.BasePhyllochron.FixedValue = 105.0
              [Leaf].ExtinctionCoeff.VegetativePhase.FixedValue = 0.75
              [Grain].NumberFunction.GrainNumber.GrainsPerGramOfStem.FixedValue = 26
              [Grain].MaximumPotentialGrainSize.FixedValue = 0.045
              [Leaf].CohortParameters.MaxArea.AreaLargestLeaves.FixedValue = 3000
              [Phenology].PhyllochronPpSensitivity.FixedValue = 0.33
              [Phenology].CAMP.FLNparams.MinLN = 10
              [Phenology].CAMP.FLNparams.PpLN = 8
              [Phenology].CAMP.FLNparams.VrnLN = 0
              [Phenology].CAMP.FLNparams.VxPLN = 0
              [Phenology].HeadEmergencePpSensitivity.FixedValue = 8
              [Phenology].CAMP.EnvData.VrnTreatTemp = 6
              [Phenology].CAMP.EnvData.VrnTreatDuration = 60
          Cultivar Zyatt: same as Replacements.Wheat.Cultivars.New Zealand.Wakanui
          Cultivar Graham: same as Replacements.Wheat.Cultivars.New Zealand.Wakanui
          Cultivar Kerrin: same as Replacements.Wheat.Cultivars.New Zealand.Wakanui
        Folder Australia
          Cultivar Adv08_0008
            Command:
              [Phenology].Phyllochron.BasePhyllochron.FixedValue = 107.385378970476
              [Phenology].PhyllochronPpSensitivity.FixedValue = 0.246728222459184
              [Phenology].CAMP.EnvData.VrnTreatTemp = 5.8
              [Phenology].CAMP.EnvData.VrnTreatDuration = 60
              [Phenology].CAMP.FLNparams.MinLN = 8
              [Phenology].CAMP.FLNparams.VrnLN = 5
              [Phenology].CAMP.FLNparams.PpLN = 1
              [Phenology].CAMP.FLNparams.VxPLN = 0
              [Phenology].HeadEmergenceLongDayBase.FixedValue = 290
              [Phenology].HeadEmergencePpSensitivity.FixedValue = 0
          Cultivar Axe
            Command:
              [Phenology].HeadEmergencePpSensitivity.FixedValue = 1
              [Phenology].Phyllochron.BasePhyllochron.FixedValue = 92.9812317822162
              [Phenology].PhyllochronPpSensitivity.FixedValue = 0.268590208069814
              [Phenology].CAMP.FLNparams.MinLN = 7
              [Phenology].CAMP.FLNparams.PpLN = 2
              [Phenology].CAMP.FLNparams.VrnLN = 0
              [Phenology].CAMP.FLNparams.VxPLN = 0
              [Phenology].CAMP.EnvData.VrnTreatTemp = 5.8
              [Phenology].CAMP.EnvData.VrnTreatDuration = 60
              [Phenology].HeadEmergenceLongDayBase.FixedValue = 130
          Cultivar Batavia
            Command:
              [Phenology].Phyllochron.BasePhyllochron.FixedValue = 100
              [Phenology].CAMP.FLNparams.MinLN = 5
              [Phenology].CAMP.FLNparams.PpLN = 9
              [Phenology].CAMP.FLNparams.VrnLN = 0
              [Phenology].CAMP.FLNparams.VxPLN = 6
              [Phenology].HeadEmergenceLongDayBase.FixedValue = 130
              [Phenology].HeadEmergencePpSensitivity.FixedValue = 6
          Cultivar Beaufort
            Command:
              [Phenology].Phyllochron.BasePhyllochron.FixedValue = 102.321288321408
              [Phenology].PhyllochronPpSensitivity.FixedValue = 0.254667061341894
              [Phenology].CAMP.FLNparams.MinLN = 8
              [Phenology].CAMP.FLNparams.PpLN = 3
              [Phenology].CAMP.FLNparams.VrnLN = 3
              [Phenology].CAMP.FLNparams.VxPLN = 3
              [Phenology].CAMP.EnvData.VrnTreatTemp = 6
              [Phenology].CAMP.EnvData.VrnTreatDuration = 60
              [Phenology].HeadEmergenceLongDayBase.FixedValue = 170
              [Phenology].HeadEmergencePpSensitivity.FixedValue = 0
          Cultivar Bennett
            Command:
              [Phenology].Phyllochron.BasePhyllochron.FixedValue = 106.269847259128
              [Phenology].PhyllochronPpSensitivity.FixedValue = 0.221423439420895
              [Phenology].CAMP.FLNparams.MinLN = 8
              [Phenology].CAMP.FLNparams.PpLN = 1
              [Phenology].CAMP.FLNparams.VrnLN = 6
              [Phenology].CAMP.FLNparams.VxPLN = 1
              [Phenology].CAMP.EnvData.VrnTreatTemp = 5.8
              [Phenology].CAMP.EnvData.VrnTreatDuration = 60
              [Phenology].HeadEmergenceLongDayBase.FixedValue = 230
              [Phenology].HeadEmergencePpSensitivity.FixedValue = 2
          Cultivar Bolac
            Command:
              [Phenology].Phyllochron.BasePhyllochron.FixedValue = 99.3767047504637
              [Phenology].PhyllochronPpSensitivity.FixedValue = 0.204801292585874
              [Phenology].CAMP.FLNparams.MinLN = 7
              [Phenology].CAMP.FLNparams.PpLN = 5
              [Phenology].CAMP.FLNparams.VrnLN = 1
              [Phenology].CAMP.FLNparams.VxPLN = 0
              [Phenology].CAMP.EnvData.VrnTreatTemp = 5.8
              [Phenology].CAMP.EnvData.VrnTreatDuration = 60
              [Phenology].HeadEmergenceLongDayBase.FixedValue = 170
              [Phenology].HeadEmergencePpSensitivity.FixedValue = 1
          Cultivar Braewood
            Command:
              [Phenology].Phyllochron.BasePhyllochron.FixedValue = 92.1177406284002
              [Phenology].PhyllochronPpSensitivity.FixedValue = 0.269041869726177
              [Phenology].CAMP.FLNparams.MinLN = 8
              [Phenology].CAMP.FLNparams.PpLN = 2
              [Phenology].CAMP.FLNparams.VrnLN = 3
              [Phenology].CAMP.FLNparams.VxPLN = -3
              [Phenology].CAMP.EnvData.VrnTreatTemp = 5.8
              [Phenology].CAMP.EnvData.VrnTreatDuration = 60
              [Phenology].HeadEmergenceLongDayBase.FixedValue = 150
              [Phenology].HeadEmergencePpSensitivity.FixedValue = 2
          Cultivar Calingiri
            Command:
              [Phenology].Phyllochron.BasePhyllochron.FixedValue = 112.665706012865
              [Phenology].PhyllochronPpSensitivity.FixedValue = 0.16928704526596
              [Phenology].CAMP.FLNparams.MinLN = 7
              [Phenology].CAMP.FLNparams.PpLN = 2
              [Phenology].CAMP.FLNparams.VrnLN = 2
              [Phenology].CAMP.FLNparams.VxPLN = -1
              [Phenology].CAMP.EnvData.VrnTreatTemp = 5.8
              [Phenology].CAMP.EnvData.VrnTreatDuration = 60
              [Phenology].HeadEmergenceLongDayBase.FixedValue = 50
              [Phenology].HeadEmergencePpSensitivity.FixedValue = 4
          Cultivar Catalina
            Command:
              [Phenology].Phyllochron.BasePhyllochron.FixedValue = 93.1373432728081
              [Phenology].PhyllochronPpSensitivity.FixedValue = 0.403019826488085
              [Phenology].CAMP.FLNparams.MinLN = 7
              [Phenology].CAMP.FLNparams.PpLN = 1
              [Phenology].CAMP.FLNparams.VrnLN = 0
              [Phenology].CAMP.FLNparams.VxPLN = 0
              [Phenology].CAMP.EnvData.VrnTreatTemp = 5.8
              [Phenology].CAMP.EnvData.VrnTreatDuration = 60
              [Phenology].HeadEmergenceLongDayBase.FixedValue = 230
              [Phenology].HeadEmergencePpSensitivity.FixedValue = 1
          Cultivar Condo
            Command:
              [Phenology].Phyllochron.BasePhyllochron.FixedValue = 94.4306598856844
              [Phenology].PhyllochronPpSensitivity.FixedValue = 0.179475706868039
              [Phenology].CAMP.FLNparams.MinLN = 7
              [Phenology].CAMP.FLNparams.PpLN = 2
              [Phenology].CAMP.FLNparams.VrnLN = 3
              [Phenology].CAMP.FLNparams.VxPLN = 0
              [Phenology].CAMP.EnvData.VrnTreatTemp = 5.8
              [Phenology].CAMP.EnvData.VrnTreatDuration = 60
              [Phenology].HeadEmergenceLongDayBase.FixedValue = 190
              [Phenology].HeadEmergencePpSensitivity.FixedValue = 0
          Cultivar Crusader
            Command:
              [Phenology].Phyllochron.BasePhyllochron.FixedValue = 100.832025052954
              [Phenology].PhyllochronPpSensitivity.FixedValue = 0.199967770650946
              [Phenology].CAMP.FLNparams.MinLN = 6
              [Phenology].CAMP.FLNparams.PpLN = 5
              [Phenology].CAMP.FLNparams.VrnLN = 3
              [Phenology].CAMP.FLNparams.VxPLN = 0
              [Phenology].CAMP.EnvData.VrnTreatTemp = 6
              [Phenology].CAMP.EnvData.VrnTreatDuration = 60
              [Phenology].HeadEmergenceLongDayBase.FixedValue = 230
              [Phenology].HeadEmergencePpSensitivity.FixedValue = 0
          Cultivar Cunningham
            Command:
              [Phenology].Phyllochron.BasePhyllochron.FixedValue = 100
              [Phenology].CAMP.FLNparams.MinLN = 7
              [Phenology].CAMP.FLNparams.PpLN = 12
              [Phenology].CAMP.FLNparams.VrnLN = 9
              [Phenology].CAMP.FLNparams.VxPLN = -9
              [Phenology].HeadEmergenceLongDayBase.FixedValue = 50
              [Phenology].HeadEmergencePpSensitivity.FixedValue = 0
          Cultivar Cutlass
            Command:
              [Phenology].Phyllochron.BasePhyllochron.FixedValue = 95.8008034182983
              [Phenology].PhyllochronPpSensitivity.FixedValue = 0.352406544577556
              [Phenology].CAMP.FLNparams.MinLN = 7
              [Phenology].CAMP.FLNparams.PpLN = 5
              [Phenology].CAMP.FLNparams.VrnLN = 1
              [Phenology].CAMP.FLNparams.VxPLN = 2
              [Phenology].CAMP.EnvData.VrnTreatTemp = 5.8
              [Phenology].CAMP.EnvData.VrnTreatDuration = 60
              [Phenology].HeadEmergenceLongDayBase.FixedValue = 130
              [Phenology].HeadEmergencePpSensitivity.FixedValue = 2
          Cultivar Derrimut
            Command:
              [Phenology].Phyllochron.BasePhyllochron.FixedValue = 94.7552823110091
              [Phenology].PhyllochronPpSensitivity.FixedValue = 0.263180943521024
              [Phenology].CAMP.FLNparams.MinLN = 7
              [Phenology].CAMP.FLNparams.PpLN = 3
              [Phenology].CAMP.FLNparams.VrnLN = 2
              [Phenology].CAMP.FLNparams.VxPLN = -2
              [Phenology].CAMP.EnvData.VrnTreatTemp = 5.8
              [Phenology].CAMP.EnvData.VrnTreatDuration = 60
              [Phenology].HeadEmergenceLongDayBase.FixedValue = 150
              [Phenology].HeadEmergencePpSensitivity.FixedValue = 1
          Cultivar Eaglehawk
            Command:
              [Phenology].Phyllochron.BasePhyllochron.FixedValue = 122.758992485634
              [Phenology].PhyllochronPpSensitivity.FixedValue = 0.119042603665788
              [Phenology].CAMP.FLNparams.MinLN = 6
              [Phenology].CAMP.FLNparams.PpLN = 3
              [Phenology].CAMP.FLNparams.VrnLN = 1
              [Phenology].CAMP.FLNparams.VxPLN = 3
              [Phenology].CAMP.EnvData.VrnTreatTemp = 5.8
              [Phenology].CAMP.EnvData.VrnTreatDuration = 60
              [Phenology].HeadEmergenceLongDayBase.FixedValue = 190
              [Phenology].HeadEmergencePpSensitivity.FixedValue = 4
          Cultivar Ellison
            Command:
              [Phenology].Phyllochron.BasePhyllochron.FixedValue = 110.512287746208
              [Phenology].PhyllochronPpSensitivity.FixedValue = 0.282156394448543
              [Phenology].CAMP.FLNparams.MinLN = 6
              [Phenology].CAMP.FLNparams.PpLN = 4
              [Phenology].CAMP.FLNparams.VrnLN = 1
              [Phenology].CAMP.FLNparams.VxPLN = 2
              [Phenology].CAMP.EnvData.VrnTreatTemp = 5.8
              [Phenology].CAMP.EnvData.VrnTreatDuration = 60
              [Phenology].HeadEmergenceLongDayBase.FixedValue = 130
              [Phenology].HeadEmergencePpSensitivity.FixedValue = 4
          Cultivar Egret
            Command:
              [Phenology].Phyllochron.BasePhyllochron.FixedValue =80
              [Phenology].CAMP.FLNparams.MinLN = 8
              [Phenology].CAMP.FLNparams.PpLN = 9
              [Phenology].CAMP.FLNparams.VrnLN = 8
              [Phenology].CAMP.FLNparams.VxPLN = -8
              [Phenology].HeadEmergenceLongDayBase.FixedValue = 110
              [Phenology].HeadEmergencePpSensitivity.FixedValue = 0
              [Phenology].CAMP.EnvData.VrnTreatTemp = 6
              [Phenology].CAMP.EnvData.VrnTreatDuration = 60
          Cultivar Emu_Rock
            Command:
              [Phenology].Phyllochron.BasePhyllochron.FixedValue = 94.7698873180009
              [Phenology].PhyllochronPpSensitivity.FixedValue = 0.358007951256312
              [Phenology].CAMP.FLNparams.MinLN = 6
              [Phenology].CAMP.FLNparams.PpLN = 1
              [Phenology].CAMP.FLNparams.VrnLN = 1
              [Phenology].CAMP.FLNparams.VxPLN = -1
              [Phenology].CAMP.EnvData.VrnTreatTemp = 5.8
              [Phenology].CAMP.EnvData.VrnTreatDuration = 60
              [Phenology].HeadEmergenceLongDayBase.FixedValue = 183.0
              [Phenology].HeadEmergencePpSensitivity.FixedValue = 1.7962741039794823
          Cultivar Forrest
            Command:
              [Phenology].Phyllochron.BasePhyllochron.FixedValue = 99.8910902837222
              [Phenology].PhyllochronPpSensitivity.FixedValue = 0.417874283738016
              [Phenology].CAMP.FLNparams.MinLN = 6
              [Phenology].CAMP.FLNparams.PpLN = 5
              [Phenology].CAMP.FLNparams.VrnLN = 2
              [Phenology].CAMP.FLNparams.VxPLN = 1
              [Phenology].CAMP.EnvData.VrnTreatTemp = 5.8
              [Phenology].CAMP.EnvData.VrnTreatDuration = 60
              [Phenology].HeadEmergenceLongDayBase.FixedValue = 370
              [Phenology].HeadEmergencePpSensitivity.FixedValue = 1
          Cultivar Gregory
            Command:
              [Phenology].Phyllochron.BasePhyllochron.FixedValue = 96.2227321902995
              [Phenology].PhyllochronPpSensitivity.FixedValue = 0.199981872553676
              [Phenology].CAMP.FLNparams.MinLN = 8
              [Phenology].CAMP.FLNparams.PpLN = 2
              [Phenology].CAMP.FLNparams.VrnLN = 4
              [Phenology].CAMP.FLNparams.VxPLN = -3
              [Phenology].CAMP.EnvData.VrnTreatTemp = 6
              [Phenology].CAMP.EnvData.VrnTreatDuration = 60
              [Phenology].HeadEmergenceLongDayBase.FixedValue = 110
              [Phenology].HeadEmergencePpSensitivity.FixedValue = 1
              [Grain].MaximumPotentialGrainSize.FixedValue = 0.041
              [Grain].NumberFunction.GrainNumber.GrainsPerGramOfStem.FixedValue = 22
          Cultivar Gamenya
            Command:
              [Phenology].Phyllochron.BasePhyllochron.FixedValue = 100
              [Phenology].PhyllochronPpSensitivity.FixedValue = 0.349562436956343
              [Phenology].CAMP.FLNparams.MinLN = 8
              [Phenology].CAMP.FLNparams.PpLN = 3
              [Phenology].CAMP.FLNparams.VrnLN = 0.5
              [Phenology].CAMP.FLNparams.VxPLN = 0
              [Phenology].CAMP.EnvData.VrnTreatTemp = 6
              [Phenology].CAMP.EnvData.VrnTreatDuration = 60
              [Phenology].HeadEmergenceLongDayBase.FixedValue = 50
              [Phenology].HeadEmergencePpSensitivity.FixedValue = 4
          Cultivar Gauntlet
            Command:
              [Phenology].Phyllochron.BasePhyllochron.FixedValue = 91.4777217640106
              [Phenology].PhyllochronPpSensitivity.FixedValue = 0.28135751778138
              [Phenology].CAMP.FLNparams.MinLN = 7
              [Phenology].CAMP.FLNparams.PpLN = 2
              [Phenology].CAMP.FLNparams.VrnLN = 4
              [Phenology].CAMP.FLNparams.VxPLN = -4
              [Phenology].CAMP.EnvData.VrnTreatTemp = 5.8
              [Phenology].CAMP.EnvData.VrnTreatDuration = 60
              [Phenology].HeadEmergenceLongDayBase.FixedValue = 230
              [Phenology].HeadEmergencePpSensitivity.FixedValue = 1
          Cultivar Gladius
            Command:
              [Phenology].Phyllochron.BasePhyllochron.FixedValue = 100
              [Phenology].CAMP.FLNparams.MinLN = 6
              [Phenology].CAMP.FLNparams.PpLN = 5.0
              [Phenology].CAMP.FLNparams.VrnLN = 0
              [Phenology].CAMP.FLNparams.VxPLN = 0.0
          Cultivar Grenade
            Command:
              [Phenology].Phyllochron.BasePhyllochron.FixedValue = 96.8120116390919
              [Phenology].PhyllochronPpSensitivity.FixedValue = 0.3478103654812
              [Phenology].CAMP.FLNparams.MinLN = 7
              [Phenology].CAMP.FLNparams.PpLN = 3
              [Phenology].CAMP.FLNparams.VrnLN = 1
              [Phenology].CAMP.FLNparams.VxPLN = 0
              [Phenology].CAMP.EnvData.VrnTreatTemp = 5.8
              [Phenology].CAMP.EnvData.VrnTreatDuration = 60
              [Phenology].HeadEmergenceLongDayBase.FixedValue = 230
              [Phenology].HeadEmergencePpSensitivity.FixedValue = 0
          Cultivar Gutha
            Command:
              [Phenology].Phyllochron.BasePhyllochron.FixedValue = 107
              [Phenology].PhyllochronPpSensitivity.FixedValue = 0.247088996399892
              [Grain].NumberFunction.GrainNumber.GrainsPerGramOfStem.FixedValue = 17
              [Phenology].CAMP.EnvData.VrnTreatTemp = 5.8
              [Phenology].CAMP.EnvData.VrnTreatDuration = 60
              [Phenology].CAMP.FLNparams.MinLN = 7
              [Phenology].CAMP.FLNparams.PpLN = 2
              [Phenology].CAMP.FLNparams.VrnLN = 1
              [Phenology].CAMP.FLNparams.VxPLN = 0
              [Phenology].HeadEmergenceLongDayBase.FixedValue = 50
              [Phenology].HeadEmergencePpSensitivity.FixedValue = 5
          Cultivar H45
            Command:
              [Phenology].Phyllochron.BasePhyllochron.FixedValue = 85.6989214218668
              [Grain].NumberFunction.GrainNumber.GrainsPerGramOfStem.FixedValue = 20
              [Phenology].PhyllochronPpSensitivity.FixedValue = 0.349562436956343
              [Phenology].CAMP.FLNparams.MinLN = 8
              [Phenology].CAMP.FLNparams.PpLN = 3
              [Phenology].CAMP.FLNparams.VrnLN = 0
              [Phenology].CAMP.FLNparams.VxPLN = 0
              [Phenology].CAMP.EnvData.VrnTreatTemp = 6
              [Phenology].CAMP.EnvData.VrnTreatDuration = 60
              [Phenology].HeadEmergenceLongDayBase.FixedValue = 50
              [Phenology].HeadEmergencePpSensitivity.FixedValue = 4
          Cultivar H46
            Command:
              [Phenology].Phyllochron.BasePhyllochron.FixedValue = 100
              [Phenology].CAMP.FLNparams.MinLN = 8
              [Phenology].CAMP.FLNparams.PpLN = 4.0
              [Phenology].CAMP.FLNparams.VrnLN = 0
              [Phenology].CAMP.FLNparams.VxPLN = 0.0
          Cultivar Hartog
            Command:
              [Phenology].Phyllochron.BasePhyllochron.FixedValue = 107.48
              [Grain].MaximumPotentialGrainSize.FixedValue = 0.041
              [Grain].NumberFunction.GrainNumber.GrainsPerGramOfStem.FixedValue = 22
              [Phenology].PhyllochronPpSensitivity.FixedValue = 0.247
              [Phenology].CAMP.FLNparams.MinLN = 7
              [Phenology].CAMP.FLNparams.PpLN = 4
              [Phenology].CAMP.FLNparams.VrnLN = 2
              [Phenology].CAMP.FLNparams.VxPLN = 0
              [Phenology].HeadEmergenceLongDayBase.FixedValue = 50
              [Phenology].HeadEmergencePpSensitivity.FixedValue = 5
              [Phenology].CAMP.EnvData.VrnTreatTemp = 6
              [Phenology].CAMP.EnvData.VrnTreatDuration = 60
          Cultivar Hume
            Command:
              [Phenology].Phyllochron.BasePhyllochron.FixedValue = 86.6877539944917
              [Phenology].PhyllochronPpSensitivity.FixedValue = 0.340327517277635
              [Phenology].CAMP.FLNparams.MinLN = 7
              [Phenology].CAMP.FLNparams.PpLN = 3
              [Phenology].CAMP.FLNparams.VrnLN = 1
              [Phenology].CAMP.FLNparams.VxPLN = -1
              [Phenology].CAMP.EnvData.VrnTreatTemp = 5.8
              [Phenology].CAMP.EnvData.VrnTreatDuration = 60
              [Phenology].HeadEmergenceLongDayBase.FixedValue = 190
              [Phenology].HeadEmergencePpSensitivity.FixedValue = 1
          Cultivar Illabo
            Command:
              [Phenology].Phyllochron.BasePhyllochron.FixedValue = 100.550798402656
              [Phenology].PhyllochronPpSensitivity.FixedValue = 0.238435422022958
              [Phenology].CAMP.EnvData.VrnTreatTemp = 5.8
              [Phenology].CAMP.EnvData.VrnTreatDuration = 60
              [Phenology].CAMP.FLNparams.MinLN = 8
              [Phenology].CAMP.FLNparams.VrnLN = 7
              [Phenology].CAMP.FLNparams.PpLN = 1
              [Phenology].CAMP.FLNparams.VxPLN = -1
              [Phenology].HeadEmergenceLongDayBase.FixedValue = 110
              [Phenology].HeadEmergencePpSensitivity.FixedValue = 0
          Cultivar Janz
            Command:
              [Phenology].Phyllochron.BasePhyllochron.FixedValue = 91.4460925764448
              [Phenology].PhyllochronPpSensitivity.FixedValue = 0.235020437209909
              [Phenology].CAMP.FLNparams.MinLN = 8
              [Phenology].CAMP.FLNparams.PpLN = 3
              [Phenology].CAMP.FLNparams.VrnLN = 1
              [Phenology].CAMP.FLNparams.VxPLN = -1
              [Phenology].CAMP.EnvData.VrnTreatTemp = 5.8
              [Phenology].CAMP.EnvData.VrnTreatDuration = 60
              [Phenology].HeadEmergenceLongDayBase.FixedValue = 130
              [Phenology].HeadEmergencePpSensitivity.FixedValue = 1
          Cultivar Mercury
            Command:
              [Phenology].HeadEmergenceLongDayBase.FixedValue = 100
              [Phenology].Phyllochron.BasePhyllochron.FixedValue = 80
              [Phenology].CAMP.FLNparams.MinLN = 9.0
              [Phenology].CAMP.FLNparams.PpLN = 2.0
              [Phenology].CAMP.FLNparams.VrnLN = 0.0
              [Phenology].CAMP.FLNparams.VxPLN = 0.0
              [Phenology].HeadEmergencePpSensitivity.FixedValue = 0.0
              [Phenology].CAMP.EnvData.VrnTreatTemp = 6
              [Phenology].CAMP.EnvData.VrnTreatDuration = 60
          Cultivar Kellalac
            Command:
              [Phenology].Phyllochron.BasePhyllochron.FixedValue = 88.1945544451052
              [Phenology].PhyllochronPpSensitivity.FixedValue = 0.350967201537242
              [Phenology].CAMP.FLNparams.MinLN = 7
              [Phenology].CAMP.FLNparams.PpLN = 4
              [Phenology].CAMP.FLNparams.VrnLN = 2
              [Phenology].CAMP.FLNparams.VxPLN = 0
              [Phenology].CAMP.EnvData.VrnTreatTemp = 6
              [Phenology].CAMP.EnvData.VrnTreatDuration = 60
              [Phenology].HeadEmergenceLongDayBase.FixedValue = 210
              [Phenology].HeadEmergencePpSensitivity.FixedValue = 3
          Cultivar Kennedy
            Command:
              [Phenology].Phyllochron.BasePhyllochron.FixedValue = 100
              [Phenology].CAMP.FLNparams.MinLN = 8
              [Phenology].CAMP.FLNparams.PpLN = 4.0
              [Phenology].CAMP.FLNparams.VrnLN = 0
              [Phenology].CAMP.FLNparams.VxPLN = 0.0
          Cultivar Kittyhawk
            Command:
              [Phenology].Phyllochron.BasePhyllochron.FixedValue = 93.7220123291132
              [Phenology].PhyllochronPpSensitivity.FixedValue = 0.212225680614483
              [Phenology].CAMP.FLNparams.MinLN = 10
              [Phenology].CAMP.FLNparams.PpLN = 2
              [Phenology].CAMP.FLNparams.VrnLN = 8
              [Phenology].CAMP.FLNparams.VxPLN = -1
              [Phenology].CAMP.EnvData.VrnTreatTemp = 5.8
              [Phenology].CAMP.EnvData.VrnTreatDuration = 60
              [Phenology].HeadEmergenceLongDayBase.FixedValue = 50
              [Phenology].HeadEmergencePpSensitivity.FixedValue = 4
          Cultivar Lancer
            Command:
              [Phenology].Phyllochron.BasePhyllochron.FixedValue = 85.6623042725763
              [Phenology].PhyllochronPpSensitivity.FixedValue = 0.324980109776406
              [Phenology].CAMP.FLNparams.MinLN = 8
              [Phenology].CAMP.FLNparams.PpLN = 4
              [Phenology].CAMP.FLNparams.VrnLN = 2
              [Phenology].CAMP.FLNparams.VxPLN = -2
              [Phenology].CAMP.EnvData.VrnTreatTemp = 5.8
              [Phenology].CAMP.EnvData.VrnTreatDuration = 60
              [Phenology].HeadEmergenceLongDayBase.FixedValue = 150
              [Phenology].HeadEmergencePpSensitivity.FixedValue = 1
          Cultivar Lang
            Command:
              [Phenology].Phyllochron.BasePhyllochron.FixedValue = 100
              [Phenology].CAMP.FLNparams.MinLN = 7
              [Phenology].CAMP.FLNparams.PpLN = 7
              [Phenology].CAMP.FLNparams.VrnLN = 0
              [Phenology].CAMP.FLNparams.VxPLN = 0
              [Phenology].HeadEmergenceLongDayBase.FixedValue = 70
              [Phenology].HeadEmergencePpSensitivity.FixedValue = 4
              [Phenology].CAMP.EnvData.VrnTreatTemp = 6
              [Phenology].CAMP.EnvData.VrnTreatDuration = 60
          Cultivar Livingston
            Command:
              [Phenology].Phyllochron.BasePhyllochron.FixedValue = 100
              [Phenology].CAMP.FLNparams.MinLN = 6.1
              [Phenology].CAMP.FLNparams.PpLN = 3.0
              [Phenology].CAMP.FLNparams.VrnLN = 1.8000000000000007
              [Phenology].CAMP.FLNparams.VxPLN = 4.0
              [Phenology].HeadEmergenceLongDayBase.FixedValue = 108
              [Phenology].HeadEmergencePpSensitivity.FixedValue = 1.3
              [Phenology].CAMP.EnvData.VrnTreatTemp = 6
              [Phenology].CAMP.EnvData.VrnTreatDuration = 60
              [Grain].MaximumPotentialGrainSize.FixedValue = 0.041
              [Grain].NumberFunction.GrainNumber.GrainsPerGramOfStem.FixedValue = 22
          Cultivar Lincoln
            Command:
              [Phenology].Phyllochron.BasePhyllochron.FixedValue = 100
              [Phenology].CAMP.FLNparams.MinLN = 6
              [Phenology].CAMP.FLNparams.PpLN = 4.0
              [Phenology].CAMP.FLNparams.VrnLN = 0
              [Phenology].CAMP.FLNparams.VxPLN = 0.0
          Cultivar Longsword
            Command:
              [Phenology].Phyllochron.BasePhyllochron.FixedValue = 100.389906627796
              [Phenology].PhyllochronPpSensitivity.FixedValue = 0.205225247925933
              [Phenology].CAMP.EnvData.VrnTreatTemp = 5.8
              [Phenology].CAMP.EnvData.VrnTreatDuration = 60
              [Phenology].CAMP.FLNparams.MinLN = 8
              [Phenology].CAMP.FLNparams.PpLN = 1
              [Phenology].CAMP.FLNparams.VrnLN = 7
              [Phenology].CAMP.FLNparams.VxPLN = 1
              [Phenology].HeadEmergenceLongDayBase.FixedValue = 110
              [Phenology].HeadEmergencePpSensitivity.FixedValue = 2
          Cultivar Mace
            Command:
              [Phenology].Phyllochron.BasePhyllochron.FixedValue = 106.268453805677
              [Phenology].PhyllochronPpSensitivity.FixedValue = 0.137742329295879
              [Phenology].CAMP.EnvData.VrnTreatTemp = 6
              [Phenology].CAMP.EnvData.VrnTreatDuration = 60
              [Phenology].CAMP.FLNparams.MinLN = 7
              [Phenology].CAMP.FLNparams.PpLN = 2
              [Phenology].CAMP.FLNparams.VrnLN = 3
              [Phenology].CAMP.FLNparams.VxPLN = -3
              [Phenology].HeadEmergenceLongDayBase.FixedValue = 70
              [Phenology].HeadEmergencePpSensitivity.FixedValue = 1
          Cultivar MacKellar
            Command:
              [Phenology].HeadEmergenceLongDayBase.FixedValue = 114.0
              [Phenology].Phyllochron.BasePhyllochron.FixedValue = 100
              [Phenology].CAMP.FLNparams.MinLN = 8.664527440257086
              [Phenology].CAMP.FLNparams.PpLN = 1.0215422635640583
              [Phenology].CAMP.FLNparams.VrnLN = 10.022473345513335
              [Phenology].CAMP.FLNparams.VxPLN = -2.1045318640627455
              [Phenology].HeadEmergencePpSensitivity.FixedValue = 3.533066035654082
              [Phenology].CAMP.EnvData.VrnTreatTemp = 6
              [Phenology].CAMP.EnvData.VrnTreatDuration = 60
          Cultivar Magenta
            Command:
              [Phenology].Phyllochron.BasePhyllochron.FixedValue = 113.040956826707
              [Phenology].PhyllochronPpSensitivity.FixedValue = 0.138444741551648
              [Phenology].CAMP.EnvData.VrnTreatTemp = 5.8
              [Phenology].CAMP.EnvData.VrnTreatDuration = 60
              [Phenology].CAMP.FLNparams.MinLN = 7
              [Phenology].CAMP.FLNparams.PpLN = 3
              [Phenology].CAMP.FLNparams.VrnLN = 2
              [Phenology].CAMP.FLNparams.VxPLN = 1
              [Phenology].HeadEmergenceLongDayBase.FixedValue = 130
              [Phenology].HeadEmergencePpSensitivity.FixedValue = 0
          Cultivar Manning
            Command:
              [Phenology].Phyllochron.BasePhyllochron.FixedValue = 104.816433323058
              [Phenology].PhyllochronPpSensitivity.FixedValue = 0.253254338348875
              [Phenology].CAMP.EnvData.VrnTreatTemp = 6
              [Phenology].CAMP.EnvData.VrnTreatDuration = 60
              [Phenology].CAMP.FLNparams.MinLN = 9
              [Phenology].CAMP.FLNparams.PpLN = 6
              [Phenology].CAMP.FLNparams.VrnLN = 8
              [Phenology].CAMP.FLNparams.VxPLN = 0
              [Phenology].HeadEmergenceLongDayBase.FixedValue = 230
              [Phenology].HeadEmergencePpSensitivity.FixedValue = 0
          Cultivar Matong
            Command:
              [Phenology].Phyllochron.BasePhyllochron.FixedValue = 100
              [Grain].NumberFunction.GrainNumber.GrainsPerGramOfStem.FixedValue = 22
              [Phenology].CAMP.FLNparams.MinLN = 7
              [Phenology].CAMP.FLNparams.PpLN = 4.0
              [Phenology].CAMP.FLNparams.VrnLN = 1
              [Phenology].CAMP.FLNparams.VxPLN = 0.0
          Cultivar McCubbin
            Command:
              [Phenology].Phyllochron.BasePhyllochron.FixedValue = 90
              [Phenology].CAMP.FLNparams.MinLN = 8.0
              [Phenology].CAMP.FLNparams.PpLN = 8.0
              [Phenology].CAMP.FLNparams.VrnLN = 0.0
              [Phenology].CAMP.FLNparams.VxPLN = 3.0
              [Phenology].HeadEmergenceLongDayBase.FixedValue = 200.0
              [Phenology].HeadEmergencePpSensitivity.FixedValue = 2.0
              [Phenology].CAMP.EnvData.VrnTreatTemp = 6
              [Phenology].CAMP.EnvData.VrnTreatDuration = 60
          Cultivar Merinda
            Command:
              [Phenology].Phyllochron.BasePhyllochron.FixedValue = 98.5779272570712
              [Phenology].PhyllochronPpSensitivity.FixedValue = 0.347160824156039
              [Phenology].CAMP.EnvData.VrnTreatTemp = 5.8
              [Phenology].CAMP.EnvData.VrnTreatDuration = 60
              [Phenology].CAMP.FLNparams.MinLN = 7
              [Phenology].CAMP.FLNparams.PpLN = 1
              [Phenology].CAMP.FLNparams.VrnLN = 1
              [Phenology].CAMP.FLNparams.VxPLN = -1
              [Phenology].HeadEmergenceLongDayBase.FixedValue = 210
              [Phenology].HeadEmergencePpSensitivity.FixedValue = 1
          Cultivar Mitch
            Command:
              [Phenology].Phyllochron.BasePhyllochron.FixedValue = 90.7949886258521
              [Phenology].PhyllochronPpSensitivity.FixedValue = 0.313387918745248
              [Phenology].CAMP.EnvData.VrnTreatTemp = 5.8
              [Phenology].CAMP.EnvData.VrnTreatDuration = 60
              [Phenology].CAMP.FLNparams.MinLN = 8
              [Phenology].CAMP.FLNparams.PpLN = 2
              [Phenology].CAMP.FLNparams.VrnLN = 3
              [Phenology].CAMP.FLNparams.VxPLN = -2
              [Phenology].HeadEmergenceLongDayBase.FixedValue = 130
              [Phenology].HeadEmergencePpSensitivity.FixedValue = 1
          Cultivar Nighthawk
            Command:
              [Phenology].Phyllochron.BasePhyllochron.FixedValue = 97.5749140549815
              [Phenology].PhyllochronPpSensitivity.FixedValue = 0.234188946138953
              [Phenology].CAMP.EnvData.VrnTreatTemp = 5.8
              [Phenology].CAMP.EnvData.VrnTreatDuration = 60
              [Phenology].CAMP.FLNparams.MinLN = 8
              [Phenology].CAMP.FLNparams.VrnLN = 4
              [Phenology].CAMP.FLNparams.PpLN = 2
              [Phenology].CAMP.FLNparams.VxPLN = -1
              [Phenology].HeadEmergenceLongDayBase.FixedValue = 70
              [Phenology].HeadEmergencePpSensitivity.FixedValue = 8
          Cultivar Ouyen
            Command:
              [Phenology].Phyllochron.BasePhyllochron.FixedValue = 84.1472430387947
              [Phenology].PhyllochronPpSensitivity.FixedValue = 0.332456383177313
              [Phenology].CAMP.EnvData.VrnTreatTemp = 5.8
              [Phenology].CAMP.EnvData.VrnTreatDuration = 60
              [Phenology].CAMP.FLNparams.MinLN = 8
              [Phenology].CAMP.FLNparams.PpLN = 2
              [Phenology].CAMP.FLNparams.VrnLN = 2
              [Phenology].CAMP.FLNparams.VxPLN = -2
              [Phenology].HeadEmergenceLongDayBase.FixedValue = 190
              [Phenology].HeadEmergencePpSensitivity.FixedValue = 1
          Cultivar Peake
            Command:
              [Phenology].Phyllochron.BasePhyllochron.FixedValue = 87.7433052533018
              [Phenology].PhyllochronPpSensitivity.FixedValue = 0.44431162843274
              [Phenology].CAMP.EnvData.VrnTreatTemp = 5.8
              [Phenology].CAMP.EnvData.VrnTreatDuration = 60
              [Phenology].CAMP.FLNparams.MinLN = 7
              [Phenology].CAMP.FLNparams.PpLN = 2
              [Phenology].CAMP.FLNparams.VrnLN = 0
              [Phenology].CAMP.FLNparams.VxPLN = 0
              [Phenology].HeadEmergenceLongDayBase.FixedValue = 190
              [Phenology].HeadEmergencePpSensitivity.FixedValue = 1
          Cultivar Revenue
            Command:
              [Phenology].Phyllochron.BasePhyllochron.FixedValue = 113.782112306367
              [Phenology].PhyllochronPpSensitivity.FixedValue = 0.155926785053575
              [Phenology].CAMP.EnvData.VrnTreatTemp = 5.8
              [Phenology].CAMP.EnvData.VrnTreatDuration = 60
              [Phenology].CAMP.FLNparams.MinLN = 8
              [Phenology].CAMP.FLNparams.PpLN = 2
              [Phenology].CAMP.FLNparams.VrnLN = 7
              [Phenology].CAMP.FLNparams.VxPLN = 2
              [Phenology].HeadEmergenceLongDayBase.FixedValue = 150
              [Phenology].HeadEmergencePpSensitivity.FixedValue = 4
          Cultivar Rosella
            Command:
              [Phenology].Phyllochron.BasePhyllochron.FixedValue = 96.7111881914136
              [Phenology].PhyllochronPpSensitivity.FixedValue = 0.209478791477046
              [Phenology].CAMP.EnvData.VrnTreatTemp = 5.8
              [Phenology].CAMP.EnvData.VrnTreatDuration = 60
              [Phenology].CAMP.FLNparams.MinLN = 7
              [Phenology].CAMP.FLNparams.PpLN = 5
              [Phenology].CAMP.FLNparams.VrnLN = 8
              [Phenology].CAMP.FLNparams.VxPLN = 5
              [Phenology].HeadEmergenceLongDayBase.FixedValue = 90
              [Phenology].HeadEmergencePpSensitivity.FixedValue = 5
          Cultivar Ruby
            Command:
              [Phenology].Phyllochron.BasePhyllochron.FixedValue = 100
              [Phenology].CAMP.FLNparams.MinLN = 8
              [Phenology].CAMP.FLNparams.PpLN = 4.0
              [Phenology].CAMP.FLNparams.VrnLN = 0
              [Phenology].CAMP.FLNparams.VxPLN = 0.0
          Cultivar Scepter
            Command:
              [Phenology].Phyllochron.BasePhyllochron.FixedValue = 107.602580952482
              [Phenology].PhyllochronPpSensitivity.FixedValue = 0.23032920462638
              [Phenology].CAMP.EnvData.VrnTreatTemp = 6
              [Phenology].CAMP.EnvData.VrnTreatDuration = 60
              [Phenology].CAMP.FLNparams.MinLN = 7
              [Phenology].CAMP.FLNparams.PpLN = 2
              [Phenology].CAMP.FLNparams.VrnLN = 2
              [Phenology].CAMP.FLNparams.VxPLN = -1
              [Phenology].HeadEmergenceLongDayBase.FixedValue = 170
              [Phenology].HeadEmergencePpSensitivity.FixedValue = 0
          Cultivar Scout
            Command:
              [Phenology].Phyllochron.BasePhyllochron.FixedValue = 102.794916048683
              [Phenology].PhyllochronPpSensitivity.FixedValue = 0.192036818570067
              [Phenology].CAMP.EnvData.VrnTreatTemp = 6
              [Phenology].CAMP.EnvData.VrnTreatDuration = 60
              [Phenology].CAMP.FLNparams.MinLN = 7
              [Phenology].CAMP.FLNparams.PpLN = 2
              [Phenology].CAMP.FLNparams.VrnLN = 4
              [Phenology].CAMP.FLNparams.VxPLN = -2
              [Phenology].HeadEmergenceLongDayBase.FixedValue = 170
              [Phenology].HeadEmergencePpSensitivity.FixedValue = 0
          Cultivar Scythe
            Command:
              [Phenology].Phyllochron.BasePhyllochron.FixedValue = 106.486507449716
              [Phenology].PhyllochronPpSensitivity.FixedValue = 0.22806739407445
              [Phenology].CAMP.EnvData.VrnTreatTemp = 5.8
              [Phenology].CAMP.EnvData.VrnTreatDuration = 60
              [Phenology].CAMP.FLNparams.MinLN = 6
              [Phenology].CAMP.FLNparams.PpLN = 4
              [Phenology].CAMP.FLNparams.VrnLN = 2
              [Phenology].CAMP.FLNparams.VxPLN = 2
              [Phenology].HeadEmergenceLongDayBase.FixedValue = 90
              [Phenology].HeadEmergencePpSensitivity.FixedValue = 4
          Cultivar Spear
            Command:
              [Phenology].Phyllochron.BasePhyllochron.FixedValue = 102.794916048683
              [Phenology].PhyllochronPpSensitivity.FixedValue = 0.192036818570067
              [Grain].NumberFunction.GrainNumber.GrainsPerGramOfStem.FixedValue = 22
              [Phenology].CAMP.EnvData.VrnTreatTemp = 6
              [Phenology].CAMP.EnvData.VrnTreatDuration = 60
              [Phenology].CAMP.FLNparams.MinLN = 7
              [Phenology].CAMP.FLNparams.PpLN = 2
              [Phenology].CAMP.FLNparams.VrnLN = 4
              [Phenology].CAMP.FLNparams.VxPLN = -2
              [Phenology].HeadEmergenceLongDayBase.FixedValue = 170
              [Phenology].HeadEmergencePpSensitivity.FixedValue = 0
          Cultivar Spitfire
            Command:
              [Phenology].Phyllochron.BasePhyllochron.FixedValue = 87.8426291924597
              [Phenology].PhyllochronPpSensitivity.FixedValue = 0.226170449889058
              [Phenology].CAMP.EnvData.VrnTreatTemp = 5.8
              [Phenology].CAMP.EnvData.VrnTreatDuration = 60
              [Phenology].CAMP.FLNparams.MinLN = 8
              [Phenology].CAMP.FLNparams.PpLN = 1
              [Phenology].CAMP.FLNparams.VrnLN = 3
              [Phenology].CAMP.FLNparams.VxPLN = -3
              [Phenology].HeadEmergenceLongDayBase.FixedValue = 130
              [Phenology].HeadEmergencePpSensitivity.FixedValue = 1
            Alias Drysdale
          Cultivar Strzelecki
            Command:
              [Phenology].Phyllochron.BasePhyllochron.FixedValue = 96.5633530493006
              [Phenology].PhyllochronPpSensitivity.FixedValue = 0.245575047413057
              [Phenology].CAMP.EnvData.VrnTreatTemp = 5.8
              [Phenology].CAMP.EnvData.VrnTreatDuration = 60
              [Phenology].CAMP.FLNparams.MinLN = 7
              [Phenology].CAMP.FLNparams.PpLN = 3
              [Phenology].CAMP.FLNparams.VrnLN = 3
              [Phenology].CAMP.FLNparams.VxPLN = 0
              [Phenology].HeadEmergenceLongDayBase.FixedValue = 110
              [Phenology].HeadEmergencePpSensitivity.FixedValue = 3
          Cultivar Sunbri
            Command:
              [Phenology].Phyllochron.BasePhyllochron.FixedValue = 91.5032903672171
              [Phenology].PhyllochronPpSensitivity.FixedValue = 0.207593313150283
              [Phenology].CAMP.EnvData.VrnTreatTemp = 5.8
              [Phenology].CAMP.EnvData.VrnTreatDuration = 60
              [Phenology].CAMP.FLNparams.MinLN = 8
              [Phenology].CAMP.FLNparams.PpLN = 4
              [Phenology].CAMP.FLNparams.VrnLN = 2
              [Phenology].CAMP.FLNparams.VxPLN = -1
              [Phenology].HeadEmergenceLongDayBase.FixedValue = 170
              [Phenology].HeadEmergencePpSensitivity.FixedValue = 2
          Cultivar Sunbee
            Command:
              [Phenology].Phyllochron.BasePhyllochron.FixedValue = 97.2940011008473
              [Phenology].PhyllochronPpSensitivity.FixedValue = 0.185142054210791
              [Phenology].CAMP.EnvData.VrnTreatTemp = 5.8
              [Phenology].CAMP.EnvData.VrnTreatDuration = 60
              [Phenology].CAMP.FLNparams.MinLN = 7
              [Phenology].CAMP.FLNparams.PpLN = 1
              [Phenology].CAMP.FLNparams.VrnLN = 3
              [Phenology].CAMP.FLNparams.VxPLN = -3
              [Phenology].HeadEmergenceLongDayBase.FixedValue = 370
              [Phenology].HeadEmergencePpSensitivity.FixedValue = 0
          Cultivar Sunco
            Command:
              [Phenology].HeadEmergencePpSensitivity.FixedValue = 1
              [Phenology].Phyllochron.BasePhyllochron.FixedValue = 100
              [Phenology].CAMP.FLNparams.MinLN = 6
              [Phenology].CAMP.FLNparams.PpLN = 11
              [Phenology].CAMP.FLNparams.VrnLN = 10
              [Phenology].CAMP.FLNparams.VxPLN = -9
              [Phenology].HeadEmergenceLongDayBase.FixedValue = 170
          Cultivar Sunlamb
            Command:
              [Phenology].Phyllochron.BasePhyllochron.FixedValue = 100.382265746297
              [Phenology].PhyllochronPpSensitivity.FixedValue = 0.154235967458266
              [Phenology].CAMP.EnvData.VrnTreatTemp = 5.8
              [Phenology].CAMP.EnvData.VrnTreatDuration = 60
              [Phenology].CAMP.FLNparams.MinLN = 7
              [Phenology].CAMP.FLNparams.PpLN = 5
              [Phenology].CAMP.FLNparams.VrnLN = 10
              [Phenology].CAMP.FLNparams.VxPLN = -5
              [Phenology].HeadEmergenceLongDayBase.FixedValue = 150
              [Phenology].HeadEmergencePpSensitivity.FixedValue = 4
          Cultivar Suneca
            Command:
              [Phenology].CAMP.FLNparams.MinLN = 5
              [Phenology].CAMP.FLNparams.PpLN = 6
              [Phenology].CAMP.FLNparams.VrnLN = 3
              [Phenology].CAMP.FLNparams.VxPLN = 3
              [Phenology].HeadEmergenceLongDayBase.FixedValue = 190
              [Phenology].HeadEmergencePpSensitivity.FixedValue = 2
          Cultivar Sunstate
            Command:
              [Phenology].Phyllochron.BasePhyllochron.FixedValue = 95.0758950229683
              [Phenology].PhyllochronPpSensitivity.FixedValue = 0.225986092694718
              [Phenology].CAMP.EnvData.VrnTreatTemp = 6
              [Phenology].CAMP.EnvData.VrnTreatDuration = 60
              [Phenology].CAMP.FLNparams.MinLN = 7
              [Phenology].CAMP.FLNparams.PpLN = 1
              [Phenology].CAMP.FLNparams.VrnLN = 4
              [Phenology].CAMP.FLNparams.VxPLN = -4
              [Phenology].HeadEmergenceLongDayBase.FixedValue = 190
              [Phenology].HeadEmergencePpSensitivity.FixedValue = 1
          Cultivar Suntop
            Command:
              [Phenology].Phyllochron.BasePhyllochron.FixedValue = 93.1036394598307
              [Phenology].PhyllochronPpSensitivity.FixedValue = 0.335203758711104
              [Phenology].CAMP.EnvData.VrnTreatTemp = 5.8
              [Phenology].CAMP.EnvData.VrnTreatDuration = 60
              [Phenology].CAMP.FLNparams.MinLN = 8
              [Phenology].CAMP.FLNparams.PpLN = 2
              [Phenology].CAMP.FLNparams.VrnLN = 0
              [Phenology].CAMP.FLNparams.VxPLN = 0
              [Phenology].HeadEmergenceLongDayBase.FixedValue = 210
              [Phenology].HeadEmergencePpSensitivity.FixedValue = 0
          Cultivar Trojan
            Command:
              [Phenology].Phyllochron.BasePhyllochron.FixedValue = 99.1351271229079
              [Phenology].PhyllochronPpSensitivity.FixedValue = 0.35511766231399
              [Phenology].CAMP.EnvData.VrnTreatTemp = 6
              [Phenology].CAMP.EnvData.VrnTreatDuration = 60
              [Phenology].CAMP.FLNparams.MinLN = 7
              [Phenology].CAMP.FLNparams.PpLN = 5
              [Phenology].CAMP.FLNparams.VrnLN = 2
              [Phenology].CAMP.FLNparams.VxPLN = 1
              [Phenology].HeadEmergenceLongDayBase.FixedValue = 50
              [Phenology].HeadEmergencePpSensitivity.FixedValue = 4
          Cultivar Ventura
            Command:
              [Phenology].Phyllochron.BasePhyllochron.FixedValue = 100
              [Phenology].CAMP.FLNparams.MinLN = 8
              [Phenology].CAMP.FLNparams.PpLN = 4.0
              [Phenology].CAMP.FLNparams.VrnLN = 0
              [Phenology].CAMP.FLNparams.VxPLN = 0.0
          Cultivar Wedgetail
            Command:
              [Phenology].Phyllochron.BasePhyllochron.FixedValue = 111.579556421375
              [Phenology].PhyllochronPpSensitivity.FixedValue = 0.217687425020179
              [Phenology].CAMP.EnvData.VrnTreatTemp = 5.8
              [Phenology].CAMP.EnvData.VrnTreatDuration = 60
              [Phenology].CAMP.FLNparams.MinLN = 7
              [Phenology].CAMP.FLNparams.PpLN = 1
              [Phenology].CAMP.FLNparams.VrnLN = 9
              [Phenology].CAMP.FLNparams.VxPLN = -1
              [Phenology].HeadEmergenceLongDayBase.FixedValue = 170
              [Phenology].HeadEmergencePpSensitivity.FixedValue = 2
          Cultivar Whistler
            Command:
              [Phenology].Phyllochron.BasePhyllochron.FixedValue = 101.152462224521
              [Phenology].PhyllochronPpSensitivity.FixedValue = 0.160519169483945
              [Phenology].CAMP.FLNparams.MinLN = 8
              [Phenology].CAMP.FLNparams.PpLN = 2
              [Phenology].CAMP.FLNparams.VrnLN = 8
              [Phenology].CAMP.FLNparams.VxPLN = -2
              [Phenology].CAMP.EnvData.VrnTreatTemp = 5.8
              [Phenology].CAMP.EnvData.VrnTreatDuration = 60
              [Phenology].HeadEmergenceLongDayBase.FixedValue = 150
              [Phenology].HeadEmergencePpSensitivity.FixedValue = 1
          Cultivar Wilgoyne
            Command:
              [Phenology].Phyllochron.BasePhyllochron.FixedValue = 100
              [Phenology].PhyllochronPpSensitivity.FixedValue = 0.349562436956343
              [Grain].NumberFunction.GrainNumber.GrainsPerGramOfStem.FixedValue = 17
              [Phenology].CAMP.FLNparams.MinLN = 8
              [Phenology].CAMP.FLNparams.PpLN = 3
              [Phenology].CAMP.FLNparams.VrnLN = 0.5
              [Phenology].CAMP.FLNparams.VxPLN = 0
              [Phenology].CAMP.EnvData.VrnTreatTemp = 6
              [Phenology].CAMP.EnvData.VrnTreatDuration = 60
              [Phenology].HeadEmergenceLongDayBase.FixedValue = 50
              [Phenology].HeadEmergencePpSensitivity.FixedValue = 4
          Cultivar Wills
            Command:
              [Phenology].Phyllochron.BasePhyllochron.FixedValue = 94.9906866085437
              [Phenology].PhyllochronPpSensitivity.FixedValue = 0.264808096779551
              [Phenology].CAMP.EnvData.VrnTreatTemp = 5.8
              [Phenology].CAMP.EnvData.VrnTreatDuration = 60
              [Phenology].CAMP.FLNparams.MinLN = 8
              [Phenology].CAMP.FLNparams.PpLN = 2
              [Phenology].CAMP.FLNparams.VrnLN = 4
              [Phenology].CAMP.FLNparams.VxPLN = -3
              [Phenology].HeadEmergenceLongDayBase.FixedValue = 110
              [Phenology].HeadEmergencePpSensitivity.FixedValue = 1
          Cultivar Wyalkatchem
            Command:
              [Phenology].Phyllochron.BasePhyllochron.FixedValue = 101.991162889267
              [Phenology].PhyllochronPpSensitivity.FixedValue = 0.203541157884576
              [Phenology].CAMP.EnvData.VrnTreatTemp = 5.8
              [Phenology].CAMP.EnvData.VrnTreatDuration = 60
              [Phenology].CAMP.FLNparams.MinLN = 7
              [Phenology].CAMP.FLNparams.PpLN = 2
              [Phenology].CAMP.FLNparams.VrnLN = 3
              [Phenology].CAMP.FLNparams.VxPLN = -3
              [Phenology].HeadEmergenceLongDayBase.FixedValue = 90
              [Phenology].HeadEmergencePpSensitivity.FixedValue = 3
          Cultivar Yitpi
            Command:
              [Phenology].Phyllochron.BasePhyllochron.FixedValue = 107.48018743345
              [Phenology].PhyllochronPpSensitivity.FixedValue = 0.247088996399892
              [Phenology].CAMP.EnvData.VrnTreatTemp = 5.8
              [Phenology].CAMP.EnvData.VrnTreatDuration = 60
              [Phenology].CAMP.FLNparams.MinLN = 7
              [Phenology].CAMP.FLNparams.PpLN = 4
              [Phenology].CAMP.FLNparams.VrnLN = 2
              [Phenology].CAMP.FLNparams.VxPLN = 0
              [Phenology].HeadEmergenceLongDayBase.FixedValue = 50
              [Phenology].HeadEmergencePpSensitivity.FixedValue = 5
          Cultivar Young
            Command:
              [Phenology].Phyllochron.BasePhyllochron.FixedValue = 86.0661362380018
              [Phenology].PhyllochronPpSensitivity.FixedValue = 0.347762945437436
              [Phenology].CAMP.EnvData.VrnTreatTemp = 5.8
              [Phenology].CAMP.EnvData.VrnTreatDuration = 60
              [Phenology].CAMP.FLNparams.MinLN = 8
              [Phenology].CAMP.FLNparams.PpLN = 1
              [Phenology].CAMP.FLNparams.VrnLN = 1
              [Phenology].CAMP.FLNparams.VxPLN = -1
              [Phenology].HeadEmergenceLongDayBase.FixedValue = 150
              [Phenology].HeadEmergencePpSensitivity.FixedValue = 1
        Folder NILs
          Cultivar CSIROW002
            Command:
              [Phenology].Phyllochron.BasePhyllochron.FixedValue = 97.1048561789481
              [Phenology].PhyllochronPpSensitivity.FixedValue = 0.330486171103675
              [Phenology].CAMP.FLNparams.MinLN = 6.658457459336699
              [Phenology].CAMP.FLNparams.PpLN = 1.9822634447408163
              [Phenology].CAMP.FLNparams.VrnLN = 2.6921517428015016
              [Phenology].CAMP.FLNparams.VxPLN = 0.012348660067480921
              [Phenology].CAMP.EnvData.VrnTreatTemp = 5.8
              [Phenology].CAMP.EnvData.VrnTreatDuration = 60
              [Phenology].HeadEmergenceLongDayBase.FixedValue = 169.0
              [Phenology].HeadEmergencePpSensitivity.FixedValue = 1.3207357239932465
          Cultivar CSIROW003
            Command:
              [Phenology].Phyllochron.BasePhyllochron.FixedValue = 97.9080402900587
              [Phenology].PhyllochronPpSensitivity.FixedValue = 0.219427317086708
              [Phenology].CAMP.FLNparams.MinLN = 5.793366821378284
              [Phenology].CAMP.FLNparams.PpLN = 0.0
              [Phenology].CAMP.FLNparams.VrnLN = 4.787965491738554
              [Phenology].CAMP.FLNparams.VxPLN = -2.8680601480674017
              [Phenology].CAMP.EnvData.VrnTreatTemp = 5.8
              [Phenology].CAMP.EnvData.VrnTreatDuration = 60
              [Phenology].HeadEmergenceLongDayBase.FixedValue = 145.0
              [Phenology].HeadEmergencePpSensitivity.FixedValue = 2.658836674667949
          Cultivar CSIROW005
            Command:
              [Phenology].Phyllochron.BasePhyllochron.FixedValue = 100.324132823901
              [Phenology].PhyllochronPpSensitivity.FixedValue = 0.16547784419225
              [Phenology].CAMP.FLNparams.MinLN = 5.759207332491177
              [Phenology].CAMP.FLNparams.PpLN = 2.4191796388445765
              [Phenology].CAMP.FLNparams.VrnLN = 3.0756722363145896
              [Phenology].CAMP.FLNparams.VxPLN = -0.2627994305564112
              [Phenology].CAMP.EnvData.VrnTreatTemp = 5.8
              [Phenology].CAMP.EnvData.VrnTreatDuration = 60
              [Phenology].HeadEmergenceLongDayBase.FixedValue = 369.0
              [Phenology].HeadEmergencePpSensitivity.FixedValue = 0.0
          Cultivar CSIROW007
            Command:
              [Phenology].Phyllochron.BasePhyllochron.FixedValue = 102.785879373288
              [Phenology].PhyllochronPpSensitivity.FixedValue = 0.18434106648197
              [Phenology].CAMP.FLNparams.MinLN = 7.326398633965955
              [Phenology].CAMP.FLNparams.PpLN = 0.0
              [Phenology].CAMP.FLNparams.VrnLN = 7.554300061869201
              [Phenology].CAMP.FLNparams.VxPLN = -1.6841419188674127
              [Phenology].CAMP.EnvData.VrnTreatTemp = 5.8
              [Phenology].CAMP.EnvData.VrnTreatDuration = 60
              [Phenology].HeadEmergenceLongDayBase.FixedValue = 193.0
              [Phenology].HeadEmergencePpSensitivity.FixedValue = 1.4807227520020911
          Cultivar CSIROW011
            Command:
              [Phenology].Phyllochron.BasePhyllochron.FixedValue = 90.109466190558
              [Phenology].PhyllochronPpSensitivity.FixedValue = 0.349636600984782
              [Phenology].CAMP.FLNparams.MinLN = 6.0
              [Phenology].CAMP.FLNparams.PpLN = 1.0
              [Phenology].CAMP.FLNparams.VrnLN = 1.0
              [Phenology].CAMP.FLNparams.VxPLN = -1.0
              [Phenology].CAMP.EnvData.VrnTreatTemp = 5.8
              [Phenology].CAMP.EnvData.VrnTreatDuration = 60
              [Phenology].HeadEmergenceLongDayBase.FixedValue = 200.0
              [Phenology].HeadEmergencePpSensitivity.FixedValue = 2.0
          Cultivar CSIROW018
            Command:
              [Phenology].Phyllochron.BasePhyllochron.FixedValue = 100.218976921681
              [Phenology].PhyllochronPpSensitivity.FixedValue = 0.305627551956816
              [Phenology].CAMP.FLNparams.MinLN = 5.0
              [Phenology].CAMP.FLNparams.PpLN = 2.0037887506286465
              [Phenology].CAMP.FLNparams.VrnLN = 3.5823533971961172
              [Phenology].CAMP.FLNparams.VxPLN = -2.0415045806529806
              [Phenology].CAMP.EnvData.VrnTreatTemp = 5.8
              [Phenology].CAMP.EnvData.VrnTreatDuration = 60
              [Phenology].HeadEmergenceLongDayBase.FixedValue = 371.0
              [Phenology].HeadEmergencePpSensitivity.FixedValue = 0.94606616045257
          Cultivar CSIROW021
            Command:
              [Phenology].Phyllochron.BasePhyllochron.FixedValue = 100.85898282236
              [Phenology].PhyllochronPpSensitivity.FixedValue = 0.228645304743823
              [Phenology].CAMP.FLNparams.MinLN = 8.0
              [Phenology].CAMP.FLNparams.PpLN = 1.333333333333334
              [Phenology].CAMP.FLNparams.VrnLN = 6.166666666666666
              [Phenology].CAMP.FLNparams.VxPLN = -0.8333333333333357
              [Phenology].CAMP.EnvData.VrnTreatTemp = 5.8
              [Phenology].CAMP.EnvData.VrnTreatDuration = 60
              [Phenology].HeadEmergenceLongDayBase.FixedValue = 200.0
              [Phenology].HeadEmergencePpSensitivity.FixedValue = 2.0
          Cultivar CSIROW023
            Command:
              [Phenology].Phyllochron.BasePhyllochron.FixedValue = 102.809488116017
              [Phenology].PhyllochronPpSensitivity.FixedValue = 0.218898108718466
              [Phenology].CAMP.FLNparams.MinLN = 7.493027691870457
              [Phenology].CAMP.FLNparams.PpLN = 2.584156511279189
              [Phenology].CAMP.FLNparams.VrnLN = 2.37442378811967
              [Phenology].CAMP.FLNparams.VxPLN = 0.28214981195795374
              [Phenology].CAMP.EnvData.VrnTreatTemp = 5.8
              [Phenology].CAMP.EnvData.VrnTreatDuration = 60
              [Phenology].HeadEmergenceLongDayBase.FixedValue = 219.0
              [Phenology].HeadEmergencePpSensitivity.FixedValue = 0.0
          Cultivar CSIROW027
            Command:
              [Phenology].Phyllochron.BasePhyllochron.FixedValue = 91.9686702262851
              [Phenology].PhyllochronPpSensitivity.FixedValue = 0.298865609355012
              [Phenology].CAMP.FLNparams.MinLN = 5.666666666666667
              [Phenology].CAMP.FLNparams.PpLN = 1.0
              [Phenology].CAMP.FLNparams.VrnLN = 1.0
              [Phenology].CAMP.FLNparams.VxPLN = -0.666666666666667
              [Phenology].CAMP.EnvData.VrnTreatTemp = 5.8
              [Phenology].CAMP.EnvData.VrnTreatDuration = 60
              [Phenology].HeadEmergenceLongDayBase.FixedValue = 200.0
              [Phenology].HeadEmergencePpSensitivity.FixedValue = 2.0
          Cultivar CSIROW029
            Command:
              [Phenology].Phyllochron.BasePhyllochron.FixedValue = 98.5813007346922
              [Phenology].PhyllochronPpSensitivity.FixedValue = 0.228833970802351
              [Phenology].CAMP.FLNparams.MinLN = 5.666666666666667
              [Phenology].CAMP.FLNparams.PpLN = 0.33333333333333304
              [Phenology].CAMP.FLNparams.VrnLN = 1.0
              [Phenology].CAMP.FLNparams.VxPLN = -0.666666666666667
              [Phenology].CAMP.EnvData.VrnTreatTemp = 5.8
              [Phenology].CAMP.EnvData.VrnTreatDuration = 60
              [Phenology].HeadEmergenceLongDayBase.FixedValue = 200.0
              [Phenology].HeadEmergencePpSensitivity.FixedValue = 2.0
          Cultivar CSIROW073
            Command:
              [Phenology].Phyllochron.BasePhyllochron.FixedValue = 95.6693440169749
              [Phenology].PhyllochronPpSensitivity.FixedValue = 0.226791235396558
              [Phenology].CAMP.FLNparams.MinLN = 8.790112770072708
              [Phenology].CAMP.FLNparams.PpLN = 0.7295023618186995
              [Phenology].CAMP.FLNparams.VrnLN = 4.373125182546708
              [Phenology].CAMP.FLNparams.VxPLN = 9.99670899443495
              [Phenology].CAMP.EnvData.VrnTreatTemp = 5.8
              [Phenology].CAMP.EnvData.VrnTreatDuration = 60
              [Phenology].HeadEmergenceLongDayBase.FixedValue = 50.0
              [Phenology].HeadEmergencePpSensitivity.FixedValue = 3.5452031099169528
          Cultivar CSIROW077
            Command:
              [Phenology].Phyllochron.BasePhyllochron.FixedValue = 89.0413135981221
              [Phenology].PhyllochronPpSensitivity.FixedValue = 0.320389882541901
              [Phenology].CAMP.FLNparams.MinLN = 5.0
              [Phenology].CAMP.FLNparams.PpLN = 0.7789007198658495
              [Phenology].CAMP.FLNparams.VrnLN = 0.9296483932829428
              [Phenology].CAMP.FLNparams.VxPLN = -0.4548378579547272
              [Phenology].CAMP.EnvData.VrnTreatTemp = 5.8
              [Phenology].CAMP.EnvData.VrnTreatDuration = 60
              [Phenology].HeadEmergenceLongDayBase.FixedValue = 201.0
              [Phenology].HeadEmergencePpSensitivity.FixedValue = 1.988848467332372
          Cultivar CSIROW087
            Command:
              [Phenology].Phyllochron.BasePhyllochron.FixedValue = 95.8407854192227
              [Phenology].PhyllochronPpSensitivity.FixedValue = 0.379363409943707
              [Phenology].CAMP.FLNparams.MinLN = 6.088762673975456
              [Phenology].CAMP.FLNparams.PpLN = 1.3098995454756082
              [Phenology].CAMP.FLNparams.VrnLN = 1.7408533665776218
              [Phenology].CAMP.FLNparams.VxPLN = -1.377321640166457
              [Phenology].CAMP.EnvData.VrnTreatTemp = 5.8
              [Phenology].CAMP.EnvData.VrnTreatDuration = 60
              [Phenology].HeadEmergenceLongDayBase.FixedValue = 214.0
              [Phenology].HeadEmergencePpSensitivity.FixedValue = 2.2429157431718143
          Cultivar CSIROW102
            Command:
              [Phenology].Phyllochron.BasePhyllochron.FixedValue = 88.798911538629
              [Phenology].PhyllochronPpSensitivity.FixedValue = 0.366324783260731
              [Phenology].CAMP.FLNparams.MinLN = 5.431828108909145
              [Phenology].CAMP.FLNparams.PpLN = 0.9159899681289015
              [Phenology].CAMP.FLNparams.VrnLN = 3.8766835434634936
              [Phenology].CAMP.FLNparams.VxPLN = -2.3613865675565133
              [Phenology].CAMP.EnvData.VrnTreatTemp = 5.8
              [Phenology].CAMP.EnvData.VrnTreatDuration = 60
              [Phenology].HeadEmergenceLongDayBase.FixedValue = 211.0
              [Phenology].HeadEmergencePpSensitivity.FixedValue = 1.796407285473646
          Cultivar CSIROW105
            Command:
              [Phenology].Phyllochron.BasePhyllochron.FixedValue = 93.3581645003809
              [Phenology].PhyllochronPpSensitivity.FixedValue = 0.233916879031932
              [Phenology].CAMP.FLNparams.MinLN = 5.0
              [Phenology].CAMP.FLNparams.PpLN = 1.0
              [Phenology].CAMP.FLNparams.VrnLN = 1.0
              [Phenology].CAMP.FLNparams.VxPLN = 0.0
              [Phenology].CAMP.EnvData.VrnTreatTemp = 5.8
              [Phenology].CAMP.EnvData.VrnTreatDuration = 60
              [Phenology].HeadEmergenceLongDayBase.FixedValue = 200.0
              [Phenology].HeadEmergencePpSensitivity.FixedValue = 2.0
        Folder APP Generic
          Cultivar Spring Very Quick-Quick
            Command:
              [Phenology].CAMP.FLNparams.MinLN = 5
              [Phenology].CAMP.FLNparams.PpLN = 0.8
              [Phenology].CAMP.FLNparams.VrnLN = 0.9
              [Phenology].CAMP.FLNparams.VxPLN = -0.5
              [Phenology].Phyllochron.BasePhyllochron.FixedValue = 89
              [Phenology].PhyllochronPpSensitivity.FixedValue = 0.3
              [Phenology].CAMP.EnvData.VrnTreatTemp = 5.8
              [Phenology].CAMP.EnvData.VrnTreatDuration = 60
              [Phenology].HeadEmergenceLongDayBase.FixedValue = 201
              [Phenology].HeadEmergencePpSensitivity.FixedValue = 2
          Cultivar Spring Quick
            Command:
              [Phenology].CAMP.FLNparams.MinLN = 6.6
              [Phenology].CAMP.FLNparams.PpLN = 1.9
              [Phenology].CAMP.FLNparams.VrnLN = 1.1
              [Phenology].CAMP.FLNparams.VxPLN = -0.6
              [Phenology].Phyllochron.BasePhyllochron.FixedValue = 91.8
              [Phenology].PhyllochronPpSensitivity.FixedValue = 0.3
              [Phenology].CAMP.EnvData.VrnTreatTemp = 5.8
              [Phenology].CAMP.EnvData.VrnTreatDuration = 60
              [Phenology].HeadEmergenceLongDayBase.FixedValue = 175.6
              [Phenology].HeadEmergencePpSensitivity.FixedValue = 1.4
          Cultivar Spring Quick-Mid
            Command:
              [Phenology].CAMP.FLNparams.MinLN = 6.9
              [Phenology].CAMP.FLNparams.PpLN = 1.9
              [Phenology].CAMP.FLNparams.VrnLN = 2.5
              [Phenology].CAMP.FLNparams.VxPLN = -1.6
              [Phenology].Phyllochron.BasePhyllochron.FixedValue = 98.6
              [Phenology].PhyllochronPpSensitivity.FixedValue = 0.2
              [Phenology].CAMP.EnvData.VrnTreatTemp = 5.8
              [Phenology].CAMP.EnvData.VrnTreatDuration = 60
              [Phenology].HeadEmergenceLongDayBase.FixedValue = 175.8
              [Phenology].HeadEmergencePpSensitivity.FixedValue = 1.2
          Cultivar Spring Mid
            Command:
              [Phenology].CAMP.FLNparams.MinLN = 7.1
              [Phenology].CAMP.FLNparams.PpLN = 3.1
              [Phenology].CAMP.FLNparams.VrnLN = 2.4
              [Phenology].CAMP.FLNparams.VxPLN = -0.9
              [Phenology].Phyllochron.BasePhyllochron.FixedValue = 96.3
              [Phenology].PhyllochronPpSensitivity.FixedValue = 0.3
              [Phenology].CAMP.EnvData.VrnTreatTemp = 5.8
              [Phenology].CAMP.EnvData.VrnTreatDuration = 60
              [Phenology].HeadEmergenceLongDayBase.FixedValue = 154
              [Phenology].HeadEmergencePpSensitivity.FixedValue = 2
          Cultivar Spring Mid-Slow
            Command:
              [Phenology].CAMP.FLNparams.MinLN = 6.8
              [Phenology].CAMP.FLNparams.PpLN = 3.2
              [Phenology].CAMP.FLNparams.VrnLN = 2.1
              [Phenology].CAMP.FLNparams.VxPLN = 0.8
              [Phenology].Phyllochron.BasePhyllochron.FixedValue = 103.3
              [Phenology].PhyllochronPpSensitivity.FixedValue = 0.2
              [Phenology].CAMP.EnvData.VrnTreatTemp = 5.8
              [Phenology].CAMP.EnvData.VrnTreatDuration = 60
              [Phenology].HeadEmergenceLongDayBase.FixedValue = 153
              [Phenology].HeadEmergencePpSensitivity.FixedValue = 2.3
          Cultivar Spring Slow
            Command:
              [Phenology].CAMP.FLNparams.MinLN = 7.3
              [Phenology].CAMP.FLNparams.PpLN = 4
              [Phenology].CAMP.FLNparams.VrnLN = 2.3
              [Phenology].CAMP.FLNparams.VxPLN = 0.8
              [Phenology].Phyllochron.BasePhyllochron.FixedValue = 95.5
              [Phenology].PhyllochronPpSensitivity.FixedValue = 0.3
              [Phenology].CAMP.EnvData.VrnTreatTemp = 5.9
              [Phenology].CAMP.EnvData.VrnTreatDuration = 60
              [Phenology].HeadEmergenceLongDayBase.FixedValue = 230
              [Phenology].HeadEmergencePpSensitivity.FixedValue = 1.5
          Cultivar Spring Slow-Very Slow
            Command:
              [Phenology].CAMP.FLNparams.MinLN =6
              [Phenology].CAMP.FLNparams.PpLN = 3
              [Phenology].CAMP.FLNparams.VrnLN = 1
              [Phenology].CAMP.FLNparams.VxPLN = 3
              [Phenology].Phyllochron.BasePhyllochron.FixedValue = 122.8
              [Phenology].PhyllochronPpSensitivity.FixedValue = 0.1
              [Phenology].CAMP.EnvData.VrnTreatTemp = 5.8
              [Phenology].CAMP.EnvData.VrnTreatDuration = 60
              [Phenology].HeadEmergenceLongDayBase.FixedValue = 190
              [Phenology].HeadEmergencePpSensitivity.FixedValue = 4
          Cultivar Spring Very Slow
            Command:
              [Phenology].CAMP.FLNparams.MinLN = 7
              [Phenology].CAMP.FLNparams.PpLN = 5
              [Phenology].CAMP.FLNparams.VrnLN = 10
              [Phenology].CAMP.FLNparams.VxPLN = -5
              [Phenology].Phyllochron.BasePhyllochron.FixedValue = 100.4
              [Phenology].PhyllochronPpSensitivity.FixedValue = 0.2
              [Phenology].CAMP.EnvData.VrnTreatTemp = 5.8
              [Phenology].CAMP.EnvData.VrnTreatDuration = 60
              [Phenology].HeadEmergenceLongDayBase.FixedValue = 150
              [Phenology].HeadEmergencePpSensitivity.FixedValue = 4
          Cultivar Winter Very-Quick
            Command:
              [Phenology].CAMP.FLNparams.MinLN = 7.3
              [Phenology].CAMP.FLNparams.PpLN = 0
              [Phenology].CAMP.FLNparams.VrnLN = 7.6
              [Phenology].CAMP.FLNparams.VxPLN = -1.7
              [Phenology].Phyllochron.BasePhyllochron.FixedValue = 102.8
              [Phenology].PhyllochronPpSensitivity.FixedValue = 0.2
              [Phenology].CAMP.EnvData.VrnTreatTemp = 5.8
              [Phenology].CAMP.EnvData.VrnTreatDuration = 60
              [Phenology].HeadEmergenceLongDayBase.FixedValue = 193
              [Phenology].HeadEmergencePpSensitivity.FixedValue = 1.5
          Cultivar Winter Quick
            Command:
              [Phenology].CAMP.FLNparams.MinLN = 8.4
              [Phenology].CAMP.FLNparams.PpLN = 0.9
              [Phenology].CAMP.FLNparams.VrnLN = 5.7
              [Phenology].CAMP.FLNparams.VxPLN = 5.5
              [Phenology].Phyllochron.BasePhyllochron.FixedValue = 98
              [Phenology].PhyllochronPpSensitivity.FixedValue = 0.2
              [Phenology].CAMP.EnvData.VrnTreatTemp = 5.8
              [Phenology].CAMP.EnvData.VrnTreatDuration = 60
              [Phenology].HeadEmergenceLongDayBase.FixedValue = 80
              [Phenology].HeadEmergencePpSensitivity.FixedValue = 2.8
          Cultivar Winter Mid
            Command:
              [Phenology].CAMP.FLNparams.MinLN = 8
              [Phenology].CAMP.FLNparams.PpLN = 2.3
              [Phenology].CAMP.FLNparams.VrnLN = 7.8
              [Phenology].CAMP.FLNparams.VxPLN = 0
              [Phenology].Phyllochron.BasePhyllochron.FixedValue = 100.8
              [Phenology].PhyllochronPpSensitivity.FixedValue = 0.2
              [Phenology].CAMP.EnvData.VrnTreatTemp = 5.8
              [Phenology].CAMP.EnvData.VrnTreatDuration = 60
              [Phenology].HeadEmergenceLongDayBase.FixedValue = 132
              [Phenology].HeadEmergencePpSensitivity.FixedValue = 2.8
          Cultivar Winter Very Slow
            Command:
              [Phenology].CAMP.FLNparams.MinLN = 8.5
              [Phenology].CAMP.FLNparams.PpLN = 4
              [Phenology].CAMP.FLNparams.VrnLN = 7.5
              [Phenology].CAMP.FLNparams.VxPLN = 1
              [Phenology].Phyllochron.BasePhyllochron.FixedValue = 109.3
              [Phenology].PhyllochronPpSensitivity.FixedValue = 0.2
              [Phenology].CAMP.EnvData.VrnTreatTemp = 5.9
              [Phenology].CAMP.EnvData.VrnTreatDuration = 60
              [Phenology].HeadEmergenceLongDayBase.FixedValue = 190
              [Phenology].HeadEmergencePpSensitivity.FixedValue = 2
        Folder Turkey
          Cultivar Konya
            Command:
              [Phenology].Phyllochron.BasePhyllochron.FixedValue = 100
              [Grain].NumberFunction.GrainNumber.GrainsPerGramOfStem.FixedValue = 13
              [Grain].MaximumPotentialGrainSize.FixedValue = 0.05
              [Phenology].GrainFilling.Target.FixedValue = 450
              [Stem].DMRetranslocationFactor.ReproductiveGrowth.DMRetranslocationFactor.FixedValue = 0.2
              [Stem].DMDemands.Structural.StructuralFraction.VegetativeGrowth.Fraction.FixedValue = 0.6
              [Leaf].ExtinctionCoeff.VegetativePhase.FixedValue = 0.8
              [Phenology].CAMP.FLNparams.MinLN = 7
              [Phenology].CAMP.FLNparams.PpLN = 2.0
              [Phenology].CAMP.FLNparams.VrnLN = 2
              [Phenology].CAMP.FLNparams.VxPLN = 0.0
        Folder China
          Cultivar Keyu13
            Command:
              [Phenology].Phyllochron.BasePhyllochron.FixedValue = 100
              [Phenology].CAMP.FLNparams.MinLN = 7
              [Phenology].CAMP.FLNparams.PpLN = 3.0
              [Phenology].CAMP.FLNparams.VrnLN = 5
              [Phenology].CAMP.FLNparams.VxPLN = 0.0
        Folder USA
          Cultivar Yecora
            Command:
              [Phenology].Phyllochron.BasePhyllochron.FixedValue = 90
              [Leaf].CohortParameters.MaxArea.AreaLargestLeaves.FixedValue = 4000
              [Phenology].CAMP.FLNparams.MinLN = 7
              [Phenology].CAMP.FLNparams.PpLN = 2
              [Phenology].CAMP.FLNparams.VrnLN = 2
              [Phenology].CAMP.FLNparams.VxPLN = 2
              [Phenology].HeadEmergenceLongDayBase.FixedValue = 110
              [Phenology].HeadEmergencePpSensitivity.FixedValue = 0
              [Phenology].CAMP.EnvData.VrnTreatTemp = 6
              [Phenology].CAMP.EnvData.VrnTreatDuration = 60
          Cultivar Rex
            Command:
              [Grain].NumberFunction.GrainNumber.GrainsPerGramOfStem.FixedValue = 18
              [Grain].MaximumNConc.FixedValue = 0.02
              [Phenology].CAMP.FLNparams.MinLN = 7
              [Phenology].CAMP.FLNparams.PpLN = 4.0
              [Phenology].CAMP.FLNparams.VrnLN = 6
              [Phenology].CAMP.FLNparams.VxPLN = 0.0
          Cultivar Nugaines
            Command:
              [Grain].NumberFunction.GrainNumber.GrainsPerGramOfStem.FixedValue = 20
              [Grain].MaximumNConc.FixedValue = 0.02
              [Phenology].CAMP.FLNparams.MinLN = 7
              [Phenology].CAMP.FLNparams.PpLN = 4.0
              [Phenology].CAMP.FLNparams.VrnLN = 6
              [Phenology].CAMP.FLNparams.VxPLN = 0.0
          Cultivar Hyslop
            Command:
              [Grain].NumberFunction.GrainNumber.GrainsPerGramOfStem.FixedValue = 22
              [Grain].MaximumNConc.FixedValue = 0.02
              [Phenology].CAMP.FLNparams.MinLN = 7
              [Phenology].CAMP.FLNparams.PpLN = 4.0
              [Phenology].CAMP.FLNparams.VrnLN = 6
              [Phenology].CAMP.FLNparams.VxPLN = 0.0
          Cultivar Stephens
            Command:
              [Grain].NumberFunction.GrainNumber.GrainsPerGramOfStem.FixedValue = 25
              [Grain].MaximumNConc.FixedValue = 0.02
              [Phenology].CAMP.FLNparams.MinLN = 7
              [Phenology].CAMP.FLNparams.PpLN = 4.0
              [Phenology].CAMP.FLNparams.VrnLN = 6
              [Phenology].CAMP.FLNparams.VxPLN = 0.0
        Folder Europe
          Cultivar Dekan
            Command:
              [Phenology].HeadEmergencePpSensitivity.FixedValue = 3
              [Phenology].Phyllochron.BasePhyllochron.FixedValue = 100.0
              [Leaf].ExtinctionCoeff.VegetativePhase.FixedValue = 0.8
              [Phenology].PhyllochronPpSensitivity.FixedValue = 0.6
              [Phenology].CAMP.FLNparams.MinLN = 9
              [Phenology].CAMP.FLNparams.PpLN = 3.0
              [Phenology].CAMP.FLNparams.VrnLN = 7
              [Phenology].CAMP.FLNparams.VxPLN = 0.0
          Cultivar Rosario: same as Replacements.Wheat.Cultivars.Europe.Dekan
          Cultivar Ararat: same as Replacements.Wheat.Cultivars.Europe.Dekan
          Cultivar Tybalt
            Command:
              [Phenology].Phyllochron.BasePhyllochron.FixedValue = 90.0
              [Phenology].PhyllochronPpSensitivity.FixedValue = 0.6
              [Phenology].CAMP.FLNparams.MinLN = 9.0
              [Phenology].CAMP.FLNparams.PpLN = 0.0
              [Phenology].CAMP.FLNparams.VrnLN = 0.0
              [Phenology].CAMP.FLNparams.VxPLN = 0.0
              [Phenology].HeadEmergenceLongDayBase.FixedValue = 145
              [Phenology].HeadEmergencePpSensitivity.FixedValue = 0.0
              [Phenology].CAMP.EnvData.VrnTreatTemp = 6
              [Phenology].CAMP.EnvData.VrnTreatDuration = 60
        Folder Africa
          Cultivar HAR1685
            Command:
              [Phenology].Phyllochron.BasePhyllochron.FixedValue = 100
              [Grain].NumberFunction.GrainNumber.GrainsPerGramOfStem.FixedValue = 17
              [Phenology].GrainFilling.Target.FixedValue = 350
              [Phenology].CAMP.FLNparams.MinLN = 7
              [Phenology].CAMP.FLNparams.PpLN = 3.0
              [Phenology].CAMP.FLNparams.VrnLN = 0
              [Phenology].CAMP.FLNparams.VxPLN = 0.0
        Folder Iran
          Cultivar Gorgan
            Command:
              [Phenology].Phyllochron.BasePhyllochron.FixedValue = 100
              [Phenology].CAMP.FLNparams.MinLN = 7
              [Phenology].CAMP.FLNparams.PpLN = 4.0
              [Phenology].CAMP.FLNparams.VrnLN = 0
              [Phenology].CAMP.FLNparams.VxPLN = 0.0
        Folder Preliminary
          Cultivar Accroc: same as Replacements.Wheat.Cultivars.APP Generic.Winter Very Slow
          Cultivar Cesario: same as Replacements.Wheat.Cultivars.APP Generic.Winter Very Slow
          Cultivar Anapurna: same as Replacements.Wheat.Cultivars.APP Generic.Winter Very Slow
          Cultivar RockStar: same as Replacements.Wheat.Cultivars.APP Generic.Spring Mid
          Cultivar Calibro: same as Replacements.Wheat.Cultivars.APP Generic.Winter Very Slow
          Cultivar BigRed: same as Replacements.Wheat.Cultivars.APP Generic.Winter Very Slow
          Cultivar Catapult: same as Replacements.Wheat.Cultivars.APP Generic.Spring Mid
          Cultivar Stockade: same as Replacements.Wheat.Cultivars.APP Generic.Spring Slow
          Cultivar Mowhawk
            Command:
              [Phenology].CAMP.FLNparams.MinLN = 8
              [Phenology].CAMP.FLNparams.PpLN = 2.3
              [Phenology].CAMP.FLNparams.VrnLN = 7.8
              [Phenology].CAMP.FLNparams.VxPLN = 0
              [Phenology].Phyllochron.BasePhyllochron.FixedValue = 100
              [Phenology].PhyllochronPpSensitivity.FixedValue = 0.2
              [Phenology].CAMP.EnvData.VrnTreatTemp = 5.8
              [Phenology].CAMP.EnvData.VrnTreatDuration = 60
              [Phenology].HeadEmergenceLongDayBase.FixedValue = 132
              [Phenology].HeadEmergencePpSensitivity.FixedValue = 2.8
          Cultivar Waugh: same as Replacements.Wheat.Cultivars.APP Generic.Winter Very Slow
          Cultivar Einstein: same as Replacements.Wheat.Cultivars.APP Generic.Winter Very Slow
          Cultivar Zanzibar: same as Replacements.Wheat.Cultivars.APP Generic.Spring Slow
          Cultivar Longford: same as Replacements.Wheat.Cultivars.APP Generic.Winter Very Slow
          Cultivar Conqueror: same as Replacements.Wheat.Cultivars.APP Generic.Winter Very Slow
          Cultivar Genius: same as Replacements.Wheat.Cultivars.APP Generic.Winter Very Slow
          Cultivar Vixin: same as Replacements.Wheat.Cultivars.APP Generic.Spring Quick
          Cultivar Meering
            Command:
              [Phenology].CAMP.FLNparams.MinLN = 7.1
              [Phenology].CAMP.FLNparams.PpLN = 3.1
              [Phenology].CAMP.FLNparams.VrnLN = 2.4
              [Phenology].CAMP.FLNparams.VxPLN = -0.9
              [Phenology].Phyllochron.BasePhyllochron.FixedValue = 100
              [Phenology].PhyllochronPpSensitivity.FixedValue = 0.3
              [Phenology].CAMP.EnvData.VrnTreatTemp = 5.8
              [Phenology].CAMP.EnvData.VrnTreatDuration = 60
              [Phenology].HeadEmergenceLongDayBase.FixedValue = 154
              [Phenology].HeadEmergencePpSensitivity.FixedValue = 1
          Cultivar Sunmaster
            Command:
              [Phenology].CAMP.FLNparams.MinLN = 7.1
              [Phenology].CAMP.FLNparams.PpLN = 3.1
              [Phenology].CAMP.FLNparams.VrnLN = 2.4
              [Phenology].CAMP.FLNparams.VxPLN = -0.9
              [Phenology].Phyllochron.BasePhyllochron.FixedValue = 100
              [Phenology].PhyllochronPpSensitivity.FixedValue = 0.3
              [Phenology].CAMP.EnvData.VrnTreatTemp = 5.8
              [Phenology].CAMP.EnvData.VrnTreatDuration = 60
              [Phenology].HeadEmergenceLongDayBase.FixedValue = 154
              [Phenology].HeadEmergencePpSensitivity.FixedValue = 2
          Cultivar Osprey
            Command:
              [Phenology].CAMP.FLNparams.MinLN = 8
              [Phenology].CAMP.FLNparams.PpLN = 2.3
              [Phenology].CAMP.FLNparams.VrnLN = 7.8
              [Phenology].CAMP.FLNparams.VxPLN = 0
              [Phenology].Phyllochron.BasePhyllochron.FixedValue = 95
              [Phenology].PhyllochronPpSensitivity.FixedValue = 0.2
              [Phenology].CAMP.EnvData.VrnTreatTemp = 5.8
              [Phenology].CAMP.EnvData.VrnTreatDuration = 60
              [Phenology].HeadEmergenceLongDayBase.FixedValue = 132
              [Phenology].HeadEmergencePpSensitivity.FixedValue = 2.8
          Cultivar Whistler
            Command:
              [Phenology].CAMP.FLNparams.MinLN = 8
              [Phenology].CAMP.FLNparams.PpLN = 2.3
              [Phenology].CAMP.FLNparams.VrnLN = 7.8
              [Phenology].CAMP.FLNparams.VxPLN = 0
              [Phenology].Phyllochron.BasePhyllochron.FixedValue = 100
              [Phenology].PhyllochronPpSensitivity.FixedValue = 0.0
              [Phenology].CAMP.EnvData.VrnTreatTemp = 5.8
              [Phenology].CAMP.EnvData.VrnTreatDuration = 60
              [Phenology].HeadEmergenceLongDayBase.FixedValue = 132
              [Phenology].HeadEmergencePpSensitivity.FixedValue = 2.8
          Cultivar Wylah: same as Replacements.Wheat.Cultivars.Preliminary.Mowhawk
          Cultivar UOM001_3_47: same as Replacements.Wheat.Cultivars.APP Generic.Spring Mid
          Cultivar UOM001_9_1: same as Replacements.Wheat.Cultivars.APP Generic.Spring Mid
      Constant MortalityRate: FixedValue=0
      Constant SeedMortalityRate: FixedValue=0
  Experiment DookieWWHI2024
    DisabledSimNames=[DookieWWHI2024CvMowhawkSow14-May, DookieWWHI2024CvIllaboSow14-May, DookieWWHI2024CvKittyhawkSow14-May, DookieWWHI2024CvWedgetailSow14-May, DookieWWHI2024CvWylahSow14-May, DookieWWHI2024CvWhistlerSow14-May, DookieWWHI2024CvRosellaSow14-May, DookieWWHI2024CvOspreySow14-May, DookieWWHI2024CvSunmasterSow17-Apr, DookieWWHI2024CvScepterSow17-Apr, DookieWWHI2024CvMaceSow17-Apr, DookieWWHI2024CvGregorySow17-Apr, DookieWWHI2024CvWyalkatchemSow17-Apr, DookieWWHI2024CvYitpiSow17-Apr, DookieWWHI2024CvJanzSow17-Apr, DookieWWHI2024CvMeeringSow17-Apr]
    Factors
      Permutation
        Factor Cv
          Memo Emergence dates
            Emergence dates were set to the observed date of 50% emergence for most cultivars except some of the early sown ones that had a protracted emergence period.  For them emergence date was set prior to 50% at more like 20%
          CompositeFactor Osprey
            Specifications:
              [Sowing].Script.CultivarName = Osprey
              [Sowing].Script.Population = 101
              [Sowing].Script.EmergeDate = 28-Apr
          CompositeFactor Rosella
            Specifications:
              [Sowing].Script.CultivarName = Rosella
              [Sowing].Script.Population = 108
              [Sowing].Script.EmergeDate = 28-Apr
          CompositeFactor Whistler
            Specifications:
              [Sowing].Script.CultivarName = Whistler
              [Sowing].Script.Population = 92
              [Sowing].Script.EmergeDate = 28-Apr
          CompositeFactor Wylah
            Specifications:
              [Sowing].Script.CultivarName = Wylah
              [Sowing].Script.Population = 105
              [Sowing].Script.EmergeDate = 26-Apr
          CompositeFactor Wedgetail
            Specifications:
              [Sowing].Script.CultivarName = Wedgetail
              [Sowing].Script.Population = 103
              [Sowing].Script.EmergeDate = 28-Apr
          CompositeFactor Kittyhawk
            Specifications:
              [Sowing].Script.CultivarName = Kittyhawk
              [Sowing].Script.Population = 103
              [Sowing].Script.EmergeDate = 27-Apr
          CompositeFactor Illabo
            Specifications:
              [Sowing].Script.CultivarName = Illabo
              [Sowing].Script.Population = 119
              [Sowing].Script.EmergeDate = 27-Apr
          CompositeFactor Mowhawk
            Specifications:
              [Sowing].Script.CultivarName = Mowhawk
              [Sowing].Script.Population = 86
              [Sowing].Script.EmergeDate = 28-Apr
          CompositeFactor Meering
            Specifications:
              [Sowing].Script.CultivarName = Meering
              [Sowing].Script.Population = 127
              [Sowing].Script.EmergeDate = 25-May
          CompositeFactor Janz
            Specifications:
              [Sowing].Script.CultivarName = Janz
              [Sowing].Script.Population = 138
              [Sowing].Script.EmergeDate = 27-May
          CompositeFactor Yitpi
            Specifications:
              [Sowing].Script.CultivarName = Yitpi
              [Sowing].Script.Population = 135
              [Sowing].Script.EmergeDate = 26-May
          CompositeFactor Wyalkatchem
            Specifications:
              [Sowing].Script.CultivarName = Wyalkatchem
              [Sowing].Script.Population = 130
              [Sowing].Script.EmergeDate = 26-May
          CompositeFactor Gregory
            Specifications:
              [Sowing].Script.CultivarName = Gregory
              [Sowing].Script.Population = 123
              [Sowing].Script.EmergeDate = 26-May
          CompositeFactor Mace
            Specifications:
              [Sowing].Script.CultivarName = Mace
              [Sowing].Script.Population = 140
              [Sowing].Script.EmergeDate = 27-May
          CompositeFactor Scepter
            Specifications:
              [Sowing].Script.CultivarName = Scepter
              [Sowing].Script.Population = 146
              [Sowing].Script.EmergeDate = 27-May
          CompositeFactor Sunmaster
            Specifications:
              [Sowing].Script.CultivarName = Sunmaster
              [Sowing].Script.Population = 131
              [Sowing].Script.EmergeDate = 27-May
        Factor Sow: Specification=[Sowing].Script.SowDate = 17-Apr,14-May
    Simulation McPoyles
      Weather: FileName=%root%/Tests/Validation/Wheat/met/Dookie2024.met
      Clock: Start=2024-04-17; End=2024-11-17
      Summary
      SoilArbitrator
      MicroClimate: a_interception=0; b_interception=1; c_interception=0; d_interception=0; SoilHeatFluxFraction=0.4; MinimumHeightDiffForNewLayer=0; NightInterceptionFraction=0.5; ReferenceHeight=2
      Manager LocationInfo
        Country = Australia
        State = Western Australia
        Region = South West
```csharp
using Models.Soils;
using System;
using Models.Core;
using Models.PMF;
using APSIM.Shared.Utilities;

namespace Models
{
    [Serializable]
    public class Script : Model
    {
        [Link] Clock Clock;
        [Link] Fertiliser Fertiliser;
        [Link] Summary Summary;
        
        [Description("Country")]
        public string Country { get; set; }

        [Description("State")]
        public string State { get; set; }

        [Description("Region")]
        public string Region { get; set; }

    }
}
```
      Zone Field: Area=1; Slope=0; AspectAngle=0; Altitude=0
        Soil Soil 1150: SoilType=Sandy duplex; LocalName=Ironstone gravelly soils; Site=Tenterden; NearestTown=Tenterden; Region=Southern Region; State=Western Australia; Country=Australia; ApsoilNumber=1150; Latitude=-34.442704; Longitude=117.394537; LocationAccuracy=+/- 20m; YearOfSampling=2015; DataSource=Rob Summers DAFWA
          Comments=gravel - Wa2 - Sb diff 6 - gravelly sandy earth light clay at depth
          Physical
            Thickness  ParticleSizeSand  ParticleSizeSilt  ParticleSizeClay  Rocks  BD     AirDry  LL15   DUL    SAT
            100        87.81             6.15              6.05              0      1.294  0.082   0.18   0.31   0.341
            100        86.18             4.95              8.86              0      1.443  0.11    0.11   0.19   0.209
            200        86.18             4.95              8.86              0      1.513  0.27    0.27   0.371  0.408
            200        88.29             3.92              7.79              0      1.2    0.27    0.27   0.465  0.511
            200        88.29             3.92              7.79              0      1.4    0.274   0.274  0.413  0.455
            200        88.29             3.92              7.79              0      1.519  0.297   0.297  0.332  0.365
            200        84.27             2.96              12.77             0      1.417  0.275   0.275  0.328  0.361
            200        84.27             2.96              12.77             0      1.669  0.258   0.258  0.315  0.346
            200        84.27             2.96              12.77             0      1.56   0.193   0.193  0.334  0.367
            200        84.27             2.96              12.77             0      1.68   0.252   0.252  0.31   0.342
            SoilCrop wheatSoil
              LL=[0.18, 0.11, 0.27, 0.27, 0.274, 0.297, 0.275, 0.258, 0.193, 0.252]
              KL=[0.06, 0.06, 0.06, 0.06, 0.04, 0.04, 0.04, 0.02, 0.02, 0.01]
              XF=[1, 1, 1, 1, 1, 1, 1, 1, 1, 1]
          WaterBalance SoilWater: SummerDate=1-Nov; SummerU=6; SummerCona=3.5; WinterDate=1-Apr; WinterU=2; WinterCona=2; DiffusConst=88; DiffusSlope=35; Salb=0.12; CN2Bare=73; CNRed=20; CNCov=0.8; PSIDul=-100; Thickness=[100, 100, 100, 100, 100, 100, 100]; SWCON=[0.5, 0.5, 0.5, 0.5, 0.3, 0.3, -]
          Organic: FOMCNRatio=40; CarbonUnits=Total
            Thickness  Carbon  SoilCNRatio  FBiom  FInert  FOM
            100        1.48    12           0.035  0.4     315.5
            100        0.64    12           0.02   0.5     127.3
            200        0.4     12           0.02   0.5     127.3
            200        0.35    12           0.02   0.7     61.6
            200        0.25    12           0.02   0.7     61.6
            200        0.21    12           0.02   0.7     61.6
            200        0.1     12           0.015  0.7     60.5
            200        0.1     12           0.015  0.7     60.1
            200        0.1     12           0.015  0.867   58.2
            200        0.1     12           0.015  0.95    42.2
          Chemical: PHUnits=Water
            Thickness  PH   EC     ESP    CEC
            100        5.1  0.132  0.026  7.003
            100        5.2  0.085  0.052  4.205
            200        6.3  0.085  0.052  4.205
            200        7.2  0.065  0.064  3.411
            200        7.6  0.065  0.064  3.411
            200        7.9  0.065  0.064  3.411
            200        7.9  0.064  0.083  3.514
            200        7.9  0.064  0.083  3.514
            200        8    0.087  0.125  4.193
            200        8.1  0.098  0.146  4.533
          Nutrient
          Solute NO3: Thickness=[100, 100, 200, 200, 200, 200, 200, 200, 200, 200]; InitialValues=[25, 5.5, 3.1, 1.8, 1.4, 2.2, 3.4, 4.2, 4.1, 4.4]; InitialValuesUnits=ppm; WaterTableConcentration=0; D0=0; DepthConstant=0; MaxDepthSoluteAccessible=0; RunoffEffectivenessAtMovingSolute=0; MaxEffectiveRunoff=0
          Solute NH4: Thickness=[100, 100, 200, 200, 200, 200, 200, 200, 200, 200]; InitialValues=[1.3, 1, 1.2, 0.9, 0.9, 0.7, 0.7, 0.7, 0.5, 1.6]; InitialValuesUnits=ppm; WaterTableConcentration=0; D0=0; DepthConstant=0; MaxDepthSoluteAccessible=0; RunoffEffectivenessAtMovingSolute=0; MaxEffectiveRunoff=0
          Solute Urea: Thickness=[100, 100, 200, 200, 200, 200, 200, 200, 200, 200]; InitialValues=[0, 0, 0, 0, 0, 0, 0, 0, 0, 0]; InitialValuesUnits=kg/ha; WaterTableConcentration=0; D0=0; DepthConstant=0; MaxDepthSoluteAccessible=0; RunoffEffectivenessAtMovingSolute=0; MaxEffectiveRunoff=0
          Water: Thickness=[100, 100, 200, 200, 200, 200, 200, 200, 200, 200]; FilledFromTop=true
            InitialValues=[0.103, 0.14, 0.37, 0.46, 0.41, 0.33, 0.33, 0.31, 0.33, 0.31]
          SoilTemperature CERESSoilTemperature
        Fertiliser
        Irrigation
        SurfaceOrganicMatter: InitialResidueName=Canola stubble; InitialResidueType=canola; InitialResidueMass=3000; InitialStandingFraction=0.7; InitialCPR=0; InitialCNR=70
        Plant Wheat
          Cultivar Mowhawk
            Command:
              [Phenology].Phyllochron.BasePhyllochron.FixedValue = 90
              [Phenology].PhyllochronPpSensitivity.FixedValue = 0.212225680614483
              [Phenology].CAMP.FLNparams.MinLN = 8
              [Phenology].CAMP.FLNparams.PpLN = 3.0
              [Phenology].CAMP.FLNparams.VrnLN = 6.0
              [Phenology].CAMP.FLNparams.VxPLN = 1.0
              [Phenology].CAMP.EnvData.VrnTreatTemp = 5.8
              [Phenology].CAMP.EnvData.VrnTreatDuration = 60
              [Phenology].HeadEmergenceLongDayBase.FixedValue = 170
              [Phenology].HeadEmergencePpSensitivity.FixedValue = 0.0
            Memo
              Placeholder cultivar Mowhawk based on DefaultCv.
          Cultivar Osprey: same as DookieWWHI2024.McPoyles.Field.Wheat.Mowhawk
          Cultivar Wylah: same as DookieWWHI2024.McPoyles.Field.Wheat.Mowhawk
          Cultivar Meering: same as DookieWWHI2024.McPoyles.Field.Wheat.Mowhawk
          Cultivar Sunmaster: same as DookieWWHI2024.McPoyles.Field.Wheat.Mowhawk
        Manager Sowing
          SowDate = 1-may
          Treat =
          CultivarName =
          SowingDepth = 30
          RowSpacing = 225
          Population = 180
          EmergeDate =
```csharp
using Newtonsoft.Json;
using System.Data;
using System.Xml.Serialization;
using Models;
using System.Text;
using System.Collections.Generic;
using Models.Interfaces;
using System;
using Models.Core;
using Models.PMF;
using Models.Soils;
using Models.Utilities;
using APSIM.Shared.Utilities;

namespace Models
{
    [Serializable]
    public class Script : Model
    {
        [Link] Clock Clock;
        [Link] Fertiliser Fertiliser;
        [Link] Summary Summary;
        [Link] Soil Soil;
        [Link(ByName = true)] Plant Wheat;
        [Link] Simulation Simulation;
        Accumulator accumulatedRain;
        
        [Description("Sowing date (d-mmm)")]
        public string SowDate { get; set; }
        [Description("Treatment Name")]
        public string Treat { get; set; }
        [Display(Type = DisplayType.CultivarName)]
        [Description("Cultivar to be sown")]
        public string CultivarName { get; set; }
        [Description("Sowing depth (mm)")]
        public double SowingDepth { get; set; }
        [Description("Row spacing (mm)")]
        public double RowSpacing { get; set; }
        [Description("Plant population (/m2)")]
        public double Population { get; set; }
        [Description("Emergence Date (d-MMM)")]
        public string EmergeDate {get; set;}



        [EventSubscribe("DoManagement")]
        private void OnDoManagement(object sender, EventArgs e)
        {

            if (DateUtilities.WithinDates(SowDate, Clock.Today, SowDate))
            {
               Wheat.Sow(population: Population, cultivar: CultivarName, depth: SowingDepth, rowSpacing: RowSpacing);   
               Wheat.Phenology.SetPhaseCompletionDate(EmergeDate,"Emerging"); 
            }            
        
        }
        
    }
}
```
        Manager Fertilize
          FertiliserType = UreaN
          FertiliserDates = 26-jul, 26-aug
          FertiliseDepth = 0
          Amount = 70.5
          AmountType = True
```csharp
using Models.Soils;
using System;
using System.Linq;
using Models.Core;
using Models.PMF;
using APSIM.Shared.Utilities;
namespace Models
{
    [Serializable]
    public class Script : Model
    {
        [Link] Clock Clock;
        [Link] Fertiliser Fertiliser;
        
        [Separator("A component to apply fertiliser on one or more dates on every year of the simulation")]

        [Description("Type of fertiliser to apply? ")] 
        [Display(Type = DisplayType.FertiliserType)]public string FertiliserType { get; set; }

        [Description("Enter the fertilisation dates as dd-mmm with comma separation (any year information entered will be ignored): ")] 
        public string[] FertiliserDates { get; set; } 
        
        [Description("Fertilise depth (mm)")]
        public double FertiliseDepth { get; set; }

        [Description("Amount of fertiliser to be applied (kg /ha)")] 
        public double Amount { get; set; }

        [Description("Is the above amount to be applied each time? (yes/ticked)? Or is it the total annual amount across all dates (no/unticked)")] 
        public bool AmountType { get; set; }

        
        [EventSubscribe("DoManagement")]
        private void OnDoManagement(object sender, EventArgs e)
        {
            foreach (string ddMMM in FertiliserDates)
            {
                if (DateUtilities.DatesEqual(ddMMM, Clock.Today))
                {
                    if (AmountType)
                        Fertiliser.Apply(amount: Amount, type: FertiliserType);
                    else
                        Fertiliser.Apply(amount: Amount / FertiliserDates.Length, type: FertiliserType, depth: FertiliseDepth);
                }
            }
        }
    }
}
```
        Manager Harvest
          NoHarvestBefore = 17-Nov
```csharp
using APSIM.Core;
using Models.Soils.Nutrients;
using System;
using Models.Core;
using System.Collections.Generic;
using System.Text;
using Models.Soils;
using Models.PMF;
using Models;
using System.Xml.Serialization;
using APSIM.Shared.Utilities;
using Models.PMF.Phen;

namespace Models
{
    [Serializable]
    public class Script : Model, IStructureDependency
    {
        [Link(ByName = true)] private Plant Wheat;
        [Link] private Simulation sim;
        [Link] private Clock clock;
        [Link] private Summary summary;
        public IStructure Structure { private get; set; }
        
        [Description("Prevent harvesting before: ")]
        public string NoHarvestBefore {get; set;}
        

        

        [EventSubscribe("DoManagement")]
        private void OnDoManagement(object sender, EventArgs e)
        {
            if (Wheat.IsReadyForHarvesting && DateUtilities.CompareDates(NoHarvestBefore, clock.Today) >= 0)
            {
                Wheat.Harvest();
                Wheat.EndCrop();
            }
        }
        
        [EventSubscribe("EndOfDay")]
        private void OnEndOfDay(object sender, EventArgs e)
        {
            if ((clock.Today.Equals(clock.EndDate))&&(Wheat.IsAlive))
            {
                Wheat.Harvest();
                Wheat.EndCrop();
                Structure.Set("Clock.EndDate", clock.Today, relativeTo: sim);
            }
        }
    }
}
```
        Manager Irrigate
          IrrigateDates = 1-May
          Amount = 5
          Depth = 0
          Efficiency = 1
          WillRunoff = False
```csharp
using Models.Soils;
using System;
using System.Linq;
using Models.Core;
using Models.PMF;
using APSIM.Shared.Utilities;
namespace Models
{
    [Serializable]
    public class Script : Model
    {
        [Link] Clock Clock;
        [Link] Irrigation Irrigation;
        
        [Separator("A component to apply irrigation on one or more dates on every year of the simulation")]

        [Description("Enter the irrigation dates as dd-mmm with comma separation (any year information entered will be ignored)")] 
        public string[] IrrigateDates { get; set; }
        
        [Description("Amount of irrigation to be applied (mm)")] 
        public double Amount { get; set; }
        
        [Description("Depth in the soil to apply the  irrigation (mm)")] 
        public double Depth { get; set; }
        
        [Description("Efficiency of irrigation (0-1)")] 
        public double Efficiency { get; set; }
        
        [Description("Will the irrigation runoff?")] 
        public bool WillRunoff { get; set; }
        
        [EventSubscribe("DoManagement")]
        private void OnDoManagement(object sender, EventArgs e)
        {
            foreach (string ddMMM in IrrigateDates)
            {
                if (DateUtilities.DatesEqual(ddMMM, Clock.Today))
                    Irrigation.Apply(amount: Amount, depth: Depth, efficiency: Efficiency, willRunoff: WillRunoff);
            }
        }
    }
}
```
        Manager NDVIModel
          DrySoilNDVI = 0.1
          WetSoilNDVI = 0.2
          GreenCropNDVI = 0.75
          DeadCropNDVI = 0.15
```csharp
using System;
using Models.Core;
using Models.Interfaces;
using Models.PMF;
using APSIM.Shared.Utilities;
using Models.WaterModel;

namespace Models
{
    [Serializable]
    public class Script : Model
    {
        [Link] IClock Clock;
        [Link] ISummary Summary;
        [Link] ICanopy WheatCanopy;
        [Link] EvaporationModel EvapModel;
        
        [Description("Dry soil NDVI")]
        public double DrySoilNDVI { get; set; }
        
        [Description("Wet soil NDVI")]
        public double WetSoilNDVI { get; set; }

        [Description("Green Crop NDVI")]
        public double GreenCropNDVI { get; set; }
        
        [Description("Dead Crop NDVI")]
        public double DeadCropNDVI { get; set; }
                
        public double NDVI { get; set; }

        [EventSubscribe("DoManagement")]
        private void DoDailyCalculations(object sender, EventArgs e)
        {
            double SoilNDVI = WetSoilNDVI;
            if (EvapModel.t > 1)
               SoilNDVI = DrySoilNDVI;

            //NDVI = GreenCropNDVI * WheatCanopy.CoverGreen;
            //NDVI += DeadCropNDVI * (WheatCanopy.CoverTotal - WheatCanopy.CoverGreen);
            //NDVI += SoilNDVI * (1 - WheatCanopy.CoverTotal);            
            
            double CropNDVI = 0;
            if (WheatCanopy.CoverTotal > 0)
                CropNDVI = (WheatCanopy.CoverGreen/WheatCanopy.CoverTotal) * GreenCropNDVI + (1.0 - WheatCanopy.CoverGreen/WheatCanopy.CoverTotal) * DeadCropNDVI;
   
            NDVI = SoilNDVI + (CropNDVI - SoilNDVI)*Math.Pow(WheatCanopy.CoverTotal, (1.0 - SoilNDVI));

            
        }
    }
}
```
        Report DailyReport
        Report HarvestReport
        Report NDVIDailyReport
        SetModelParamsBySimulation SetPhenologyParams: ParameterFile=..\inputs\DookieWWHI2024_parameterOverwrites.csv; SetEventName=[Plant].Sowing
        Report ReportPhenoDates: EventNames=[Clock].StartOfDay
          VariableNames:
            [Clock].Today
            [Wheat].Phenology.Stage
  Experiment DookieEVA2024
    Factors
      Permutation
        Factor Sow
          CompositeFactor April_Illabo
            Specifications:
              [Sowing].Script.SowDate = 16-Apr
              [Sowing].Script.CultivarName = Illabo
              [Sowing].Script.Population = 116
              [Sowing].Script.EmergeDate = 28-Apr
          CompositeFactor April_BigRed
            Specifications:
              [Sowing].Script.SowDate = 16-Apr
              [Sowing].Script.CultivarName = BigRed
              [Sowing].Script.Population = 104
              [Sowing].Script.EmergeDate = 27-Apr
          CompositeFactor April_UOM001_3_47
            Specifications:
              [Sowing].Script.SowDate = 16-Apr
              [Sowing].Script.CultivarName = UOM001_3_47
              [Sowing].Script.Population = 96
              [Sowing].Script.EmergeDate = 27-Apr
          CompositeFactor April_UOM001_9_1
            Specifications:
              [Sowing].Script.SowDate = 16-Apr
              [Sowing].Script.CultivarName = UOM001_9_1
              [Sowing].Script.Population = 93
              [Sowing].Script.EmergeDate = 29-Apr
          CompositeFactor May_Zanzibar
            Specifications:
              [Sowing].Script.SowDate = 14-May
              [Sowing].Script.CultivarName = Zanzibar
              [Sowing].Script.Population = 139
              [Sowing].Script.EmergeDate = 26-May
          CompositeFactor May_Sunmaster
            Specifications:
              [Sowing].Script.SowDate = 14-May
              [Sowing].Script.CultivarName = SunMaster
              [Sowing].Script.Population = 147
              [Sowing].Script.EmergeDate = 27-May
          CompositeFactor May_UOM001_3_47
            Specifications:
              [Sowing].Script.SowDate = 14-May
              [Sowing].Script.CultivarName = UOM001_3_47
              [Sowing].Script.Population = 132
              [Sowing].Script.EmergeDate = 27-May
          CompositeFactor May_UOM001_9_1
            Specifications:
              [Sowing].Script.SowDate = 14-May
              [Sowing].Script.CultivarName = UOM001_9_1
              [Sowing].Script.Population = 128
              [Sowing].Script.EmergeDate = 27-May
    Simulation McPoyle
      Weather: FileName=%root%/Tests/Validation/Wheat/met/Dookie2024.met
      Clock: Start=2024-04-16; End=2024-11-17
      Summary
      SoilArbitrator
      MicroClimate: a_interception=0; b_interception=1; c_interception=0; d_interception=0; SoilHeatFluxFraction=0.4; MinimumHeightDiffForNewLayer=0; NightInterceptionFraction=0.5; ReferenceHeight=2
      Manager LocationInfo: same as DookieWWHI2024.McPoyles.LocationInfo
      Zone Field: Area=1; Slope=0; AspectAngle=0; Altitude=0
        Soil Soil 1150: same as DookieWWHI2024.McPoyles.Field.Soil 1150
        Fertiliser
        Irrigation
        SurfaceOrganicMatter: InitialResidueName=Canola stubble; InitialResidueType=canola; InitialResidueMass=3000; InitialStandingFraction=0.7; InitialCPR=0; InitialCNR=70
        Plant Wheat
        Manager Sowing: same as DookieWWHI2024.McPoyles.Field.Sowing
        Manager Fertilize: same as DookieWWHI2024.McPoyles.Field.Fertilize
        Manager Harvest: same as DookieWWHI2024.McPoyles.Field.Harvest
        Manager Irrigate: same as DookieWWHI2024.McPoyles.Field.Irrigate
        Manager NDVIModel: same as DookieWWHI2024.McPoyles.Field.NDVIModel
        Report DailyReport
        Report HarvestReport
        Report NDVIDailyReport
        SetModelParamsBySimulation SetPhenologyParams: ParameterFile=..\inputs\DookieEVA2024_parameterOverwrites.csv; SetEventName=[Plant].Sowing
        Report ReportPhenoDates: EventNames=[Clock].StartOfDay
          VariableNames:
            [Clock].Today
            [Wheat].Phenology.Stage
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