Simulations: Version=206
  Memo TitlePage
    # The APSIM Wheat Model

    _Brown, H.E., Huth, N.I. and Holzworth, D.P._
  Memo Introduction
    The APSIM wheat model has been developed using the Plant Modelling Framework (PMF) of [brown_plant_2014]. This new framework provides a library of plant organ and process submodels that can be coupled, at runtime, to construct a model in much the same way that models can be coupled to construct a simulation. This means that dynamic composition of lower level process and organ classes (e.g. photosynthesis, leaf) into larger constructions (e.g. maize, wheat, sorghum) can be achieved by the model developer without additional coding.

    The wheat model consists of:

    * a phenology model to simulate development through sequential developmental phases
    * a structure model to simulate plant morphology
    * a collection of organs to simulate the various plant parts
    * an arbitrator to allocate resources (N, biomass) to the various plant organs

    This work builds upon earlier APSIM Wheat models such as NWheat ([Asseng200225], [KeatingNWheat]), NWheatS ([Asseng1998163]), Cropmod-Wheat ([Wang2002GenericCropModel]), and the earlier versions developed in Plant (<a href=\"http://www.apsim.info/Documentation/Model,CropandSoil/CropModuleDocumentation/Wheat.aspx">APSIM Wheat 7.5</a>") and then within the Plant Modelling Framework ([brown_plant_2014]).
  DataStore
    ExcelInput ExcelMultiInput: FileNames=[WaggaWagga2024_Observed.xlsx]; SheetNames=[Observed]
    PredictedObserved DailyObsPred (disabled): PredictedTableName=DailyReport; ObservedTableName=Observed; FieldNameUsedForMatch=SimulationName; FieldName2UsedForMatch=Clock.Today; AllColumns=false
      Tests: POName=DailyObsPred
        AcceptedStats:
          Name                   n     Slope         Intercept   SEslope      SEintercept  R2           RMSE       NSE         ME          MAE         RSR       RMR
          ET                     123   1.13169       -0.428525   0.0437149    0.169573     0.847065     0.75711    0.750672    0.0416707   0.558234    0.497294  0
          ProfileWater           1327  0.876588      76.0389     0.0130203    5.47947      0.7738       58.7876    0.702733    25.8355     33.06       0.545016  0
          Soil.SoilWater.SW(1)   1300  0.000187106   0.209326    0.000113886  0.00216848   0.00207521   18.9789    -0.0810339  -5.20763    5.28548     1.03933   0
          Soil.SoilWater.SW(10)  8     -0.411168     0.612361    0.204164     0.087484     0.403332     0.0113816  -3.15811    0.00772724  0.00919543  1.90744   0
          Soil.SoilWater.SW(2)   1323  -9.03035e-05  0.237103    7.90585e-05  0.00185795   0.000986689  23.4358    -0.0848838  -6.54813    6.60052     1.04118   0
          Soil.SoilWater.SW(3)   1323  7.41365e-05   0.225765    6.63683e-05  0.00193967   0.000943693  29.1595    -0.0857037  -8.19945    8.22086     1.04158   0
          Soil.SoilWater.SW(4)   1323  0.00032245    0.209832    5.67479e-05  0.00181599   0.0238581    31.9313    -0.0847602  -8.95944    8.97693     1.04112   0
          Soil.SoilWater.SW(5)   1323  0.000184327   0.244192    5.45151e-05  0.00180824   0.00858025   33.0939    -0.0856543  -9.31536    9.33089     1.04155   0
          Soil.SoilWater.SW(6)   1218  0.983201      0.00665286  0.00580358   0.00166975   0.959354     0.0168556  0.958159    0.00202203  0.00893392  0.204467  0
          Soil.SoilWater.SW(7)   1194  0.995766      0.00138347  0.00547865   0.00136097   0.965173     0.0121361  0.964171    0.00036727  0.00674653  0.189207  0
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        AcceptedStatsName=Name n Slope Intercept SEslope SEintercept R2 RMSE NSE ME MAE RSR
    PredictedObserved HarvestObsPred: PredictedTableName=HarvestReport; ObservedTableName=Observed; FieldNameUsedForMatch=SimulationName; FieldName2UsedForMatch=Clock.Today; AllColumns=false
      Tests: POName=HarvestObsPred
        AcceptedStats:
          Name                                  n    Slope      Intercept   SEslope     SEintercept  R2          RMSE        NSE         ME           MAE         RSR       RMR
          Wheat.AboveGround.N                   67   1.12809    -1.00273    0.0391678   0.525848     0.927336    2.09151     0.875576    0.540148     1.59606     0.350095  0
          Wheat.AboveGround.Wt                  211  1.01911    34.1751     0.0202867   28.6588      0.923515    188.663     0.904426    58.5184      140.453     0.308417  0
          Wheat.Grain.N                         135  1.07639    -0.257745   0.0362834   0.353004     0.868717    1.79883     0.808865    0.415699     1.36719     0.435568  0
          Wheat.Grain.Nconc                     136  0.52548    0.0109277   0.0578165   0.00130116   0.381364    0.00332647  0.31597     0.000420536  0.00251003  0.824015  0
          Wheat.Grain.Number                    195  0.819153   2260.06     0.0213448   308.959      0.88414     2247.71     0.879203    -81.8409     1634.74     0.346666  0
          Wheat.Grain.Protein                   114  0.424157   7.85561     0.0562272   0.726492     0.336911    2.10436     0.263918    0.550644     1.57133     0.854181  0
          Wheat.Grain.Wt                        233  0.978713   11.017      0.0292591   15.5104      0.828875    103.644     0.801774    0.879252     78.6576     0.444269  0
          Wheat.Leaf.CohortMaxSize(1)           10   0.0270759  255.563     0.0327969   7.48653      0.078506    51.271      -0.92608    36.4016      40.5202     1.31661   0
          Wheat.Leaf.CohortMaxSize(10)          10   1.11919    -412.466    0.256733    521.362      0.703745    224.554     -0.300948   -171.57      207.903     1.08206   0
          Wheat.Leaf.CohortMaxSize(11)          10   0.825212   365.905     0.266736    598.083      0.54471     196.601     0.391552    -23.5263     115.224     0.740002  0
          Wheat.Leaf.CohortMaxSize(12)          10   0.848404   253.801     0.223896    493.954      0.642195    151.745     0.416747    -79.2873     105.917     0.724519  0
          Wheat.Leaf.CohortMaxSize(13)          10   1.09708    -403.529    1.01788     2346.69      0.126797    703.826     -7.88491    -180.887     351.071     2.82779   0
          Wheat.Leaf.CohortMaxSize(14)          10   1.30676    -642.351    0.429337    1019.71      0.536608    603.245     -0.59098    71.3164      415.854     1.19661   0
          Wheat.Leaf.CohortMaxSize(15)          9    -0.26027   2713.41     0.159916    364.78       0.274529    585.946     -0.830732   -109.076     515.056     1.27566   0
          Wheat.Leaf.CohortMaxSize(16)          3    -0.645839  2788.84     7.95817     13511.1      0.00654291  1245.82     -65.0428    6.01155      1116.21     6.6354    0
          Wheat.Leaf.CohortMaxSize(17)          2    3.1965     -3522.2732  0           0            1           590.025     -4.43529    -197.771     555.892     1.64853   0
          Wheat.Leaf.CohortMaxSize(18)          1    -          -           -           -            -           985.267     -           985.267      985.267     -         0
          Wheat.Leaf.CohortMaxSize(2)           10   0.0630555  275.197     0.29264     121.589      0.00577     139.081     -3.00585    -108.611     115.388     1.89875   0
          Wheat.Leaf.CohortMaxSize(3)           10   0.289291   221.125     0.270354    144.318      0.125205    181.922     -2.6244     -152.132     163.333     1.80609   0
          Wheat.Leaf.CohortMaxSize(4)           10   0.345581   263.167     0.345159    223.342      0.111353    208.379     -1.99176    -152.884     173.867     1.64091   0
          Wheat.Leaf.CohortMaxSize(5)           10   0.249259   458.154     0.277019    225.53       0.0919017   229.975     -0.868592   -139.856     146.902     1.29682   0
          Wheat.Leaf.CohortMaxSize(6)           10   0.345905   476.527     0.195687    187.624      0.280871    242.414     -0.0368856  -130.978     145.477     0.966021  0
          Wheat.Leaf.CohortMaxSize(7)           10   0.441949   501.987     0.142766    157.184      0.545013    176.986     0.296106    -101.041     122.714     0.79593   0
          Wheat.Leaf.CohortMaxSize(8)           10   0.589766   515.86      0.179194    229.582      0.575192    169.291     0.574802    1.17705      117.592     0.61861   0
          Wheat.Leaf.CohortMaxSize(9)           10   0.793068   300.515     0.327977    507.562      0.422258    241.916     0.0929616   -15.3812     161.582     0.903512  0
          Wheat.Phenology.FlagLeafDAS.Value()   255  0.974146   6.29479     0.00979673  1.35981      0.97505     8.03204     0.971245    2.92157      5.87059     0.16924   0
          Wheat.Phenology.FloweringDAS.Value()  299  0.943644   8.35638     0.00705763  1.10217      0.983658    6.98781     0.982029    0.0602007    4.93645     0.133831  0
        AcceptedStatsName=Name n Slope Intercept SEslope SEintercept R2 RMSE NSE ME MAE RSR
  Folder Replacements
    Report HarvestReport: EventNames=[Wheat].Harvesting
      VariableNames:
        [Clock].Today
        [Clock].StartDate
        [Wheat].SowingDate
        [Wheat].SowingData.Cultivar
        [Wheat].SowingDate.DayOfYear
        [IWeather].Latitude
        [IWeather].Longitude
        [IWeather].FileName
        [LocationInfo].Script.Country
        [LocationInfo].Script.State
        [LocationInfo].Script.Region
        [Wheat].AboveGround.N
        [Wheat].AboveGround.NConc
        [Wheat].AboveGround.Wt
        [Wheat].Ear.N
        [Wheat].Ear.NConc
        [Wheat].Ear.Wt
        [Wheat].Grain.N
        [Wheat].Grain.NConc
        [Wheat].Grain.Number
        [Wheat].Grain.Protein
        [Wheat].Grain.Size
        [Wheat].Grain.Wt
        [Wheat].Leaf.Dead.Wt
        [Wheat].Leaf.Dead.N
        [Wheat].Leaf.Live.N
        [Wheat].Leaf.Live.Wt
        [Wheat].Leaf.N
        [Wheat].Leaf.StemPopulation
        [Wheat].Leaf.Wt
        [Wheat].Phenology.CAMP.TSHS
        [Wheat].Phenology.CurrentStageName
        [Wheat].Phenology.EmergenceDAS
        [Wheat].Phenology.FinalLeafNumber
        [Wheat].Phenology.FlagLeafDAS
        [Wheat].Phenology.FloweringDAS
        [Wheat].Phenology.HeadingDAS
        [Wheat].Phenology.MaturityDAS
        [Wheat].Phenology.TerminalSpikeletDAS
        [Wheat].Spike.HeadNumber
        [Wheat].Spike.N
        [Wheat].Spike.Wt
        [Wheat].Stem.N
        [Wheat].Stem.NConc
        [Wheat].Stem.Wt
    Report DailyReport: EventNames=[Clock].DoReport
      VariableNames:
        [Clock].Today
        [IWeather].MeanT
        [IWeather].MeanT
        [IWeather].Radn
        [Simulation].Name
        [Soil].Water.Volumetric
        [Wheat].AboveGround.N
        [Wheat].AboveGround.Wt
        [Wheat].AboveGroundDead.N
        [Wheat].AboveGroundDead.Wt
        [Wheat].AboveGroundLive.N
        [Wheat].AboveGroundLive.Wt
        [Wheat].Ear.N
        [Wheat].Ear.NConc
        [Wheat].Ear.Wt
        [Wheat].Grain.N
        [Wheat].Grain.NConc
        [Wheat].Grain.NperKernal
        [Wheat].Grain.Number
        [Wheat].Grain.Size
        [Wheat].Grain.Wt
        [Wheat].Leaf.CoverGreen
        [Wheat].Leaf.CoverTotal
        [Wheat].Leaf.Dead.N
        [Wheat].Leaf.Dead.NConc
        [Wheat].Leaf.Dead.Wt
        [Wheat].Leaf.FinalLeafNumber
        [Wheat].Leaf.Fn
        [Wheat].Leaf.Fw
        [Wheat].Leaf.Height
        [Wheat].Leaf.LAI
        [Wheat].Leaf.Ligules
        [Wheat].Leaf.Live.N
        [Wheat].Leaf.Live.NConc
        [Wheat].Leaf.Live.Wt
        [Wheat].Leaf.MainStemPopulation
        [Wheat].Leaf.Photosynthesis.FT
        [Wheat].Leaf.SpecificArea
        [Wheat].Leaf.SpecificAreaCanopy
        [Wheat].Leaf.SpecificNitrogen
        [Wheat].Leaf.StemNumberPerPlant
        [Wheat].Leaf.StemPopulation
        [Wheat].Leaf.Tips
        [Wheat].Leaf.Tips
        [Wheat].Leaf.Transpiration
        [Wheat].Phenology.AccumulatedTT
        [Wheat].Phenology.CurrentPhase.Name
        [Wheat].Phenology.CurrentStageName
        [Wheat].Phenology.EmergenceDAS
        [Wheat].Phenology.HaunStage
        [Wheat].Phenology.Photoperiod
        [Wheat].Phenology.Phyllochron
        [Wheat].Phenology.PTQ
        [Wheat].Phenology.Stage
        [Wheat].Phenology.ThermalTime
        [Wheat].Phenology.Zadok.Stage
        [Wheat].Root.Depth
        [Wheat].Root.N
        [Wheat].Root.NConc
        [Wheat].Root.Wt
        [Wheat].SowingData.Cultivar
        [Wheat].Spike.N
        [Wheat].Spike.NConc
        [Wheat].Spike.Wt
        [Wheat].Stem.N
        [Wheat].Stem.NConc
        [Wheat].Stem.Wt
        [Wheat].StemPlusSpike.N
        [Wheat].StemPlusSpike.Wt
        [Wheat].Total.N
        [Wheat].Total.Wt
        sum([Soil].NO3.kgha)
        sum([Soil].Water.MM)
        ([Wheat].Leaf.Transpiration + [ISoilWater].Es + [MicroClimate].PrecipitationInterception)
    Manager MaxLeafSize
```csharp
using Models.Soils;
using Models.PMF.Struct;
using System;
using System.Collections.Generic;
using System.Xml.Serialization;
using Models.Core;
using Models.Interfaces;
using Models.PMF;
using Models.PMF.Organs;
using Models.Soils.Arbitrator;
using APSIM.Shared.Utilities;
using Newtonsoft.Json;



namespace Models
{
    [Serializable] 
    public class Script : Model
    {
//        [Link] private Clock Clock;
//        [Link] private Plant Wheat;
//        public  event EventHandler LeafReport;
//        [Link(Type = LinkType.Path, Path = "[Wheat].Structure")]
//        private Structure structure;
//        
//        
//        [JsonIgnore] public int LeafPosition { get; set; }
//        [JsonIgnore] public double MaxLeafSize { get; set; }
//        
//        [EventSubscribe("DoManagement")]
//        private void OnDoManagement(object sender, EventArgs e)
//        {
//            var leaf = Wheat.Leaf as Leaf;
//            if ((leaf.ExpandedCohortNo > LeafPosition) & (structure.NextLeafProportion == 1))
//            {
//                LeafPosition = (int)
//                leaf.ExpandedCohortNo;
//                MaxLeafSize = leaf.CohortSize[LeafPosition - 1];
//                LeafReport.Invoke(this, new EventArgs());
//            }
//        }
    }
}
```
    Report MaxLeafSizeReport: EventNames=//[MaxLeafSize].Script.LeafReport
      VariableNames:
        //[MaxLeafSize].Script.MaxLeafSize
        //[MaxLeafSize].Script.LeafPosition
    Manager Harvesting
```csharp
using APSIM.Core;
using Models.Soils.Nutrients;
using System;
using Models.Core;
using System.Collections.Generic;
using System.Text;
using Models.Soils;
using Models.PMF;
using Models;
using System.Xml.Serialization;
using APSIM.Shared.Utilities;
using Models.PMF.Phen;

namespace Models
{
    [Serializable] 
    public class Script : Model, IStructureDependency
    {
        [Link] private Plant Wheat;
        [Link] private Simulation sim;
        [Link] private Clock clock;
        [Link(Type = LinkType.Path, Path = "[Wheat].Phenology")]
        private Phenology phenology;
        public IStructure Structure { private get; set; }


        

        [EventSubscribe("DoManagement")]
        private void OnDoManagement(object sender, EventArgs e)
        {
            if (phenology.CurrentPhase.Name == "GrainRipening")
            {
                Wheat.Harvest();
                Wheat.EndCrop();
                Structure.Set("Clock.EndDate", clock.Today, relativeTo: sim);  
            }
        }

        [EventSubscribe("EndOfDay")]
        private void OnEndOfDay(object sender, EventArgs e)
        {
            if ((clock.Today.Equals(clock.EndDate))&&(Wheat.IsAlive))
            {
                Wheat.Harvest();
                Wheat.EndCrop();
                Structure.Set("Clock.EndDate", clock.Today, relativeTo: sim);  
            }
        }

    }
}
```
    Report SowingReport: EventNames=[Wheat].Sowing
      VariableNames:
        [Simulation].Name
        [Clock].Today
        [Wheat].SowingData.Cultivar
        [IWeather].Latitude
        [IWeather].Longitude
        [LocationInfo].Script.Country
        [LocationInfo].Script.State
        [LocationInfo].Script.Region
    Report NDVIDailyReport: EventNames=[Clock].DoReport
      VariableNames:
        [Simulation].Name
        [Clock].Today
        [Spectral].NDVI
    Plant Wheat: ResourceName=WinterCereal
      ModelOverrides (disabled): Overrides=[[Wheat].PlantType=Wheat]
      Folder Cultivars
        Folder New Zealand
          Cultivar Amarok
            Command:
              [Phenology].HeadEmergencePpSensitivity.FixedValue = 4
              [Phenology].Phyllochron.BasePhyllochron.FixedValue = 100.0
              [Phenology].PhyllochronPpSensitivity.FixedValue = 0.6
              [Phenology].CAMP.FLNparams.MinLN = 8
              [Phenology].CAMP.FLNparams.PpLN = 4
              [Phenology].CAMP.FLNparams.VrnLN = 5
              [Phenology].CAMP.FLNparams.VxPLN = 2
              [Phenology].HeadEmergenceLongDayBase.FixedValue = 90
              [Phenology].CAMP.EnvData.VrnTreatTemp = 6
              [Phenology].CAMP.EnvData.VrnTreatDuration = 60
          Cultivar BattenWinter
            Command:
              [Phenology].HeadEmergencePpSensitivity.FixedValue = 3.8423212708469157
              [Phenology].Phyllochron.BasePhyllochron.FixedValue = 100.0
              [Phenology].PhyllochronPpSensitivity.FixedValue = 0.6
              [Phenology].CAMP.FLNparams.MinLN = 8.15781757053076
              [Phenology].CAMP.FLNparams.PpLN = 3.6074343511019427
              [Phenology].CAMP.FLNparams.VrnLN = 3.096547775405041
              [Phenology].CAMP.FLNparams.VxPLN = 6.987099381114945
              [Phenology].HeadEmergenceLongDayBase.FixedValue = 266.0
              [Phenology].CAMP.EnvData.VrnTreatTemp = 6
              [Phenology].CAMP.EnvData.VrnTreatDuration = 60
          Cultivar BattenSpring
            Command:
              [Phenology].HeadEmergencePpSensitivity.FixedValue = 0.006727231500210627
              [Phenology].Phyllochron.BasePhyllochron.FixedValue = 100.0
              [Phenology].PhyllochronPpSensitivity.FixedValue = 0.6
              [Phenology].CAMP.FLNparams.MinLN = 8.25262475446035
              [Phenology].CAMP.FLNparams.PpLN = 7.552256317837019
              [Phenology].CAMP.FLNparams.VrnLN = 0.18541366678983096
              [Phenology].CAMP.FLNparams.VxPLN = -0.03479769923441367
              [Phenology].HeadEmergenceLongDayBase.FixedValue = 107.0
              [Phenology].CAMP.EnvData.VrnTreatTemp = 6
              [Phenology].CAMP.EnvData.VrnTreatDuration = 60
          Cultivar Claire
            Command:
              [Phenology].HeadEmergencePpSensitivity.FixedValue = 2
              [Phenology].Phyllochron.BasePhyllochron.FixedValue = 100
              [Phenology].CAMP.FLNparams.MinLN = 9
              [Phenology].CAMP.FLNparams.PpLN = 5
              [Phenology].CAMP.FLNparams.VrnLN = 4
              [Phenology].CAMP.FLNparams.VxPLN = 4
              [Phenology].HeadEmergenceLongDayBase.FixedValue = 150
              [Phenology].CAMP.EnvData.VrnTreatTemp = 6
              [Phenology].CAMP.EnvData.VrnTreatDuration = 60
            Alias Savannah
            Alias Atlanta
            Alias Istabraq
          Cultivar Conquest
            Command:
              [Phenology].Phyllochron.BasePhyllochron.FixedValue = 100
              [Phenology].CAMP.FLNparams.MinLN = 7.5
              [Phenology].CAMP.FLNparams.PpLN = 2.5
              [Phenology].CAMP.FLNparams.VrnLN = 0.0
              [Phenology].CAMP.FLNparams.VxPLN = 0.0
              [Phenology].HeadEmergenceLongDayBase.FixedValue = 100
              [Phenology].HeadEmergencePpSensitivity.FixedValue = 1.0
              [Phenology].CAMP.EnvData.VrnTreatTemp = 6
              [Phenology].CAMP.EnvData.VrnTreatDuration = 60
          Cultivar CRWT153
            Command:
              [Phenology].Phyllochron.BasePhyllochron.FixedValue = 100.0
              [Phenology].PhyllochronPpSensitivity.FixedValue = 0.6
              [Phenology].CAMP.FLNparams.MinLN = 14.27272727272727
              [Phenology].CAMP.FLNparams.PpLN = -0.028282828282829797
              [Phenology].CAMP.FLNparams.VrnLN = 2.6000000000000014
              [Phenology].CAMP.FLNparams.VxPLN = -1.2477272727272712
              [Phenology].HeadEmergenceLongDayBase.FixedValue = 200
              [Phenology].HeadEmergencePpSensitivity.FixedValue = 2.3
              [Phenology].CAMP.EnvData.VrnTreatTemp = 6
              [Phenology].CAMP.EnvData.VrnTreatDuration = 60
          Cultivar Discovery
            Command:
              [Phenology].Phyllochron.BasePhyllochron.FixedValue = 80
              [Phenology].CAMP.FLNparams.MinLN = 9.0
              [Phenology].CAMP.FLNparams.PpLN = 0.0
              [Phenology].CAMP.FLNparams.VrnLN = 0.0
              [Phenology].CAMP.FLNparams.VxPLN = 0.0
              [Phenology].HeadEmergenceLongDayBase.FixedValue = 100
              [Phenology].HeadEmergencePpSensitivity.FixedValue = 1.0
              [Phenology].CAMP.EnvData.VrnTreatTemp = 6
              [Phenology].CAMP.EnvData.VrnTreatDuration = 60
            Memo
              This is a spring wheat with a high grain number and later tillering
          Cultivar Exceed
            Command:
              [Phenology].CAMP.FLNparams.MinLN = 9
              [Phenology].CAMP.FLNparams.PpLN = 3.0
              [Phenology].CAMP.FLNparams.VrnLN = 7
              [Phenology].CAMP.FLNparams.VxPLN = 0.0
          Cultivar Option
            Command:
              [Phenology].CAMP.FLNparams.MinLN = 9
              [Phenology].CAMP.FLNparams.PpLN = 3.0
              [Phenology].CAMP.FLNparams.VrnLN = 7
              [Phenology].CAMP.FLNparams.VxPLN = 0.0
          Cultivar Otane
            Command:
              [Phenology].HeadEmergencePpSensitivity.FixedValue = 2
              [Phenology].Phyllochron.BasePhyllochron.FixedValue = 100.0
              [Phenology].PhyllochronPpSensitivity.FixedValue = 0.6
              [Phenology].CAMP.FLNparams.MinLN = 7
              [Phenology].CAMP.FLNparams.PpLN = 4
              [Phenology].CAMP.FLNparams.VrnLN = 0
              [Phenology].CAMP.FLNparams.VxPLN = 0
              [Phenology].HeadEmergenceLongDayBase.FixedValue = 150
              [Phenology].CAMP.EnvData.VrnTreatTemp = 6
              [Phenology].CAMP.EnvData.VrnTreatDuration = 60
          Cultivar Regency
            Command:
              [Phenology].CAMP.FLNparams.MinLN = 9
              [Phenology].CAMP.FLNparams.PpLN = 3.0
              [Phenology].CAMP.FLNparams.VrnLN = 7
              [Phenology].CAMP.FLNparams.VxPLN = 0.0
          Cultivar Robigus
            Command:
              [Phenology].CAMP.FLNparams.MinLN = 9
              [Phenology].CAMP.FLNparams.PpLN = 3.0
              [Phenology].CAMP.FLNparams.VrnLN = 7
              [Phenology].CAMP.FLNparams.VxPLN = 0.0
          Cultivar Rongotea
            Command:
              [Phenology].HeadEmergencePpSensitivity.FixedValue = 3.92123686073301
              [Phenology].Phyllochron.BasePhyllochron.FixedValue = 100
              [Phenology].CAMP.FLNparams.MinLN = 7.73858795204672
              [Phenology].CAMP.FLNparams.PpLN = 10.6418278399273
              [Phenology].CAMP.FLNparams.VrnLN = 0.307012432477857
              [Phenology].CAMP.FLNparams.VxPLN = -0.256935248010825
              [Phenology].HeadEmergenceLongDayBase.FixedValue = 168
              [Phenology].CAMP.EnvData.VrnTreatTemp = 6
              [Phenology].CAMP.EnvData.VrnTreatDuration = 60
          Cultivar Sage
            Command:
              [Phenology].CAMP.FLNparams.MinLN = 9
              [Phenology].CAMP.FLNparams.PpLN = 3.0
              [Phenology].CAMP.FLNparams.VrnLN = 7
              [Phenology].CAMP.FLNparams.VxPLN = 0.0
          Cultivar Saracen
            Command:
              [Phenology].Phyllochron.BasePhyllochron.FixedValue = 100.0
              [Phenology].PhyllochronPpSensitivity.FixedValue = 0.6
              [Phenology].CAMP.FLNparams.MinLN = 8
              [Phenology].CAMP.FLNparams.PpLN = 2
              [Phenology].CAMP.FLNparams.VrnLN = 1
              [Phenology].CAMP.FLNparams.VxPLN = 2
              [Phenology].HeadEmergenceLongDayBase.FixedValue = 170
              [Phenology].HeadEmergencePpSensitivity.FixedValue = 4
              [Phenology].CAMP.EnvData.VrnTreatTemp = 6
              [Phenology].CAMP.EnvData.VrnTreatDuration = 60
          Cultivar Solstice
            Command:
              [Phenology].CAMP.FLNparams.MinLN = 9
              [Phenology].CAMP.FLNparams.PpLN = 3.0
              [Phenology].CAMP.FLNparams.VrnLN = 7
              [Phenology].CAMP.FLNparams.VxPLN = 0.0
          Cultivar Tribute
            Command:
              [Phenology].CAMP.FLNparams.MinLN = 9
              [Phenology].CAMP.FLNparams.PpLN = 3.0
              [Phenology].CAMP.FLNparams.VrnLN = 7
              [Phenology].CAMP.FLNparams.VxPLN = 0.0
          Cultivar Wakanui
            Command:
              [Phenology].HeadEmergenceLongDayBase.FixedValue = 50
              [Phenology].Phyllochron.BasePhyllochron.FixedValue = 105.0
              [Phenology].PhyllochronPpSensitivity.FixedValue = 0.33
              [Phenology].CAMP.FLNparams.MinLN = 10
              [Phenology].CAMP.FLNparams.PpLN = 12
              [Phenology].CAMP.FLNparams.VrnLN = 12
              [Phenology].CAMP.FLNparams.VxPLN = 4
              [Phenology].HeadEmergencePpSensitivity.FixedValue = 8
              [Phenology].CAMP.EnvData.VrnTreatTemp = 6
              [Phenology].CAMP.EnvData.VrnTreatDuration = 60
          Cultivar Voltron
            Command:
              [Phenology].HeadEmergenceLongDayBase.FixedValue = 50
              [Phenology].Phyllochron.BasePhyllochron.FixedValue = 105.0
              [Phenology].PhyllochronPpSensitivity.FixedValue = 0.33
              [Phenology].CAMP.FLNparams.MinLN = 10
              [Phenology].CAMP.FLNparams.PpLN = 6
              [Phenology].CAMP.FLNparams.VrnLN = 4
              [Phenology].CAMP.FLNparams.VxPLN = 0
              [Phenology].HeadEmergencePpSensitivity.FixedValue = 8
              [Phenology].CAMP.EnvData.VrnTreatTemp = 6
              [Phenology].CAMP.EnvData.VrnTreatDuration = 60
              [Phenology].GrainFilling.Target.FixedValue = 700
          Cultivar Sorrial: same as Replacements.Wheat.Cultivars.New Zealand.Voltron
          Cultivar Cesario
            Command:
              [Phenology].HeadEmergenceLongDayBase.FixedValue = 50
              [Phenology].Phyllochron.BasePhyllochron.FixedValue = 105.0
              [Phenology].PhyllochronPpSensitivity.FixedValue = 0.33
              [Phenology].CAMP.FLNparams.MinLN = 8
              [Phenology].CAMP.FLNparams.PpLN = 12
              [Phenology].CAMP.FLNparams.VrnLN = 12
              [Phenology].CAMP.FLNparams.VxPLN = 4
              [Phenology].HeadEmergencePpSensitivity.FixedValue = 8
              [Phenology].CAMP.EnvData.VrnTreatTemp = 6
              [Phenology].CAMP.EnvData.VrnTreatDuration = 60
              [Phenology].GrainFilling.Target.FixedValue = 700
          Cultivar Stockade
            Command:
              [Phenology].HeadEmergenceLongDayBase.FixedValue = 50
              [Phenology].Phyllochron.BasePhyllochron.FixedValue = 105.0
              [Phenology].PhyllochronPpSensitivity.FixedValue = 0.33
              [Phenology].CAMP.FLNparams.MinLN = 8
              [Phenology].CAMP.FLNparams.PpLN = 12
              [Phenology].CAMP.FLNparams.VrnLN = 12
              [Phenology].CAMP.FLNparams.VxPLN = 4
              [Phenology].HeadEmergencePpSensitivity.FixedValue = 8
              [Phenology].CAMP.EnvData.VrnTreatTemp = 6
              [Phenology].CAMP.EnvData.VrnTreatDuration = 60
          Cultivar CRW247
            Command:
              [Phenology].HeadEmergenceLongDayBase.FixedValue = 50
              [Phenology].Phyllochron.BasePhyllochron.FixedValue = 105.0
              [Phenology].PhyllochronPpSensitivity.FixedValue = 0.33
              [Phenology].CAMP.FLNparams.MinLN = 10
              [Phenology].CAMP.FLNparams.PpLN = 8
              [Phenology].CAMP.FLNparams.VrnLN = 0
              [Phenology].CAMP.FLNparams.VxPLN = 0
              [Phenology].HeadEmergencePpSensitivity.FixedValue = 8
              [Phenology].CAMP.EnvData.VrnTreatTemp = 6
              [Phenology].CAMP.EnvData.VrnTreatDuration = 60
          Cultivar Zyatt: same as Replacements.Wheat.Cultivars.New Zealand.Wakanui
          Cultivar Graham
            Command:
              [Phenology].HeadEmergenceLongDayBase.FixedValue = 50
              [Phenology].Phyllochron.BasePhyllochron.FixedValue = 105.0
              [Phenology].PhyllochronPpSensitivity.FixedValue = 0.33
              [Phenology].CAMP.FLNparams.MinLN = 10
              [Phenology].CAMP.FLNparams.PpLN = 12
              [Phenology].CAMP.FLNparams.VrnLN = 12
              [Phenology].CAMP.FLNparams.VxPLN = 4
              [Phenology].HeadEmergencePpSensitivity.FixedValue = 8
              [Phenology].CAMP.EnvData.VrnTreatTemp = 6
              [Phenology].CAMP.EnvData.VrnTreatDuration = 60
              [Phenology].GrainFilling.Target.FixedValue = 700
          Cultivar Kerrin: same as Replacements.Wheat.Cultivars.New Zealand.Graham
        Folder Australia
          Cultivar Adv08_0008
            Command:
              [Phenology].Phyllochron.BasePhyllochron.FixedValue = 107.385378970476
              [Phenology].PhyllochronPpSensitivity.FixedValue = 0.246728222459184
              [Phenology].CAMP.EnvData.VrnTreatTemp = 5.8
              [Phenology].CAMP.EnvData.VrnTreatDuration = 60
              [Phenology].CAMP.FLNparams.MinLN = 8
              [Phenology].CAMP.FLNparams.VrnLN = 5
              [Phenology].CAMP.FLNparams.PpLN = 1
              [Phenology].CAMP.FLNparams.VxPLN = 0
              [Phenology].HeadEmergenceLongDayBase.FixedValue = 290
              [Phenology].HeadEmergencePpSensitivity.FixedValue = 0
          Cultivar Axe
            Command:
              [Phenology].HeadEmergencePpSensitivity.FixedValue = 1
              [Phenology].Phyllochron.BasePhyllochron.FixedValue = 92.9812317822162
              [Phenology].PhyllochronPpSensitivity.FixedValue = 0.268590208069814
              [Phenology].CAMP.FLNparams.MinLN = 7
              [Phenology].CAMP.FLNparams.PpLN = 2
              [Phenology].CAMP.FLNparams.VrnLN = 0
              [Phenology].CAMP.FLNparams.VxPLN = 0
              [Phenology].CAMP.EnvData.VrnTreatTemp = 5.8
              [Phenology].CAMP.EnvData.VrnTreatDuration = 60
              [Phenology].HeadEmergenceLongDayBase.FixedValue = 130
          Cultivar Batavia
            Command:
              [Phenology].Phyllochron.BasePhyllochron.FixedValue = 100
              [Phenology].CAMP.FLNparams.MinLN = 5
              [Phenology].CAMP.FLNparams.PpLN = 9
              [Phenology].CAMP.FLNparams.VrnLN = 0
              [Phenology].CAMP.FLNparams.VxPLN = 6
              [Phenology].HeadEmergenceLongDayBase.FixedValue = 130
              [Phenology].HeadEmergencePpSensitivity.FixedValue = 6
          Cultivar Beaufort
            Command:
              [Phenology].Phyllochron.BasePhyllochron.FixedValue = 102.321288321408
              [Phenology].PhyllochronPpSensitivity.FixedValue = 0.254667061341894
              [Phenology].CAMP.FLNparams.MinLN = 8
              [Phenology].CAMP.FLNparams.PpLN = 3
              [Phenology].CAMP.FLNparams.VrnLN = 3
              [Phenology].CAMP.FLNparams.VxPLN = 3
              [Phenology].CAMP.EnvData.VrnTreatTemp = 6
              [Phenology].CAMP.EnvData.VrnTreatDuration = 60
              [Phenology].HeadEmergenceLongDayBase.FixedValue = 170
              [Phenology].HeadEmergencePpSensitivity.FixedValue = 0
          Cultivar Bennett
            Command:
              [Phenology].Phyllochron.BasePhyllochron.FixedValue = 106.269847259128
              [Phenology].PhyllochronPpSensitivity.FixedValue = 0.221423439420895
              [Phenology].CAMP.FLNparams.MinLN = 8
              [Phenology].CAMP.FLNparams.PpLN = 1
              [Phenology].CAMP.FLNparams.VrnLN = 6
              [Phenology].CAMP.FLNparams.VxPLN = 1
              [Phenology].CAMP.EnvData.VrnTreatTemp = 5.8
              [Phenology].CAMP.EnvData.VrnTreatDuration = 60
              [Phenology].HeadEmergenceLongDayBase.FixedValue = 230
              [Phenology].HeadEmergencePpSensitivity.FixedValue = 2
          Cultivar Bolac
            Command:
              [Phenology].Phyllochron.BasePhyllochron.FixedValue = 99.3767047504637
              [Phenology].PhyllochronPpSensitivity.FixedValue = 0.204801292585874
              [Phenology].CAMP.FLNparams.MinLN = 7
              [Phenology].CAMP.FLNparams.PpLN = 5
              [Phenology].CAMP.FLNparams.VrnLN = 1
              [Phenology].CAMP.FLNparams.VxPLN = 0
              [Phenology].CAMP.EnvData.VrnTreatTemp = 5.8
              [Phenology].CAMP.EnvData.VrnTreatDuration = 60
              [Phenology].HeadEmergenceLongDayBase.FixedValue = 170
              [Phenology].HeadEmergencePpSensitivity.FixedValue = 1
          Cultivar Braewood
            Command:
              [Phenology].Phyllochron.BasePhyllochron.FixedValue = 92.1177406284002
              [Phenology].PhyllochronPpSensitivity.FixedValue = 0.269041869726177
              [Phenology].CAMP.FLNparams.MinLN = 8
              [Phenology].CAMP.FLNparams.PpLN = 2
              [Phenology].CAMP.FLNparams.VrnLN = 3
              [Phenology].CAMP.FLNparams.VxPLN = -3
              [Phenology].CAMP.EnvData.VrnTreatTemp = 5.8
              [Phenology].CAMP.EnvData.VrnTreatDuration = 60
              [Phenology].HeadEmergenceLongDayBase.FixedValue = 150
              [Phenology].HeadEmergencePpSensitivity.FixedValue = 2
          Cultivar Calingiri
            Command:
              [Phenology].Phyllochron.BasePhyllochron.FixedValue = 112.665706012865
              [Phenology].PhyllochronPpSensitivity.FixedValue = 0.16928704526596
              [Phenology].CAMP.FLNparams.MinLN = 7
              [Phenology].CAMP.FLNparams.PpLN = 2
              [Phenology].CAMP.FLNparams.VrnLN = 2
              [Phenology].CAMP.FLNparams.VxPLN = -1
              [Phenology].CAMP.EnvData.VrnTreatTemp = 5.8
              [Phenology].CAMP.EnvData.VrnTreatDuration = 60
              [Phenology].HeadEmergenceLongDayBase.FixedValue = 50
              [Phenology].HeadEmergencePpSensitivity.FixedValue = 4
          Cultivar Catalina
            Command:
              [Phenology].Phyllochron.BasePhyllochron.FixedValue = 93.1373432728081
              [Phenology].PhyllochronPpSensitivity.FixedValue = 0.403019826488085
              [Phenology].CAMP.FLNparams.MinLN = 7
              [Phenology].CAMP.FLNparams.PpLN = 1
              [Phenology].CAMP.FLNparams.VrnLN = 0
              [Phenology].CAMP.FLNparams.VxPLN = 0
              [Phenology].CAMP.EnvData.VrnTreatTemp = 5.8
              [Phenology].CAMP.EnvData.VrnTreatDuration = 60
              [Phenology].HeadEmergenceLongDayBase.FixedValue = 230
              [Phenology].HeadEmergencePpSensitivity.FixedValue = 1
          Cultivar Condo
            Command:
              [Phenology].Phyllochron.BasePhyllochron.FixedValue = 94.4306598856844
              [Phenology].PhyllochronPpSensitivity.FixedValue = 0.179475706868039
              [Phenology].CAMP.FLNparams.MinLN = 7
              [Phenology].CAMP.FLNparams.PpLN = 2
              [Phenology].CAMP.FLNparams.VrnLN = 3
              [Phenology].CAMP.FLNparams.VxPLN = 0
              [Phenology].CAMP.EnvData.VrnTreatTemp = 5.8
              [Phenology].CAMP.EnvData.VrnTreatDuration = 60
              [Phenology].HeadEmergenceLongDayBase.FixedValue = 190
              [Phenology].HeadEmergencePpSensitivity.FixedValue = 0
          Cultivar Corack
            Command:
              // Phenology parameters taken from Harto as it is near isogenic
              [Phenology].Phyllochron.BasePhyllochron.FixedValue = 100. //107.48
              [Grain].MaximumPotentialGrainSize.FixedValue = 0.041
              [Grain].NumberFunction.GrainNumber.GrainsPerGramOfStem.FixedValue = 24
              [Phenology].PhyllochronPpSensitivity.FixedValue = 0.247
              [Phenology].CAMP.FLNparams.MinLN = 7
              [Phenology].CAMP.FLNparams.PpLN = 4
              [Phenology].CAMP.FLNparams.VrnLN = 2
              [Phenology].CAMP.FLNparams.VxPLN = 0
              [Phenology].HeadEmergenceLongDayBase.FixedValue = 50
              [Phenology].HeadEmergencePpSensitivity.FixedValue = 5
              [Phenology].CAMP.EnvData.VrnTreatTemp = 6
              [Phenology].CAMP.EnvData.VrnTreatDuration = 60
          Cultivar Crusader
            Command:
              [Phenology].Phyllochron.BasePhyllochron.FixedValue = 100.832025052954
              [Phenology].PhyllochronPpSensitivity.FixedValue = 0.199967770650946
              [Phenology].CAMP.FLNparams.MinLN = 6
              [Phenology].CAMP.FLNparams.PpLN = 5
              [Phenology].CAMP.FLNparams.VrnLN = 3
              [Phenology].CAMP.FLNparams.VxPLN = 0
              [Phenology].CAMP.EnvData.VrnTreatTemp = 6
              [Phenology].CAMP.EnvData.VrnTreatDuration = 60
              [Phenology].HeadEmergenceLongDayBase.FixedValue = 230
              [Phenology].HeadEmergencePpSensitivity.FixedValue = 0
          Cultivar Cunningham
            Command:
              [Phenology].Phyllochron.BasePhyllochron.FixedValue = 100
              [Phenology].CAMP.FLNparams.MinLN = 7
              [Phenology].CAMP.FLNparams.PpLN = 12
              [Phenology].CAMP.FLNparams.VrnLN = 9
              [Phenology].CAMP.FLNparams.VxPLN = -9
              [Phenology].HeadEmergenceLongDayBase.FixedValue = 50
              [Phenology].HeadEmergencePpSensitivity.FixedValue = 0
          Cultivar Cutlass
            Command:
              [Phenology].Phyllochron.BasePhyllochron.FixedValue = 95.8008034182983
              [Phenology].PhyllochronPpSensitivity.FixedValue = 0.352406544577556
              [Phenology].CAMP.FLNparams.MinLN = 7
              [Phenology].CAMP.FLNparams.PpLN = 5
              [Phenology].CAMP.FLNparams.VrnLN = 1
              [Phenology].CAMP.FLNparams.VxPLN = 2
              [Phenology].CAMP.EnvData.VrnTreatTemp = 5.8
              [Phenology].CAMP.EnvData.VrnTreatDuration = 60
              [Phenology].HeadEmergenceLongDayBase.FixedValue = 130
              [Phenology].HeadEmergencePpSensitivity.FixedValue = 2
          Cultivar Derrimut
            Command:
              [Phenology].Phyllochron.BasePhyllochron.FixedValue = 94.7552823110091
              [Phenology].PhyllochronPpSensitivity.FixedValue = 0.263180943521024
              [Phenology].CAMP.FLNparams.MinLN = 7
              [Phenology].CAMP.FLNparams.PpLN = 3
              [Phenology].CAMP.FLNparams.VrnLN = 2
              [Phenology].CAMP.FLNparams.VxPLN = -2
              [Phenology].CAMP.EnvData.VrnTreatTemp = 5.8
              [Phenology].CAMP.EnvData.VrnTreatDuration = 60
              [Phenology].HeadEmergenceLongDayBase.FixedValue = 150
              [Phenology].HeadEmergencePpSensitivity.FixedValue = 1
          Cultivar Eaglehawk
            Command:
              [Phenology].Phyllochron.BasePhyllochron.FixedValue = 122.758992485634
              [Phenology].PhyllochronPpSensitivity.FixedValue = 0.119042603665788
              [Phenology].CAMP.FLNparams.MinLN = 6
              [Phenology].CAMP.FLNparams.PpLN = 3
              [Phenology].CAMP.FLNparams.VrnLN = 1
              [Phenology].CAMP.FLNparams.VxPLN = 3
              [Phenology].CAMP.EnvData.VrnTreatTemp = 5.8
              [Phenology].CAMP.EnvData.VrnTreatDuration = 60
              [Phenology].HeadEmergenceLongDayBase.FixedValue = 190
              [Phenology].HeadEmergencePpSensitivity.FixedValue = 4
          Cultivar Ellison
            Command:
              [Phenology].Phyllochron.BasePhyllochron.FixedValue = 110.512287746208
              [Phenology].PhyllochronPpSensitivity.FixedValue = 0.282156394448543
              [Phenology].CAMP.FLNparams.MinLN = 6
              [Phenology].CAMP.FLNparams.PpLN = 4
              [Phenology].CAMP.FLNparams.VrnLN = 1
              [Phenology].CAMP.FLNparams.VxPLN = 2
              [Phenology].CAMP.EnvData.VrnTreatTemp = 5.8
              [Phenology].CAMP.EnvData.VrnTreatDuration = 60
              [Phenology].HeadEmergenceLongDayBase.FixedValue = 130
              [Phenology].HeadEmergencePpSensitivity.FixedValue = 4
          Cultivar Egret
            Command:
              [Phenology].Phyllochron.BasePhyllochron.FixedValue =80
              [Phenology].CAMP.FLNparams.MinLN = 8
              [Phenology].CAMP.FLNparams.PpLN = 9
              [Phenology].CAMP.FLNparams.VrnLN = 8
              [Phenology].CAMP.FLNparams.VxPLN = -8
              [Phenology].HeadEmergenceLongDayBase.FixedValue = 110
              [Phenology].HeadEmergencePpSensitivity.FixedValue = 0
              [Phenology].CAMP.EnvData.VrnTreatTemp = 6
              [Phenology].CAMP.EnvData.VrnTreatDuration = 60
          Cultivar Emu_Rock
            Command:
              [Phenology].Phyllochron.BasePhyllochron.FixedValue = 94.7698873180009
              [Phenology].PhyllochronPpSensitivity.FixedValue = 0.358007951256312
              [Phenology].CAMP.FLNparams.MinLN = 6
              [Phenology].CAMP.FLNparams.PpLN = 1
              [Phenology].CAMP.FLNparams.VrnLN = 1
              [Phenology].CAMP.FLNparams.VxPLN = -1
              [Phenology].CAMP.EnvData.VrnTreatTemp = 5.8
              [Phenology].CAMP.EnvData.VrnTreatDuration = 60
              [Phenology].HeadEmergenceLongDayBase.FixedValue = 183.0
              [Phenology].HeadEmergencePpSensitivity.FixedValue = 1.7962741039794823
          Cultivar Forrest
            Command:
              [Phenology].Phyllochron.BasePhyllochron.FixedValue = 99.8910902837222
              [Phenology].PhyllochronPpSensitivity.FixedValue = 0.417874283738016
              [Phenology].CAMP.FLNparams.MinLN = 6
              [Phenology].CAMP.FLNparams.PpLN = 5
              [Phenology].CAMP.FLNparams.VrnLN = 2
              [Phenology].CAMP.FLNparams.VxPLN = 1
              [Phenology].CAMP.EnvData.VrnTreatTemp = 5.8
              [Phenology].CAMP.EnvData.VrnTreatDuration = 60
              [Phenology].HeadEmergenceLongDayBase.FixedValue = 370
              [Phenology].HeadEmergencePpSensitivity.FixedValue = 1
          Cultivar Gregory
            Command:
              [Phenology].Phyllochron.BasePhyllochron.FixedValue = 96.2227321902995
              [Phenology].PhyllochronPpSensitivity.FixedValue = 0.199981872553676
              [Phenology].CAMP.FLNparams.MinLN = 8
              [Phenology].CAMP.FLNparams.PpLN = 2
              [Phenology].CAMP.FLNparams.VrnLN = 4
              [Phenology].CAMP.FLNparams.VxPLN = -3
              [Phenology].CAMP.EnvData.VrnTreatTemp = 6
              [Phenology].CAMP.EnvData.VrnTreatDuration = 60
              [Phenology].HeadEmergenceLongDayBase.FixedValue = 110
              [Phenology].HeadEmergencePpSensitivity.FixedValue = 1
              [Grain].MaximumPotentialGrainSize.FixedValue = 0.041
              [Grain].NumberFunction.GrainNumber.GrainsPerGramOfStem.FixedValue = 22
          Cultivar Gamenya
            Command:
              [Phenology].Phyllochron.BasePhyllochron.FixedValue = 100
              [Phenology].PhyllochronPpSensitivity.FixedValue = 0.349562436956343
              [Phenology].CAMP.FLNparams.MinLN = 8
              [Phenology].CAMP.FLNparams.PpLN = 3
              [Phenology].CAMP.FLNparams.VrnLN = 0.5
              [Phenology].CAMP.FLNparams.VxPLN = 0
              [Phenology].CAMP.EnvData.VrnTreatTemp = 6
              [Phenology].CAMP.EnvData.VrnTreatDuration = 60
              [Phenology].HeadEmergenceLongDayBase.FixedValue = 50
              [Phenology].HeadEmergencePpSensitivity.FixedValue = 4
          Cultivar Gauntlet
            Command:
              [Phenology].Phyllochron.BasePhyllochron.FixedValue = 91.4777217640106
              [Phenology].PhyllochronPpSensitivity.FixedValue = 0.28135751778138
              [Phenology].CAMP.FLNparams.MinLN = 7
              [Phenology].CAMP.FLNparams.PpLN = 2
              [Phenology].CAMP.FLNparams.VrnLN = 4
              [Phenology].CAMP.FLNparams.VxPLN = -4
              [Phenology].CAMP.EnvData.VrnTreatTemp = 5.8
              [Phenology].CAMP.EnvData.VrnTreatDuration = 60
              [Phenology].HeadEmergenceLongDayBase.FixedValue = 230
              [Phenology].HeadEmergencePpSensitivity.FixedValue = 1
          Cultivar Gladius
            Command:
              [Phenology].Phyllochron.BasePhyllochron.FixedValue = 100
              [Phenology].CAMP.FLNparams.MinLN = 6
              [Phenology].CAMP.FLNparams.PpLN = 5.0
              [Phenology].CAMP.FLNparams.VrnLN = 0
              [Phenology].CAMP.FLNparams.VxPLN = 0.0
          Cultivar Grenade
            Command:
              [Phenology].Phyllochron.BasePhyllochron.FixedValue = 96.8120116390919
              [Phenology].PhyllochronPpSensitivity.FixedValue = 0.3478103654812
              [Phenology].CAMP.FLNparams.MinLN = 7
              [Phenology].CAMP.FLNparams.PpLN = 3
              [Phenology].CAMP.FLNparams.VrnLN = 1
              [Phenology].CAMP.FLNparams.VxPLN = 0
              [Phenology].CAMP.EnvData.VrnTreatTemp = 5.8
              [Phenology].CAMP.EnvData.VrnTreatDuration = 60
              [Phenology].HeadEmergenceLongDayBase.FixedValue = 230
              [Phenology].HeadEmergencePpSensitivity.FixedValue = 0
          Cultivar Gutha
            Command:
              [Phenology].Phyllochron.BasePhyllochron.FixedValue = 107
              [Phenology].PhyllochronPpSensitivity.FixedValue = 0.247088996399892
              [Grain].NumberFunction.GrainNumber.GrainsPerGramOfStem.FixedValue = 17
              [Phenology].CAMP.EnvData.VrnTreatTemp = 5.8
              [Phenology].CAMP.EnvData.VrnTreatDuration = 60
              [Phenology].CAMP.FLNparams.MinLN = 7
              [Phenology].CAMP.FLNparams.PpLN = 2
              [Phenology].CAMP.FLNparams.VrnLN = 1
              [Phenology].CAMP.FLNparams.VxPLN = 0
              [Phenology].HeadEmergenceLongDayBase.FixedValue = 50
              [Phenology].HeadEmergencePpSensitivity.FixedValue = 5
          Cultivar H45
            Command:
              [Phenology].Phyllochron.BasePhyllochron.FixedValue = 85.6989214218668
              [Grain].NumberFunction.GrainNumber.GrainsPerGramOfStem.FixedValue = 20
              [Phenology].PhyllochronPpSensitivity.FixedValue = 0.349562436956343
              [Phenology].CAMP.FLNparams.MinLN = 8
              [Phenology].CAMP.FLNparams.PpLN = 3
              [Phenology].CAMP.FLNparams.VrnLN = 0
              [Phenology].CAMP.FLNparams.VxPLN = 0
              [Phenology].CAMP.EnvData.VrnTreatTemp = 6
              [Phenology].CAMP.EnvData.VrnTreatDuration = 60
              [Phenology].HeadEmergenceLongDayBase.FixedValue = 50
              [Phenology].HeadEmergencePpSensitivity.FixedValue = 4
          Cultivar H46
            Command:
              [Phenology].Phyllochron.BasePhyllochron.FixedValue = 100
              [Phenology].CAMP.FLNparams.MinLN = 8
              [Phenology].CAMP.FLNparams.PpLN = 4.0
              [Phenology].CAMP.FLNparams.VrnLN = 0
              [Phenology].CAMP.FLNparams.VxPLN = 0.0
          Cultivar Hartog
            Command:
              [Phenology].Phyllochron.BasePhyllochron.FixedValue = 100. //107.48
              //[Leaf].TilleringRate.Vegetative.StressedRate.PotentialtilleringRate.GenotypeTilleringTendency.FixedValue = 1.
              //[Leaf].TilleringRate.Vegetative.StressedRate.Stresses.CoverEffect.XYPairs.X=0,0.2,0.7,1
              //[Leaf].TilleringRate.Vegetative.StressedRate.Stresses.CoverEffect.XYPairs.X=1.0,1.0,1,1
              [Grain].MaximumPotentialGrainSize.FixedValue = 0.041
              [Grain].NumberFunction.GrainNumber.GrainsPerGramOfStem.FixedValue = 22
              [Phenology].PhyllochronPpSensitivity.FixedValue = 0.247
              [Phenology].CAMP.FLNparams.MinLN = 7
              [Phenology].CAMP.FLNparams.PpLN = 4
              [Phenology].CAMP.FLNparams.VrnLN = 2
              [Phenology].CAMP.FLNparams.VxPLN = 0
              [Phenology].HeadEmergenceLongDayBase.FixedValue = 50
              [Phenology].HeadEmergencePpSensitivity.FixedValue = 5
              [Phenology].CAMP.EnvData.VrnTreatTemp = 6
              [Phenology].CAMP.EnvData.VrnTreatDuration = 60
          Cultivar Hume
            Command:
              [Phenology].Phyllochron.BasePhyllochron.FixedValue = 86.6877539944917
              [Phenology].PhyllochronPpSensitivity.FixedValue = 0.340327517277635
              [Phenology].CAMP.FLNparams.MinLN = 7
              [Phenology].CAMP.FLNparams.PpLN = 3
              [Phenology].CAMP.FLNparams.VrnLN = 1
              [Phenology].CAMP.FLNparams.VxPLN = -1
              [Phenology].CAMP.EnvData.VrnTreatTemp = 5.8
              [Phenology].CAMP.EnvData.VrnTreatDuration = 60
              [Phenology].HeadEmergenceLongDayBase.FixedValue = 190
              [Phenology].HeadEmergencePpSensitivity.FixedValue = 1
          Cultivar Illabo
            Command:
              [Phenology].Phyllochron.BasePhyllochron.FixedValue = 100.550798402656
              [Phenology].PhyllochronPpSensitivity.FixedValue = 0.238435422022958
              [Phenology].CAMP.EnvData.VrnTreatTemp = 5.8
              [Phenology].CAMP.EnvData.VrnTreatDuration = 60
              [Phenology].CAMP.FLNparams.MinLN = 8
              [Phenology].CAMP.FLNparams.VrnLN = 7
              [Phenology].CAMP.FLNparams.PpLN = 1
              [Phenology].CAMP.FLNparams.VxPLN = -1
              [Phenology].HeadEmergenceLongDayBase.FixedValue = 110
              [Phenology].HeadEmergencePpSensitivity.FixedValue = 0
          Cultivar Janz
            Command:
              [Phenology].Phyllochron.BasePhyllochron.FixedValue = 91.4460925764448
              [Phenology].PhyllochronPpSensitivity.FixedValue = 0.235020437209909
              [Phenology].CAMP.FLNparams.MinLN = 8
              [Phenology].CAMP.FLNparams.PpLN = 3
              [Phenology].CAMP.FLNparams.VrnLN = 1
              [Phenology].CAMP.FLNparams.VxPLN = -1
              [Phenology].CAMP.EnvData.VrnTreatTemp = 5.8
              [Phenology].CAMP.EnvData.VrnTreatDuration = 60
              [Phenology].HeadEmergenceLongDayBase.FixedValue = 130
              [Phenology].HeadEmergencePpSensitivity.FixedValue = 1
          Cultivar Mercury
            Command:
              [Phenology].HeadEmergenceLongDayBase.FixedValue = 100
              [Phenology].Phyllochron.BasePhyllochron.FixedValue = 80
              [Phenology].CAMP.FLNparams.MinLN = 9.0
              [Phenology].CAMP.FLNparams.PpLN = 2.0
              [Phenology].CAMP.FLNparams.VrnLN = 0.0
              [Phenology].CAMP.FLNparams.VxPLN = 0.0
              [Phenology].HeadEmergencePpSensitivity.FixedValue = 0.0
              [Phenology].CAMP.EnvData.VrnTreatTemp = 6
              [Phenology].CAMP.EnvData.VrnTreatDuration = 60
          Cultivar Kellalac
            Command:
              [Phenology].Phyllochron.BasePhyllochron.FixedValue = 88.1945544451052
              [Phenology].PhyllochronPpSensitivity.FixedValue = 0.350967201537242
              [Phenology].CAMP.FLNparams.MinLN = 7
              [Phenology].CAMP.FLNparams.PpLN = 4
              [Phenology].CAMP.FLNparams.VrnLN = 2
              [Phenology].CAMP.FLNparams.VxPLN = 0
              [Phenology].CAMP.EnvData.VrnTreatTemp = 6
              [Phenology].CAMP.EnvData.VrnTreatDuration = 60
              [Phenology].HeadEmergenceLongDayBase.FixedValue = 210
              [Phenology].HeadEmergencePpSensitivity.FixedValue = 3
          Cultivar Kennedy
            Command:
              [Phenology].Phyllochron.BasePhyllochron.FixedValue = 100
              [Phenology].CAMP.FLNparams.MinLN = 8
              [Phenology].CAMP.FLNparams.PpLN = 4.0
              [Phenology].CAMP.FLNparams.VrnLN = 0
              [Phenology].CAMP.FLNparams.VxPLN = 0.0
          Cultivar Kittyhawk
            Command:
              [Phenology].Phyllochron.BasePhyllochron.FixedValue = 93.7220123291132
              [Phenology].PhyllochronPpSensitivity.FixedValue = 0.212225680614483
              [Phenology].CAMP.FLNparams.MinLN = 10
              [Phenology].CAMP.FLNparams.PpLN = 2
              [Phenology].CAMP.FLNparams.VrnLN = 8
              [Phenology].CAMP.FLNparams.VxPLN = -1
              [Phenology].CAMP.EnvData.VrnTreatTemp = 5.8
              [Phenology].CAMP.EnvData.VrnTreatDuration = 60
              [Phenology].HeadEmergenceLongDayBase.FixedValue = 50
              [Phenology].HeadEmergencePpSensitivity.FixedValue = 4
          Cultivar Lancer
            Command:
              [Phenology].Phyllochron.BasePhyllochron.FixedValue = 85.6623042725763
              [Phenology].PhyllochronPpSensitivity.FixedValue = 0.324980109776406
              [Phenology].CAMP.FLNparams.MinLN = 8
              [Phenology].CAMP.FLNparams.PpLN = 4
              [Phenology].CAMP.FLNparams.VrnLN = 2
              [Phenology].CAMP.FLNparams.VxPLN = -2
              [Phenology].CAMP.EnvData.VrnTreatTemp = 5.8
              [Phenology].CAMP.EnvData.VrnTreatDuration = 60
              [Phenology].HeadEmergenceLongDayBase.FixedValue = 150
              [Phenology].HeadEmergencePpSensitivity.FixedValue = 1
          Cultivar Lang
            Command:
              [Phenology].Phyllochron.BasePhyllochron.FixedValue = 100
              [Phenology].CAMP.FLNparams.MinLN = 7
              [Phenology].CAMP.FLNparams.PpLN = 7
              [Phenology].CAMP.FLNparams.VrnLN = 0
              [Phenology].CAMP.FLNparams.VxPLN = 0
              [Phenology].HeadEmergenceLongDayBase.FixedValue = 70
              [Phenology].HeadEmergencePpSensitivity.FixedValue = 4
              [Phenology].CAMP.EnvData.VrnTreatTemp = 6
              [Phenology].CAMP.EnvData.VrnTreatDuration = 60
          Cultivar Livingston
            Command:
              [Phenology].Phyllochron.BasePhyllochron.FixedValue = 100
              [Phenology].CAMP.FLNparams.MinLN = 6.1
              [Phenology].CAMP.FLNparams.PpLN = 3.0
              [Phenology].CAMP.FLNparams.VrnLN = 1.8000000000000007
              [Phenology].CAMP.FLNparams.VxPLN = 4.0
              [Phenology].HeadEmergenceLongDayBase.FixedValue = 108
              [Phenology].HeadEmergencePpSensitivity.FixedValue = 1.3
              [Phenology].CAMP.EnvData.VrnTreatTemp = 6
              [Phenology].CAMP.EnvData.VrnTreatDuration = 60
              [Grain].MaximumPotentialGrainSize.FixedValue = 0.041
              [Grain].NumberFunction.GrainNumber.GrainsPerGramOfStem.FixedValue = 22
          Cultivar Lincoln
            Command:
              [Phenology].Phyllochron.BasePhyllochron.FixedValue = 100
              [Phenology].CAMP.FLNparams.MinLN = 6
              [Phenology].CAMP.FLNparams.PpLN = 4.0
              [Phenology].CAMP.FLNparams.VrnLN = 0
              [Phenology].CAMP.FLNparams.VxPLN = 0.0
          Cultivar Longsword
            Command:
              [Phenology].Phyllochron.BasePhyllochron.FixedValue = 100.389906627796
              [Phenology].PhyllochronPpSensitivity.FixedValue = 0.205225247925933
              [Phenology].CAMP.EnvData.VrnTreatTemp = 5.8
              [Phenology].CAMP.EnvData.VrnTreatDuration = 60
              [Phenology].CAMP.FLNparams.MinLN = 8
              [Phenology].CAMP.FLNparams.PpLN = 1
              [Phenology].CAMP.FLNparams.VrnLN = 7
              [Phenology].CAMP.FLNparams.VxPLN = 1
              [Phenology].HeadEmergenceLongDayBase.FixedValue = 110
              [Phenology].HeadEmergencePpSensitivity.FixedValue = 2
          Cultivar Mace
            Command:
              [Phenology].Phyllochron.BasePhyllochron.FixedValue = 100. //106.268453805677
              [Phenology].PhyllochronPpSensitivity.FixedValue = 0.137742329295879
              [Grain].NumberFunction.GrainNumber.GrainsPerGramOfStem.FixedValue = 24
              [Phenology].CAMP.EnvData.VrnTreatTemp = 6
              [Phenology].CAMP.EnvData.VrnTreatDuration = 60
              [Phenology].CAMP.FLNparams.MinLN = 7
              [Phenology].CAMP.FLNparams.PpLN = 2
              [Phenology].CAMP.FLNparams.VrnLN = 3
              [Phenology].CAMP.FLNparams.VxPLN = -3
              [Phenology].HeadEmergenceLongDayBase.FixedValue = 70
              [Phenology].HeadEmergencePpSensitivity.FixedValue = 1
          Cultivar MacKellar
            Command:
              [Phenology].HeadEmergenceLongDayBase.FixedValue = 114.0
              [Phenology].Phyllochron.BasePhyllochron.FixedValue = 100
              [Phenology].CAMP.FLNparams.MinLN = 8.664527440257086
              [Phenology].CAMP.FLNparams.PpLN = 1.0215422635640583
              [Phenology].CAMP.FLNparams.VrnLN = 10.022473345513335
              [Phenology].CAMP.FLNparams.VxPLN = -2.1045318640627455
              [Phenology].HeadEmergencePpSensitivity.FixedValue = 3.533066035654082
              [Phenology].CAMP.EnvData.VrnTreatTemp = 6
              [Phenology].CAMP.EnvData.VrnTreatDuration = 60
          Cultivar Magenta
            Command:
              [Phenology].Phyllochron.BasePhyllochron.FixedValue = 113.040956826707
              [Phenology].PhyllochronPpSensitivity.FixedValue = 0.138444741551648
              [Phenology].CAMP.EnvData.VrnTreatTemp = 5.8
              [Phenology].CAMP.EnvData.VrnTreatDuration = 60
              [Phenology].CAMP.FLNparams.MinLN = 7
              [Phenology].CAMP.FLNparams.PpLN = 3
              [Phenology].CAMP.FLNparams.VrnLN = 2
              [Phenology].CAMP.FLNparams.VxPLN = 1
              [Phenology].HeadEmergenceLongDayBase.FixedValue = 130
              [Phenology].HeadEmergencePpSensitivity.FixedValue = 0
          Cultivar Manning
            Command:
              [Phenology].Phyllochron.BasePhyllochron.FixedValue = 104.816433323058
              [Phenology].PhyllochronPpSensitivity.FixedValue = 0.253254338348875
              [Phenology].CAMP.EnvData.VrnTreatTemp = 6
              [Phenology].CAMP.EnvData.VrnTreatDuration = 60
              [Phenology].CAMP.FLNparams.MinLN = 9
              [Phenology].CAMP.FLNparams.PpLN = 6
              [Phenology].CAMP.FLNparams.VrnLN = 8
              [Phenology].CAMP.FLNparams.VxPLN = 0
              [Phenology].HeadEmergenceLongDayBase.FixedValue = 230
              [Phenology].HeadEmergencePpSensitivity.FixedValue = 0
          Cultivar Matong
            Command:
              [Phenology].Phyllochron.BasePhyllochron.FixedValue = 100
              [Grain].NumberFunction.GrainNumber.GrainsPerGramOfStem.FixedValue = 22
              [Phenology].CAMP.FLNparams.MinLN = 7
              [Phenology].CAMP.FLNparams.PpLN = 4.0
              [Phenology].CAMP.FLNparams.VrnLN = 1
              [Phenology].CAMP.FLNparams.VxPLN = 0.0
          Cultivar McCubbin
            Command:
              [Phenology].Phyllochron.BasePhyllochron.FixedValue = 90
              [Phenology].CAMP.FLNparams.MinLN = 8.0
              [Phenology].CAMP.FLNparams.PpLN = 8.0
              [Phenology].CAMP.FLNparams.VrnLN = 0.0
              [Phenology].CAMP.FLNparams.VxPLN = 3.0
              [Phenology].HeadEmergenceLongDayBase.FixedValue = 200.0
              [Phenology].HeadEmergencePpSensitivity.FixedValue = 2.0
              [Phenology].CAMP.EnvData.VrnTreatTemp = 6
              [Phenology].CAMP.EnvData.VrnTreatDuration = 60
          Cultivar Merinda
            Command:
              [Phenology].Phyllochron.BasePhyllochron.FixedValue = 98.5779272570712
              [Phenology].PhyllochronPpSensitivity.FixedValue = 0.347160824156039
              [Phenology].CAMP.EnvData.VrnTreatTemp = 5.8
              [Phenology].CAMP.EnvData.VrnTreatDuration = 60
              [Phenology].CAMP.FLNparams.MinLN = 7
              [Phenology].CAMP.FLNparams.PpLN = 1
              [Phenology].CAMP.FLNparams.VrnLN = 1
              [Phenology].CAMP.FLNparams.VxPLN = -1
              [Phenology].HeadEmergenceLongDayBase.FixedValue = 210
              [Phenology].HeadEmergencePpSensitivity.FixedValue = 1
          Cultivar Mitch
            Command:
              [Phenology].Phyllochron.BasePhyllochron.FixedValue = 90.7949886258521
              [Phenology].PhyllochronPpSensitivity.FixedValue = 0.313387918745248
              [Phenology].CAMP.EnvData.VrnTreatTemp = 5.8
              [Phenology].CAMP.EnvData.VrnTreatDuration = 60
              [Phenology].CAMP.FLNparams.MinLN = 8
              [Phenology].CAMP.FLNparams.PpLN = 2
              [Phenology].CAMP.FLNparams.VrnLN = 3
              [Phenology].CAMP.FLNparams.VxPLN = -2
              [Phenology].HeadEmergenceLongDayBase.FixedValue = 130
              [Phenology].HeadEmergencePpSensitivity.FixedValue = 1
          Cultivar Nighthawk
            Command:
              [Phenology].Phyllochron.BasePhyllochron.FixedValue = 97.5749140549815
              [Phenology].PhyllochronPpSensitivity.FixedValue = 0.234188946138953
              [Phenology].CAMP.EnvData.VrnTreatTemp = 5.8
              [Phenology].CAMP.EnvData.VrnTreatDuration = 60
              [Phenology].CAMP.FLNparams.MinLN = 8
              [Phenology].CAMP.FLNparams.VrnLN = 4
              [Phenology].CAMP.FLNparams.PpLN = 2
              [Phenology].CAMP.FLNparams.VxPLN = -1
              [Phenology].HeadEmergenceLongDayBase.FixedValue = 70
              [Phenology].HeadEmergencePpSensitivity.FixedValue = 8
          Cultivar Ouyen
            Command:
              [Phenology].Phyllochron.BasePhyllochron.FixedValue = 84.1472430387947
              [Phenology].PhyllochronPpSensitivity.FixedValue = 0.332456383177313
              [Phenology].CAMP.EnvData.VrnTreatTemp = 5.8
              [Phenology].CAMP.EnvData.VrnTreatDuration = 60
              [Phenology].CAMP.FLNparams.MinLN = 8
              [Phenology].CAMP.FLNparams.PpLN = 2
              [Phenology].CAMP.FLNparams.VrnLN = 2
              [Phenology].CAMP.FLNparams.VxPLN = -2
              [Phenology].HeadEmergenceLongDayBase.FixedValue = 190
              [Phenology].HeadEmergencePpSensitivity.FixedValue = 1
          Cultivar Peake
            Command:
              [Phenology].Phyllochron.BasePhyllochron.FixedValue = 87.7433052533018
              [Phenology].PhyllochronPpSensitivity.FixedValue = 0.44431162843274
              [Phenology].CAMP.EnvData.VrnTreatTemp = 5.8
              [Phenology].CAMP.EnvData.VrnTreatDuration = 60
              [Phenology].CAMP.FLNparams.MinLN = 7
              [Phenology].CAMP.FLNparams.PpLN = 2
              [Phenology].CAMP.FLNparams.VrnLN = 0
              [Phenology].CAMP.FLNparams.VxPLN = 0
              [Phenology].HeadEmergenceLongDayBase.FixedValue = 190
              [Phenology].HeadEmergencePpSensitivity.FixedValue = 1
          Cultivar Revenue
            Command:
              [Phenology].Phyllochron.BasePhyllochron.FixedValue = 113.782112306367
              [Phenology].PhyllochronPpSensitivity.FixedValue = 0.155926785053575
              [Phenology].CAMP.EnvData.VrnTreatTemp = 5.8
              [Phenology].CAMP.EnvData.VrnTreatDuration = 60
              [Phenology].CAMP.FLNparams.MinLN = 8
              [Phenology].CAMP.FLNparams.PpLN = 2
              [Phenology].CAMP.FLNparams.VrnLN = 7
              [Phenology].CAMP.FLNparams.VxPLN = 2
              [Phenology].HeadEmergenceLongDayBase.FixedValue = 150
              [Phenology].HeadEmergencePpSensitivity.FixedValue = 4
          Cultivar Rosella
            Command:
              [Phenology].Phyllochron.BasePhyllochron.FixedValue = 96.7111881914136
              [Phenology].PhyllochronPpSensitivity.FixedValue = 0.209478791477046
              [Phenology].CAMP.EnvData.VrnTreatTemp = 5.8
              [Phenology].CAMP.EnvData.VrnTreatDuration = 60
              [Phenology].CAMP.FLNparams.MinLN = 7
              [Phenology].CAMP.FLNparams.PpLN = 5
              [Phenology].CAMP.FLNparams.VrnLN = 8
              [Phenology].CAMP.FLNparams.VxPLN = 5
              [Phenology].HeadEmergenceLongDayBase.FixedValue = 90
              [Phenology].HeadEmergencePpSensitivity.FixedValue = 5
          Cultivar Ruby
            Command:
              [Phenology].Phyllochron.BasePhyllochron.FixedValue = 100
              [Phenology].CAMP.FLNparams.MinLN = 8
              [Phenology].CAMP.FLNparams.PpLN = 4.0
              [Phenology].CAMP.FLNparams.VrnLN = 0
              [Phenology].CAMP.FLNparams.VxPLN = 0.0
          Cultivar Scepter
            Command:
              [Phenology].Phyllochron.BasePhyllochron.FixedValue = 107.602580952482
              [Phenology].PhyllochronPpSensitivity.FixedValue = 0.23032920462638
              [Phenology].CAMP.EnvData.VrnTreatTemp = 6
              [Phenology].CAMP.EnvData.VrnTreatDuration = 60
              [Phenology].CAMP.FLNparams.MinLN = 7
              [Phenology].CAMP.FLNparams.PpLN = 2
              [Phenology].CAMP.FLNparams.VrnLN = 2
              [Phenology].CAMP.FLNparams.VxPLN = -1
              [Phenology].HeadEmergenceLongDayBase.FixedValue = 170
              [Phenology].HeadEmergencePpSensitivity.FixedValue = 0
          Cultivar Scout
            Command:
              [Phenology].Phyllochron.BasePhyllochron.FixedValue = 102.794916048683
              [Phenology].PhyllochronPpSensitivity.FixedValue = 0.192036818570067
              [Phenology].CAMP.EnvData.VrnTreatTemp = 6
              [Phenology].CAMP.EnvData.VrnTreatDuration = 60
              [Phenology].CAMP.FLNparams.MinLN = 7
              [Phenology].CAMP.FLNparams.PpLN = 2
              [Phenology].CAMP.FLNparams.VrnLN = 4
              [Phenology].CAMP.FLNparams.VxPLN = -2
              [Phenology].HeadEmergenceLongDayBase.FixedValue = 170
              [Phenology].HeadEmergencePpSensitivity.FixedValue = 0
          Cultivar Scythe
            Command:
              [Phenology].Phyllochron.BasePhyllochron.FixedValue = 106.486507449716
              [Phenology].PhyllochronPpSensitivity.FixedValue = 0.22806739407445
              [Phenology].CAMP.EnvData.VrnTreatTemp = 5.8
              [Phenology].CAMP.EnvData.VrnTreatDuration = 60
              [Phenology].CAMP.FLNparams.MinLN = 6
              [Phenology].CAMP.FLNparams.PpLN = 4
              [Phenology].CAMP.FLNparams.VrnLN = 2
              [Phenology].CAMP.FLNparams.VxPLN = 2
              [Phenology].HeadEmergenceLongDayBase.FixedValue = 90
              [Phenology].HeadEmergencePpSensitivity.FixedValue = 4
          Cultivar Spear
            Command:
              [Phenology].Phyllochron.BasePhyllochron.FixedValue = 102.794916048683
              [Phenology].PhyllochronPpSensitivity.FixedValue = 0.192036818570067
              [Grain].NumberFunction.GrainNumber.GrainsPerGramOfStem.FixedValue = 22
              [Phenology].CAMP.EnvData.VrnTreatTemp = 6
              [Phenology].CAMP.EnvData.VrnTreatDuration = 60
              [Phenology].CAMP.FLNparams.MinLN = 7
              [Phenology].CAMP.FLNparams.PpLN = 2
              [Phenology].CAMP.FLNparams.VrnLN = 4
              [Phenology].CAMP.FLNparams.VxPLN = -2
              [Phenology].HeadEmergenceLongDayBase.FixedValue = 170
              [Phenology].HeadEmergencePpSensitivity.FixedValue = 0
          Cultivar Spitfire
            Command:
              [Phenology].Phyllochron.BasePhyllochron.FixedValue = 87.8426291924597
              [Phenology].PhyllochronPpSensitivity.FixedValue = 0.226170449889058
              [Phenology].CAMP.EnvData.VrnTreatTemp = 5.8
              [Phenology].CAMP.EnvData.VrnTreatDuration = 60
              [Phenology].CAMP.FLNparams.MinLN = 8
              [Phenology].CAMP.FLNparams.PpLN = 1
              [Phenology].CAMP.FLNparams.VrnLN = 3
              [Phenology].CAMP.FLNparams.VxPLN = -3
              [Phenology].HeadEmergenceLongDayBase.FixedValue = 130
              [Phenology].HeadEmergencePpSensitivity.FixedValue = 1
            Alias Drysdale
          Cultivar Strzelecki
            Command:
              [Phenology].Phyllochron.BasePhyllochron.FixedValue = 96.5633530493006
              [Phenology].PhyllochronPpSensitivity.FixedValue = 0.245575047413057
              [Phenology].CAMP.EnvData.VrnTreatTemp = 5.8
              [Phenology].CAMP.EnvData.VrnTreatDuration = 60
              [Phenology].CAMP.FLNparams.MinLN = 7
              [Phenology].CAMP.FLNparams.PpLN = 3
              [Phenology].CAMP.FLNparams.VrnLN = 3
              [Phenology].CAMP.FLNparams.VxPLN = 0
              [Phenology].HeadEmergenceLongDayBase.FixedValue = 110
              [Phenology].HeadEmergencePpSensitivity.FixedValue = 3
          Cultivar Sunbri
            Command:
              [Phenology].Phyllochron.BasePhyllochron.FixedValue = 91.5032903672171
              [Phenology].PhyllochronPpSensitivity.FixedValue = 0.207593313150283
              [Phenology].CAMP.EnvData.VrnTreatTemp = 5.8
              [Phenology].CAMP.EnvData.VrnTreatDuration = 60
              [Phenology].CAMP.FLNparams.MinLN = 8
              [Phenology].CAMP.FLNparams.PpLN = 4
              [Phenology].CAMP.FLNparams.VrnLN = 2
              [Phenology].CAMP.FLNparams.VxPLN = -1
              [Phenology].HeadEmergenceLongDayBase.FixedValue = 170
              [Phenology].HeadEmergencePpSensitivity.FixedValue = 2
          Cultivar Sunbee
            Command:
              [Phenology].Phyllochron.BasePhyllochron.FixedValue = 97.2940011008473
              [Phenology].PhyllochronPpSensitivity.FixedValue = 0.185142054210791
              [Phenology].CAMP.EnvData.VrnTreatTemp = 5.8
              [Phenology].CAMP.EnvData.VrnTreatDuration = 60
              [Phenology].CAMP.FLNparams.MinLN = 7
              [Phenology].CAMP.FLNparams.PpLN = 1
              [Phenology].CAMP.FLNparams.VrnLN = 3
              [Phenology].CAMP.FLNparams.VxPLN = -3
              [Phenology].HeadEmergenceLongDayBase.FixedValue = 370
              [Phenology].HeadEmergencePpSensitivity.FixedValue = 0
          Cultivar Sunco
            Command:
              [Phenology].HeadEmergencePpSensitivity.FixedValue = 1
              [Phenology].Phyllochron.BasePhyllochron.FixedValue = 100
              [Phenology].CAMP.FLNparams.MinLN = 6
              [Phenology].CAMP.FLNparams.PpLN = 11
              [Phenology].CAMP.FLNparams.VrnLN = 10
              [Phenology].CAMP.FLNparams.VxPLN = -9
              [Phenology].HeadEmergenceLongDayBase.FixedValue = 170
          Cultivar Sunlamb
            Command:
              [Phenology].Phyllochron.BasePhyllochron.FixedValue = 100.382265746297
              [Phenology].PhyllochronPpSensitivity.FixedValue = 0.154235967458266
              [Phenology].CAMP.EnvData.VrnTreatTemp = 5.8
              [Phenology].CAMP.EnvData.VrnTreatDuration = 60
              [Phenology].CAMP.FLNparams.MinLN = 7
              [Phenology].CAMP.FLNparams.PpLN = 5
              [Phenology].CAMP.FLNparams.VrnLN = 10
              [Phenology].CAMP.FLNparams.VxPLN = -5
              [Phenology].HeadEmergenceLongDayBase.FixedValue = 150
              [Phenology].HeadEmergencePpSensitivity.FixedValue = 4
          Cultivar Suneca
            Command:
              [Phenology].CAMP.FLNparams.MinLN = 5
              [Phenology].CAMP.FLNparams.PpLN = 6
              [Phenology].CAMP.FLNparams.VrnLN = 3
              [Phenology].CAMP.FLNparams.VxPLN = 3
              [Phenology].HeadEmergenceLongDayBase.FixedValue = 190
              [Phenology].HeadEmergencePpSensitivity.FixedValue = 2
          Cultivar Sunstate
            Command:
              [Phenology].Phyllochron.BasePhyllochron.FixedValue = 95.0758950229683
              [Phenology].PhyllochronPpSensitivity.FixedValue = 0.225986092694718
              [Phenology].CAMP.EnvData.VrnTreatTemp = 6
              [Phenology].CAMP.EnvData.VrnTreatDuration = 60
              [Phenology].CAMP.FLNparams.MinLN = 7
              [Phenology].CAMP.FLNparams.PpLN = 1
              [Phenology].CAMP.FLNparams.VrnLN = 4
              [Phenology].CAMP.FLNparams.VxPLN = -4
              [Phenology].HeadEmergenceLongDayBase.FixedValue = 190
              [Phenology].HeadEmergencePpSensitivity.FixedValue = 1
          Cultivar Suntop
            Command:
              [Phenology].Phyllochron.BasePhyllochron.FixedValue = 93.1036394598307
              [Phenology].PhyllochronPpSensitivity.FixedValue = 0.335203758711104
              [Phenology].CAMP.EnvData.VrnTreatTemp = 5.8
              [Phenology].CAMP.EnvData.VrnTreatDuration = 60
              [Phenology].CAMP.FLNparams.MinLN = 8
              [Phenology].CAMP.FLNparams.PpLN = 2
              [Phenology].CAMP.FLNparams.VrnLN = 0
              [Phenology].CAMP.FLNparams.VxPLN = 0
              [Phenology].HeadEmergenceLongDayBase.FixedValue = 210
              [Phenology].HeadEmergencePpSensitivity.FixedValue = 0
          Cultivar Trojan
            Command:
              [Phenology].Phyllochron.BasePhyllochron.FixedValue = 99.1351271229079
              [Phenology].PhyllochronPpSensitivity.FixedValue = 0.35511766231399
              [Phenology].CAMP.EnvData.VrnTreatTemp = 6
              [Phenology].CAMP.EnvData.VrnTreatDuration = 60
              [Phenology].CAMP.FLNparams.MinLN = 7
              [Phenology].CAMP.FLNparams.PpLN = 5
              [Phenology].CAMP.FLNparams.VrnLN = 2
              [Phenology].CAMP.FLNparams.VxPLN = 1
              [Phenology].HeadEmergenceLongDayBase.FixedValue = 50
              [Phenology].HeadEmergencePpSensitivity.FixedValue = 4
          Cultivar Ventura
            Command:
              [Phenology].Phyllochron.BasePhyllochron.FixedValue = 100
              [Phenology].CAMP.FLNparams.MinLN = 8
              [Phenology].CAMP.FLNparams.PpLN = 4.0
              [Phenology].CAMP.FLNparams.VrnLN = 0
              [Phenology].CAMP.FLNparams.VxPLN = 0.0
          Cultivar Wedgetail
            Command:
              [Phenology].Phyllochron.BasePhyllochron.FixedValue = 111.579556421375
              [Phenology].PhyllochronPpSensitivity.FixedValue = 0.217687425020179
              [Phenology].CAMP.EnvData.VrnTreatTemp = 5.8
              [Phenology].CAMP.EnvData.VrnTreatDuration = 60
              [Phenology].CAMP.FLNparams.MinLN = 7
              [Phenology].CAMP.FLNparams.PpLN = 1
              [Phenology].CAMP.FLNparams.VrnLN = 9
              [Phenology].CAMP.FLNparams.VxPLN = -1
              [Phenology].HeadEmergenceLongDayBase.FixedValue = 170
              [Phenology].HeadEmergencePpSensitivity.FixedValue = 2
          Cultivar Whistler
            Command:
              [Phenology].Phyllochron.BasePhyllochron.FixedValue = 101.152462224521
              [Phenology].PhyllochronPpSensitivity.FixedValue = 0.160519169483945
              [Phenology].CAMP.FLNparams.MinLN = 8
              [Phenology].CAMP.FLNparams.PpLN = 2
              [Phenology].CAMP.FLNparams.VrnLN = 8
              [Phenology].CAMP.FLNparams.VxPLN = -2
              [Phenology].CAMP.EnvData.VrnTreatTemp = 5.8
              [Phenology].CAMP.EnvData.VrnTreatDuration = 60
              [Phenology].HeadEmergenceLongDayBase.FixedValue = 150
              [Phenology].HeadEmergencePpSensitivity.FixedValue = 1
          Cultivar Wilgoyne
            Command:
              [Phenology].Phyllochron.BasePhyllochron.FixedValue = 100
              [Phenology].PhyllochronPpSensitivity.FixedValue = 0.349562436956343
              [Grain].NumberFunction.GrainNumber.GrainsPerGramOfStem.FixedValue = 17
              [Phenology].CAMP.FLNparams.MinLN = 8
              [Phenology].CAMP.FLNparams.PpLN = 3
              [Phenology].CAMP.FLNparams.VrnLN = 0.5
              [Phenology].CAMP.FLNparams.VxPLN = 0
              [Phenology].CAMP.EnvData.VrnTreatTemp = 6
              [Phenology].CAMP.EnvData.VrnTreatDuration = 60
              [Phenology].HeadEmergenceLongDayBase.FixedValue = 50
              [Phenology].HeadEmergencePpSensitivity.FixedValue = 4
          Cultivar Wills
            Command:
              [Phenology].Phyllochron.BasePhyllochron.FixedValue = 94.9906866085437
              [Phenology].PhyllochronPpSensitivity.FixedValue = 0.264808096779551
              [Phenology].CAMP.EnvData.VrnTreatTemp = 5.8
              [Phenology].CAMP.EnvData.VrnTreatDuration = 60
              [Phenology].CAMP.FLNparams.MinLN = 8
              [Phenology].CAMP.FLNparams.PpLN = 2
              [Phenology].CAMP.FLNparams.VrnLN = 4
              [Phenology].CAMP.FLNparams.VxPLN = -3
              [Phenology].HeadEmergenceLongDayBase.FixedValue = 110
              [Phenology].HeadEmergencePpSensitivity.FixedValue = 1
          Cultivar Wyalkatchem
            Command:
              [Phenology].Phyllochron.BasePhyllochron.FixedValue = 101.991162889267
              [Phenology].PhyllochronPpSensitivity.FixedValue = 0.203541157884576
              [Phenology].CAMP.EnvData.VrnTreatTemp = 5.8
              [Phenology].CAMP.EnvData.VrnTreatDuration = 60
              [Phenology].CAMP.FLNparams.MinLN = 7
              [Phenology].CAMP.FLNparams.PpLN = 2
              [Phenology].CAMP.FLNparams.VrnLN = 3
              [Phenology].CAMP.FLNparams.VxPLN = -3
              [Phenology].HeadEmergenceLongDayBase.FixedValue = 90
              [Phenology].HeadEmergencePpSensitivity.FixedValue = 3
          Cultivar Yitpi
            Command:
              [Phenology].Phyllochron.BasePhyllochron.FixedValue = 107.48018743345
              [Phenology].PhyllochronPpSensitivity.FixedValue = 0.247088996399892
              [Phenology].CAMP.EnvData.VrnTreatTemp = 5.8
              [Phenology].CAMP.EnvData.VrnTreatDuration = 60
              [Phenology].CAMP.FLNparams.MinLN = 7
              [Phenology].CAMP.FLNparams.PpLN = 4
              [Phenology].CAMP.FLNparams.VrnLN = 2
              [Phenology].CAMP.FLNparams.VxPLN = 0
              [Phenology].HeadEmergenceLongDayBase.FixedValue = 50
              [Phenology].HeadEmergencePpSensitivity.FixedValue = 5
          Cultivar Young
            Command:
              [Phenology].Phyllochron.BasePhyllochron.FixedValue = 86.0661362380018
              [Phenology].PhyllochronPpSensitivity.FixedValue = 0.347762945437436
              [Phenology].CAMP.EnvData.VrnTreatTemp = 5.8
              [Phenology].CAMP.EnvData.VrnTreatDuration = 60
              [Phenology].CAMP.FLNparams.MinLN = 8
              [Phenology].CAMP.FLNparams.PpLN = 1
              [Phenology].CAMP.FLNparams.VrnLN = 1
              [Phenology].CAMP.FLNparams.VxPLN = -1
              [Phenology].HeadEmergenceLongDayBase.FixedValue = 150
              [Phenology].HeadEmergencePpSensitivity.FixedValue = 1
        Folder NILs
          Cultivar CSIROW002
            Command:
              [Phenology].Phyllochron.BasePhyllochron.FixedValue = 97.1048561789481
              [Phenology].PhyllochronPpSensitivity.FixedValue = 0.330486171103675
              [Phenology].CAMP.FLNparams.MinLN = 6.658457459336699
              [Phenology].CAMP.FLNparams.PpLN = 1.9822634447408163
              [Phenology].CAMP.FLNparams.VrnLN = 2.6921517428015016
              [Phenology].CAMP.FLNparams.VxPLN = 0.012348660067480921
              [Phenology].CAMP.EnvData.VrnTreatTemp = 5.8
              [Phenology].CAMP.EnvData.VrnTreatDuration = 60
              [Phenology].HeadEmergenceLongDayBase.FixedValue = 169.0
              [Phenology].HeadEmergencePpSensitivity.FixedValue = 1.3207357239932465
          Cultivar CSIROW003
            Command:
              [Phenology].Phyllochron.BasePhyllochron.FixedValue = 97.9080402900587
              [Phenology].PhyllochronPpSensitivity.FixedValue = 0.219427317086708
              [Phenology].CAMP.FLNparams.MinLN = 5.793366821378284
              [Phenology].CAMP.FLNparams.PpLN = 0.0
              [Phenology].CAMP.FLNparams.VrnLN = 4.787965491738554
              [Phenology].CAMP.FLNparams.VxPLN = -2.8680601480674017
              [Phenology].CAMP.EnvData.VrnTreatTemp = 5.8
              [Phenology].CAMP.EnvData.VrnTreatDuration = 60
              [Phenology].HeadEmergenceLongDayBase.FixedValue = 145.0
              [Phenology].HeadEmergencePpSensitivity.FixedValue = 2.658836674667949
          Cultivar CSIROW005
            Command:
              [Phenology].Phyllochron.BasePhyllochron.FixedValue = 100.324132823901
              [Phenology].PhyllochronPpSensitivity.FixedValue = 0.16547784419225
              [Phenology].CAMP.FLNparams.MinLN = 5.759207332491177
              [Phenology].CAMP.FLNparams.PpLN = 2.4191796388445765
              [Phenology].CAMP.FLNparams.VrnLN = 3.0756722363145896
              [Phenology].CAMP.FLNparams.VxPLN = -0.2627994305564112
              [Phenology].CAMP.EnvData.VrnTreatTemp = 5.8
              [Phenology].CAMP.EnvData.VrnTreatDuration = 60
              [Phenology].HeadEmergenceLongDayBase.FixedValue = 369.0
              [Phenology].HeadEmergencePpSensitivity.FixedValue = 0.0
          Cultivar CSIROW007
            Command:
              [Phenology].Phyllochron.BasePhyllochron.FixedValue = 102.785879373288
              [Phenology].PhyllochronPpSensitivity.FixedValue = 0.18434106648197
              [Phenology].CAMP.FLNparams.MinLN = 7.326398633965955
              [Phenology].CAMP.FLNparams.PpLN = 0.0
              [Phenology].CAMP.FLNparams.VrnLN = 7.554300061869201
              [Phenology].CAMP.FLNparams.VxPLN = -1.6841419188674127
              [Phenology].CAMP.EnvData.VrnTreatTemp = 5.8
              [Phenology].CAMP.EnvData.VrnTreatDuration = 60
              [Phenology].HeadEmergenceLongDayBase.FixedValue = 193.0
              [Phenology].HeadEmergencePpSensitivity.FixedValue = 1.4807227520020911
          Cultivar CSIROW011
            Command:
              [Phenology].Phyllochron.BasePhyllochron.FixedValue = 90.109466190558
              [Phenology].PhyllochronPpSensitivity.FixedValue = 0.349636600984782
              [Phenology].CAMP.FLNparams.MinLN = 6.0
              [Phenology].CAMP.FLNparams.PpLN = 1.0
              [Phenology].CAMP.FLNparams.VrnLN = 1.0
              [Phenology].CAMP.FLNparams.VxPLN = -1.0
              [Phenology].CAMP.EnvData.VrnTreatTemp = 5.8
              [Phenology].CAMP.EnvData.VrnTreatDuration = 60
              [Phenology].HeadEmergenceLongDayBase.FixedValue = 200.0
              [Phenology].HeadEmergencePpSensitivity.FixedValue = 2.0
          Cultivar CSIROW018
            Command:
              [Phenology].Phyllochron.BasePhyllochron.FixedValue = 100.218976921681
              [Phenology].PhyllochronPpSensitivity.FixedValue = 0.305627551956816
              [Phenology].CAMP.FLNparams.MinLN = 5.0
              [Phenology].CAMP.FLNparams.PpLN = 2.0037887506286465
              [Phenology].CAMP.FLNparams.VrnLN = 3.5823533971961172
              [Phenology].CAMP.FLNparams.VxPLN = -2.0415045806529806
              [Phenology].CAMP.EnvData.VrnTreatTemp = 5.8
              [Phenology].CAMP.EnvData.VrnTreatDuration = 60
              [Phenology].HeadEmergenceLongDayBase.FixedValue = 371.0
              [Phenology].HeadEmergencePpSensitivity.FixedValue = 0.94606616045257
          Cultivar CSIROW021
            Command:
              [Phenology].Phyllochron.BasePhyllochron.FixedValue = 100.85898282236
              [Phenology].PhyllochronPpSensitivity.FixedValue = 0.228645304743823
              [Phenology].CAMP.FLNparams.MinLN = 8.0
              [Phenology].CAMP.FLNparams.PpLN = 1.333333333333334
              [Phenology].CAMP.FLNparams.VrnLN = 6.166666666666666
              [Phenology].CAMP.FLNparams.VxPLN = -0.8333333333333357
              [Phenology].CAMP.EnvData.VrnTreatTemp = 5.8
              [Phenology].CAMP.EnvData.VrnTreatDuration = 60
              [Phenology].HeadEmergenceLongDayBase.FixedValue = 200.0
              [Phenology].HeadEmergencePpSensitivity.FixedValue = 2.0
          Cultivar CSIROW023
            Command:
              [Phenology].Phyllochron.BasePhyllochron.FixedValue = 102.809488116017
              [Phenology].PhyllochronPpSensitivity.FixedValue = 0.218898108718466
              [Phenology].CAMP.FLNparams.MinLN = 7.493027691870457
              [Phenology].CAMP.FLNparams.PpLN = 2.584156511279189
              [Phenology].CAMP.FLNparams.VrnLN = 2.37442378811967
              [Phenology].CAMP.FLNparams.VxPLN = 0.28214981195795374
              [Phenology].CAMP.EnvData.VrnTreatTemp = 5.8
              [Phenology].CAMP.EnvData.VrnTreatDuration = 60
              [Phenology].HeadEmergenceLongDayBase.FixedValue = 219.0
              [Phenology].HeadEmergencePpSensitivity.FixedValue = 0.0
          Cultivar CSIROW027
            Command:
              [Phenology].Phyllochron.BasePhyllochron.FixedValue = 91.9686702262851
              [Phenology].PhyllochronPpSensitivity.FixedValue = 0.298865609355012
              [Phenology].CAMP.FLNparams.MinLN = 5.666666666666667
              [Phenology].CAMP.FLNparams.PpLN = 1.0
              [Phenology].CAMP.FLNparams.VrnLN = 1.0
              [Phenology].CAMP.FLNparams.VxPLN = -0.666666666666667
              [Phenology].CAMP.EnvData.VrnTreatTemp = 5.8
              [Phenology].CAMP.EnvData.VrnTreatDuration = 60
              [Phenology].HeadEmergenceLongDayBase.FixedValue = 200.0
              [Phenology].HeadEmergencePpSensitivity.FixedValue = 2.0
          Cultivar CSIROW029
            Command:
              [Phenology].Phyllochron.BasePhyllochron.FixedValue = 98.5813007346922
              [Phenology].PhyllochronPpSensitivity.FixedValue = 0.228833970802351
              [Phenology].CAMP.FLNparams.MinLN = 5.666666666666667
              [Phenology].CAMP.FLNparams.PpLN = 0.33333333333333304
              [Phenology].CAMP.FLNparams.VrnLN = 1.0
              [Phenology].CAMP.FLNparams.VxPLN = -0.666666666666667
              [Phenology].CAMP.EnvData.VrnTreatTemp = 5.8
              [Phenology].CAMP.EnvData.VrnTreatDuration = 60
              [Phenology].HeadEmergenceLongDayBase.FixedValue = 200.0
              [Phenology].HeadEmergencePpSensitivity.FixedValue = 2.0
          Cultivar CSIROW073
            Command:
              [Phenology].Phyllochron.BasePhyllochron.FixedValue = 95.6693440169749
              [Phenology].PhyllochronPpSensitivity.FixedValue = 0.226791235396558
              [Phenology].CAMP.FLNparams.MinLN = 8.790112770072708
              [Phenology].CAMP.FLNparams.PpLN = 0.7295023618186995
              [Phenology].CAMP.FLNparams.VrnLN = 4.373125182546708
              [Phenology].CAMP.FLNparams.VxPLN = 9.99670899443495
              [Phenology].CAMP.EnvData.VrnTreatTemp = 5.8
              [Phenology].CAMP.EnvData.VrnTreatDuration = 60
              [Phenology].HeadEmergenceLongDayBase.FixedValue = 50.0
              [Phenology].HeadEmergencePpSensitivity.FixedValue = 3.5452031099169528
          Cultivar CSIROW077
            Command:
              [Phenology].Phyllochron.BasePhyllochron.FixedValue = 89.0413135981221
              [Phenology].PhyllochronPpSensitivity.FixedValue = 0.320389882541901
              [Phenology].CAMP.FLNparams.MinLN = 5.0
              [Phenology].CAMP.FLNparams.PpLN = 0.7789007198658495
              [Phenology].CAMP.FLNparams.VrnLN = 0.9296483932829428
              [Phenology].CAMP.FLNparams.VxPLN = -0.4548378579547272
              [Phenology].CAMP.EnvData.VrnTreatTemp = 5.8
              [Phenology].CAMP.EnvData.VrnTreatDuration = 60
              [Phenology].HeadEmergenceLongDayBase.FixedValue = 201.0
              [Phenology].HeadEmergencePpSensitivity.FixedValue = 1.988848467332372
          Cultivar CSIROW087
            Command:
              [Phenology].Phyllochron.BasePhyllochron.FixedValue = 95.8407854192227
              [Phenology].PhyllochronPpSensitivity.FixedValue = 0.379363409943707
              [Phenology].CAMP.FLNparams.MinLN = 6.088762673975456
              [Phenology].CAMP.FLNparams.PpLN = 1.3098995454756082
              [Phenology].CAMP.FLNparams.VrnLN = 1.7408533665776218
              [Phenology].CAMP.FLNparams.VxPLN = -1.377321640166457
              [Phenology].CAMP.EnvData.VrnTreatTemp = 5.8
              [Phenology].CAMP.EnvData.VrnTreatDuration = 60
              [Phenology].HeadEmergenceLongDayBase.FixedValue = 214.0
              [Phenology].HeadEmergencePpSensitivity.FixedValue = 2.2429157431718143
          Cultivar CSIROW102
            Command:
              [Phenology].Phyllochron.BasePhyllochron.FixedValue = 88.798911538629
              [Phenology].PhyllochronPpSensitivity.FixedValue = 0.366324783260731
              [Phenology].CAMP.FLNparams.MinLN = 5.431828108909145
              [Phenology].CAMP.FLNparams.PpLN = 0.9159899681289015
              [Phenology].CAMP.FLNparams.VrnLN = 3.8766835434634936
              [Phenology].CAMP.FLNparams.VxPLN = -2.3613865675565133
              [Phenology].CAMP.EnvData.VrnTreatTemp = 5.8
              [Phenology].CAMP.EnvData.VrnTreatDuration = 60
              [Phenology].HeadEmergenceLongDayBase.FixedValue = 211.0
              [Phenology].HeadEmergencePpSensitivity.FixedValue = 1.796407285473646
          Cultivar CSIROW105
            Command:
              [Phenology].Phyllochron.BasePhyllochron.FixedValue = 93.3581645003809
              [Phenology].PhyllochronPpSensitivity.FixedValue = 0.233916879031932
              [Phenology].CAMP.FLNparams.MinLN = 5.0
              [Phenology].CAMP.FLNparams.PpLN = 1.0
              [Phenology].CAMP.FLNparams.VrnLN = 1.0
              [Phenology].CAMP.FLNparams.VxPLN = 0.0
              [Phenology].CAMP.EnvData.VrnTreatTemp = 5.8
              [Phenology].CAMP.EnvData.VrnTreatDuration = 60
              [Phenology].HeadEmergenceLongDayBase.FixedValue = 200.0
              [Phenology].HeadEmergencePpSensitivity.FixedValue = 2.0
        Folder APP Generic
          Cultivar Spring Very Quick-Quick
            Command:
              [Phenology].CAMP.FLNparams.MinLN = 5
              [Phenology].CAMP.FLNparams.PpLN = 0.8
              [Phenology].CAMP.FLNparams.VrnLN = 0.9
              [Phenology].CAMP.FLNparams.VxPLN = -0.5
              [Phenology].Phyllochron.BasePhyllochron.FixedValue = 89
              [Phenology].PhyllochronPpSensitivity.FixedValue = 0.3
              [Phenology].CAMP.EnvData.VrnTreatTemp = 5.8
              [Phenology].CAMP.EnvData.VrnTreatDuration = 60
              [Phenology].HeadEmergenceLongDayBase.FixedValue = 201
              [Phenology].HeadEmergencePpSensitivity.FixedValue = 2
          Cultivar Spring Quick
            Command:
              [Phenology].CAMP.FLNparams.MinLN = 6.6
              [Phenology].CAMP.FLNparams.PpLN = 1.9
              [Phenology].CAMP.FLNparams.VrnLN = 1.1
              [Phenology].CAMP.FLNparams.VxPLN = -0.6
              [Phenology].Phyllochron.BasePhyllochron.FixedValue = 91.8
              [Phenology].PhyllochronPpSensitivity.FixedValue = 0.3
              [Phenology].CAMP.EnvData.VrnTreatTemp = 5.8
              [Phenology].CAMP.EnvData.VrnTreatDuration = 60
              [Phenology].HeadEmergenceLongDayBase.FixedValue = 175.6
              [Phenology].HeadEmergencePpSensitivity.FixedValue = 1.4
          Cultivar Spring Quick-Mid
            Command:
              [Phenology].CAMP.FLNparams.MinLN = 6.9
              [Phenology].CAMP.FLNparams.PpLN = 1.9
              [Phenology].CAMP.FLNparams.VrnLN = 2.5
              [Phenology].CAMP.FLNparams.VxPLN = -1.6
              [Phenology].Phyllochron.BasePhyllochron.FixedValue = 98.6
              [Phenology].PhyllochronPpSensitivity.FixedValue = 0.2
              [Phenology].CAMP.EnvData.VrnTreatTemp = 5.8
              [Phenology].CAMP.EnvData.VrnTreatDuration = 60
              [Phenology].HeadEmergenceLongDayBase.FixedValue = 175.8
              [Phenology].HeadEmergencePpSensitivity.FixedValue = 1.2
          Cultivar Spring Mid
            Command:
              [Phenology].CAMP.FLNparams.MinLN = 7.1
              [Phenology].CAMP.FLNparams.PpLN = 3.1
              [Phenology].CAMP.FLNparams.VrnLN = 2.4
              [Phenology].CAMP.FLNparams.VxPLN = -0.9
              [Phenology].Phyllochron.BasePhyllochron.FixedValue = 96.3
              [Phenology].PhyllochronPpSensitivity.FixedValue = 0.3
              [Phenology].CAMP.EnvData.VrnTreatTemp = 5.8
              [Phenology].CAMP.EnvData.VrnTreatDuration = 60
              [Phenology].HeadEmergenceLongDayBase.FixedValue = 154
              [Phenology].HeadEmergencePpSensitivity.FixedValue = 2
          Cultivar Spring Mid-Slow
            Command:
              [Phenology].CAMP.FLNparams.MinLN = 6.8
              [Phenology].CAMP.FLNparams.PpLN = 3.2
              [Phenology].CAMP.FLNparams.VrnLN = 2.1
              [Phenology].CAMP.FLNparams.VxPLN = 0.8
              [Phenology].Phyllochron.BasePhyllochron.FixedValue = 103.3
              [Phenology].PhyllochronPpSensitivity.FixedValue = 0.2
              [Phenology].CAMP.EnvData.VrnTreatTemp = 5.8
              [Phenology].CAMP.EnvData.VrnTreatDuration = 60
              [Phenology].HeadEmergenceLongDayBase.FixedValue = 153
              [Phenology].HeadEmergencePpSensitivity.FixedValue = 2.3
          Cultivar Spring Slow
            Command:
              [Phenology].CAMP.FLNparams.MinLN = 7.3
              [Phenology].CAMP.FLNparams.PpLN = 4
              [Phenology].CAMP.FLNparams.VrnLN = 2.3
              [Phenology].CAMP.FLNparams.VxPLN = 0.8
              [Phenology].Phyllochron.BasePhyllochron.FixedValue = 95.5
              [Phenology].PhyllochronPpSensitivity.FixedValue = 0.3
              [Phenology].CAMP.EnvData.VrnTreatTemp = 5.9
              [Phenology].CAMP.EnvData.VrnTreatDuration = 60
              [Phenology].HeadEmergenceLongDayBase.FixedValue = 230
              [Phenology].HeadEmergencePpSensitivity.FixedValue = 1.5
          Cultivar Spring Slow-Very Slow
            Command:
              [Phenology].CAMP.FLNparams.MinLN =6
              [Phenology].CAMP.FLNparams.PpLN = 3
              [Phenology].CAMP.FLNparams.VrnLN = 1
              [Phenology].CAMP.FLNparams.VxPLN = 3
              [Phenology].Phyllochron.BasePhyllochron.FixedValue = 122.8
              [Phenology].PhyllochronPpSensitivity.FixedValue = 0.1
              [Phenology].CAMP.EnvData.VrnTreatTemp = 5.8
              [Phenology].CAMP.EnvData.VrnTreatDuration = 60
              [Phenology].HeadEmergenceLongDayBase.FixedValue = 190
              [Phenology].HeadEmergencePpSensitivity.FixedValue = 4
          Cultivar Spring Very Slow
            Command:
              [Phenology].CAMP.FLNparams.MinLN = 7
              [Phenology].CAMP.FLNparams.PpLN = 5
              [Phenology].CAMP.FLNparams.VrnLN = 10
              [Phenology].CAMP.FLNparams.VxPLN = -5
              [Phenology].Phyllochron.BasePhyllochron.FixedValue = 100.4
              [Phenology].PhyllochronPpSensitivity.FixedValue = 0.2
              [Phenology].CAMP.EnvData.VrnTreatTemp = 5.8
              [Phenology].CAMP.EnvData.VrnTreatDuration = 60
              [Phenology].HeadEmergenceLongDayBase.FixedValue = 150
              [Phenology].HeadEmergencePpSensitivity.FixedValue = 4
          Cultivar Winter Very-Quick
            Command:
              [Phenology].CAMP.FLNparams.MinLN = 7.3
              [Phenology].CAMP.FLNparams.PpLN = 0
              [Phenology].CAMP.FLNparams.VrnLN = 7.6
              [Phenology].CAMP.FLNparams.VxPLN = -1.7
              [Phenology].Phyllochron.BasePhyllochron.FixedValue = 102.8
              [Phenology].PhyllochronPpSensitivity.FixedValue = 0.2
              [Phenology].CAMP.EnvData.VrnTreatTemp = 5.8
              [Phenology].CAMP.EnvData.VrnTreatDuration = 60
              [Phenology].HeadEmergenceLongDayBase.FixedValue = 193
              [Phenology].HeadEmergencePpSensitivity.FixedValue = 1.5
          Cultivar Winter Quick
            Command:
              [Phenology].CAMP.FLNparams.MinLN = 8.4
              [Phenology].CAMP.FLNparams.PpLN = 0.9
              [Phenology].CAMP.FLNparams.VrnLN = 5.7
              [Phenology].CAMP.FLNparams.VxPLN = 5.5
              [Phenology].Phyllochron.BasePhyllochron.FixedValue = 98
              [Phenology].PhyllochronPpSensitivity.FixedValue = 0.2
              [Phenology].CAMP.EnvData.VrnTreatTemp = 5.8
              [Phenology].CAMP.EnvData.VrnTreatDuration = 60
              [Phenology].HeadEmergenceLongDayBase.FixedValue = 80
              [Phenology].HeadEmergencePpSensitivity.FixedValue = 2.8
          Cultivar Winter Mid
            Command:
              [Phenology].CAMP.FLNparams.MinLN = 8
              [Phenology].CAMP.FLNparams.PpLN = 2.3
              [Phenology].CAMP.FLNparams.VrnLN = 7.8
              [Phenology].CAMP.FLNparams.VxPLN = 0
              [Phenology].Phyllochron.BasePhyllochron.FixedValue = 100.8
              [Phenology].PhyllochronPpSensitivity.FixedValue = 0.2
              [Phenology].CAMP.EnvData.VrnTreatTemp = 5.8
              [Phenology].CAMP.EnvData.VrnTreatDuration = 60
              [Phenology].HeadEmergenceLongDayBase.FixedValue = 132
              [Phenology].HeadEmergencePpSensitivity.FixedValue = 2.8
          Cultivar Winter Very Slow
            Command:
              [Phenology].CAMP.FLNparams.MinLN = 8.5
              [Phenology].CAMP.FLNparams.PpLN = 4
              [Phenology].CAMP.FLNparams.VrnLN = 7.5
              [Phenology].CAMP.FLNparams.VxPLN = 1
              [Phenology].Phyllochron.BasePhyllochron.FixedValue = 109.3
              [Phenology].PhyllochronPpSensitivity.FixedValue = 0.2
              [Phenology].CAMP.EnvData.VrnTreatTemp = 5.9
              [Phenology].CAMP.EnvData.VrnTreatDuration = 60
              [Phenology].HeadEmergenceLongDayBase.FixedValue = 190
              [Phenology].HeadEmergencePpSensitivity.FixedValue = 2
        Folder Turkey
          Cultivar Konya
            Command:
              [Phenology].Phyllochron.BasePhyllochron.FixedValue = 100
              [Grain].NumberFunction.GrainNumber.GrainsPerGramOfStem.FixedValue = 13
              [Grain].MaximumPotentialGrainSize.FixedValue = 0.05
              [Phenology].GrainFilling.Target.FixedValue = 450
              //[Stem].DMRetranslocationFactor.ReproductiveGrowth.DMRetranslocationFactor.FixedValue = 0.2
              //[Stem].DMDemands.Structural.StructuralFraction.VegetativeGrowth.Fraction.FixedValue = 0.6
              //[Leaf].ExtinctionCoeff.VegetativePhase.FixedValue = 0.8
              [Phenology].CAMP.FLNparams.MinLN = 7
              [Phenology].CAMP.FLNparams.PpLN = 2.0
              [Phenology].CAMP.FLNparams.VrnLN = 2
              [Phenology].CAMP.FLNparams.VxPLN = 0.0
        Folder China
          Cultivar Keyu13
            Command:
              [Phenology].Phyllochron.BasePhyllochron.FixedValue = 100
              [Phenology].CAMP.FLNparams.MinLN = 7
              [Phenology].CAMP.FLNparams.PpLN = 3.0
              [Phenology].CAMP.FLNparams.VrnLN = 5
              [Phenology].CAMP.FLNparams.VxPLN = 0.0
        Folder USA
          Cultivar Yecora
            Command:
              [Phenology].Phyllochron.BasePhyllochron.FixedValue = 90
              //[Leaf].CohortParameters.MaxArea.AreaLargestLeaves.FixedValue = 4000
              [Phenology].CAMP.FLNparams.MinLN = 7
              [Phenology].CAMP.FLNparams.PpLN = 2
              [Phenology].CAMP.FLNparams.VrnLN = 2
              [Phenology].CAMP.FLNparams.VxPLN = 2
              [Phenology].HeadEmergenceLongDayBase.FixedValue = 110
              [Phenology].HeadEmergencePpSensitivity.FixedValue = 0
              [Phenology].CAMP.EnvData.VrnTreatTemp = 6
              [Phenology].CAMP.EnvData.VrnTreatDuration = 60
          Cultivar Rex
            Command:
              [Grain].NumberFunction.GrainNumber.GrainsPerGramOfStem.FixedValue = 18
              [Grain].MaximumNConc.FixedValue = 0.02
              [Phenology].CAMP.FLNparams.MinLN = 7
              [Phenology].CAMP.FLNparams.PpLN = 4.0
              [Phenology].CAMP.FLNparams.VrnLN = 6
              [Phenology].CAMP.FLNparams.VxPLN = 0.0
          Cultivar Nugaines
            Command:
              [Grain].NumberFunction.GrainNumber.GrainsPerGramOfStem.FixedValue = 20
              [Grain].MaximumNConc.FixedValue = 0.02
              [Phenology].CAMP.FLNparams.MinLN = 7
              [Phenology].CAMP.FLNparams.PpLN = 4.0
              [Phenology].CAMP.FLNparams.VrnLN = 6
              [Phenology].CAMP.FLNparams.VxPLN = 0.0
          Cultivar Hyslop
            Command:
              [Grain].NumberFunction.GrainNumber.GrainsPerGramOfStem.FixedValue = 22
              [Grain].MaximumNConc.FixedValue = 0.02
              [Phenology].CAMP.FLNparams.MinLN = 7
              [Phenology].CAMP.FLNparams.PpLN = 4.0
              [Phenology].CAMP.FLNparams.VrnLN = 6
              [Phenology].CAMP.FLNparams.VxPLN = 0.0
          Cultivar Stephens
            Command:
              [Grain].NumberFunction.GrainNumber.GrainsPerGramOfStem.FixedValue = 25
              [Grain].MaximumNConc.FixedValue = 0.02
              [Phenology].CAMP.FLNparams.MinLN = 7
              [Phenology].CAMP.FLNparams.PpLN = 4.0
              [Phenology].CAMP.FLNparams.VrnLN = 6
              [Phenology].CAMP.FLNparams.VxPLN = 0.0
        Folder Europe
          Cultivar Dekan
            Command:
              [Phenology].HeadEmergencePpSensitivity.FixedValue = 3
              [Phenology].Phyllochron.BasePhyllochron.FixedValue = 100.0
              //[Leaf].ExtinctionCoeff.VegetativePhase.FixedValue = 0.8
              [Phenology].PhyllochronPpSensitivity.FixedValue = 0.6
              [Phenology].CAMP.FLNparams.MinLN = 9
              [Phenology].CAMP.FLNparams.PpLN = 3.0
              [Phenology].CAMP.FLNparams.VrnLN = 7
              [Phenology].CAMP.FLNparams.VxPLN = 0.0
          Cultivar Rosario: same as Replacements.Wheat.Cultivars.Europe.Dekan
          Cultivar Ararat: same as Replacements.Wheat.Cultivars.Europe.Dekan
          Cultivar Tybalt
            Command:
              [Phenology].Phyllochron.BasePhyllochron.FixedValue = 90.0
              [Phenology].PhyllochronPpSensitivity.FixedValue = 0.6
              [Phenology].CAMP.FLNparams.MinLN = 9.0
              [Phenology].CAMP.FLNparams.PpLN = 0.0
              [Phenology].CAMP.FLNparams.VrnLN = 0.0
              [Phenology].CAMP.FLNparams.VxPLN = 0.0
              [Phenology].HeadEmergenceLongDayBase.FixedValue = 145
              [Phenology].HeadEmergencePpSensitivity.FixedValue = 0.0
              [Phenology].CAMP.EnvData.VrnTreatTemp = 6
              [Phenology].CAMP.EnvData.VrnTreatDuration = 60
        Folder Africa
          Cultivar HAR1685
            Command:
              [Phenology].Phyllochron.BasePhyllochron.FixedValue = 100
              [Grain].NumberFunction.GrainNumber.GrainsPerGramOfStem.FixedValue = 17
              [Phenology].GrainFilling.Target.FixedValue = 350
              [Phenology].CAMP.FLNparams.MinLN = 7
              [Phenology].CAMP.FLNparams.PpLN = 3.0
              [Phenology].CAMP.FLNparams.VrnLN = 0
              [Phenology].CAMP.FLNparams.VxPLN = 0.0
        Folder Iran
          Cultivar Gorgan
            Command:
              [Phenology].Phyllochron.BasePhyllochron.FixedValue = 100
              [Phenology].CAMP.FLNparams.MinLN = 7
              [Phenology].CAMP.FLNparams.PpLN = 4.0
              [Phenology].CAMP.FLNparams.VrnLN = 0
              [Phenology].CAMP.FLNparams.VxPLN = 0.0
        Folder Preliminary
          Cultivar Accroc: same as Replacements.Wheat.Cultivars.APP Generic.Winter Very Slow
          Cultivar Cesario: same as Replacements.Wheat.Cultivars.APP Generic.Winter Very Slow
          Cultivar Anapurna: same as Replacements.Wheat.Cultivars.APP Generic.Winter Very Slow
          Cultivar RockStar: same as Replacements.Wheat.Cultivars.APP Generic.Spring Mid
          Cultivar Calibro: same as Replacements.Wheat.Cultivars.APP Generic.Winter Very Slow
          Cultivar BigRed: same as Replacements.Wheat.Cultivars.APP Generic.Winter Very Slow
          Cultivar Catapult: same as Replacements.Wheat.Cultivars.APP Generic.Spring Mid
          Cultivar Stockade: same as Replacements.Wheat.Cultivars.APP Generic.Spring Slow
          Cultivar Mowhawk
            Command:
              [Phenology].CAMP.FLNparams.MinLN = 8
              [Phenology].CAMP.FLNparams.PpLN = 2.3
              [Phenology].CAMP.FLNparams.VrnLN = 7.8
              [Phenology].CAMP.FLNparams.VxPLN = 0
              [Phenology].Phyllochron.BasePhyllochron.FixedValue = 100
              [Phenology].PhyllochronPpSensitivity.FixedValue = 0.2
              [Phenology].CAMP.EnvData.VrnTreatTemp = 5.8
              [Phenology].CAMP.EnvData.VrnTreatDuration = 60
              [Phenology].HeadEmergenceLongDayBase.FixedValue = 132
              [Phenology].HeadEmergencePpSensitivity.FixedValue = 2.8
          Cultivar Waugh: same as Replacements.Wheat.Cultivars.APP Generic.Winter Very Slow
          Cultivar Einstein: same as Replacements.Wheat.Cultivars.APP Generic.Winter Very Slow
          Cultivar Zanzibar: same as Replacements.Wheat.Cultivars.APP Generic.Spring Slow
          Cultivar Longford: same as Replacements.Wheat.Cultivars.APP Generic.Winter Very Slow
          Cultivar Conqueror: same as Replacements.Wheat.Cultivars.APP Generic.Winter Very Slow
          Cultivar Genius: same as Replacements.Wheat.Cultivars.APP Generic.Winter Very Slow
          Cultivar Vixin: same as Replacements.Wheat.Cultivars.APP Generic.Spring Quick
          Cultivar Meering
            Command:
              [Phenology].CAMP.FLNparams.MinLN = 7.1
              [Phenology].CAMP.FLNparams.PpLN = 3.1
              [Phenology].CAMP.FLNparams.VrnLN = 2.4
              [Phenology].CAMP.FLNparams.VxPLN = -0.9
              [Phenology].Phyllochron.BasePhyllochron.FixedValue = 100
              [Phenology].PhyllochronPpSensitivity.FixedValue = 0.3
              [Phenology].CAMP.EnvData.VrnTreatTemp = 5.8
              [Phenology].CAMP.EnvData.VrnTreatDuration = 60
              [Phenology].HeadEmergenceLongDayBase.FixedValue = 154
              [Phenology].HeadEmergencePpSensitivity.FixedValue = 1
          Cultivar Sunmaster
            Command:
              [Phenology].CAMP.FLNparams.MinLN = 7.1
              [Phenology].CAMP.FLNparams.PpLN = 3.1
              [Phenology].CAMP.FLNparams.VrnLN = 2.4
              [Phenology].CAMP.FLNparams.VxPLN = -0.9
              [Phenology].Phyllochron.BasePhyllochron.FixedValue = 100
              [Phenology].PhyllochronPpSensitivity.FixedValue = 0.3
              [Phenology].CAMP.EnvData.VrnTreatTemp = 5.8
              [Phenology].CAMP.EnvData.VrnTreatDuration = 60
              [Phenology].HeadEmergenceLongDayBase.FixedValue = 154
              [Phenology].HeadEmergencePpSensitivity.FixedValue = 2
          Cultivar Osprey
            Command:
              [Phenology].CAMP.FLNparams.MinLN = 8
              [Phenology].CAMP.FLNparams.PpLN = 2.3
              [Phenology].CAMP.FLNparams.VrnLN = 7.8
              [Phenology].CAMP.FLNparams.VxPLN = 0
              [Phenology].Phyllochron.BasePhyllochron.FixedValue = 95
              [Phenology].PhyllochronPpSensitivity.FixedValue = 0.2
              [Phenology].CAMP.EnvData.VrnTreatTemp = 5.8
              [Phenology].CAMP.EnvData.VrnTreatDuration = 60
              [Phenology].HeadEmergenceLongDayBase.FixedValue = 132
              [Phenology].HeadEmergencePpSensitivity.FixedValue = 2.8
          Cultivar Whistler
            Command:
              [Phenology].CAMP.FLNparams.MinLN = 8
              [Phenology].CAMP.FLNparams.PpLN = 2.3
              [Phenology].CAMP.FLNparams.VrnLN = 7.8
              [Phenology].CAMP.FLNparams.VxPLN = 0
              [Phenology].Phyllochron.BasePhyllochron.FixedValue = 100
              [Phenology].PhyllochronPpSensitivity.FixedValue = 0.0
              [Phenology].CAMP.EnvData.VrnTreatTemp = 5.8
              [Phenology].CAMP.EnvData.VrnTreatDuration = 60
              [Phenology].HeadEmergenceLongDayBase.FixedValue = 132
              [Phenology].HeadEmergencePpSensitivity.FixedValue = 2.8
          Cultivar Wylah: same as Replacements.Wheat.Cultivars.Preliminary.Mowhawk
          Cultivar UOM001_3_47: same as Replacements.Wheat.Cultivars.APP Generic.Spring Mid
          Cultivar UOM001_9_1: same as Replacements.Wheat.Cultivars.APP Generic.Spring Mid
  Experiment WaggaWagga2024
    DisabledSimNames=[WaggaWagga2024CvMeeringSow22-Apr, WaggaWagga2024CvJanzSow22-Apr, WaggaWagga2024CvYitpiSow22-Apr, WaggaWagga2024CvWyalkatchemSow22-Apr, WaggaWagga2024CvGregorySow22-Apr, WaggaWagga2024CvMaceSow22-Apr, WaggaWagga2024CvScepterSow22-Apr, WaggaWagga2024CvSunmasterSow22-Apr, WaggaWagga2024CvOspreySow13-May, WaggaWagga2024CvRosellaSow13-May, WaggaWagga2024CvWhistlerSow13-May, WaggaWagga2024CvWylahSow13-May, WaggaWagga2024CvWedgetailSow13-May, WaggaWagga2024CvKittyhawkSow13-May, WaggaWagga2024CvIllaboSow13-May, WaggaWagga2024CvMowhawkSow13-May, DookieWaggaWagga2024CvMeeringSow22-Apr, DookieWaggaWagga2024CvJanzSow22-Apr, DookieWaggaWagga2024CvYitpiSow22-Apr, DookieWaggaWagga2024CvWyalkatchemSow22-Apr, DookieWaggaWagga2024CvGregorySow22-Apr, DookieWaggaWagga2024CvMaceSow22-Apr, DookieWaggaWagga2024CvScepterSow22-Apr, DookieWaggaWagga2024CvSunmasterSow22-Apr, DookieWaggaWagga2024CvOspreySow13-May, DookieWaggaWagga2024CvRosellaSow13-May, DookieWaggaWagga2024CvWhistlerSow13-May, DookieWaggaWagga2024CvWylahSow13-May, DookieWaggaWagga2024CvWedgetailSow13-May, DookieWaggaWagga2024CvKittyhawkSow13-May, DookieWaggaWagga2024CvIllaboSow13-May, DookieWaggaWagga2024CvMowhawkSow13-May, DookieWWHI2024CvMowhawkSow14-May, DookieWWHI2024CvIllaboSow14-May, DookieWWHI2024CvKittyhawkSow14-May, DookieWWHI2024CvWedgetailSow14-May, DookieWWHI2024CvWylahSow14-May, DookieWWHI2024CvWhistlerSow14-May, DookieWWHI2024CvRosellaSow14-May, DookieWWHI2024CvOspreySow14-May, DookieWWHI2024CvSunmasterSow17-Apr, DookieWWHI2024CvScepterSow17-Apr, DookieWWHI2024CvMaceSow17-Apr, DookieWWHI2024CvGregorySow17-Apr, DookieWWHI2024CvWyalkatchemSow17-Apr, DookieWWHI2024CvYitpiSow17-Apr, DookieWWHI2024CvJanzSow17-Apr, DookieWWHI2024CvMeeringSow17-Apr]
    Memo Description
      **Experiment name**

      Harvest index in historic winter and spring wheat cultivars

      **Aim**

      To quantify genetic yield gain and phenotypic shifts in Australian winter and spring wheat cultivars due to selection for yield, and elucidate the mechaism responsible for reduced HI in winter wheat

      **Research question**
      - What has been the comparitive genetic yield gain in Australian winter and spring wheat cultivars?

      - What phenotypic shifts have been associated with selection for yield in winter and spring wheat cultivars?

      - What are the phenotypic differences between spring and winter wheat that cause comparitively lower HI in winter wheat?

      **Treatments**

      Cultivar nested within habit (spring vs winter) with habit confounded by sow time

      	Habit	Sow time	Sow order	Cultivar	Year of release
      	Winter	mid April	1	Osprey	1983
      	Winter	mid April	1	Rosella	1985
      	Winter	mid April	1	Whistler	1998
      	Winter	mid April	1	Wylah	1999
      	Winter	mid April	1	EGA_Wedgetail	2002
      	Winter	mid April	1	LRPB_Kittyhawk	2016
      	Winter	mid April	1	Illabo	2018
      	Winter	mid April	1	LRPB_Mohawk	2023
      	Spring	mid May	2	Meering	1984
      	Spring	mid May	2	Janz	1989
      	Spring	mid May	2	Yitpi	1999
      	Spring	mid May	2	Wyalkatchem	2001
      	Spring	mid May	2	EGA_Gregory	2004
      	Spring	mid May	2	Mace	2008
      	Spring	mid May	2	Scepter	2016
      	Spring	mid May	2	Sunmaster	2023

      17/04/2024
      Applied 15mm irrigation via lateral to PHDA24WARI2 site to ensure germination

      14/05/2024
      Irrigate all lateral experiments with 15mm irrigation to ensure establishment.

      27/05/2024
      Site irrigated with 6mm to alleviate soil crusting.
    Factors
      Permutation
        Factor Cv
          Memo Emergence dates
            Emergence dates were set to the observed date of 50% emergence for most cultivars except some of the early sown ones that had a protracted emergence period.  For them emergence date was set prior to 50% at more like 20%
          CompositeFactor Osprey
            Specifications:
              //[Sowing].Script.CultivarName = Osprey
              [Sowing].Script.Population = 200
              [Sowing].Script.EmergeDate = 28-Apr
          CompositeFactor Rosella
            Specifications:
              //[Sowing].Script.CultivarName = Rosella
              [Sowing].Script.Population = 200
              [Sowing].Script.EmergeDate = 28-Apr
          CompositeFactor Whistler
            Specifications:
              //[Sowing].Script.CultivarName = Whistler
              [Sowing].Script.Population = 200
              [Sowing].Script.EmergeDate = 28-Apr
          CompositeFactor Wylah
            Specifications:
              //[Sowing].Script.CultivarName = Wylah
              [Sowing].Script.Population = 200
              [Sowing].Script.EmergeDate = 26-Apr
          CompositeFactor Wedgetail
            Specifications:
              //[Sowing].Script.CultivarName = Wedgetail
              [Sowing].Script.Population = 200
              [Sowing].Script.EmergeDate = 28-Apr
          CompositeFactor Kittyhawk
            Specifications:
              //[Sowing].Script.CultivarName = Kittyhawk
              [Sowing].Script.Population = 200
              [Sowing].Script.EmergeDate = 27-Apr
          CompositeFactor Illabo
            Specifications:
              //[Sowing].Script.CultivarName = Illabo
              [Sowing].Script.Population = 200
              [Sowing].Script.EmergeDate = 27-Apr
          CompositeFactor Mowhawk
            Specifications:
              //[Sowing].Script.CultivarName = Mowhawk
              [Sowing].Script.Population = 200
              [Sowing].Script.EmergeDate = 28-Apr
          CompositeFactor Meering
            Specifications:
              //[Sowing].Script.CultivarName = Meering
              [Sowing].Script.Population = 200
              [Sowing].Script.EmergeDate = 25-May
          CompositeFactor Janz
            Specifications:
              //[Sowing].Script.CultivarName = Janz
              [Sowing].Script.Population = 200
              [Sowing].Script.EmergeDate = 27-May
          CompositeFactor Yitpi
            Specifications:
              //[Sowing].Script.CultivarName = Yitpi
              [Sowing].Script.Population = 200
              [Sowing].Script.EmergeDate = 26-May
          CompositeFactor Wyalkatchem
            Specifications:
              //[Sowing].Script.CultivarName = Wyalkatchem
              [Sowing].Script.Population = 200
              [Sowing].Script.EmergeDate = 26-May
          CompositeFactor Gregory
            Specifications:
              //[Sowing].Script.CultivarName = Gregory
              [Sowing].Script.Population = 200
              [Sowing].Script.EmergeDate = 26-May
          CompositeFactor Mace
            Specifications:
              //[Sowing].Script.CultivarName = Mace
              [Sowing].Script.Population = 200
              [Sowing].Script.EmergeDate = 27-May
          CompositeFactor Scepter
            Specifications:
              //[Sowing].Script.CultivarName = Scepter
              [Sowing].Script.Population = 200
              [Sowing].Script.EmergeDate = 27-May
          CompositeFactor Sunmaster
            Specifications:
              //[Sowing].Script.CultivarName = Sunmaster
              [Sowing].Script.Population = 200
              [Sowing].Script.EmergeDate = 27-May
        Factor Sow
          CompositeFactor 22-Apr: Specifications=[Sowing].Script.SowDate = 22-Apr
          CompositeFactor 13-May: Specifications=[Sowing].Script.SowDate = 13-May
    Simulation Wagga
      Weather: FileName=%root%/Tests/Validation/Wheat/met/WaggaWagga2024.met
      Clock: Start=2024-04-22; End=2024-11-22
      Summary
      SoilArbitrator
      MicroClimate: a_interception=0; b_interception=1; c_interception=0; d_interception=0; SoilHeatFluxFraction=0.4; MinimumHeightDiffForNewLayer=0; NightInterceptionFraction=0.5; ReferenceHeight=2
      Manager LocationInfo
        Country = Australia
        State = Western Australia
        Region = South West
```csharp
using Models.Soils;
using System;
using Models.Core;
using Models.PMF;
using APSIM.Shared.Utilities;

namespace Models
{
    [Serializable]
    public class Script : Model
    {
        [Link] Clock Clock;
        [Link] Fertiliser Fertiliser;
        [Link] Summary Summary;
        
        [Description("Country")]
        public string Country { get; set; }

        [Description("State")]
        public string State { get; set; }

        [Description("Region")]
        public string Region { get; set; }

    }
}
```
      Zone Field: Area=1; Slope=0; AspectAngle=0; Altitude=0
        Fertiliser
        Soil Soil 1150: SoilType=Sandy duplex; LocalName=Ironstone gravelly soils; Site=Tenterden; NearestTown=Tenterden; Region=Southern Region; State=Western Australia; Country=Australia; ApsoilNumber=1150; Latitude=-34.442704; Longitude=117.394537; LocationAccuracy=+/- 20m; YearOfSampling=2015; DataSource=Rob Summers DAFWA
          Comments=gravel - Wa2 - Sb diff 6 - gravelly sandy earth light clay at depth
          Physical
            Thickness  ParticleSizeSand  ParticleSizeSilt  ParticleSizeClay  Rocks  BD    AirDry  LL15   DUL   SAT
            100        87.81             6.15              6.05              0      1.38  0.1     0.1    0.24  0.264
            100        86.18             4.95              8.86              0      1.4   0.1     0.1    0.24  0.264
            200        86.18             4.95              8.86              0      1.44  0.12    0.12   0.25  0.275
            200        88.29             3.92              7.79              0      1.44  0.12    0.12   0.25  0.275
            200        88.29             3.92              7.79              0      1.44  0.15    0.15   0.28  0.308
            200        88.29             3.92              7.79              0      1.44  0.15    0.15   0.28  0.308
            200        84.27             2.96              12.77             0      1.57  0.15    0.15   0.33  0.363
            200        84.27             2.96              12.77             0      1.57  0.17    0.17   0.33  0.363
            200        84.27             2.96              12.77             0      1.57  0.2     0.2    0.33  0.363
            200        84.27             2.96              12.77             0      1.57  0.252   0.252  0.31  0.342
            SoilCrop wheatSoil
              LL=[0.1, 0.1, 0.12, 0.12, 0.15, 0.15, 0.15, 0.17, 0.2, 0.252]
              KL=[0.06, 0.06, 0.06, 0.06, 0.04, 0.04, 0.04, 0.02, 0.02, 0.01]
              XF=[1, 1, 1, 1, 1, 1, 1, 1, 1, 1]
          WaterBalance SoilWater: SummerDate=1-Nov; SummerU=6; SummerCona=3.5; WinterDate=1-Apr; WinterU=2; WinterCona=2; DiffusConst=88; DiffusSlope=35; Salb=0.12; CN2Bare=73; CNRed=20; CNCov=0.8; PSIDul=-100; Thickness=[100, 100, 100, 100, 100, 100, 100]; SWCON=[0.5, 0.5, 0.5, 0.5, 0.3, 0.3, -]
          Organic: FOMCNRatio=40; CarbonUnits=Total
            Thickness  Carbon  SoilCNRatio  FBiom  FInert  FOM
            100        0.72    12           0.035  0.4     315.5
            100        0.29    12           0.02   0.5     127.3
            200        0.25    12           0.02   0.5     127.3
            200        0.26    12           0.02   0.7     61.6
            200        0.2     12           0.02   0.7     61.6
            200        0.18    12           0.02   0.7     61.6
            200        0.1     12           0.015  0.7     60.5
            200        0.1     12           0.015  0.7     60.1
            200        0.1     12           0.015  0.867   58.2
            200        0.1     12           0.015  0.95    42.2
          Chemical: PHUnits=Water
            Thickness  PH   EC     ESP    CEC
            100        5.1  0.132  0.026  7.003
            100        5.2  0.085  0.052  4.205
            200        6.3  0.085  0.052  4.205
            200        7.2  0.065  0.064  3.411
            200        7.6  0.065  0.064  3.411
            200        7.9  0.065  0.064  3.411
            200        7.9  0.064  0.083  3.514
            200        7.9  0.064  0.083  3.514
            200        8    0.087  0.125  4.193
            200        8.1  0.098  0.146  4.533
          Nutrient
          Solute NO3: Thickness=[100, 100, 200, 200, 200, 200, 200, 200, 200, 200]; InitialValuesUnits=ppm; WaterTableConcentration=0; D0=0; DepthConstant=0; MaxDepthSoluteAccessible=0; RunoffEffectivenessAtMovingSolute=0; MaxEffectiveRunoff=0
            InitialValues=[25.25, 25.875, 15.375, 9.2125, 5.3375, 3.475, 3.1875, 2.9125, 2.48, 4.4]
          Solute NH4: Thickness=[100, 100, 200, 200, 200, 200, 200, 200, 200, 200]; InitialValues=[5.925, 3.55, 2.525, 2.2, 3, 2.6375, 3, 2.7125, 4.24, 1.6]; InitialValuesUnits=ppm; WaterTableConcentration=0; D0=0; DepthConstant=0; MaxDepthSoluteAccessible=0; RunoffEffectivenessAtMovingSolute=0; MaxEffectiveRunoff=0
          Solute Urea: Thickness=[100, 100, 200, 200, 200, 200, 200, 200, 200, 200]; InitialValues=[0, 0, 0, 0, 0, 0, 0, 0, 0, 0]; InitialValuesUnits=kg/ha; WaterTableConcentration=0; D0=0; DepthConstant=0; MaxDepthSoluteAccessible=0; RunoffEffectivenessAtMovingSolute=0; MaxEffectiveRunoff=0
          Water: Thickness=[100, 100, 200, 200, 200, 200, 200, 200, 200, 200]; FilledFromTop=true
            InitialValues=[0.24, 0.24, 0.25, 0.25, 0.28, 0.28, 0.33, 0.33, 0.33, 0.31]
          SoilTemperature CERESSoilTemperature
          CERESSoilTemperature Temperature
        Irrigation
        SurfaceOrganicMatter: InitialResidueName=Canola stubble; InitialResidueType=canola; InitialResidueMass=3000; InitialStandingFraction=0.7; InitialCPR=0; InitialCNR=70
        Plant Wheat
          Cultivar Mowhawk
            Command:
              [Phenology].Phyllochron.BasePhyllochron.FixedValue = 90
              [Phenology].PhyllochronPpSensitivity.FixedValue = 0.212225680614483
              [Phenology].CAMP.FLNparams.MinLN = 8
              [Phenology].CAMP.FLNparams.PpLN = 3.0
              [Phenology].CAMP.FLNparams.VrnLN = 6.0
              [Phenology].CAMP.FLNparams.VxPLN = 1.0
              [Phenology].CAMP.EnvData.VrnTreatTemp = 5.8
              [Phenology].CAMP.EnvData.VrnTreatDuration = 60
              [Phenology].HeadEmergenceLongDayBase.FixedValue = 170
              [Phenology].HeadEmergencePpSensitivity.FixedValue = 0.0
            Memo
              Placeholder cultivar Mowhawk based on DefaultCv.
          Cultivar Osprey: same as WaggaWagga2024.Wagga.Field.Wheat.Mowhawk
          Cultivar Wylah: same as WaggaWagga2024.Wagga.Field.Wheat.Mowhawk
          Cultivar Meering: same as WaggaWagga2024.Wagga.Field.Wheat.Mowhawk
          Cultivar Sunmaster: same as WaggaWagga2024.Wagga.Field.Wheat.Mowhawk
        Operations IrrigationAppliedAmounts
          2024-04-01  [Irrigation].Apply (15);
          2024-05-04  [Irrigation].Apply (15);
          2024-05-09  [Irrigation].Apply (6);
        Operations FertiliserAppliedAmounts
          2024-04-22  [Fertiliser].Apply(amount: 100, type: "MAP");
          2024-05-13  [Fertiliser].Apply(amount: 100, type: "MAP");
          Memo
            FIXME: These are conditional to cv instead (not for both) ... i.e., at sowing
        Manager Sowing
          SowDate = 1-may
          Treat =
          CultivarName = Hartog
          SowingDepth = 30
          RowSpacing = 225
          Population = 180
          EmergeDate =
```csharp
using Newtonsoft.Json;
using System.Data;
using System.Xml.Serialization;
using Models;
using System.Text;
using System.Collections.Generic;
using Models.Interfaces;
using System;
using Models.Core;
using Models.PMF;
using Models.Soils;
using Models.Utilities;
using APSIM.Shared.Utilities;

namespace Models
{
    [Serializable]
    public class Script : Model
    {
        [Link] Clock Clock;
        [Link] Fertiliser Fertiliser;
        [Link] Summary Summary;
        [Link] Soil Soil;
        [Link(ByName = true)] Plant Wheat;
        [Link] Simulation Simulation;
        Accumulator accumulatedRain;
        
        [Description("Sowing date (d-mmm)")]
        public string SowDate { get; set; }
        [Description("Treatment Name")]
        public string Treat { get; set; }
        [Display(Type = DisplayType.CultivarName)]
        [Description("Cultivar to be sown")]
        public string CultivarName { get; set; }
        [Description("Sowing depth (mm)")]
        public double SowingDepth { get; set; }
        [Description("Row spacing (mm)")]
        public double RowSpacing { get; set; }
        [Description("Plant population (/m2)")]
        public double Population { get; set; }
        [Description("Emergence Date (d-MMM)")]
        public string EmergeDate {get; set;}



        [EventSubscribe("DoManagement")]
        private void OnDoManagement(object sender, EventArgs e)
        {

            if (DateUtilities.WithinDates(SowDate, Clock.Today, SowDate))
            {
               Wheat.Sow(population: Population, cultivar: CultivarName, depth: SowingDepth, rowSpacing: RowSpacing);   
               Wheat.Phenology.SetPhaseCompletionDate(EmergeDate,"Emerging"); 
            }            
        
        }
        
    }
}
```
        Manager Fertilize
          FertiliserType = UreaN
          FertiliserDates = 26-jul, 26-aug
          FertiliseDepth = 0
          Amount = 70.5
          AmountType = True
```csharp
using Models.Soils;
using System;
using System.Linq;
using Models.Core;
using Models.PMF;
using APSIM.Shared.Utilities;
namespace Models
{
    [Serializable]
    public class Script : Model
    {
        [Link] Clock Clock;
        [Link] Fertiliser Fertiliser;
        
        [Separator("A component to apply fertiliser on one or more dates on every year of the simulation")]

        [Description("Type of fertiliser to apply? ")] 
        [Display(Type = DisplayType.FertiliserType)]public string FertiliserType { get; set; }

        [Description("Enter the fertilisation dates as dd-mmm with comma separation (any year information entered will be ignored): ")] 
        public string[] FertiliserDates { get; set; } 
        
        [Description("Fertilise depth (mm)")]
        public double FertiliseDepth { get; set; }

        [Description("Amount of fertiliser to be applied (kg /ha)")] 
        public double Amount { get; set; }

        [Description("Is the above amount to be applied each time? (yes/ticked)? Or is it the total annual amount across all dates (no/unticked)")] 
        public bool AmountType { get; set; }

        
        [EventSubscribe("DoManagement")]
        private void OnDoManagement(object sender, EventArgs e)
        {
            foreach (string ddMMM in FertiliserDates)
            {
                if (DateUtilities.DatesEqual(ddMMM, Clock.Today))
                {
                    if (AmountType)
                        Fertiliser.Apply(amount: Amount, type: FertiliserType);
                    else
                        Fertiliser.Apply(amount: Amount / FertiliserDates.Length, type: FertiliserType, depth: FertiliseDepth);
                }
            }
        }
    }
}
```
        Manager Harvest
          NoHarvestBefore = 25-Nov
```csharp
using APSIM.Core;
using Models.Soils.Nutrients;
using System;
using Models.Core;
using System.Collections.Generic;
using System.Text;
using Models.Soils;
using Models.PMF;
using Models;
using System.Xml.Serialization;
using APSIM.Shared.Utilities;
using Models.PMF.Phen;

namespace Models
{
    [Serializable]
    public class Script : Model, IStructureDependency
    {
        [Link(ByName = true)] private Plant Wheat;
        [Link] private Simulation sim;
        [Link] private Clock clock;
        [Link] private Summary summary;
        public IStructure Structure { private get; set; }
        
        [Description("Prevent harvesting before: ")]
        public string NoHarvestBefore {get; set;}
        

        

        [EventSubscribe("DoManagement")]
        private void OnDoManagement(object sender, EventArgs e)
        {
            if (Wheat.IsReadyForHarvesting && DateUtilities.CompareDates(NoHarvestBefore, clock.Today) >= 0)
            {
                Wheat.Harvest();
                Wheat.EndCrop();
            }
        }
        
        [EventSubscribe("EndOfDay")]
        private void OnEndOfDay(object sender, EventArgs e)
        {
            if ((clock.Today.Equals(clock.EndDate))&&(Wheat.IsAlive))
            {
                Wheat.Harvest();
                Wheat.EndCrop();
                Structure.Set("Clock.EndDate", clock.Today, relativeTo: sim);
            }
        }
    }
}
```
        Manager Irrigate
          IrrigateDates = 1-May
          Amount = 5
          Depth = 0
          Efficiency = 1
          WillRunoff = False
```csharp
using Models.Soils;
using System;
using System.Linq;
using Models.Core;
using Models.PMF;
using APSIM.Shared.Utilities;
namespace Models
{
    [Serializable]
    public class Script : Model
    {
        [Link] Clock Clock;
        [Link] Irrigation Irrigation;
        
        [Separator("A component to apply irrigation on one or more dates on every year of the simulation")]

        [Description("Enter the irrigation dates as dd-mmm with comma separation (any year information entered will be ignored)")] 
        public string[] IrrigateDates { get; set; }
        
        [Description("Amount of irrigation to be applied (mm)")] 
        public double Amount { get; set; }
        
        [Description("Depth in the soil to apply the  irrigation (mm)")] 
        public double Depth { get; set; }
        
        [Description("Efficiency of irrigation (0-1)")] 
        public double Efficiency { get; set; }
        
        [Description("Will the irrigation runoff?")] 
        public bool WillRunoff { get; set; }
        
        [EventSubscribe("DoManagement")]
        private void OnDoManagement(object sender, EventArgs e)
        {
            foreach (string ddMMM in IrrigateDates)
            {
                if (DateUtilities.DatesEqual(ddMMM, Clock.Today))
                    Irrigation.Apply(amount: Amount, depth: Depth, efficiency: Efficiency, willRunoff: WillRunoff);
            }
        }
    }
}
```
        Spectral: DrySoilNDVI=0.1; WetSoilNDVI=0.2; GreenCropNDVI=0.95; DeadCropNDVI=0.15
        Report DailyReport
        Report HarvestReport
        Report NDVIDailyReport
        Report ReportPhenoDates: EventNames=[Clock].StartOfDay
          VariableNames:
            [Clock].Today
            [Wheat].Phenology.Stage
            [Wheat].Phenology.HaunStage
        SetModelParamsBySimulation SetPhenoDatesExternally: SetEventName=[Plant].PlantSowing
          ParameterFile=%root%/Tests/Validation/Wheat/inputs/WaggaWagga2024_PhenoDatesInput.csv
        SetModelParamsBySimulation SetHaunRelatedExternally: SetEventName=[Plant].PlantSowing
          ParameterFile=%root%/Tests/Validation/Wheat/inputs/WaggaWagga2024_HaunStagesInput.csv
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