Simulations: Version=206
  Memo TitlePage
    # The APSIM Wheat Model

    _Brown, H.E., Huth, N.I. and Holzworth, D.P._
  Memo Introduction
    The APSIM wheat model has been developed using the Plant Modelling Framework (PMF) of [brown_plant_2014]. This new framework provides a library of plant organ and process submodels that can be coupled, at runtime, to construct a model in much the same way that models can be coupled to construct a simulation. This means that dynamic composition of lower level process and organ classes (e.g. photosynthesis, leaf) into larger constructions (e.g. maize, wheat, sorghum) can be achieved by the model developer without additional coding.

    The wheat model consists of:

    * a phenology model to simulate development through sequential developmental phases
    * a structure model to simulate plant morphology
    * a collection of organs to simulate the various plant parts
    * an arbitrator to allocate resources (N, biomass) to the various plant organs

    This work builds upon earlier APSIM Wheat models such as NWheat ([Asseng200225], [KeatingNWheat]), NWheatS ([Asseng1998163]), Cropmod-Wheat ([Wang2002GenericCropModel]), and the earlier versions developed in Plant (<a href=\"http://www.apsim.info/Documentation/Model,CropandSoil/CropModuleDocumentation/Wheat.aspx">APSIM Wheat 7.5</a>") and then within the Plant Modelling Framework ([brown_plant_2014]).
  DataStore
    ExcelInput ExcelMultiInput: FileNames=[Observed/Dookie2025_Observed.xlsx]; SheetNames=[Observed]
    PredictedObserved DailyObsPred: PredictedTableName=DailyReport; ObservedTableName=Observed; FieldNameUsedForMatch=SimulationName; FieldName2UsedForMatch=Clock.Today; AllColumns=false
      Tests: POName=DailyObsPred
        AcceptedStats:
          Name                   n     Slope         Intercept   SEslope      SEintercept  R2           RMSE       NSE         ME          MAE         RSR       RMR
          ET                     123   1.13169       -0.428525   0.0437149    0.169573     0.847065     0.75711    0.750672    0.0416707   0.558234    0.497294  0
          ProfileWater           1327  0.876588      76.0389     0.0130203    5.47947      0.7738       58.7876    0.702733    25.8355     33.06       0.545016  0
          Soil.SoilWater.SW(1)   1300  0.000187106   0.209326    0.000113886  0.00216848   0.00207521   18.9789    -0.0810339  -5.20763    5.28548     1.03933   0
          Soil.SoilWater.SW(10)  8     -0.411168     0.612361    0.204164     0.087484     0.403332     0.0113816  -3.15811    0.00772724  0.00919543  1.90744   0
          Soil.SoilWater.SW(2)   1323  -9.03035e-05  0.237103    7.90585e-05  0.00185795   0.000986689  23.4358    -0.0848838  -6.54813    6.60052     1.04118   0
          Soil.SoilWater.SW(3)   1323  7.41365e-05   0.225765    6.63683e-05  0.00193967   0.000943693  29.1595    -0.0857037  -8.19945    8.22086     1.04158   0
          Soil.SoilWater.SW(4)   1323  0.00032245    0.209832    5.67479e-05  0.00181599   0.0238581    31.9313    -0.0847602  -8.95944    8.97693     1.04112   0
          Soil.SoilWater.SW(5)   1323  0.000184327   0.244192    5.45151e-05  0.00180824   0.00858025   33.0939    -0.0856543  -9.31536    9.33089     1.04155   0
          Soil.SoilWater.SW(6)   1218  0.983201      0.00665286  0.00580358   0.00166975   0.959354     0.0168556  0.958159    0.00202203  0.00893392  0.204467  0
          Soil.SoilWater.SW(7)   1194  0.995766      0.00138347  0.00547865   0.00136097   0.965173     0.0121361  0.964171    0.00036727  0.00674653  0.189207  0
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        AcceptedStatsName=Name n Slope Intercept SEslope SEintercept R2 RMSE NSE ME MAE RSR
    PredictedObserved HarvestObsPred: PredictedTableName=HarvestReport; ObservedTableName=Observed; FieldNameUsedForMatch=SimulationName; FieldName2UsedForMatch=Wheat.Phenology.CurrentStageName; AllColumns=false
  Folder Replacements
    Manager MaxLeafSize
```csharp
using Models.Soils;
using Models.PMF.Struct;
using System;
using System.Collections.Generic;
using System.Xml.Serialization;
using Models.Core;
using Models.Interfaces;
using Models.PMF;
using Models.PMF.Organs;
using Models.Soils.Arbitrator;
using APSIM.Shared.Utilities;
using Newtonsoft.Json;



namespace Models
{
    [Serializable] 
    public class Script : Model
    {
//        [Link] private Clock Clock;
//        [Link] private Plant Wheat;
//        public  event EventHandler LeafReport;
//        [Link(Type = LinkType.Path, Path = "[Wheat].Structure")]
//        private Structure structure;
//        
//        
//        [JsonIgnore] public int LeafPosition { get; set; }
//        [JsonIgnore] public double MaxLeafSize { get; set; }
//        
//        [EventSubscribe("DoManagement")]
//        private void OnDoManagement(object sender, EventArgs e)
//        {
//            var leaf = Wheat.Leaf as Leaf;
//            if ((leaf.ExpandedCohortNo > LeafPosition) & (structure.NextLeafProportion == 1))
//            {
//                LeafPosition = (int)
//                leaf.ExpandedCohortNo;
//                MaxLeafSize = leaf.CohortSize[LeafPosition - 1];
//                LeafReport.Invoke(this, new EventArgs());
//            }
//        }
    }
}
```
    Report MaxLeafSizeReport: EventNames=//[MaxLeafSize].Script.LeafReport
      VariableNames:
        //[MaxLeafSize].Script.MaxLeafSize
        //[MaxLeafSize].Script.LeafPosition
    Manager Harvesting
```csharp
using APSIM.Core;
using Models.Soils.Nutrients;
using System;
using Models.Core;
using System.Collections.Generic;
using System.Text;
using Models.Soils;
using Models.PMF;
using Models;
using System.Xml.Serialization;
using APSIM.Shared.Utilities;
using Models.PMF.Phen;

namespace Models
{
    [Serializable] 
    public class Script : Model, IStructureDependency
    {
        [Link] private Plant Wheat;
        [Link] private Simulation sim;
        [Link] private Clock clock;
        [Link(Type = LinkType.Path, Path = "[Wheat].Phenology")]
        private Phenology phenology;
        public IStructure Structure { private get; set; }


        

        [EventSubscribe("DoManagement")]
        private void OnDoManagement(object sender, EventArgs e)
        {
            if (phenology.CurrentPhase.Name == "GrainRipening")
            {
                Wheat.Harvest();
                Wheat.EndCrop();
                Structure.Set("Clock.EndDate", clock.Today, relativeTo: sim);  
            }
        }

        [EventSubscribe("EndOfDay")]
        private void OnEndOfDay(object sender, EventArgs e)
        {
            if ((clock.Today.Equals(clock.EndDate))&&(Wheat.IsAlive))
            {
                Wheat.Harvest();
                Wheat.EndCrop();
                Structure.Set("Clock.EndDate", clock.Today, relativeTo: sim);  
            }
        }

    }
}
```
    Report SowingReport: EventNames=[Wheat].Sowing
      VariableNames:
        [Simulation].Name
        [Clock].Today
        [Wheat].SowingData.Cultivar
        [IWeather].Latitude
        [IWeather].Longitude
        [LocationInfo].Script.Country
        [LocationInfo].Script.State
        [LocationInfo].Script.Region
    Report NDVIDailyReport: EventNames=[Clock].DoReport
      VariableNames:
        [Simulation].Name
        [Clock].Today
        [Spectral].NDVI
    Report HarvestReport: EventNames=[Wheat].Harvesting
      VariableNames:
        [Clock].Today
        [Clock].StartDate
        [Wheat].SowingDate
        [Wheat].SowingData.Cultivar
        [Wheat].SowingDate.DayOfYear
        [IWeather].Latitude
        [IWeather].Longitude
        [IWeather].FileName
        [LocationInfo].Script.Country
        [LocationInfo].Script.State
        [LocationInfo].Script.Region
        [Wheat].AboveGround.N
        [Wheat].AboveGround.NConc
        [Wheat].AboveGround.Wt
        [Wheat].AboveGround.StorageWt as Wheat.AboveGround.WSC
        [Wheat].Ear.N
        [Wheat].Ear.NConc
        [Wheat].Ear.Wt
        [Wheat].Grain.N
        [Wheat].Grain.Live.NConc
        [Wheat].Grain.Number
        [Wheat].Grain.Protein
        [Wheat].Grain.Size
        [Wheat].Grain.Wt
        [Wheat].Leaf.Dead.Wt
        [Wheat].Leaf.Dead.N
        [Wheat].Leaf.Dead.Nconc
        [Wheat].Leaf.Wt
        [Wheat].Leaf.Live.N
        [Wheat].Leaf.Live.NConc
        [Wheat].Leaf.Live.Wt
        [Wheat].Leaf.Live.NConc
        [Wheat].Leaf.Live.StructuralWt
        [Wheat].Leaf.Live.StorageWt as Wheat.Leaf.Live.WSC
        [Wheat].Leaf.Dead.StorageWt as Wheat.Leaf.Dead.WSC
        [Wheat].Phenology.CAMP.TSHS
        [Wheat].Phenology.CurrentStageName
        [Wheat].Phenology.EmergenceDAS
        [Wheat].Phenology.FinalLeafNumber
        [Wheat].Phenology.FlagLeafDAS
        [Wheat].Phenology.FloweringDAS
        [Wheat].Phenology.HeadingDAS
        [Wheat].Phenology.MaturityDAS
        [Wheat].Phenology.TerminalSpikeletDAS
        [Wheat].Spike.HeadNumber
        [Wheat].Spike.Wt
        [Wheat].Spike.Live.Wt
        [Wheat].Spike.Live.N
        [Wheat].Spike.Live.NConc
        [Wheat].Spike.Live.StorageWt as Wheat.Spike.Live.WSC
        [Wheat].Stem.Live.Wt
        [Wheat].Stem.Wt
        [Wheat].Stem.Live.Wt
        [Wheat].Stem.Live.N
        [Wheat].Stem.Live.NConc
        [Wheat].Stem.Live.StorageWt as Wheat.Stem.Live.WSC
        1.0 * [Wheat].Grain.Wt / ([Wheat].AboveGround.Wt + 0.00001) as HarvestIndex
        1.0 * [Wheat].Leaf.Live.StorageWt / ([Wheat].Leaf.Live.Wt + 0.00001) as Wheat.Leaf.Live.WSCc
        1.0 * [Wheat].Stem.Live.StorageWt / ([Wheat].Stem.Live.Wt + 0.00001) as Wheat.Stem.Live.WSCc
        1.0 * [Wheat].Spike.Live.StorageWt / ([Wheat].Spike.Live.Wt + 0.00001) as Wheat.Spike.Live.WSCc
        1.0 * [Wheat].Leaf.Dead.StorageWt/([Wheat].Leaf.Dead.Wt + 0.00001) as Wheat.Leaf.Dead.WSCc
    Report DailyReport: EventNames=[Clock].DoReport
      VariableNames:
        [Clock].Today
        [IWeather].MeanT
        [IWeather].MeanT
        [IWeather].Radn
        [Simulation].Name
        [Soil].Water.Volumetric
        [Wheat].AboveGround.N
        [Wheat].AboveGround.Wt
        [Wheat].AboveGroundDead.N
        [Wheat].AboveGroundDead.Wt
        [Wheat].AboveGroundLive.N
        [Wheat].AboveGroundLive.Wt
        [Wheat].AboveGround.StorageWt as Wheat.AboveGround.WSC
        [Wheat].Ear.N
        [Wheat].Ear.NConc
        [Wheat].Ear.Wt
        [Wheat].Grain.N
        [Wheat].Grain.Live.NConc
        [Wheat].Grain.Number
        [Wheat].Grain.Size
        [Wheat].Grain.Wt
        [Wheat].Grain.Protein
        [Wheat].Leaf.CoverGreen
        [Wheat].Leaf.CoverTotal
        [Wheat].Leaf.Dead.N
        [Wheat].Leaf.Dead.NConc
        [Wheat].Leaf.Dead.Wt
        [Wheat].Leaf.Live.StorageWt as Wheat.Leaf.Live.WSC
        [Wheat].Leaf.Dead.StorageWt as Wheat.Leaf.Dead.WSC
        [Wheat].Leaf.FinalLeafNumber
        [Wheat].Leaf.Fn
        [Wheat].Leaf.Fw
        [Wheat].Leaf.Height
        [Wheat].Leaf.LAI
        [Wheat].Leaf.Ligules
        [Wheat].Leaf.Live.N
        [Wheat].Leaf.Live.NConc
        [Wheat].Leaf.Live.Wt
        [Wheat].Leaf.Live.StorageWt
        [Wheat].Leaf.MainStemPopulation
        [Wheat].Leaf.Photosynthesis.FT
        [Wheat].Leaf.SpecificArea
        [Wheat].Leaf.SpecificAreaCanopy
        [Wheat].Leaf.SpecificNitrogen
        [Wheat].Leaf.StemNumberPerPlant
        [Wheat].Leaf.StemPopulation
        [Wheat].Leaf.Tips
        [Wheat].Leaf.Tips
        [Wheat].Leaf.Transpiration
        [Wheat].Phenology.AccumulatedTT
        [Wheat].Phenology.CurrentPhase.Name
        [Wheat].Phenology.CurrentStageName
        [Wheat].Phenology.EmergenceDAS
        [Wheat].Phenology.HaunStage
        [Wheat].Phenology.Photoperiod
        [Wheat].Phenology.Phyllochron
        [Wheat].Phenology.PTQ
        [Wheat].Phenology.Stage
        [Wheat].Phenology.ThermalTime
        [Wheat].Phenology.Zadok.Stage
        [Wheat].Root.Depth
        [Wheat].Root.N
        [Wheat].Root.NConc
        [Wheat].Root.Wt
        [Wheat].SowingData.Cultivar
        [Wheat].Spike.N
        [Wheat].Spike.NConc
        [Wheat].Spike.Wt
        [Wheat].Spike.Live.Wt
        [Wheat].Spike.Live.N
        [Wheat].Spike.Live.NConc
        [Wheat].Spike.Live.StorageWt as Wheat.Spike.Live.WSC
        [Wheat].Stem.Wt
        [Wheat].Stem.Live.Wt
        [Wheat].Stem.Live.N
        [Wheat].Stem.Live.NConc
        [Wheat].Stem.Live.StorageWt as Wheat.Stem.Live.WSC
        1.0 * [Wheat].Grain.Wt / ([Wheat].AboveGround.Wt + 0.00001) as HarvestIndex
        1.0 * [Wheat].Leaf.Live.StorageWt / ([Wheat].Leaf.Live.Wt + 0.00001) as Wheat.Leaf.Live.WSCc
        1.0 * [Wheat].Stem.Live.StorageWt / ([Wheat].Stem.Live.Wt + 0.00001) as Wheat.Stem.Live.WSCc
        1.0 * [Wheat].Spike.Live.StorageWt / ([Wheat].Spike.Live.Wt + 0.00001) as Wheat.Spike.Live.WSCc
        1.0 * [Wheat].Leaf.Dead.StorageWt/([Wheat].Leaf.Dead.Wt + 0.00001) as Wheat.Leaf.Dead.WSCc
        [Spectral].NDVI
        [Irrigation].IrrigationApplied
        [Fertiliser].NitrogenApplied
  Experiment DookieWWHI2025
    DisabledSimNames=[DookieWWHI2025CvKittyhawkSow13-May, DookieWWHI2025CvWedgetailSow13-May, DookieWWHI2025CvWylahSow13-May, DookieWWHI2025CvWhistlerSow13-May, DookieWWHI2025CvRosellaSow13-May, DookieWWHI2025CvOspreySow13-May, DookieWWHI2025CvIllaboSow13-May, DookieWWHI2025CvMowhawkSow13-May, DookieWWHI2025CvJanzSow16-Apr, DookieWWHI2025CvYitpiSow16-Apr, DookieWWHI2025CvWyalkatchemSow16-Apr, DookieWWHI2025CvGregorySow16-Apr, DookieWWHI2025CvMaceSow16-Apr, DookieWWHI2025CvScepterSow16-Apr, DookieWWHI2025CvSunmasterSow16-Apr, DookieWWHI2025CvMeeringSow16-Apr, DookieWWHI2024CvMowhawkSow14-May, DookieWWHI2024CvIllaboSow14-May, DookieWWHI2024CvKittyhawkSow14-May, DookieWWHI2024CvWedgetailSow14-May, DookieWWHI2024CvWylahSow14-May, DookieWWHI2024CvWhistlerSow14-May, DookieWWHI2024CvRosellaSow14-May, DookieWWHI2024CvOspreySow14-May, DookieWWHI2024CvSunmasterSow17-Apr, DookieWWHI2024CvScepterSow17-Apr, DookieWWHI2024CvMaceSow17-Apr, DookieWWHI2024CvGregorySow17-Apr, DookieWWHI2024CvWyalkatchemSow17-Apr, DookieWWHI2024CvYitpiSow17-Apr, DookieWWHI2024CvJanzSow17-Apr, DookieWWHI2024CvMeeringSow17-Apr]
    Factors
      Permutation
        Factor Cv
          Memo Emergence dates
            Emergence dates were set to the observed date of 50% emergence for most cultivars except some of the early sown ones that had a protracted emergence period.  For them emergence date was set prior to 50% at more like 20%
          CompositeFactor Osprey
            Specifications:
              [Sowing].Script.CultivarName = Osprey
              [Sowing].Script.Population = 200
          CompositeFactor Rosella
            Specifications:
              [Sowing].Script.CultivarName = Rosella
              [Sowing].Script.Population = 200
          CompositeFactor Whistler
            Specifications:
              [Sowing].Script.CultivarName = Whistler
              [Sowing].Script.Population = 200
          CompositeFactor Wylah
            Specifications:
              [Sowing].Script.CultivarName = Wylah
              [Sowing].Script.Population = 200
          CompositeFactor Wedgetail
            Specifications:
              [Sowing].Script.CultivarName = Wedgetail
              [Sowing].Script.Population = 200
          CompositeFactor Kittyhawk
            Specifications:
              [Sowing].Script.CultivarName = Kittyhawk
              [Sowing].Script.Population = 200
          CompositeFactor Illabo
            Specifications:
              [Sowing].Script.CultivarName = Illabo
              [Sowing].Script.Population = 200
          CompositeFactor Mowhawk
            Specifications:
              [Sowing].Script.CultivarName = Mowhawk
              [Sowing].Script.Population = 200
          CompositeFactor Meering
            Specifications:
              [Sowing].Script.CultivarName = Meering
              [Sowing].Script.Population = 200
          CompositeFactor Janz
            Specifications:
              [Sowing].Script.CultivarName = Janz
              [Sowing].Script.Population = 200
          CompositeFactor Yitpi
            Specifications:
              [Sowing].Script.CultivarName = Yitpi
              [Sowing].Script.Population = 200
          CompositeFactor Wyalkatchem
            Specifications:
              [Sowing].Script.CultivarName = Wyalkatchem
              [Sowing].Script.Population = 200
          CompositeFactor Gregory
            Specifications:
              [Sowing].Script.CultivarName = Gregory
              [Sowing].Script.Population = 200
          CompositeFactor Mace
            Specifications:
              [Sowing].Script.CultivarName = Mace
              [Sowing].Script.Population = 200
          CompositeFactor Scepter
            Specifications:
              [Sowing].Script.CultivarName = Scepter
              [Sowing].Script.Population = 200
          CompositeFactor Sunmaster
            Specifications:
              [Sowing].Script.CultivarName = Sunmaster
              [Sowing].Script.Population = 200
        Factor Sow
          CompositeFactor 16-Apr
            Specifications:
              [Sowing].Script.SowDate = 17-Apr
              [ManagementSpring].Enabled = false
              [ManagementWinter].Enabled = true
          CompositeFactor 13-May
            Specifications:
              [Sowing].Script.SowDate = 14-May
              [ManagementSpring].Enabled = true
              [ManagementWinter].Enabled = false
    Simulation McPoyles
      Weather: FileName=Met/Dookie2025.met
      Clock: Start=2025-04-01; End=2025-11-24
      Summary
      SoilArbitrator
      MicroClimate: a_interception=0; b_interception=1; c_interception=0; d_interception=0; SoilHeatFluxFraction=0.4; MinimumHeightDiffForNewLayer=0; NightInterceptionFraction=0.5; ReferenceHeight=2
      Manager LocationInfo
        Country = Australia
        State = Western Australia
        Region = South West
```csharp
using Models.Soils;
using System;
using Models.Core;
using Models.PMF;
using APSIM.Shared.Utilities;

namespace Models
{
    [Serializable]
    public class Script : Model
    {
        [Link] Clock Clock;
        [Link] Fertiliser Fertiliser;
        [Link] Summary Summary;
        
        [Description("Country")]
        public string Country { get; set; }

        [Description("State")]
        public string State { get; set; }

        [Description("Region")]
        public string Region { get; set; }

    }
}
```
      Zone Field: Area=1; Slope=0; AspectAngle=0; Altitude=0
        Soil Soil 1150: SoilType=Sandy duplex; LocalName=Ironstone gravelly soils; Site=Tenterden; NearestTown=Tenterden; Region=Southern Region; State=Western Australia; Country=Australia; ApsoilNumber=1150; Latitude=-34.442704; Longitude=117.394537; LocationAccuracy=+/- 20m; YearOfSampling=2015; DataSource=Rob Summers DAFWA
          Comments=gravel - Wa2 - Sb diff 6 - gravelly sandy earth light clay at depth
          Physical
            Thickness  ParticleSizeSand  ParticleSizeSilt  ParticleSizeClay  Rocks  BD     AirDry  LL15   DUL    SAT
            100        87.81             6.15              6.05              0      1.294  0.05    0.18   0.31   0.341
            100        86.18             4.95              8.86              0      1.443  0.05    0.11   0.19   0.209
            200        86.18             4.95              8.86              0      1.513  0.05    0.27   0.371  0.408
            200        88.29             3.92              7.79              0      1.2    0.05    0.27   0.465  0.511
            200        88.29             3.92              7.79              0      1.4    0.05    0.274  0.413  0.455
            200        88.29             3.92              7.79              0      1.519  0.05    0.297  0.332  0.365
            200        84.27             2.96              12.77             0      1.417  0.05    0.275  0.328  0.361
            200        84.27             2.96              12.77             0      1.669  0.05    0.258  0.315  0.346
            200        84.27             2.96              12.77             0      1.56   0.05    0.193  0.334  0.367
            200        84.27             2.96              12.77             0      1.68   0.05    0.252  0.31   0.342
            SoilCrop wheatSoil
              LL=[0.18, 0.11, 0.27, 0.27, 0.274, 0.297, 0.275, 0.258, 0.193, 0.252]
              KL=[0.06, 0.06, 0.06, 0.06, 0.04, 0.04, 0.04, 0.02, 0.02, 0.01]
              XF=[1, 1, 1, 1, 1, 1, 1, 1, 1, 1]
          WaterBalance SoilWater: SummerDate=1-Nov; SummerU=6; SummerCona=3.5; WinterDate=1-Apr; WinterU=2; WinterCona=2; DiffusConst=88; DiffusSlope=35; Salb=0.12; CN2Bare=73; CNRed=20; CNCov=0.8; PSIDul=-100; Thickness=[100, 100, 100, 100, 100, 100, 100]; SWCON=[0.5, 0.5, 0.5, 0.5, 0.3, 0.3, -]
          Organic: FOMCNRatio=40; CarbonUnits=Total
            Thickness  Carbon  SoilCNRatio  FBiom  FInert  FOM
            100        1.48    12           0.035  0.4     315.5
            100        0.64    12           0.02   0.5     127.3
            200        0.4     12           0.02   0.5     127.3
            200        0.35    12           0.02   0.7     61.6
            200        0.25    12           0.02   0.7     61.6
            200        0.21    12           0.02   0.7     61.6
            200        0.1     12           0.015  0.7     60.5
            200        0.1     12           0.015  0.7     60.1
            200        0.1     12           0.015  0.867   58.2
            200        0.1     12           0.015  0.95    42.2
          Chemical: PHUnits=Water
            Thickness  PH   EC     ESP    CEC
            100        5.1  0.132  0.026  7.003
            100        5.2  0.085  0.052  4.205
            200        6.3  0.085  0.052  4.205
            200        7.2  0.065  0.064  3.411
            200        7.6  0.065  0.064  3.411
            200        7.9  0.065  0.064  3.411
            200        7.9  0.064  0.083  3.514
            200        7.9  0.064  0.083  3.514
            200        8    0.087  0.125  4.193
            200        8.1  0.098  0.146  4.533
          Nutrient
          Solute NO3: Thickness=[100, 100, 200, 200, 200, 200, 200, 200, 200, 200]; InitialValuesUnits=ppm; WaterTableConcentration=0; D0=0; DepthConstant=0; MaxDepthSoluteAccessible=0; RunoffEffectivenessAtMovingSolute=0; MaxEffectiveRunoff=0
            InitialValues=[12.2, 2.3, 2.875, 2.275, 3.825, 4.475, 3.75, 3.14, 4.49, 4.1]
          Solute NH4: Thickness=[100, 100, 200, 200, 200, 200, 200, 200, 200, 200]; InitialValues=[9.05, 1, 1.475, 1.2, 1.22, 0.9, 0.71, 0.755, 0.755, 0.855]; InitialValuesUnits=ppm; WaterTableConcentration=0; D0=0; DepthConstant=0; MaxDepthSoluteAccessible=0; RunoffEffectivenessAtMovingSolute=0; MaxEffectiveRunoff=0
          Solute Urea: Thickness=[100, 100, 200, 200, 200, 200, 200, 200, 200, 200]; InitialValues=[0, 0, 0, 0, 0, 0, 0, 0, 0, 0]; InitialValuesUnits=kg/ha; WaterTableConcentration=0; D0=0; DepthConstant=0; MaxDepthSoluteAccessible=0; RunoffEffectivenessAtMovingSolute=0; MaxEffectiveRunoff=0
          Water: Thickness=[100, 100, 200, 200, 200, 200, 200, 200, 200, 200]; FilledFromTop=true
            InitialValues=[0.07, 0.08, 0.11, 0.15, 0.15, 0.19, 0.22, 0.22, 0.22, 0.22]
          SoilTemperature CERESSoilTemperature
        Fertiliser
        Irrigation
        SurfaceOrganicMatter: InitialResidueName=Canola stubble; InitialResidueType=canola; InitialResidueMass=3000; InitialStandingFraction=0.7; InitialCPR=0; InitialCNR=70
        Plant Wheat
        Manager Sowing
          SowDate = 1-may
          Treat =
          CultivarName =
          SowingDepth = 30
          RowSpacing = 225
          Population = 180
          EmergeDate =
```csharp
using Newtonsoft.Json;
using System.Data;
using System.Xml.Serialization;
using Models;
using System.Text;
using System.Collections.Generic;
using Models.Interfaces;
using System;
using Models.Core;
using Models.PMF;
using Models.Soils;
using Models.Utilities;
using APSIM.Shared.Utilities;

namespace Models
{
    [Serializable]
    public class Script : Model
    {
        [Link] Clock Clock;
        [Link] Fertiliser Fertiliser;
        [Link] Summary Summary;
        [Link] Soil Soil;
        [Link(ByName = true)] Plant Wheat;
        [Link] Simulation Simulation;
        Accumulator accumulatedRain;
        
        [Description("Sowing date (d-mmm)")]
        public string SowDate { get; set; }
        [Description("Treatment Name")]
        public string Treat { get; set; }
        [Display(Type = DisplayType.CultivarName)]
        [Description("Cultivar to be sown")]
        public string CultivarName { get; set; }
        [Description("Sowing depth (mm)")]
        public double SowingDepth { get; set; }
        [Description("Row spacing (mm)")]
        public double RowSpacing { get; set; }
        [Description("Plant population (/m2)")]
        public double Population { get; set; }
        [Description("Emergence Date (d-MMM)")]
        public string EmergeDate {get; set;}



        [EventSubscribe("DoManagement")]
        private void OnDoManagement(object sender, EventArgs e)
        {

            if (DateUtilities.WithinDates(SowDate, Clock.Today, SowDate))
            {
               Wheat.Sow(population: Population, cultivar: CultivarName, depth: SowingDepth, rowSpacing: RowSpacing);   
               //Wheat.Phenology.SetPhaseCompletionDate(EmergeDate,"Emerging"); 
            }            
        
        }
        
    }
}
```
        Manager Fertilize (disabled)
          FertiliserType = UreaN
          FertiliserDates = 26-jul, 26-aug
          FertiliseDepth = 0
          Amount = 70.5
          AmountType = True
```csharp
using Models.Soils;
using System;
using System.Linq;
using Models.Core;
using Models.PMF;
using APSIM.Shared.Utilities;
namespace Models
{
    [Serializable]
    public class Script : Model
    {
        [Link] Clock Clock;
        [Link] Fertiliser Fertiliser;
        
        [Separator("A component to apply fertiliser on one or more dates on every year of the simulation")]

        [Description("Type of fertiliser to apply? ")] 
        [Display(Type = DisplayType.FertiliserType)]public string FertiliserType { get; set; }

        [Description("Enter the fertilisation dates as dd-mmm with comma separation (any year information entered will be ignored): ")] 
        public string[] FertiliserDates { get; set; } 
        
        [Description("Fertilise depth (mm)")]
        public double FertiliseDepth { get; set; }

        [Description("Amount of fertiliser to be applied (kg /ha)")] 
        public double Amount { get; set; }

        [Description("Is the above amount to be applied each time? (yes/ticked)? Or is it the total annual amount across all dates (no/unticked)")] 
        public bool AmountType { get; set; }

        
        [EventSubscribe("DoManagement")]
        private void OnDoManagement(object sender, EventArgs e)
        {
            foreach (string ddMMM in FertiliserDates)
            {
                if (DateUtilities.DatesEqual(ddMMM, Clock.Today))
                {
                    if (AmountType)
                        Fertiliser.Apply(amount: Amount, type: FertiliserType);
                    else
                        Fertiliser.Apply(amount: Amount / FertiliserDates.Length, type: FertiliserType, depth: FertiliseDepth);
                }
            }
        }
    }
}
```
        Manager Harvest
          NoHarvestBefore = 17-Nov
```csharp
using APSIM.Core;
using Models.Soils.Nutrients;
using System;
using Models.Core;
using System.Collections.Generic;
using System.Text;
using Models.Soils;
using Models.PMF;
using Models;
using System.Xml.Serialization;
using APSIM.Shared.Utilities;
using Models.PMF.Phen;

namespace Models
{
    [Serializable]
    public class Script : Model, IStructureDependency
    {
        [Link(ByName = true)] private Plant Wheat;
        [Link] private Simulation sim;
        [Link] private Clock clock;
        [Link] private Summary summary;
        public IStructure Structure { private get; set; }
        
        [Description("Prevent harvesting before: ")]
        public string NoHarvestBefore {get; set;}
        

        

        [EventSubscribe("DoManagement")]
        private void OnDoManagement(object sender, EventArgs e)
        {
            if (Wheat.IsReadyForHarvesting && DateUtilities.CompareDates(NoHarvestBefore, clock.Today) >= 0)
            {
                Wheat.Harvest();
                Wheat.EndCrop();
            }
        }
        
        [EventSubscribe("EndOfDay")]
        private void OnEndOfDay(object sender, EventArgs e)
        {
            if ((clock.Today.Equals(clock.EndDate))&&(Wheat.IsAlive))
            {
                Wheat.Harvest();
                Wheat.EndCrop();
                Structure.Set("Clock.EndDate", clock.Today, relativeTo: sim);
            }
        }
    }
}
```
        Manager Irrigate (disabled)
          IrrigateDates = 1-May
          Amount = 5
          Depth = 0
          Efficiency = 1
          WillRunoff = False
```csharp
using Models.Soils;
using System;
using System.Linq;
using Models.Core;
using Models.PMF;
using APSIM.Shared.Utilities;
namespace Models
{
    [Serializable]
    public class Script : Model
    {
        [Link] Clock Clock;
        [Link] Irrigation Irrigation;
        
        [Separator("A component to apply irrigation on one or more dates on every year of the simulation")]

        [Description("Enter the irrigation dates as dd-mmm with comma separation (any year information entered will be ignored)")] 
        public string[] IrrigateDates { get; set; }
        
        [Description("Amount of irrigation to be applied (mm)")] 
        public double Amount { get; set; }
        
        [Description("Depth in the soil to apply the  irrigation (mm)")] 
        public double Depth { get; set; }
        
        [Description("Efficiency of irrigation (0-1)")] 
        public double Efficiency { get; set; }
        
        [Description("Will the irrigation runoff?")] 
        public bool WillRunoff { get; set; }
        
        [EventSubscribe("DoManagement")]
        private void OnDoManagement(object sender, EventArgs e)
        {
            foreach (string ddMMM in IrrigateDates)
            {
                if (DateUtilities.DatesEqual(ddMMM, Clock.Today))
                    Irrigation.Apply(amount: Amount, depth: Depth, efficiency: Efficiency, willRunoff: WillRunoff);
            }
        }
    }
}
```
        Spectral: DrySoilNDVI=0.1; WetSoilNDVI=0.2; GreenCropNDVI=0.85; DeadCropNDVI=0.15
        Report DailyReport
        Report HarvestReport
        Report NDVIDailyReport
        Report ReportPhenoDates: EventNames=[Clock].StartOfDay
          VariableNames:
            [Clock].Today
            [Wheat].Phenology.Stage
        SetModelParamsBySimulation ConstantBaseCv: SetEventName=[Plant].PlantSowing; ParameterFile=Inputs/Dookie2025_ConstantPhenology.csv
        SetModelParamsBySimulation SetPhenoDatesExternally: SetEventName=[Plant].PlantSowing; ParameterFile=Inputs/Dookie2025_PhenoDatesInput.csv
        SetModelParamsBySimulation SetHaunStageExternally: SetEventName=[Plant].PlantSowing; ParameterFile=Inputs/Dookie2025_HaunStagesInput.csv
        Operations ManagementWinter
          2025-04-15  [Irrigation].Apply(25)
          2025-04-16  [Fertiliser].Apply(amount: 100, type: "MAP")
          2025-05-07  [Irrigation].Apply(40)
          2025-08-05  [Fertiliser].Apply(amount: 90, type: "UreaN")
          Memo
            Year	Site	Date	Habit	Amount (mm)	Notes

            2025	Dookie	17/4	Winter and Spring	13

            2025	Dookie	7/5	Winter and Spring	0 to 40 mm???

            2025	Dookie	16/05	Winter and Spring	25	This was done with drippers

            2025	Dookie	16-Apr-25	Winter	MAP	100

            2025	Dookie	13-May-25	Spring	MAP	100

            2025	Dookie	05-Aug-25	Winter & Spring	Urea	200

            2025	Dookie	15/04-09/05	Winter	25

            2025	Dookie	15/05-22/05	Spring	25
        Operations ManagementSpring
          2025-05-15  [Irrigation].Apply(25)
          2025-05-07  [Irrigation].Apply(40)
          2025-05-13  [Fertiliser].Apply(amount: 100, type: "MAP")
          Memo: same as DookieWWHI2025.McPoyles.Field.ManagementWinter.Memo
  Experiment DookieEVA2025
    DisabledSimNames=[DookieEVA2025CvBigRedSow213-May, DookieEVA2025CvIllaboSow213-May, DookieEVA2025CvUOM001_9_11Sow216-Apr, DookieEVA2025CvUOM001_3_471Sow216-Apr, DookieEVA2025CvSunmasterSow216-Apr, DookieEVA2025CvZanzibarSow216-Apr]
    Factors
      Permutation
        Factor Sow
          CompositeFactor April_Illabo
            Specifications:
              [Sowing].Script.SowDate = 16-Apr
              [Sowing].Script.CultivarName = Illabo
              [Sowing].Script.Population = 200
              [ManagementSpring].Enabled = false
              [ManagementWinter].Enabled = true
          CompositeFactor April_BigRed
            Specifications:
              [Sowing].Script.SowDate = 16-Apr
              [Sowing].Script.CultivarName = BigRed
              [Sowing].Script.Population = 200
              [ManagementSpring].Enabled = false
              [ManagementWinter].Enabled = true
          CompositeFactor April_UOM001_3_47
            Specifications:
              [Sowing].Script.SowDate = 16-Apr
              [Sowing].Script.CultivarName = UOM001_3_47
              [Sowing].Script.Population = 200
              [ManagementSpring].Enabled = false
              [ManagementWinter].Enabled = true
          CompositeFactor April_UOM001_9_1
            Specifications:
              [Sowing].Script.SowDate = 16-Apr
              [Sowing].Script.CultivarName = UOM001_9_1
              [Sowing].Script.Population = 200
              [ManagementSpring].Enabled = false
              [ManagementWinter].Enabled = true
          CompositeFactor May_Zanzibar
            Specifications:
              [Sowing].Script.SowDate = 13-May
              [Sowing].Script.CultivarName = Zanzibar
              [Sowing].Script.Population = 200
              [ManagementSpring].Enabled = true
              [ManagementWinter].Enabled = false
          CompositeFactor May_Sunmaster
            Specifications:
              [Sowing].Script.SowDate = 13-May
              [Sowing].Script.CultivarName = SunMaster
              [Sowing].Script.Population = 200
              [ManagementSpring].Enabled = true
              [ManagementWinter].Enabled = false
          CompositeFactor May_UOM001_3_47
            Specifications:
              [Sowing].Script.SowDate = 13-May
              [Sowing].Script.CultivarName = UOM001_3_47
              [Sowing].Script.Population = 200
              [ManagementSpring].Enabled = true
              [ManagementWinter].Enabled = false
          CompositeFactor May_UOM001_9_1
            Specifications:
              [Sowing].Script.SowDate = 13-May
              [Sowing].Script.CultivarName = UOM001_9_1
              [Sowing].Script.Population = 128
              [ManagementSpring].Enabled = true
              [ManagementWinter].Enabled = false
    Simulation McPoyle
      Weather: FileName=Met/Dookie2025.met
      Clock: Start=2025-04-01; End=2025-11-24
      Summary
      SoilArbitrator
      MicroClimate: a_interception=0; b_interception=1; c_interception=0; d_interception=0; SoilHeatFluxFraction=0.4; MinimumHeightDiffForNewLayer=0; NightInterceptionFraction=0.5; ReferenceHeight=2
      Manager LocationInfo: same as DookieWWHI2025.McPoyles.LocationInfo
      Zone Field: Area=1; Slope=0; AspectAngle=0; Altitude=0
        Soil Soil 1150: SoilType=Sandy duplex; LocalName=Ironstone gravelly soils; Site=Tenterden; NearestTown=Tenterden; Region=Southern Region; State=Western Australia; Country=Australia; ApsoilNumber=1150; Latitude=-34.442704; Longitude=117.394537; LocationAccuracy=+/- 20m; YearOfSampling=2015; DataSource=Rob Summers DAFWA
          Comments=gravel - Wa2 - Sb diff 6 - gravelly sandy earth light clay at depth
          Physical: same as DookieWWHI2025.McPoyles.Field.Soil 1150.Physical
          WaterBalance SoilWater: same as DookieWWHI2025.McPoyles.Field.Soil 1150.SoilWater
          Organic: same as DookieWWHI2025.McPoyles.Field.Soil 1150.Organic
          Chemical: same as DookieWWHI2025.McPoyles.Field.Soil 1150.Chemical
          Nutrient
          Solute NO3: same as DookieWWHI2025.McPoyles.Field.Soil 1150.NO3
          Solute NH4: same as DookieWWHI2025.McPoyles.Field.Soil 1150.NH4
          Solute Urea: same as DookieWWHI2025.McPoyles.Field.Soil 1150.Urea
          Water: Thickness=[100, 100, 200, 200, 200, 200, 200, 200, 200, 200]; FilledFromTop=true
            InitialValues=[0.07, 0.08, 0.11, 0.15, 0.15, 0.19, 0.22, 0.22, 0.22, 0.22]
          SoilTemperature CERESSoilTemperature
          CERESSoilTemperature Temperature
        Fertiliser
        Irrigation
        SurfaceOrganicMatter: InitialResidueName=Canola stubble; InitialResidueType=canola; InitialResidueMass=3000; InitialStandingFraction=0.7; InitialCPR=0; InitialCNR=70
        Plant Wheat
        Manager Sowing
          SowDate = 1-may
          Treat =
          CultivarName =
          SowingDepth = 30
          RowSpacing = 225
          Population = 180
          EmergeDate =
```csharp
using Newtonsoft.Json;
using System.Data;
using System.Xml.Serialization;
using Models;
using System.Text;
using System.Collections.Generic;
using Models.Interfaces;
using System;
using Models.Core;
using Models.PMF;
using Models.Soils;
using Models.Utilities;
using APSIM.Shared.Utilities;

namespace Models
{
    [Serializable]
    public class Script : Model
    {
        [Link] Clock Clock;
        [Link] Fertiliser Fertiliser;
        [Link] Summary Summary;
        [Link] Soil Soil;
        [Link(ByName = true)] Plant Wheat;
        [Link] Simulation Simulation;
        Accumulator accumulatedRain;
        
        [Description("Sowing date (d-mmm)")]
        public string SowDate { get; set; }
        [Description("Treatment Name")]
        public string Treat { get; set; }
        [Display(Type = DisplayType.CultivarName)]
        [Description("Cultivar to be sown")]
        public string CultivarName { get; set; }
        [Description("Sowing depth (mm)")]
        public double SowingDepth { get; set; }
        [Description("Row spacing (mm)")]
        public double RowSpacing { get; set; }
        [Description("Plant population (/m2)")]
        public double Population { get; set; }
        [Description("Emergence Date (d-MMM)")]
        public string EmergeDate {get; set;}



        [EventSubscribe("DoManagement")]
        private void OnDoManagement(object sender, EventArgs e)
        {

            if (DateUtilities.WithinDates(SowDate, Clock.Today, SowDate))
            {
               Wheat.Sow(population: Population, cultivar: CultivarName, depth: SowingDepth, rowSpacing: RowSpacing);   
               Wheat.Phenology.SetPhaseCompletionDate(EmergeDate,"Emerging"); 
            }            
        
        }
        
    }
}
```
        Manager Fertilize (disabled): same as DookieWWHI2025.McPoyles.Field.Fertilize
        Manager Harvest: same as DookieWWHI2025.McPoyles.Field.Harvest
        Manager Irrigate (disabled): same as DookieWWHI2025.McPoyles.Field.Irrigate
        Spectral: DrySoilNDVI=0.1; WetSoilNDVI=0.2; GreenCropNDVI=0.85; DeadCropNDVI=0.15
        Report DailyReport
        Report HarvestReport
        Report NDVIDailyReport
        Report ReportPhenoDates: EventNames=[Clock].StartOfDay
          VariableNames:
            [Clock].Today
            [Wheat].Phenology.Stage
        SetModelParamsBySimulation ConstantBaseCv: SetEventName=[Plant].PlantSowing; ParameterFile=Inputs/Dookie2025_ConstantPhenology.csv
        SetModelParamsBySimulation SetHaunStageExternally: SetEventName=[Plant].PlantSowing; ParameterFile=Inputs/Dookie2025_HaunStagesInput.csv
        SetModelParamsBySimulation SetPhenoDatesExternally: SetEventName=[Plant].PlantSowing; ParameterFile=Inputs/Dookie2025_PhenoDatesInput.csv
        Operations ManagementWinter
          2025-04-15  [Irrigation].Apply(25)
          2025-04-16  [Fertiliser].Apply(amount: 100, type: "MAP")
          2025-05-07  [Irrigation].Apply(40)
          2025-08-05  [Fertiliser].Apply(amount: 90, type: "UreaN")
          Memo
            2024	Dookie	17-Apr-24	Winter	MAP	100

            2024	Dookie	14-May-24	Spring	MAP	100

            2024	Dookie	26-Jul-24	Winter & Spring	Urea	150

            2024	Dookie	26-Aug-24	Winter & Spring	Urea	150

            2024	Dookie	01-May-24	Winter	5	Establishment irrigation (winter wheat only)
        Operations ManagementSpring
          2025-05-07  [Irrigation].Apply(40)
          2025-05-15  [Irrigation].Apply(25)
          2025-05-13  [Fertiliser].Apply(amount: 100, type: "MAP")
          Memo
            2024	Dookie	17-Apr-24	Winter	MAP	100

            2024	Dookie	14-May-24	Spring	MAP	100

            2024	Dookie	26-Jul-24	Winter & Spring	Urea	150

            2024	Dookie	26-Aug-24	Winter & Spring	Urea	150

            2024	Dookie	01-May-24	Winter	5	Establishment irrigation (winter wheat only)
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