Simulations: Version=206
  Memo TitlePage
    # The APSIM Wheat Model

    _Brown, H.E., Huth, N.I. and Holzworth, D.P._
  Memo Introduction
    The APSIM wheat model has been developed using the Plant Modelling Framework (PMF) of [brown_plant_2014]. This new framework provides a library of plant organ and process submodels that can be coupled, at runtime, to construct a model in much the same way that models can be coupled to construct a simulation. This means that dynamic composition of lower level process and organ classes (e.g. photosynthesis, leaf) into larger constructions (e.g. maize, wheat, sorghum) can be achieved by the model developer without additional coding.

    The wheat model consists of:

    * a phenology model to simulate development through sequential developmental phases
    * a structure model to simulate plant morphology
    * a collection of organs to simulate the various plant parts
    * an arbitrator to allocate resources (N, biomass) to the various plant organs

    This work builds upon earlier APSIM Wheat models such as NWheat ([Asseng200225], [KeatingNWheat]), NWheatS ([Asseng1998163]), Cropmod-Wheat ([Wang2002GenericCropModel]), and the earlier versions developed in Plant (<a href=\"http://www.apsim.info/Documentation/Model,CropandSoil/CropModuleDocumentation/Wheat.aspx">APSIM Wheat 7.5</a>") and then within the Plant Modelling Framework ([brown_plant_2014]).
  DataStore
    ExcelInput ExcelMultiInput: FileNames=[Observed/Fords2025_Observed.xlsx]; SheetNames=[Observed]
    PredictedObserved DailyObsPred: PredictedTableName=DailyReport; ObservedTableName=Observed; FieldNameUsedForMatch=SimulationName; FieldName2UsedForMatch=Clock.Today; AllColumns=false
    PredictedObserved HarvestObsPred: PredictedTableName=HarvestReport; ObservedTableName=Observed; FieldNameUsedForMatch=SimulationName; FieldName2UsedForMatch=Wheat.Phenology.CurrentStageName; AllColumns=false
  Folder Replacements
    Manager Harvesting
      TargetHarvestDate = 01/21/2026 00:00:00
```csharp
using APSIM.Core;
using Models.Soils.Nutrients;
using System;
using Models.Core;
using System.Collections.Generic;
using System.Text;
using Models.Soils;
using Models.PMF;
using Models;
using System.Xml.Serialization;
using APSIM.Shared.Utilities;

namespace Models
{
    [Serializable] 
    public class Script : Model, IStructureDependency
    {
        [Link] private Plant Wheat;
        [Link] private Simulation sim;
        [Link] private Clock clock;

        // 1. Expose the date to the APSIM UI. 
        // This will create a clean input box in the interface.
        [Description("Target Harvest Date (e.g., 2025-11-27):")]
        public DateTime TargetHarvestDate { get; set; }

        public IStructure Structure { private get; set; }

        [EventSubscribe("DoManagement")]
        private void OnDoManagement(object sender, EventArgs e)
        {
            // 2. Trigger harvest ONLY when the calendar date matches exactly, 
            // AND ensure the crop is actually growing to prevent errors.
            if (clock.Today == TargetHarvestDate && Wheat.IsAlive)
            {
                Wheat.Harvest();
                Wheat.EndCrop();
                
                // Forces the simulation to end on this harvest date
                Structure.Set("Clock.EndDate", clock.Today, relativeTo: sim);  
            }
        }

        [EventSubscribe("EndOfDay")]
        private void OnEndOfDay(object sender, EventArgs e)
        {
            // 3. Fallback safety net: if the simulation reaches its set EndDate 
            // for any other reason before the TargetHarvestDate, clean up the crop.
            if ((clock.Today.Equals(clock.EndDate)) && (Wheat.IsAlive))
            {
                Wheat.Harvest();
                Wheat.EndCrop();
            }
        }
    }
}
```
    Manager MaxLeafSize
```csharp
using Models.Soils;
using Models.PMF.Struct;
using System;
using System.Collections.Generic;
using System.Xml.Serialization;
using Models.Core;
using Models.Interfaces;
using Models.PMF;
using Models.PMF.Organs;
using Models.Soils.Arbitrator;
using APSIM.Shared.Utilities;
using Newtonsoft.Json;



namespace Models
{
    [Serializable] 
    public class Script : Model
    {
//        [Link] private Clock Clock;
//        [Link] private Plant Wheat;
//        public  event EventHandler LeafReport;
//        [Link(Type = LinkType.Path, Path = "[Wheat].Structure")]
//        private Structure structure;
//        
//        
//        [JsonIgnore] public int LeafPosition { get; set; }
//        [JsonIgnore] public double MaxLeafSize { get; set; }
//        
//        [EventSubscribe("DoManagement")]
//        private void OnDoManagement(object sender, EventArgs e)
//        {
//            var leaf = Wheat.Leaf as Leaf;
//            if ((leaf.ExpandedCohortNo > LeafPosition) & (structure.NextLeafProportion == 1))
//            {
//                LeafPosition = (int)
//                leaf.ExpandedCohortNo;
//                MaxLeafSize = leaf.CohortSize[LeafPosition - 1];
//                LeafReport.Invoke(this, new EventArgs());
//            }
//        }
    }
}
```
    Report MaxLeafSizeReport: EventNames=//[MaxLeafSize].Script.LeafReport
      VariableNames:
        //[MaxLeafSize].Script.MaxLeafSize
        //[MaxLeafSize].Script.LeafPosition
    Report SowingReport: EventNames=[Wheat].Sowing
      VariableNames:
        [Simulation].Name
        [Clock].Today
        [Wheat].SowingData.Cultivar
        [IWeather].Latitude
        [IWeather].Longitude
        [LocationInfo].Script.Country
        [LocationInfo].Script.State
        [LocationInfo].Script.Region
    Report NDVIDailyReport: EventNames=[Clock].DoReport
      VariableNames:
        [Simulation].Name
        [Clock].Today
        [Spectral].NDVI
    Report HarvestReport: EventNames=[Wheat].Harvesting
      VariableNames:
        [Clock].Today
        [Clock].StartDate
        [Wheat].SowingDate
        [Wheat].SowingData.Cultivar
        [Wheat].SowingDate.DayOfYear
        [IWeather].Latitude
        [IWeather].Longitude
        [IWeather].FileName
        [LocationInfo].Script.Country
        [LocationInfo].Script.State
        [LocationInfo].Script.Region
        [Wheat].AboveGround.N
        [Wheat].AboveGround.NConc
        [Wheat].AboveGround.Wt
        [Wheat].AboveGround.StorageWt as Wheat.AboveGround.WSC
        [Wheat].Ear.N
        [Wheat].Ear.NConc
        [Wheat].Ear.Wt
        [Wheat].Grain.N
        [Wheat].Grain.Live.NConc
        [Wheat].Grain.Number
        [Wheat].Grain.Protein
        [Wheat].Grain.Size
        [Wheat].Grain.Wt
        [Wheat].Leaf.Dead.Wt
        [Wheat].Leaf.Dead.N
        [Wheat].Leaf.Dead.Nconc
        [Wheat].Leaf.Wt
        [Wheat].Leaf.Live.N
        [Wheat].Leaf.Live.NConc
        [Wheat].Leaf.Live.Wt
        [Wheat].Leaf.Live.NConc
        [Wheat].Leaf.Live.StructuralWt
        [Wheat].Leaf.Live.StorageWt as Wheat.Leaf.Live.WSC
        [Wheat].Leaf.Dead.StorageWt as Wheat.Leaf.Dead.WSC
        [Wheat].Phenology.CAMP.TSHS
        [Wheat].Phenology.CurrentStageName
        [Wheat].Phenology.EmergenceDAS
        [Wheat].Phenology.FinalLeafNumber
        [Wheat].Phenology.FlagLeafDAS
        [Wheat].Phenology.FloweringDAS
        [Wheat].Phenology.HeadingDAS
        [Wheat].Phenology.MaturityDAS
        [Wheat].Phenology.TerminalSpikeletDAS
        [Wheat].Spike.HeadNumber
        [Wheat].Spike.Wt
        [Wheat].Spike.Wt
        [Wheat].Spike.N
        [Wheat].Spike.NConc
        ([Wheat].Spike.Live.StorageWt + [Wheat].Spike.Dead.StorageWt)  as Wheat.Spike.WSC
        [Wheat].Stem.Wt
        [Wheat].Stem.Wt
        [Wheat].Stem.Wt
        [Wheat].Stem.N
        [Wheat].Stem.NConc
        ([Wheat].Stem.Live.StorageWt + [Wheat].Stem.Dead.StorageWt)  as Wheat.Stem.WSC
        1.0 * [Wheat].Grain.Wt / ([Wheat].AboveGround.Wt + 0.00001) as HarvestIndex
        1.0 * [Wheat].Leaf.Live.StorageWt / ([Wheat].Leaf.Live.Wt + 0.00001) as Wheat.Leaf.Live.WSCc
        1.0 * ([Wheat].Stem.Live.StorageWt + [Wheat].Stem.Dead.StorageWt)  / ([Wheat].Stem.Wt + 0.00001) as Wheat.Stem.WSCc
        1.0 * ([Wheat].Spike.Live.StorageWt + [Wheat].Spike.Dead.StorageWt)  / ([Wheat].Spike.Wt + 0.00001) as Wheat.Spike.WSCc
        1.0 * [Wheat].Leaf.Dead.StorageWt/([Wheat].Leaf.Dead.Wt + 0.00001) as Wheat.Leaf.Dead.WSCc
    Report DailyReport: EventNames=[Clock].DoReport
      VariableNames:
        [Clock].Today
        [IWeather].MeanT
        [IWeather].MeanT
        [IWeather].Radn
        [Simulation].Name
        [Soil].Water.Volumetric
        [Wheat].AboveGround.N
        [Wheat].AboveGround.Wt
        [Wheat].AboveGroundDead.N
        [Wheat].AboveGroundDead.Wt
        [Wheat].AboveGroundLive.N
        [Wheat].AboveGroundLive.Wt
        [Wheat].AboveGround.StorageWt as Wheat.AboveGround.WSC
        [Wheat].Ear.N
        [Wheat].Ear.NConc
        [Wheat].Ear.Wt
        [Wheat].Grain.N
        [Wheat].Grain.Live.NConc
        [Wheat].Grain.Number
        [Wheat].Grain.Size
        [Wheat].Grain.Wt
        [Wheat].Grain.Protein
        [Wheat].Leaf.CoverGreen
        [Wheat].Leaf.CoverTotal
        [Wheat].Leaf.Dead.N
        [Wheat].Leaf.Dead.NConc
        [Wheat].Leaf.Dead.Wt
        [Wheat].Leaf.Live.StorageWt as Wheat.Leaf.Live.WSC
        [Wheat].Leaf.Dead.StorageWt as Wheat.Leaf.Dead.WSC
        [Wheat].Leaf.FinalLeafNumber
        [Wheat].Leaf.Fn
        [Wheat].Leaf.Fw
        [Wheat].Leaf.Height
        [Wheat].Leaf.LAI
        [Wheat].Leaf.Ligules
        [Wheat].Leaf.Live.N
        [Wheat].Leaf.Live.NConc
        [Wheat].Leaf.Live.Wt
        [Wheat].Leaf.Live.StorageWt
        [Wheat].Leaf.MainStemPopulation
        [Wheat].Leaf.Photosynthesis.FT
        [Wheat].Leaf.SpecificArea
        [Wheat].Leaf.SpecificAreaCanopy
        [Wheat].Leaf.SpecificNitrogen
        [Wheat].Leaf.StemNumberPerPlant
        [Wheat].Leaf.StemPopulation
        [Wheat].Leaf.Tips
        [Wheat].Leaf.Tips
        [Wheat].Leaf.Transpiration
        [Wheat].Phenology.AccumulatedTT
        [Wheat].Phenology.CurrentPhase.Name
        [Wheat].Phenology.CurrentStageName
        [Wheat].Phenology.EmergenceDAS
        [Wheat].Phenology.HaunStage
        [Wheat].Phenology.Photoperiod
        [Wheat].Phenology.Phyllochron
        [Wheat].Phenology.PTQ
        [Wheat].Phenology.Stage
        [Wheat].Phenology.ThermalTime
        [Wheat].Phenology.Zadok.Stage
        [Wheat].Root.Depth
        [Wheat].Root.N
        [Wheat].Root.NConc
        [Wheat].Root.Wt
        [Wheat].SowingData.Cultivar
        [Wheat].Spike.N
        [Wheat].Spike.NConc
        [Wheat].Spike.Wt
        [Wheat].Spike.Wt
        [Wheat].Spike.N
        [Wheat].Spike.NConc
        ([Wheat].Spike.Live.StorageWt + [Wheat].Spike.Dead.StorageWt)  as Wheat.Spike.WSC
        [Wheat].Spike.HeadNumber
        [Wheat].Stem.Wt
        [Wheat].Stem.Wt
        [Wheat].Stem.N
        [Wheat].Stem.NConc
        ([Wheat].Stem.Live.StorageWt + [Wheat].Stem.Dead.StorageWt)  as Wheat.Stem.WSC
        1.0 * [Wheat].Grain.Wt / ([Wheat].AboveGround.Wt + 0.00001) as HarvestIndex
        1.0 * [Wheat].Leaf.Live.StorageWt / ([Wheat].Leaf.Live.Wt + 0.00001) as Wheat.Leaf.Live.WSCc
        1.0 * ([Wheat].Stem.Live.StorageWt + [Wheat].Stem.Dead.StorageWt)  / ([Wheat].Stem.Wt + 0.00001) as Wheat.Stem.WSCc
        1.0 * ([Wheat].Spike.Live.StorageWt + [Wheat].Spike.Dead.StorageWt)  / ([Wheat].Spike.Wt + 0.00001) as Wheat.Spike.WSCc
        1.0 * [Wheat].Leaf.Dead.StorageWt/([Wheat].Leaf.Dead.Wt + 0.00001) as Wheat.Leaf.Dead.WSCc
        [Spectral].NDVI
        [Irrigation].IrrigationApplied
        [Fertiliser].NitrogenApplied
        [Wheat].Ear.N
        [Wheat].Ear.NConc
        [Wheat].Ear.StorageWt as Wheat.Ear.WSC
        1.0 * [Wheat].Ear.StorageWt / ([Wheat].Ear.Wt + 0.00001) as Wheat.Ear.WSCc
  Experiment Fords2025
    Factors
      Permutation
        Factor Sow
          CompositeFactor April_Osprey
            Specifications:
              [Sowing].Script.SowDate = 15-Apr
              [Sowing].Script.CultivarName = Osprey
              [Sowing].Script.Population = 93
              [ManagementSpring].Enabled = false
              [ManagementWinter].Enabled = true
          CompositeFactor April_Rosella
            Specifications:
              [Sowing].Script.SowDate = 15-Apr
              [Sowing].Script.CultivarName = Rosella
              [Sowing].Script.Population = 125
              [ManagementSpring].Enabled = false
              [ManagementWinter].Enabled = true
          CompositeFactor April_Whistler
            Specifications:
              [Sowing].Script.SowDate = 15-Apr
              [Sowing].Script.CultivarName = Whistler
              [Sowing].Script.Population = 92
              [ManagementSpring].Enabled = false
              [ManagementWinter].Enabled = true
          CompositeFactor April_Wylah
            Specifications:
              [Sowing].Script.SowDate = 15-Apr
              [Sowing].Script.CultivarName = Wylah
              [Sowing].Script.Population = 112
              [ManagementSpring].Enabled = false
              [ManagementWinter].Enabled = true
          CompositeFactor April_Wedgetail
            Specifications:
              [Sowing].Script.SowDate = 15-Apr
              [Sowing].Script.CultivarName = Wedgetail
              [Sowing].Script.Population = 119
              [ManagementSpring].Enabled = false
              [ManagementWinter].Enabled = true
          CompositeFactor April_Kittyhawk
            Specifications:
              [Sowing].Script.SowDate = 15-Apr
              [Sowing].Script.CultivarName =  Kittyhawk
              [Sowing].Script.Population = 111
              [ManagementSpring].Enabled = false
              [ManagementWinter].Enabled = true
          CompositeFactor April_Illabo
            Specifications:
              [Sowing].Script.SowDate = 15-Apr
              [Sowing].Script.CultivarName = Illabo
              [Sowing].Script.Population = 109
              [ManagementSpring].Enabled = false
              [ManagementWinter].Enabled = true
          CompositeFactor April_Mowhawk
            Specifications:
              [Sowing].Script.SowDate = 15-Apr
              [Sowing].Script.CultivarName =  Mowhawk
              [Sowing].Script.Population = 104
              [ManagementSpring].Enabled = false
              [ManagementWinter].Enabled = true
          CompositeFactor May_Sunmaster
            Specifications:
              [Sowing].Script.SowDate = 15-May
              [Sowing].Script.CultivarName = Sunmaster
              [Sowing].Script.Population = 123
              [ManagementSpring].Enabled = true
              [ManagementWinter].Enabled = false
          CompositeFactor May_Meering
            Specifications:
              [Sowing].Script.SowDate = 15-May
              [Sowing].Script.CultivarName = Meering
              [Sowing].Script.Population = 124
              [ManagementSpring].Enabled = true
              [ManagementWinter].Enabled = false
          CompositeFactor May_Janz
            Specifications:
              [Sowing].Script.SowDate = 15-May
              [Sowing].Script.CultivarName = Janz
              [Sowing].Script.Population = 129
              [ManagementSpring].Enabled = true
              [ManagementWinter].Enabled = false
          CompositeFactor May_Yitpi
            Specifications:
              [Sowing].Script.SowDate = 15-May
              [Sowing].Script.CultivarName = Yitpi
              [Sowing].Script.Population = 126
              [ManagementSpring].Enabled = true
              [ManagementWinter].Enabled = false
          CompositeFactor May_Wyalkatchem
            Specifications:
              [Sowing].Script.SowDate = 15-May
              [Sowing].Script.CultivarName = Wyalkatchem
              [Sowing].Script.Population = 109
              [ManagementSpring].Enabled = true
              [ManagementWinter].Enabled = false
          CompositeFactor May_Gregory
            Specifications:
              [Sowing].Script.SowDate = 15-May
              [Sowing].Script.CultivarName = Gregory
              [Sowing].Script.Population = 125
              [ManagementSpring].Enabled = true
              [ManagementWinter].Enabled = false
          CompositeFactor May_Mace
            Specifications:
              [Sowing].Script.SowDate = 15-May
              [Sowing].Script.CultivarName = Mace
              [Sowing].Script.Population = 116
              [ManagementSpring].Enabled = true
              [ManagementWinter].Enabled = false
          CompositeFactor May_Scepter
            Specifications:
              [Sowing].Script.SowDate = 15-May
              [Sowing].Script.CultivarName = Scepter
              [Sowing].Script.Population = 128
              [ManagementSpring].Enabled = true
              [ManagementWinter].Enabled = false
    Simulation McPoyle
      Weather: FileName=Met/Fords2025.met
      Clock: Start=2025-04-10; End=2025-11-21
      Summary
      SoilArbitrator
      MicroClimate: a_interception=0; b_interception=1; c_interception=0; d_interception=0; SoilHeatFluxFraction=0.4; MinimumHeightDiffForNewLayer=0; NightInterceptionFraction=0.5; ReferenceHeight=2
      Manager LocationInfo
        Country = Australia
        State = Western Australia
        Region = South West
```csharp
using Models.Soils;
using System;
using Models.Core;
using Models.PMF;
using APSIM.Shared.Utilities;

namespace Models
{
    [Serializable]
    public class Script : Model
    {
        [Link] Clock Clock;
        [Link] Fertiliser Fertiliser;
        [Link] Summary Summary;
        
        [Description("Country")]
        public string Country { get; set; }

        [Description("State")]
        public string State { get; set; }

        [Description("Region")]
        public string Region { get; set; }

    }
}
```
      Zone Field: Area=1; Slope=0; AspectAngle=0; Altitude=0
        Soil Soil 1150: SoilType=Sandy duplex; LocalName=Ironstone gravelly soils; Site=Tenterden; NearestTown=Tenterden; Region=Southern Region; State=Western Australia; Country=Australia; ApsoilNumber=1150; Latitude=-34.442704; Longitude=117.394537; LocationAccuracy=+/- 20m; YearOfSampling=2015; DataSource=Rob Summers DAFWA
          Comments=gravel - Wa2 - Sb diff 6 - gravelly sandy earth light clay at depth
          Physical
            Thickness  ParticleSizeSand  ParticleSizeSilt  ParticleSizeClay  Rocks  BD     AirDry  LL15   DUL    SAT
            100        43.95             22.45             33.6              0      1.4    0.108   0.12   0.32   0.37
            100        39.975            20.675            39.35             0      1.545  0.117   0.13   0.33   0.37
            200        35.413            22.062            42.525            0      1.515  0.198   0.22   0.32   0.37
            200        29.938            19.775            50.288            0      1.527  0.198   0.22   0.32   0.37
            200        27.6              15.1              57.3              0      1.527  0.198   0.22   0.32   0.37
            200        24.837            16.025            59.138            0      1.527  0.198   0.22   0.32   0.37
            200        84.27             2.96              12.77             0      1.417  0.2475  0.275  0.355  0.37
            200        84.27             2.96              12.77             0      1.669  0.2322  0.258  0.358  0.37
            200        84.27             2.96              12.77             0      1.56   0.1737  0.193  0.353  0.36
            200        84.27             2.96              12.77             0      1.68   0.2268  0.252  0.352  0.36
            SoilCrop wheatSoil
              LL=[0.12, 0.13, 0.22, 0.22, 0.22, 0.22, 0.275, 0.258, 0.193, 0.252]
              KL=[0.06, 0.06, 0.06, 0.06, 0.06, 0.06, 0.06, 0.06, 0.06, 0.06]
              XF=[1, 1, 1, 1, 1, 1, 1, 1, 1, 1]
          WaterBalance SoilWater: SummerDate=1-Nov; SummerU=6; SummerCona=3.5; WinterDate=1-Apr; WinterU=2; WinterCona=2; DiffusConst=88; DiffusSlope=35; Salb=0.12; CN2Bare=73; CNRed=20; CNCov=0.8; PSIDul=-100; Thickness=[100, 100, 100, 100, 100, 100, 100]; SWCON=[0.5, 0.5, 0.5, 0.5, 0.3, 0.3, -]
          Organic: FOMCNRatio=40; CarbonUnits=Total
            Thickness  Carbon  SoilCNRatio  FBiom  FInert  FOM
            100        2.212   11           0.035  0.4     315.5
            100        2.1     12.688       0.02   0.5     127.3
            200        2.35    20.65        0.02   0.5     127.3
            200        2.188   26.625       0.02   0.7     61.6
            200        1.956   25.025       0.02   0.7     61.6
            200        2.312   31.5         0.02   0.7     61.6
            200        0.1     12           0.015  0.7     60.5
            200        0.1     12           0.015  0.7     60.1
            200        0.1     12           0.015  0.867   58.2
            200        0.1     12           0.015  0.95    42.2
          Chemical: PHUnits=Water
            Thickness  PH     EC     ESP    CEC
            100        8.287  0.231  0.026  7.003
            100        8.375  0.219  0.052  4.205
            200        8.637  0.211  0.052  4.205
            200        9.025  0.236  0.064  3.411
            200        9.325  0.316  0.064  3.411
            200        9.463  0.436  0.064  3.411
            200        7.9    0.064  0.083  3.514
            200        7.9    0.064  0.083  3.514
            200        8      0.087  0.125  4.193
            200        8.1    0.098  0.146  4.533
          Nutrient
          Solute NO3: Thickness=[100, 100, 200, 200, 200, 200, 200, 200, 200, 200]; InitialValuesUnits=ppm; WaterTableConcentration=0; D0=0; DepthConstant=0; MaxDepthSoluteAccessible=0; RunoffEffectivenessAtMovingSolute=0; MaxEffectiveRunoff=0
            InitialValues=[25.875, 20.625, 17.625, 11.225, 7.963, 7.562, 3.4, 4.2, 4.1, 4.4]
          Solute NH4: Thickness=[100, 100, 200, 200, 200, 200, 200, 200, 200, 200]; InitialValuesUnits=ppm; WaterTableConcentration=0; D0=0; DepthConstant=0; MaxDepthSoluteAccessible=0; RunoffEffectivenessAtMovingSolute=0; MaxEffectiveRunoff=0
            InitialValues=[8.637, 5.938, 4.287, 2.8, 1.913, 2.275, 0.7, 0.7, 0.5, 1.6]
          Solute Urea: Thickness=[100, 100, 200, 200, 200, 200, 200, 200, 200, 200]; InitialValues=[0, 0, 0, 0, 0, 0, 0, 0, 0, 0]; InitialValuesUnits=kg/ha; WaterTableConcentration=0; D0=0; DepthConstant=0; MaxDepthSoluteAccessible=0; RunoffEffectivenessAtMovingSolute=0; MaxEffectiveRunoff=0
          Water: Thickness=[100, 100, 200, 200, 200, 200, 200, 200, 200, 200]; FilledFromTop=true
            InitialValues=[0.22, 0.23, 0.27, 0.27, 0.27, 0.27, 0.315, 0.308, 0.273, 0.302]
          SoilTemperature (disabled)
          CERESSoilTemperature
        Fertiliser
        Irrigation
        SurfaceOrganicMatter: InitialResidueName=Canola stubble; InitialResidueType=canola; InitialResidueMass=0; InitialStandingFraction=0; InitialCPR=0; InitialCNR=0
        Plant Wheat
        Manager Sowing
          SowDate = 1-may
          Treat =
          CultivarName =
          SowingDepth = 30
          RowSpacing = 225
          Population = 180
```csharp
using Newtonsoft.Json;
using System.Data;
using System.Xml.Serialization;
using Models;
using System.Text;
using System.Collections.Generic;
using Models.Interfaces;
using System;
using Models.Core;
using Models.PMF;
using Models.Soils;
using Models.Utilities;
using APSIM.Shared.Utilities;

namespace Models
{
    [Serializable]
    public class Script : Model
    {
        [Link] Clock Clock;
        [Link] Fertiliser Fertiliser;
        [Link] Summary Summary;
        [Link] Soil Soil;
        [Link(ByName = true)] Plant Wheat;
        [Link] Simulation Simulation;
        Accumulator accumulatedRain;
        
        [Description("Sowing date (d-mmm)")]
        public string SowDate { get; set; }
        [Description("Treatment Name")]
        public string Treat { get; set; }
        [Display(Type = DisplayType.CultivarName)]
        [Description("Cultivar to be sown")]
        public string CultivarName { get; set; }
        [Description("Sowing depth (mm)")]
        public double SowingDepth { get; set; }
        [Description("Row spacing (mm)")]
        public double RowSpacing { get; set; }
        [Description("Plant population (/m2)")]
        public double Population { get; set; }
        //[Description("Emergence Date (d-MMM)")]
        //public string EmergeDate {get; set;}



        [EventSubscribe("DoManagement")]
        private void OnDoManagement(object sender, EventArgs e)
        {

            if (DateUtilities.WithinDates(SowDate, Clock.Today, SowDate))
            {
               Wheat.Sow(population: Population, cultivar: CultivarName, depth: SowingDepth, rowSpacing: RowSpacing);   
               // Wheat.Phenology.SetPhaseCompletionDate(EmergeDate,"Emerging"); 
            }            
        
        }
        
    }
}
```
        Manager Harvesting: same as Replacements.Harvesting
        Spectral: DrySoilNDVI=0.1; WetSoilNDVI=0.2; GreenCropNDVI=0.85; DeadCropNDVI=0.15
        Report DailyReport
        Report HarvestReport
        Report NDVIDailyReport
        Report ReportPhenoDates: EventNames=[Clock].StartOfDay
          VariableNames:
            [Clock].Today
            [Wheat].Phenology.Stage
        SetModelParamsBySimulation ConstantBaseCv: SetEventName=[Plant].PlantSowing; ParameterFile=Inputs/Fords2025_ConstantPhenology.csv
        SetModelParamsBySimulation SetGermDatesExternally: SetEventName=[Plant].PlantSowing; ParameterFile=Inputs/Fords2025_GermDatesInput.csv
        SetModelParamsBySimulation SetPhenoDatesExternally (disabled): SetEventName=[Plant].PlantSowing; ParameterFile=Inputs/Fords2025_PhenoDatesInput.csv
        SetModelParamsBySimulation SetHaunStageExternally (disabled): SetEventName=[Plant].PlantSowing; ParameterFile=Inputs/Fords2025_HaunStagesInput.csv
        Operations ManagementWinter
          2025-04-15  [Fertiliser].Apply(amount: 9, type: "UreaN")
          2025-04-15  [Irrigation].Apply(20)
          2025-05-03  [Irrigation].Apply(17)
          2025-05-14  [Irrigation].Apply(20)
          2025-07-07  [Fertiliser].Apply(amount: 86, type: "UreaN")
        Operations ManagementSpring
          2025-05-15  [Fertiliser].Apply(amount: 9, type: "UreaN")
          2025-05-15  [Irrigation].Apply(20)
          2025-07-07  [Fertiliser].Apply(amount: 86, type: "UreaN")
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