Simulations: Version=222
  DataStore
    ExcelInput ExcelMultiInput: FileNames=[Observed/Gnarwarre2024_Observed.xlsx]; SheetNames=[Observed]
    PredictedObserved DailyObsPred: PredictedTableName=DailyReport; ObservedTableName=Observed; FieldNameUsedForMatch=SimulationName; FieldName2UsedForMatch=Clock.Today; AllColumns=false
    PredictedObserved HarvestObsPred: PredictedTableName=HarvestReport; ObservedTableName=Observed; FieldNameUsedForMatch=SimulationName; FieldName2UsedForMatch=Wheat.Phenology.CurrentStageName; AllColumns=false
  Folder Replacements
    Manager Harvesting
      TargetHarvestDate = 12/19/2024 00:00:00
```csharp
using APSIM.Core;
using Models.Soils.Nutrients;
using System;
using Models.Core;
using System.Collections.Generic;
using System.Text;
using Models.Soils;
using Models.PMF;
using Models;
using System.Xml.Serialization;
using APSIM.Shared.Utilities;

namespace Models
{
    [Serializable] 
    public class Script : Model, IStructureDependency
    {
        [Link] private Plant Wheat;
        [Link] private Simulation sim;
        [Link] private Clock clock;

        // 1. Expose the date to the APSIM UI. 
        // This will create a clean input box in the interface.
        [Description("Target Harvest Date (e.g., 2025-11-27):")]
        public DateTime TargetHarvestDate { get; set; }

        public IStructure Structure { private get; set; }

        [EventSubscribe("DoManagement")]
        private void OnDoManagement(object sender, EventArgs e)
        {
            // 2. Trigger harvest ONLY when the calendar date matches exactly, 
            // AND ensure the crop is actually growing to prevent errors.
            if (clock.Today == TargetHarvestDate && Wheat.IsAlive)
            {
                Wheat.Harvest();
                Wheat.EndCrop();
                
                // Forces the simulation to end on this harvest date
                Structure.Set("Clock.EndDate", clock.Today, relativeTo: sim);  
            }
        }

        [EventSubscribe("EndOfDay")]
        private void OnEndOfDay(object sender, EventArgs e)
        {
            // 3. Fallback safety net: if the simulation reaches its set EndDate 
            // for any other reason before the TargetHarvestDate, clean up the crop.
            if ((clock.Today.Equals(clock.EndDate)) && (Wheat.IsAlive))
            {
                Wheat.Harvest();
                Wheat.EndCrop();
            }
        }
    }
}
```
    Report DailyReport: EventNames=[Clock].DoReport
      VariableNames:
        [Clock].Today
        [IWeather].MeanT
        [IWeather].MeanT
        [IWeather].Radn
        [Simulation].Name
        [Soil].Water.Volumetric
        [Wheat].AboveGround.N
        [Wheat].AboveGround.Wt
        [Wheat].AboveGroundDead.N
        [Wheat].AboveGroundDead.Wt
        [Wheat].AboveGroundLive.N
        [Wheat].AboveGroundLive.Wt
        [Wheat].AboveGround.StorageWt as Wheat.AboveGround.WSC
        [Wheat].Ear.N
        [Wheat].Ear.NConc
        [Wheat].Ear.Wt
        [Wheat].Grain.N
        [Wheat].Grain.Live.NConc
        [Wheat].Grain.Number
        [Wheat].Grain.Size
        [Wheat].Grain.Wt
        [Wheat].Grain.Protein
        [Wheat].Leaf.CoverGreen
        [Wheat].Leaf.CoverTotal
        [Wheat].Leaf.Dead.N
        [Wheat].Leaf.Dead.NConc
        [Wheat].Leaf.Dead.Wt
        [Wheat].Leaf.Live.StorageWt as Wheat.Leaf.Live.WSC
        [Wheat].Leaf.Dead.StorageWt as Wheat.Leaf.Dead.WSC
        [Wheat].Leaf.FinalLeafNumber
        [Wheat].Leaf.Fn
        [Wheat].Leaf.Fw
        [Wheat].Leaf.Height
        [Wheat].Leaf.LAI
        [Wheat].Leaf.Ligules
        [Wheat].Leaf.Live.N
        [Wheat].Leaf.Live.NConc
        [Wheat].Leaf.Live.Wt
        [Wheat].Leaf.Live.StorageWt
        [Wheat].Leaf.MainStemPopulation
        [Wheat].Leaf.Photosynthesis.FT
        [Wheat].Leaf.SpecificArea
        [Wheat].Leaf.SpecificAreaCanopy
        [Wheat].Leaf.SpecificNitrogen
        [Wheat].Leaf.StemNumberPerPlant
        [Wheat].Leaf.StemPopulation
        [Wheat].Leaf.Tips
        [Wheat].Leaf.Tips
        [Wheat].Leaf.Transpiration
        [Wheat].Phenology.AccumulatedTT
        [Wheat].Phenology.CurrentPhase.Name
        [Wheat].Phenology.CurrentStageName
        [Wheat].Phenology.EmergenceDAS
        [Wheat].Phenology.HaunStage
        [Wheat].Phenology.Photoperiod
        [Wheat].Phenology.Phyllochron
        [Wheat].Phenology.PTQ
        [Wheat].Phenology.Stage
        [Wheat].Phenology.ThermalTime
        [Wheat].Phenology.Zadok.Stage
        [Wheat].Root.Depth
        [Wheat].Root.N
        [Wheat].Root.NConc
        [Wheat].Root.Wt
        [Wheat].SowingData.Cultivar
        [Wheat].Spike.N
        [Wheat].Spike.NConc
        [Wheat].Spike.Wt
        [Wheat].Spike.Wt
        [Wheat].Spike.N
        [Wheat].Spike.NConc
        ([Wheat].Spike.Live.StorageWt + [Wheat].Spike.Dead.StorageWt)  as Wheat.Spike.WSC
        [Wheat].Spike.HeadNumber
        [Wheat].Stem.Wt
        [Wheat].Stem.Wt
        [Wheat].Stem.N
        [Wheat].Stem.NConc
        ([Wheat].Stem.Live.StorageWt + [Wheat].Stem.Dead.StorageWt)  as Wheat.Stem.WSC
        1.0 * [Wheat].Grain.Wt / ([Wheat].AboveGround.Wt + 0.00001) as HarvestIndex
        1.0 * [Wheat].Leaf.Live.StorageWt / ([Wheat].Leaf.Live.Wt + 0.00001) as Wheat.Leaf.Live.WSCc
        1.0 * ([Wheat].Stem.Live.StorageWt + [Wheat].Stem.Dead.StorageWt)  / ([Wheat].Stem.Wt + 0.00001) as Wheat.Stem.WSCc
        1.0 * ([Wheat].Spike.Live.StorageWt + [Wheat].Spike.Dead.StorageWt)  / ([Wheat].Spike.Wt + 0.00001) as Wheat.Spike.WSCc
        1.0 * [Wheat].Leaf.Dead.StorageWt/([Wheat].Leaf.Dead.Wt + 0.00001) as Wheat.Leaf.Dead.WSCc
        [Spectral].NDVI
        [Irrigation].IrrigationApplied
        [Fertiliser].NitrogenApplied
        [Wheat].Ear.N
        [Wheat].Ear.NConc
        [Wheat].Ear.StorageWt as Wheat.Ear.WSC
        1.0 * [Wheat].Ear.StorageWt / ([Wheat].Ear.Wt + 0.00001) as Wheat.Ear.WSCc
    Report HarvestReport: EventNames=[Wheat].Harvesting
      VariableNames:
        [Clock].Today
        [Clock].StartDate
        [Wheat].SowingDate
        [Wheat].SowingData.Cultivar
        [Wheat].SowingDate.DayOfYear
        [IWeather].Latitude
        [IWeather].Longitude
        [IWeather].FileName
        [LocationInfo].Script.Country
        [LocationInfo].Script.State
        [LocationInfo].Script.Region
        [Wheat].AboveGround.N
        [Wheat].AboveGround.NConc
        [Wheat].AboveGround.Wt
        [Wheat].AboveGround.StorageWt as Wheat.AboveGround.WSC
        [Wheat].Ear.N
        [Wheat].Ear.NConc
        [Wheat].Ear.Wt
        [Wheat].Grain.N
        [Wheat].Grain.Live.NConc
        [Wheat].Grain.Number
        [Wheat].Grain.Protein
        [Wheat].Grain.Size
        [Wheat].Grain.Wt
        [Wheat].Leaf.Dead.Wt
        [Wheat].Leaf.Dead.N
        [Wheat].Leaf.Dead.Nconc
        [Wheat].Leaf.Wt
        [Wheat].Leaf.Live.N
        [Wheat].Leaf.Live.NConc
        [Wheat].Leaf.Live.Wt
        [Wheat].Leaf.Live.NConc
        [Wheat].Leaf.Live.StructuralWt
        [Wheat].Leaf.Live.StorageWt as Wheat.Leaf.Live.WSC
        [Wheat].Leaf.Dead.StorageWt as Wheat.Leaf.Dead.WSC
        [Wheat].Phenology.CAMP.TSHS
        [Wheat].Phenology.CurrentStageName
        [Wheat].Phenology.EmergenceDAS
        [Wheat].Phenology.FinalLeafNumber
        [Wheat].Phenology.FlagLeafDAS
        [Wheat].Phenology.FloweringDAS
        [Wheat].Phenology.HeadingDAS
        [Wheat].Phenology.MaturityDAS
        [Wheat].Phenology.TerminalSpikeletDAS
        [Wheat].Spike.HeadNumber
        [Wheat].Spike.Wt
        [Wheat].Spike.Wt
        [Wheat].Spike.N
        [Wheat].Spike.NConc
        ([Wheat].Spike.Live.StorageWt + [Wheat].Spike.Dead.StorageWt)  as Wheat.Spike.WSC
        [Wheat].Stem.Wt
        [Wheat].Stem.Wt
        [Wheat].Stem.Wt
        [Wheat].Stem.N
        [Wheat].Stem.NConc
        ([Wheat].Stem.Live.StorageWt + [Wheat].Stem.Dead.StorageWt)  as Wheat.Stem.WSC
        1.0 * [Wheat].Grain.Wt / ([Wheat].AboveGround.Wt + 0.00001) as HarvestIndex
        1.0 * [Wheat].Leaf.Live.StorageWt / ([Wheat].Leaf.Live.Wt + 0.00001) as Wheat.Leaf.Live.WSCc
        1.0 * ([Wheat].Stem.Live.StorageWt + [Wheat].Stem.Dead.StorageWt)  / ([Wheat].Stem.Wt + 0.00001) as Wheat.Stem.WSCc
        1.0 * ([Wheat].Spike.Live.StorageWt + [Wheat].Spike.Dead.StorageWt)  / ([Wheat].Spike.Wt + 0.00001) as Wheat.Spike.WSCc
        1.0 * [Wheat].Leaf.Dead.StorageWt/([Wheat].Leaf.Dead.Wt + 0.00001) as Wheat.Leaf.Dead.WSCc
  Experiment Gnarwarre2024
    Factors
      Permutation
        Factor Cv
          CompositeFactor Illabo
            Specifications:
              [Sowing].Script.SowDate = 24-Apr
              [Clock].StartDate = 2024-04-23
              [Sowing].Script.CultivarName = Illabo
              [ManagementSpring].Enabled = false
              [ManagementWinter].Enabled = true
              [Sowing].Script.Population = 153
          CompositeFactor BigRed
            Specifications:
              [Sowing].Script.SowDate = 24-Apr
              [Clock].StartDate = 2024-04-23
              [Sowing].Script.CultivarName = BigRed
              [ManagementSpring].Enabled = false
              [ManagementWinter].Enabled = true
              [Sowing].Script.Population = 140
          CompositeFactor Sunmaster
            Specifications:
              [Sowing].Script.SowDate = 20-May
              [Clock].StartDate = 2024-04-23
              [Sowing].Script.CultivarName = Sunmaster
              [ManagementSpring].Enabled = true
              [ManagementWinter].Enabled = false
              [Sowing].Script.Population = 125
          CompositeFactor Zanzibar
            Specifications:
              [Sowing].Script.SowDate = 20-May
              [Clock].StartDate = 2024-04-23
              [Sowing].Script.CultivarName = Zanzibar
              [ManagementSpring].Enabled = true
              [ManagementWinter].Enabled = false
              [Sowing].Script.Population = 95
          Memo
            Illabo and BigRed emerged by May 8 (at least half leaf)
            Sunmaster and Zanzibar emerged by Jun 4 (most by June 11)
    Simulation Gnarwarre2024Base
      Weather: FileName=Met/Gnarwarre2024.met
      Clock: Start=2024-03-03; End=2024-12-20
      Summary
      SoilArbitrator
      MicroClimate: a_interception=0; b_interception=1; c_interception=0; d_interception=0; SoilHeatFluxFraction=0.4; MinimumHeightDiffForNewLayer=0; NightInterceptionFraction=0.5; ReferenceHeight=2
      Manager LocationInfo
        Country = Australia
        State = Victoria
        Region = South
```csharp
using Models.Soils;
using System;
using Models.Core;
using Models.PMF;
using APSIM.Shared.Utilities;

namespace Models
{
    [Serializable]
    public class Script : Model
    {
        [Link] Clock Clock;
        [Link] Fertiliser Fertiliser;
        [Link] Summary Summary;
        
        [Description("Country")]
        public string Country { get; set; }

        [Description("State")]
        public string State { get; set; }

        [Description("Region")]
        public string Region { get; set; }

    }
}
```
      Zone Field: Area=1; Slope=0; AspectAngle=0; Altitude=50
        Report DailyReport: EventNames=[Wheat].Harvesting
          VariableNames:
            [Clock].Today
            [Wheat].Phenology.FloweringDAS
            [Wheat].Phenology.FlagLeafDAS
            [Wheat].Phenology.TerminalSpikeletDAS
        Report HarvestReport: EventNames=[Clock].DoReport
          VariableNames:
            [Clock].Today
            [Wheat].Phenology.Stage
            [Wheat].Phenology.Zadok.Stage
            [Wheat].Phenology.FloweringDAS
            [Wheat].Phenology.FlagLeafDAS
            [Wheat].Phenology.TerminalSpikeletDAS
        Fertiliser
        SurfaceOrganicMatter: InitialResidueName=bean_stubble; InitialResidueType=fababean; InitialResidueMass=1000; InitialStandingFraction=0; InitialCPR=0; InitialCNR=40
        Plant Wheat
          Cultivar Sunmaster
            Command:
              [Phenology].Phyllochron.BasePhyllochron.FixedValue = 90
              [Phenology].PhyllochronPpSensitivity.FixedValue = 0.212225680614483
              [Phenology].CAMP.FLNparams.MinLN = 8
              [Phenology].CAMP.FLNparams.PpLN = 3.0
              [Phenology].CAMP.FLNparams.VrnLN = 6.0
              [Phenology].CAMP.FLNparams.VxPLN = 1.0
              [Phenology].CAMP.EnvData.VrnTreatTemp = 5.8
              [Phenology].CAMP.EnvData.VrnTreatDuration = 60
              [Phenology].HeadEmergenceLongDayBase.FixedValue = 170
              [Phenology].HeadEmergencePpSensitivity.FixedValue = 0.0
          Cultivar BigRed
            Command:
              [Phenology].Phyllochron.BasePhyllochron.FixedValue = 95
              [Phenology].PhyllochronPpSensitivity.FixedValue = 0.212225680614483
              [Phenology].CAMP.FLNparams.MinLN = 8.5
              [Phenology].CAMP.FLNparams.PpLN = 3.0
              [Phenology].CAMP.FLNparams.VrnLN = 5.0
              [Phenology].CAMP.FLNparams.VxPLN = 1.0
              [Phenology].CAMP.EnvData.VrnTreatTemp = 5.8
              [Phenology].CAMP.EnvData.VrnTreatDuration = 60
              [Phenology].HeadEmergenceLongDayBase.FixedValue = 170
              [Phenology].HeadEmergencePpSensitivity.FixedValue = 0.0
          Cultivar Zanzibar
            Command:
              [Phenology].Phyllochron.BasePhyllochron.FixedValue = 93.7220123291132
              [Phenology].PhyllochronPpSensitivity.FixedValue = 0.212225680614483
              [Phenology].CAMP.FLNparams.MinLN = 8.5
              [Phenology].CAMP.FLNparams.PpLN = 3.0
              [Phenology].CAMP.FLNparams.VrnLN = 7.0
              [Phenology].CAMP.FLNparams.VxPLN = 1.0
              [Phenology].CAMP.EnvData.VrnTreatTemp = 5.8
              [Phenology].CAMP.EnvData.VrnTreatDuration = 60
              [Phenology].HeadEmergenceLongDayBase.FixedValue = 170
              [Phenology].HeadEmergencePpSensitivity.FixedValue = 0.0
        Manager Sowing
          SowDate =
          CultivarName =
          SowingDepth = 30
          RowSpacing = 225
          Population = 150
```csharp
using APSIM.Shared.Utilities;
using Models.Utilities;
using Models.Soils;
using Models.PMF;
using Models.Core;
using System;

namespace Models
{
    [Serializable]
    public class Script : Model
    {
        [Link] Clock Clock;
        [Link] Fertiliser Fertiliser;
        [Link] Summary Summary;
        [Link] Soil Soil;
        
        [Link] Plant wheat;

        [Description("Sowing date (d-mmm)")]
        public string SowDate { get; set; }

        [Display(Type = DisplayType.CultivarName)]
        [Description("Cultivar to be sown")]
        public string CultivarName { get; set; }

        [Description("Sowing depth (mm)")]
        public double SowingDepth { get; set; }

        [Description("Row spacing (mm)")]
        public double RowSpacing { get; set; }

        [Description("Plant population (/m2)")]
        public double Population { get; set; }
        
     //   [Description("Emergence Date (d-MMM)")]
     //   public string EmergeDate {get; set;}

        [EventSubscribe("DoManagement")]
        private void OnDoManagement(object sender, EventArgs e)
        {
            if (DateUtilities.WithinDates(SowDate, Clock.Today, SowDate))
            {
                wheat.Sow(population: Population, cultivar: CultivarName, depth: SowingDepth, rowSpacing: RowSpacing);    
            //    wheat.Phenology.SetPhaseCompletionDate(EmergeDate,"Emerging");
            }
        }
    }
}
```
        Manager SowingFertiliser (disabled)
          Amount = 200
          CropName = wheat
```csharp
using Models.Soils;
using System;
using Models.Core;
using Models.PMF;
namespace Models
{
    [Serializable]
    public class Script : Model
    {
        [Link] Clock Clock;
        [Link] Fertiliser Fertiliser;
        [Link] Summary Summary;
        
        
        [Description("Amount of fertiliser to be applied (kg/ha)")]
        public double Amount { get; set;}
        
        [Description("Crop to be fertilised")]
        public string CropName { get; set;}
        
        
        

        [EventSubscribe("Sowing")]
        private void OnSowing(object sender, EventArgs e)
        {
            Model crop = sender as Model;
            if (crop.Name.ToLower()==CropName.ToLower())
                Fertiliser.Apply(amount: Amount, type: "NO3N");
        }
        
    }
}
```
        Manager Harvesting
        Irrigation
        SetModelParamsBySimulation ConstantBaseCv: SetEventName=[Plant].PlantSowing; ParameterFile=Inputs/Gnarwarre2024_ConstantPhenology.csv
        SetModelParamsBySimulation SetGermDatesExternally: SetEventName=[Plant].PlantSowing; ParameterFile=Inputs/Gnarwarre2024_GermDatesInput.csv
        SetModelParamsBySimulation SetHaunRelatedExternally: SetEventName=[Plant].PlantSowing; ParameterFile=Inputs/Gnarwarre2024_HaunStagesInput.csv
        SetModelParamsBySimulation SetPhenoDatesExternally: SetEventName=[Plant].PlantSowing; ParameterFile=Inputs/Gnarwarre2024_PhenoDatesInput.csv
        Spectral: DrySoilNDVI=0.1; WetSoilNDVI=0.2; GreenCropNDVI=0.85; DeadCropNDVI=0.15
        Operations ManagementWinter
          2024-04-24  [Fertiliser].Apply(amount: 100, type: "MAP");
          2024-07-18  [Fertiliser].Apply(amount: 109, type: "UreaGranular");
          2024-08-14  [Fertiliser].Apply(amount: 217, type: "UreaGranular");
          Memo
            Gnarwarre 2024

            FERTILISER
            {this was done by the "Sowing Fertiliser" script; first for TOS 1, second for TOS 2, but in your format}

            2024-05-24 [#Fertiliser].Apply(amount: 100, type: "MAP");

            2024-10-24 [#Fertiliser].Apply(amount: 100, type: "MAP");

            {this is done by the "Fertiliser on a date" script; same for each TOS}

            2024-07-18 [#Fertiliser].Apply(amount: 109, type: "UreaGranular");

            2024-08-14 [#Fertiliser].Apply(amount: 217, type: "UreaGranular");

            Ben's email 19/10/26

            As per what was sent back in May. Both sowings receive the same urea applications:

            Gnarwarre 2024

            FERTILISER
            {this is done by the "Fertiliser on a date" script; same for each TOS}
            2024-07-18 [#Fertiliser].Apply(amount: 109, type: "UreaGranular");
            2024-08-14 [#Fertiliser].Apply(amount: 217, type: "UreaGranular");
        Operations ManagementSpring
          2024-05-20  [Fertiliser].Apply(amount: 100, type: "MAP");
          2024-07-18  [Fertiliser].Apply(amount: 109, type: "UreaGranular");
          2024-08-14  [Fertiliser].Apply(amount: 217, type: "UreaGranular");
          Memo
            Gnarwarre 2024

            FERTILISER
            {this was done by the "Sowing Fertiliser" script; first for TOS 1, second for TOS 2, but in your format}

            2024-05-24 [#Fertiliser].Apply(amount: 100, type: "MAP");

            2024-10-24 [#Fertiliser].Apply(amount: 100, type: "MAP");

            {this is done by the "Fertiliser on a date" script; same for each TOS}

            2024-07-18 [#Fertiliser].Apply(amount: 109, type: "UreaGranular");

            2024-08-14 [#Fertiliser].Apply(amount: 217, type: "UreaGranular");

            Gnarwarre 2024

            FERTILISER
            {this is done by the "Fertiliser on a date" script; same for each TOS}
            2024-07-18 [#Fertiliser].Apply(amount: 109, type: "UreaGranular");
            2024-08-14 [#Fertiliser].Apply(amount: 217, type: "UreaGranular");
        Soil Heavy Clay (Murdeduke No825): SoilType=Clay; Site=Murdeduke Homestead; NearestTown=Winchelsea; Region=South West; State=Victoria; Country=Australia; ApsoilNumber=825; Latitude=-38.191; Longitude=143.742; YearOfSampling=0
          DataSource=Data collected as part of the GRDC project Training growers to manage soil water by CSIRO Sustainable Ecosystems in collaboration with farmers and Agvise consultants
          Comments=Clay - Chem analysis: If EC <0.25 dS/m, ammonium acetate method used for cations, no prewash for soluble salts. pHwater independent.  If EC>0.25dS/m and pHwater>7.5 Tucker cation method used. OC estimated for all layers. Barley CLL estimated
          Memo Read Me
            2023-08-24 NH Soil layers added to extend profile from 120cm to 180cm depth.  Assumed uniform soil properties through this interval.\
            2024-03-18 Alter 30-60 cm soil layer Wheat LL to 0.2 (from 0.242) to reflect reasonably uniform measured lower limit.
          Physical
            Thickness  ParticleSizeSand  ParticleSizeSilt  ParticleSizeClay  Rocks  BD          AirDry     LL15       DUL    SAT
            200        5                 65                30                0      0.835365    0.0231969  0.0231969  0.37   0.505
            200        5                 65                30                0      1.18356     0.175371   0.175371   0.375  0.528
            200        5                 65                30                0      1.27012     0.146774   0.146774   0.405  0.452
            200        5                 65                30                0      1.30344     0.200976   0.200976   0.368  0.452
            200        5                 65                30                0      1.3167      0.259311   0.259311   0.308  0.452
            200        5                 65                30                0      1.49819511  0.328838   0.328838   0.329  0.435
            200        5                 65                30                0      1.5268      0.36195    0.36195    0.362  0.424
            200        5                 65                30                0      1.49068     0.337975   0.337975   0.338  0.437
            Rocks, ParticleSizeSand, ParticleSizeSilt, ParticleSizeClay source: Calculated (layer 1, 2, 3, 4, 5, 6, 7)
            SoilCrop wheatSoil
              LL=[0.0231969, 0.175371, 0.146774, 0.200976, 0.259311, 0.328838, 0.36195, 0.337975]
              KL=[0.06, 0.06, 0.06, 0.06, 0.06, 0.06, 0.06, 0.06]
              XF=[1, 1, 1, 1, 1, 1, 1, 1]
          WaterBalance SoilWater: SummerDate=1-Nov; SummerU=6; SummerCona=3.5; WinterDate=1-Apr; WinterU=2; WinterCona=2; DiffusConst=40; DiffusSlope=16; Salb=0.12; CN2Bare=73; CNRed=20; CNCov=0.8; PSIDul=-100; Thickness=[150, 150, 300, 300, 300, 300, 300]; SWCON=[0.3, 0.3, 0.3, 0.3, 0.3, 0.3, 0.3]
          Organic: FOMCNRatio=40; CarbonUnits=WalkleyBlack
            Thickness  Carbon  SoilCNRatio  FBiom  FInert  FOM
            150        2.4     12           0.04   0.4     446.88
            150        0.96    12           0.02   0.5     307.136
            300        0.6     12           0.02   0.7     145.081
            300        0.3     12           0.02   1       68.531
            300        0.18    12           0.01   1       32.372
            300        0.18    12           0.01   1       32.372
            300        0.18    12           0.01   1       32.372
          Chemical: PHUnits=Water
            Thickness  PH   EC   ESP   CEC
            150        6.5  0.1  4.2   11
            150        7.5  0.2  5.2   17.4
            300        8.4  0.2  5.9   28.8
            300        9.2  0.3  8.9   26.9
            300        9.2  0.3  15.8  23.4
            300        9.2  0.3  15.8  23.4
            300        9.2  0.3  15.8  23.4
            EC, CL, ESP, PH source: Unknown source or quality of data
          Nutrient
          Solute NO3: Thickness=[200, 200, 200, 200, 200, 200, 200, 200]; InitialValuesUnits=ppm; WaterTableConcentration=0; D0=0; DepthConstant=0; MaxDepthSoluteAccessible=0; RunoffEffectivenessAtMovingSolute=0; MaxEffectiveRunoff=0
            InitialValues=[40.7778, 13.6541, 4.59556, 2.42199, 1.699, 1.52987, 1.82578, 2.17501672]
          Solute NH4: Thickness=[200, 200, 200, 200, 200, 200, 200, 200]; InitialValuesUnits=ppm; WaterTableConcentration=0; D0=0; DepthConstant=0; MaxDepthSoluteAccessible=0; RunoffEffectivenessAtMovingSolute=0; MaxEffectiveRunoff=0
            InitialValues=[13.0696, 4.90833, 2.28922, 1.56713, 1.34144, 1.3415, 1.44832, 1.59709]
          Solute Urea: Thickness=[150, 150, 300, 300, 300, 300, 300]; InitialValues=[0, 0, 0, 0, 0, 0, 0]; InitialValuesUnits=kg/ha; WaterTableConcentration=0; D0=0; DepthConstant=0; MaxDepthSoluteAccessible=0; RunoffEffectivenessAtMovingSolute=0; MaxEffectiveRunoff=0
          Water: Thickness=[200, 200, 200, 200, 200, 200, 200, 200]; FilledFromTop=false
            InitialValues=[0.0925575, 0.215297, 0.198419, 0.234381, 0.269049, 0.32887, 0.36196, 0.33798]
          SoilTemperature (disabled): InteractionsPerDay=8
          CERESSoilTemperature Temperature
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