Simulations: Version=206
  DataStore
    ExcelInput ExcelMultiInput: FileNames=[Gnarwarre2025_Observed.xlsx]; SheetNames=[Observed]
    PredictedObserved DailyObsPred: PredictedTableName=DailyReport; ObservedTableName=Observed; FieldNameUsedForMatch=SimulationName; FieldName2UsedForMatch=Clock.Today; AllColumns=false
    PredictedObserved HarvestObsPred: PredictedTableName=HarvestReport; ObservedTableName=Observed; FieldNameUsedForMatch=SimulationName; FieldName2UsedForMatch=Wheat.Phenology.CurrentStageName; AllColumns=false
  Folder Replacements
    Report HarvestReport: EventNames=[Wheat].Harvesting
      VariableNames:
        [Clock].Today
        [Clock].StartDate
        [Wheat].SowingDate
        [Wheat].SowingData.Cultivar
        [Wheat].SowingDate.DayOfYear
        [IWeather].Latitude
        [IWeather].Longitude
        [IWeather].FileName
        [LocationInfo].Script.Country
        [LocationInfo].Script.State
        [LocationInfo].Script.Region
        [Wheat].AboveGround.N
        [Wheat].AboveGround.NConc
        [Wheat].AboveGround.Wt
        [Wheat].Ear.N
        [Wheat].Ear.NConc
        [Wheat].Ear.Wt
        [Wheat].Grain.N
        [Wheat].Grain.NConc
        [Wheat].Grain.Number
        [Wheat].Grain.Protein
        [Wheat].Grain.Size
        [Wheat].Grain.Wt
        [Wheat].Leaf.Dead.Wt
        [Wheat].Leaf.Dead.N
        [Wheat].Leaf.Live.N
        [Wheat].Leaf.Live.Wt
        [Wheat].Leaf.N
        [Wheat].Leaf.StemPopulation
        [Wheat].Leaf.Wt
        [Wheat].Phenology.CAMP.TSHS
        [Wheat].Phenology.CurrentStageName
        [Wheat].Phenology.EmergenceDAS
        [Wheat].Phenology.FinalLeafNumber
        [Wheat].Phenology.FlagLeafDAS
        [Wheat].Phenology.FloweringDAS
        [Wheat].Phenology.HeadingDAS
        [Wheat].Phenology.MaturityDAS
        [Wheat].Phenology.TerminalSpikeletDAS
        [Wheat].Spike.HeadNumber
        [Wheat].Spike.N
        [Wheat].Spike.Wt
        [Wheat].Stem.N
        [Wheat].Stem.NConc
        [Wheat].Stem.Wt
    Report DailyReport: EventNames=[Clock].DoReport
      VariableNames:
        [Clock].Today
        [IWeather].MeanT
        [IWeather].MeanT
        [IWeather].Radn
        [Simulation].Name
        [Soil].Water.Volumetric
        [Wheat].AboveGround.N
        [Wheat].AboveGround.Wt
        [Wheat].AboveGroundDead.N
        [Wheat].AboveGroundDead.Wt
        [Wheat].AboveGroundLive.N
        [Wheat].AboveGroundLive.Wt
        [Wheat].Ear.N
        [Wheat].Ear.NConc
        [Wheat].Ear.Wt
        [Wheat].Grain.N
        [Wheat].Grain.NConc
        [Wheat].Grain.NperKernal
        [Wheat].Grain.Number
        [Wheat].Grain.Size
        [Wheat].Grain.Wt
        [Wheat].Leaf.CoverGreen
        [Wheat].Leaf.CoverTotal
        [Wheat].Leaf.Dead.N
        [Wheat].Leaf.Dead.NConc
        [Wheat].Leaf.Dead.Wt
        [Wheat].Leaf.FinalLeafNumber
        [Wheat].Leaf.Fn
        [Wheat].Leaf.Fw
        [Wheat].Leaf.Height /10 as Height
        [Wheat].Leaf.LAI
        [Wheat].Leaf.Ligules
        [Wheat].Leaf.Live.N
        [Wheat].Leaf.Live.NConc
        [Wheat].Leaf.Live.Wt
        [Wheat].Leaf.MainStemPopulation
        [Wheat].Leaf.Photosynthesis.FT
        [Wheat].Leaf.SpecificArea
        [Wheat].Leaf.SpecificAreaCanopy
        [Wheat].Leaf.SpecificNitrogen
        [Wheat].Leaf.StemNumberPerPlant
        [Wheat].Leaf.StemPopulation
        [Wheat].Leaf.Tips
        [Wheat].Leaf.Tips
        [Wheat].Leaf.Transpiration
        [Wheat].Phenology.AccumulatedTT
        [Wheat].Phenology.CurrentPhase.Name
        [Wheat].Phenology.CurrentStageName
        [Wheat].Phenology.EmergenceDAS
        [Wheat].Phenology.HaunStage
        [Wheat].Phenology.Photoperiod
        [Wheat].Phenology.Phyllochron
        [Wheat].Phenology.PTQ
        [Wheat].Phenology.Stage
        [Wheat].Phenology.ThermalTime
        [Wheat].Phenology.Zadok.Stage
        [Wheat].Root.Depth
        [Wheat].Root.N
        [Wheat].Root.NConc
        [Wheat].Root.Wt
        [Wheat].SowingData.Cultivar
        [Wheat].Spike.N
        [Wheat].Spike.NConc
        [Wheat].Spike.Wt
        [Wheat].Stem.N
        [Wheat].Stem.NConc
        [Wheat].Stem.Wt
        [Wheat].StemPlusSpike.N
        [Wheat].StemPlusSpike.Wt
        [Wheat].Total.N
        [Wheat].Total.Wt
        sum([Soil].NO3.kgha)
        sum([Soil].Water.MM)
        ([Wheat].Leaf.Transpiration + [ISoilWater].Es + [MicroClimate].PrecipitationInterception)
        [Spectral].NDVI
    Manager Harvesting
      TargetHarvestDate = 01/06/2026 00:00:00
```csharp
using APSIM.Core;
using Models.Soils.Nutrients;
using System;
using Models.Core;
using System.Collections.Generic;
using System.Text;
using Models.Soils;
using Models.PMF;
using Models;
using System.Xml.Serialization;
using APSIM.Shared.Utilities;

namespace Models
{
    [Serializable] 
    public class Script : Model, IStructureDependency
    {
        [Link] private Plant Wheat;
        [Link] private Simulation sim;
        [Link] private Clock clock;

        // 1. Expose the date to the APSIM UI. 
        // This will create a clean input box in the interface.
        [Description("Target Harvest Date (e.g., 2025-11-27):")]
        public DateTime TargetHarvestDate { get; set; }

        public IStructure Structure { private get; set; }

        [EventSubscribe("DoManagement")]
        private void OnDoManagement(object sender, EventArgs e)
        {
            // 2. Trigger harvest ONLY when the calendar date matches exactly, 
            // AND ensure the crop is actually growing to prevent errors.
            if (clock.Today == TargetHarvestDate && Wheat.IsAlive)
            {
                Wheat.Harvest();
                Wheat.EndCrop();
                
                // Forces the simulation to end on this harvest date
                Structure.Set("Clock.EndDate", clock.Today, relativeTo: sim);  
            }
        }

        [EventSubscribe("EndOfDay")]
        private void OnEndOfDay(object sender, EventArgs e)
        {
            // 3. Fallback safety net: if the simulation reaches its set EndDate 
            // for any other reason before the TargetHarvestDate, clean up the crop.
            if ((clock.Today.Equals(clock.EndDate)) && (Wheat.IsAlive))
            {
                Wheat.Harvest();
                Wheat.EndCrop();
            }
        }
    }
}
```
  Experiment FAR VIC W24-50
    Factors
      Permutation
        Factor Cv
          CompositeFactor SowAprIllabo
            Specifications:
              [Sowing].Script.SowDate = 30-Apr
              [Clock].StartDate = 2025-04-23
              [Sowing].Script.CultivarName = Illabo
          CompositeFactor SowAprBigRed
            Specifications:
              [Sowing].Script.SowDate = 30-Apr
              [Clock].StartDate = 2025-04-23
              [Sowing].Script.CultivarName = BigRed
          CompositeFactor SowAprStockade
            Specifications:
              [Sowing].Script.SowDate = 30-Apr
              [Clock].StartDate = 2025-04-23
              [Sowing].Script.CultivarName = Stockade
          CompositeFactor SowMaySunmaster
            Specifications:
              [Sowing].Script.SowDate = 21-May
              [Clock].StartDate = 2025-04-23
              [Sowing].Script.CultivarName = Sunmaster
          CompositeFactor SowMayZanzibar
            Specifications:
              [Sowing].Script.SowDate = 21-May
              [Clock].StartDate = 2025-04-23
              [Sowing].Script.CultivarName = Zanzibar
          CompositeFactor SowMayIllabo
            Specifications:
              [Sowing].Script.SowDate = 21-May
              [Clock].StartDate = 2025-04-23
              [Sowing].Script.CultivarName = Illabo
        Factor PGR
          CompositeFactor No
            Specifications:
              [PGRApp].Script.PGR = "None"
              [PGRApp].Script.Amount = 0
          CompositeFactor Yes
            Specifications:
              [PGRApp].Script.PGR = "Moddus"
              [PGRApp].Script.Amount = 1
    Simulation Gnarwarre2025Base
      Weather
        FileName=%root%/Tests/Validation/Wheat/met/Gnarwarre_-38.20_144.05_2025.met
      Clock: Start=2025-03-03; End=2026-02-17
      Summary
      SoilArbitrator
      MicroClimate: a_interception=0; b_interception=1; c_interception=0; d_interception=0; SoilHeatFluxFraction=0.4; MinimumHeightDiffForNewLayer=0; NightInterceptionFraction=0.5; ReferenceHeight=2
      Manager LocationInfo
        Country = Australia
        State = Victoria
        Region = South
```csharp
using Models.Soils;
using System;
using Models.Core;
using Models.PMF;
using APSIM.Shared.Utilities;

namespace Models
{
    [Serializable]
    public class Script : Model
    {
        [Link] Clock Clock;
        [Link] Fertiliser Fertiliser;
        [Link] Summary Summary;
        
        [Description("Country")]
        public string Country { get; set; }

        [Description("State")]
        public string State { get; set; }

        [Description("Region")]
        public string Region { get; set; }

    }
}
```
      Zone Field: Area=1; Slope=0; AspectAngle=0; Altitude=50
        Report DailyReport: EventNames=[Wheat].Harvesting
          VariableNames:
            [Clock].Today
            [Wheat].Phenology.FloweringDAS
            [Wheat].Phenology.FlagLeafDAS
            [Wheat].Phenology.TerminalSpikeletDAS
        Report HarvestReport: EventNames=[Clock].DoReport
          VariableNames:
            [Clock].Today
            [Wheat].Phenology.Stage
            [Wheat].Phenology.Zadok.Stage
            [Wheat].Phenology.FloweringDAS
            [Wheat].Phenology.FlagLeafDAS
            [Wheat].Phenology.TerminalSpikeletDAS
        Fertiliser
        SurfaceOrganicMatter: InitialResidueName=bean_stubble; InitialResidueType=fababean; InitialResidueMass=1000; InitialStandingFraction=0; InitialCPR=0; InitialCNR=40
        Plant Wheat
        Manager Sowing
          SowDate =
          CultivarName =
          SowingDepth = 30
          RowSpacing = 225
          Population = 150
          EmergeDate =
```csharp
using APSIM.Shared.Utilities;
using Models.Utilities;
using Models.Soils;
using Models.PMF;
using Models.Core;
using System;

namespace Models
{
    [Serializable]
    public class Script : Model
    {
        [Link] Clock Clock;
        [Link] Fertiliser Fertiliser;
        [Link] Summary Summary;
        [Link] Soil Soil;
        
        [Link] Plant wheat;

        [Description("Sowing date (d-mmm)")]
        public string SowDate { get; set; }

        [Display(Type = DisplayType.CultivarName)]
        [Description("Cultivar to be sown")]
        public string CultivarName { get; set; }

        [Description("Sowing depth (mm)")]
        public double SowingDepth { get; set; }

        [Description("Row spacing (mm)")]
        public double RowSpacing { get; set; }

        [Description("Plant population (/m2)")]
        public double Population { get; set; }
        
        [Description("Emergence Date (d-MMM)")]
        public string EmergeDate {get; set;}

        [EventSubscribe("DoManagement")]
        private void OnDoManagement(object sender, EventArgs e)
        {
            if (DateUtilities.WithinDates(SowDate, Clock.Today, SowDate))
            {
                wheat.Sow(population: Population, cultivar: CultivarName, depth: SowingDepth, rowSpacing: RowSpacing);    
                wheat.Phenology.SetPhaseCompletionDate(EmergeDate,"Emerging");
            }
        }
    }
}
```
        Manager SowingFertiliser
          Amount = 200
          CropName = wheat
```csharp
using Models.Soils;
using System;
using Models.Core;
using Models.PMF;
namespace Models
{
    [Serializable]
    public class Script : Model
    {
        [Link] Clock Clock;
        [Link] Fertiliser Fertiliser;
        [Link] Summary Summary;
        
        
        [Description("Amount of fertiliser to be applied (kg/ha)")]
        public double Amount { get; set;}
        
        [Description("Crop to be fertilised")]
        public string CropName { get; set;}
        
        
        

        [EventSubscribe("Sowing")]
        private void OnSowing(object sender, EventArgs e)
        {
            Model crop = sender as Model;
            if (crop.Name.ToLower()==CropName.ToLower())
                Fertiliser.Apply(amount: Amount, type: "NO3N");
        }
        
    }
}
```
        Manager PGRApp
          Amount = 0
          PGR =
```csharp
using Models.Soils;
using System;
using Models.Core;
using Models.PMF;
namespace Models
{
    [Serializable]
    public class Script : Model
    {
        [Link] Clock Clock;
        [Link] Fertiliser Fertiliser;
        [Link] Summary Summary;

        [Description("Amount of PGR to apply ()")]
        public double Amount { get; set;}
        
        [Description("PGR to use")]
        public string PGR { get; set;}

        [EventSubscribe("Sowing")]
        private void OnSowing(object sender, EventArgs e)
        {
            Model crop = sender as Model;
        }
        
    }
}
```
        Manager Harvesting
        Operations Management
        Irrigation
        Soil Heavy Clay (Murdeduke No825): SoilType=Clay; Site=Murdeduke Homestead; NearestTown=Winchelsea; Region=South West; State=Victoria; Country=Australia; ApsoilNumber=825; Latitude=-38.191; Longitude=143.742; YearOfSampling=0
          DataSource=Data collected as part of the GRDC project Training growers to manage soil water by CSIRO Sustainable Ecosystems in collaboration with farmers and Agvise consultants
          Comments=Clay - Chem analysis: If EC <0.25 dS/m, ammonium acetate method used for cations, no prewash for soluble salts. pHwater independent.  If EC>0.25dS/m and pHwater>7.5 Tucker cation method used. OC estimated for all layers. Barley CLL estimated
          Memo Read Me
            2023-08-24 NH Soil layers added to extend profile from 120cm to 180cm depth.  Assumed uniform soil properties through this interval.\
            2024-03-18 Alter 30-60 cm soil layer Wheat LL to 0.2 (from 0.242) to reflect reasonably uniform measured lower limit.
          Physical
            Thickness  ParticleSizeSand  ParticleSizeSilt  ParticleSizeClay  Rocks  BD     AirDry  LL15  DUL    SAT
            150        5                 65                30                0      1.231  0.1     0.2   0.37   0.505
            150        5                 65                30                0      1.172  0.16    0.2   0.375  0.528
            300        5                 65                30                0      1.108  0.2     0.2   0.405  0.552
            300        5                 65                30                0      1.162  0.2     0.2   0.368  0.532
            300        5                 65                30                0      1.372  0.2     0.2   0.308  0.452
            300        5                 65                30                0      1.372  0.2     0.2   0.308  0.452
            300        5                 65                30                0      1.372  0.2     0.2   0.308  0.452
            BD, AirDry, LL15, DUL, SAT source: Unknown source or quality of data
            Rocks, ParticleSizeSand, ParticleSizeSilt, ParticleSizeClay source: Calculated
            SoilCrop wheatSoil: LL=[0.2, 0.2, 0.2, 0.203, 0.22, 0.22, 0.22]; KL=[0.06, 0.06, 0.06, 0.04, 0.04, 0.04, 0.04]; XF=[1, 1, 1, 1, 1, 1, 1]
              LL source: Estimated based on local knowledge (layer 1, 2, 3, 4, 5)
            SoilCrop barleySoil: LL=[0.2, 0.2, 0.242, 0.203, 0.22, 0.22, 0.22]; KL=[0.07, 0.07, 0.07, 0.05, 0.05, 0.05, 0.05]; XF=[1, 1, 1, 1, 1, 1, 1]
              LL source: Estimated based on local knowledge (layer 1, 2, 3, 4, 5)
            SoilCrop SCRUMSoil: LL=[0.2, 0.2, 0.242, 0.203, 0.22, 0.22, 0.22]; KL=[0.06, 0.06, 0.06, 0.04, 0.04, 0.04, 0.04]; XF=[1, 1, 1, 1, 1, 1, 1]
              LL source: Estimated based on local knowledge (layer 1, 2, 3, 4, 5)
          WaterBalance SoilWater: SummerDate=1-Nov; SummerU=6; SummerCona=3.5; WinterDate=1-Apr; WinterU=2; WinterCona=2; DiffusConst=40; DiffusSlope=16; Salb=0.12; CN2Bare=73; CNRed=20; CNCov=0.8; PSIDul=-100; Thickness=[150, 150, 300, 300, 300, 300, 300]; SWCON=[0.3, 0.3, 0.3, 0.3, 0.3, 0.3, 0.3]
          Organic: FOMCNRatio=40; CarbonUnits=WalkleyBlack
            Thickness  Carbon  SoilCNRatio  FBiom  FInert  FOM
            150        2.4     12           0.04   0.4     446.88
            150        0.96    12           0.02   0.5     307.136
            300        0.6     12           0.02   0.7     145.081
            300        0.3     12           0.02   1       68.531
            300        0.18    12           0.01   1       32.372
            300        0.18    12           0.01   1       32.372
            300        0.18    12           0.01   1       32.372
          Chemical: PHUnits=Water
            Thickness  PH   EC   ESP   CEC
            150        6.5  0.1  4.2   11
            150        7.5  0.2  5.2   17.4
            300        8.4  0.2  5.9   28.8
            300        9.2  0.3  8.9   26.9
            300        9.2  0.3  15.8  23.4
            300        9.2  0.3  15.8  23.4
            300        9.2  0.3  15.8  23.4
            EC, CL, ESP, PH source: Unknown source or quality of data
          Nutrient
          Solute NO3: Thickness=[100, 100, 100, 300, 400]; InitialValues=[47, 15, 13, 6.9, 3.4]; InitialValuesUnits=ppm; WaterTableConcentration=0; D0=0; DepthConstant=0; MaxDepthSoluteAccessible=0; RunoffEffectivenessAtMovingSolute=0; MaxEffectiveRunoff=0
          Solute NH4: Thickness=[100, 100, 100, 300, 400]; InitialValues=[9.8, 1.1, 1.2, 1.1, 0.8]; InitialValuesUnits=ppm; WaterTableConcentration=0; D0=0; DepthConstant=0; MaxDepthSoluteAccessible=0; RunoffEffectivenessAtMovingSolute=0; MaxEffectiveRunoff=0
          Solute Urea: Thickness=[150, 150, 300, 300, 300, 300, 300]; InitialValues=[0, 0, 0, 0, 0, 0, 0]; InitialValuesUnits=kg/ha; WaterTableConcentration=0; D0=0; DepthConstant=0; MaxDepthSoluteAccessible=0; RunoffEffectivenessAtMovingSolute=0; MaxEffectiveRunoff=0
          Water: Thickness=[150, 150, 300, 300, 300, 300, 300]; InitialValues=[0.285, 0.2875, 0.3025, 0.284, 0.254, 0.254, 0.254]; FilledFromTop=false
          SoilTemperature CERESSoilTemperature
        Spectral: DrySoilNDVI=0.13; WetSoilNDVI=0.18; GreenCropNDVI=0.85; DeadCropNDVI=0.1
        SetModelParamsBySimulation SetHaunRelatedExternally: SetEventName=[Plant].PlantSowing
          ParameterFile=%root%/Tests/Validation/Wheat/inputs/Gnarwarre2025_HaunStagesInput.csv
        SetModelParamsBySimulation SetPhenoDatesExternally: SetEventName=[Plant].PlantSowing
          ParameterFile=%root%/Tests/Validation/Wheat/inputs/Gnarwarre2025_PhenoDatesInput.csv
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