Simulations: Version=206
  DataStore
    ExcelInput ExcelMultiInput: FileNames=[Observed/GrassPatch2025_Observed.xlsx]; SheetNames=[Observed]
    PredictedObserved DailyObsPred: PredictedTableName=DailyReport; ObservedTableName=Observed; FieldNameUsedForMatch=SimulationName; FieldName2UsedForMatch=Clock.Today; AllColumns=false
    PredictedObserved HarvestObsPred: PredictedTableName=HarvestReport; ObservedTableName=Observed; FieldNameUsedForMatch=SimulationName; FieldName2UsedForMatch=Wheat.Phenology.CurrentStageName; AllColumns=false
  Folder Replacements
    Manager Harvesting
```csharp
using APSIM.Core;
using Models.Soils.Nutrients;
using System;
using Models.Core;
using System.Collections.Generic;
using System.Text;
using Models.Soils;
using Models.PMF;
using Models;
using System.Xml.Serialization;
using APSIM.Shared.Utilities;
using Models.PMF.Phen;

namespace Models
{
    [Serializable] 
    public class Script : Model, IStructureDependency
    {
        [Link] private Plant Wheat;
        [Link] private Simulation sim;
        [Link] private Clock clock;
        [Link(Type = LinkType.Path, Path = "[Wheat].Phenology")]
        private Phenology phenology;
        public IStructure Structure { private get; set; }


        

//        [EventSubscribe("DoManagement")]
//        private void OnDoManagement(object sender, EventArgs e)
//        {
//            if (phenology.CurrentPhase.Name == "GrainRipening")
//            {
//                Wheat.Harvest();
//                Wheat.EndCrop();
//                Structure.Set("Clock.EndDate", clock.Today, relativeTo: sim);  
//            }
//        }

        [EventSubscribe("EndOfDay")]
        private void OnEndOfDay(object sender, EventArgs e)
        {
            if ((clock.Today.Equals(clock.EndDate))&&(Wheat.IsAlive))
            {
                Wheat.Harvest();
                Wheat.EndCrop();
                Structure.Set("Clock.EndDate", clock.Today, relativeTo: sim);  
            }
        }

    }
}
```
    Report HarvestReport: EventNames=[Wheat].Harvesting
      VariableNames:
        [Clock].Today
        [Clock].StartDate
        [Wheat].SowingDate
        [Wheat].SowingData.Cultivar
        [Wheat].SowingDate.DayOfYear
        [IWeather].Latitude
        [IWeather].Longitude
        [IWeather].FileName
        [LocationInfo].Script.Country
        [LocationInfo].Script.State
        [LocationInfo].Script.Region
        [Wheat].AboveGround.N
        [Wheat].AboveGround.NConc
        [Wheat].AboveGround.Wt
        [Wheat].AboveGround.StorageWt as Wheat.AboveGround.WSC
        [Wheat].Ear.N
        [Wheat].Ear.NConc
        [Wheat].Ear.Wt
        [Wheat].Grain.N
        [Wheat].Grain.Live.NConc
        [Wheat].Grain.Number
        [Wheat].Grain.Protein
        [Wheat].Grain.Size
        [Wheat].Grain.Wt
        [Wheat].Leaf.Dead.Wt
        [Wheat].Leaf.Dead.N
        [Wheat].Leaf.Dead.Nconc
        [Wheat].Leaf.Wt
        [Wheat].Leaf.Live.N
        [Wheat].Leaf.Live.NConc
        [Wheat].Leaf.Live.Wt
        [Wheat].Leaf.Live.NConc
        [Wheat].Leaf.Live.StructuralWt
        [Wheat].Leaf.Live.StorageWt as Wheat.Leaf.Live.WSC
        [Wheat].Leaf.Dead.StorageWt as Wheat.Leaf.Dead.WSC
        [Wheat].Phenology.CAMP.TSHS
        [Wheat].Phenology.CurrentStageName
        [Wheat].Phenology.EmergenceDAS
        [Wheat].Phenology.FinalLeafNumber
        [Wheat].Phenology.FlagLeafDAS
        [Wheat].Phenology.FloweringDAS
        [Wheat].Phenology.HeadingDAS
        [Wheat].Phenology.MaturityDAS
        [Wheat].Phenology.TerminalSpikeletDAS
        [Wheat].Spike.HeadNumber
        [Wheat].Spike.Wt
        [Wheat].Spike.Live.Wt
        [Wheat].Spike.Live.N
        [Wheat].Spike.Live.NConc
        [Wheat].Spike.Live.StorageWt as Wheat.Spike.Live.WSC
        [Wheat].Stem.Live.Wt
        [Wheat].Stem.Wt
        [Wheat].Stem.Live.Wt
        [Wheat].Stem.Live.N
        [Wheat].Stem.Live.NConc
        [Wheat].Stem.Live.StorageWt as Wheat.Stem.Live.WSC
        1.0 * [Wheat].Grain.Wt / ([Wheat].AboveGround.Wt + 0.00001) as HarvestIndex
        1.0 * [Wheat].Leaf.Live.StorageWt / ([Wheat].Leaf.Live.Wt + 0.00001) as Wheat.Leaf.Live.WSCc
        1.0 * [Wheat].Stem.Live.StorageWt / ([Wheat].Stem.Live.Wt + 0.00001) as Wheat.Stem.Live.WSCc
        1.0 * [Wheat].Spike.Live.StorageWt / ([Wheat].Spike.Live.Wt + 0.00001) as Wheat.Spike.Live.WSCc
        1.0 * [Wheat].Leaf.Dead.StorageWt/([Wheat].Leaf.Dead.Wt + 0.00001) as Wheat.Leaf.Dead.WSCc
    Report DailyReport: EventNames=[Clock].DoReport
      VariableNames:
        [Clock].Today
        [IWeather].MeanT
        [IWeather].MeanT
        [IWeather].Radn
        [Simulation].Name
        [Soil].Water.Volumetric
        [Wheat].AboveGround.N
        [Wheat].AboveGround.Wt
        [Wheat].AboveGroundDead.N
        [Wheat].AboveGroundDead.Wt
        [Wheat].AboveGroundLive.N
        [Wheat].AboveGroundLive.Wt
        [Wheat].AboveGround.StorageWt as Wheat.AboveGround.WSC
        [Wheat].Ear.N
        [Wheat].Ear.NConc
        [Wheat].Ear.Wt
        [Wheat].Grain.N
        [Wheat].Grain.Live.NConc
        [Wheat].Grain.Number
        [Wheat].Grain.Size
        [Wheat].Grain.Wt
        [Wheat].Grain.Protein
        [Wheat].Leaf.CoverGreen
        [Wheat].Leaf.CoverTotal
        [Wheat].Leaf.Dead.N
        [Wheat].Leaf.Dead.NConc
        [Wheat].Leaf.Dead.Wt
        [Wheat].Leaf.Live.StorageWt as Wheat.Leaf.Live.WSC
        [Wheat].Leaf.Dead.StorageWt as Wheat.Leaf.Dead.WSC
        [Wheat].Leaf.FinalLeafNumber
        [Wheat].Leaf.Fn
        [Wheat].Leaf.Fw
        [Wheat].Leaf.Height
        [Wheat].Leaf.LAI
        [Wheat].Leaf.Ligules
        [Wheat].Leaf.Live.N
        [Wheat].Leaf.Live.NConc
        [Wheat].Leaf.Live.Wt
        [Wheat].Leaf.Live.StorageWt
        [Wheat].Leaf.MainStemPopulation
        [Wheat].Leaf.Photosynthesis.FT
        [Wheat].Leaf.SpecificArea
        [Wheat].Leaf.SpecificAreaCanopy
        [Wheat].Leaf.SpecificNitrogen
        [Wheat].Leaf.StemNumberPerPlant
        [Wheat].Leaf.StemPopulation
        [Wheat].Leaf.Tips
        [Wheat].Leaf.Tips
        [Wheat].Leaf.Transpiration
        [Wheat].Phenology.AccumulatedTT
        [Wheat].Phenology.CurrentPhase.Name
        [Wheat].Phenology.CurrentStageName
        [Wheat].Phenology.EmergenceDAS
        [Wheat].Phenology.HaunStage
        [Wheat].Phenology.Photoperiod
        [Wheat].Phenology.Phyllochron
        [Wheat].Phenology.PTQ
        [Wheat].Phenology.Stage
        [Wheat].Phenology.ThermalTime
        [Wheat].Phenology.Zadok.Stage
        [Wheat].Root.Depth
        [Wheat].Root.N
        [Wheat].Root.NConc
        [Wheat].Root.Wt
        [Wheat].SowingData.Cultivar
        [Wheat].Spike.N
        [Wheat].Spike.NConc
        [Wheat].Spike.Wt
        [Wheat].Spike.Live.Wt
        [Wheat].Spike.Live.N
        [Wheat].Spike.Live.NConc
        [Wheat].Spike.Live.StorageWt as Wheat.Spike.Live.WSC
        [Wheat].Stem.Wt
        [Wheat].Stem.Live.Wt
        [Wheat].Stem.Live.N
        [Wheat].Stem.Live.NConc
        [Wheat].Stem.Live.StorageWt as Wheat.Stem.Live.WSC
        1.0 * [Wheat].Grain.Wt / ([Wheat].AboveGround.Wt + 0.00001) as HarvestIndex
        1.0 * [Wheat].Leaf.Live.StorageWt / ([Wheat].Leaf.Live.Wt + 0.00001) as Wheat.Leaf.Live.WSCc
        1.0 * [Wheat].Stem.Live.StorageWt / ([Wheat].Stem.Live.Wt + 0.00001) as Wheat.Stem.Live.WSCc
        1.0 * [Wheat].Spike.Live.StorageWt / ([Wheat].Spike.Live.Wt + 0.00001) as Wheat.Spike.Live.WSCc
        1.0 * [Wheat].Leaf.Dead.StorageWt/([Wheat].Leaf.Dead.Wt + 0.00001) as Wheat.Leaf.Dead.WSCc
        [Spectral].NDVI
        [Irrigation].IrrigationApplied
        [Fertiliser].NitrogenApplied
  Experiment GrassPatch2025
    Factors
      Permutation
        Factor Cv
          CompositeFactor Osprey
            Specifications:
              [Sowing].Script.SowDate = 17-Apr
              [Clock].StartDate = 2025-04-01
              [Sowing].Script.CultivarName = Osprey
              [ManagementSpring].Enabled = false
              [ManagementWinter].Enabled = true
              [Sowing].Script.Population = 149
          CompositeFactor Rosella
            Specifications:
              [Sowing].Script.SowDate = 17-Apr
              [Clock].StartDate = 2025-04-01
              [Sowing].Script.CultivarName = Rosella
              [ManagementSpring].Enabled = false
              [ManagementWinter].Enabled = true
              [Sowing].Script.Population = 118
          CompositeFactor Whistler
            Specifications:
              [Sowing].Script.SowDate = 17-Apr
              [Clock].StartDate = 2025-04-01
              [Sowing].Script.CultivarName = Whistler
              [ManagementSpring].Enabled = false
              [ManagementWinter].Enabled = true
              [Sowing].Script.Population = 121
          CompositeFactor Wylah
            Specifications:
              [Sowing].Script.SowDate = 17-Apr
              [Clock].StartDate = 2025-04-01
              [Sowing].Script.CultivarName = Wylah
              [ManagementSpring].Enabled = false
              [ManagementWinter].Enabled = true
              [Sowing].Script.Population = 121
          CompositeFactor Wedgetail
            Specifications:
              [Sowing].Script.SowDate = 17-Apr
              [Clock].StartDate = 2025-04-01
              [Sowing].Script.CultivarName = Wedgetail
              [ManagementSpring].Enabled = false
              [ManagementWinter].Enabled = true
              [Sowing].Script.Population = 137
          CompositeFactor Kittyhawk
            Specifications:
              [Sowing].Script.SowDate = 17-Apr
              [Clock].StartDate = 2025-04-01
              [Sowing].Script.CultivarName = Kittyhawk
              [ManagementSpring].Enabled = false
              [ManagementWinter].Enabled = true
              [Sowing].Script.Population = 129
          CompositeFactor Illabo
            Specifications:
              [Sowing].Script.SowDate = 17-Apr
              [Clock].StartDate = 2025-04-01
              [Sowing].Script.CultivarName = Illabo
              [ManagementSpring].Enabled = false
              [ManagementWinter].Enabled = true
              [Sowing].Script.Population = 113
          CompositeFactor Mowhawk
            Specifications:
              [Sowing].Script.SowDate = 17-Apr
              [Clock].StartDate = 2025-04-01
              [Sowing].Script.CultivarName = Mowhawk
              [ManagementSpring].Enabled = false
              [ManagementWinter].Enabled = true
              [Sowing].Script.Population = 107
          CompositeFactor Meering
            Specifications:
              [Sowing].Script.SowDate = 15-May
              [Clock].StartDate = 2025-04-01
              [Sowing].Script.CultivarName = Meering
              [ManagementSpring].Enabled = true
              [ManagementWinter].Enabled = false
              [Sowing].Script.Population = 174
          CompositeFactor Janz
            Specifications:
              [Sowing].Script.SowDate = 15-May
              [Clock].StartDate = 2025-04-01
              [Sowing].Script.CultivarName = Janz
              [ManagementSpring].Enabled = true
              [ManagementWinter].Enabled = false
              [Sowing].Script.Population = 168
          CompositeFactor Yitpi
            Specifications:
              [Sowing].Script.SowDate = 15-May
              [Clock].StartDate = 2025-04-01
              [Sowing].Script.CultivarName = Yitpi
              [ManagementSpring].Enabled = true
              [ManagementWinter].Enabled = false
              [Sowing].Script.Population = 164
          CompositeFactor Wyalkatchem
            Specifications:
              [Sowing].Script.SowDate = 15-May
              [Clock].StartDate = 2025-04-01
              [Sowing].Script.CultivarName = Wyalkatchem
              [ManagementSpring].Enabled = true
              [ManagementWinter].Enabled = false
              [Sowing].Script.Population = 169
          CompositeFactor Gregory
            Specifications:
              [Sowing].Script.SowDate = 15-May
              [Clock].StartDate = 2025-04-01
              [Sowing].Script.CultivarName = Gregory
              [ManagementSpring].Enabled = true
              [ManagementWinter].Enabled = false
              [Sowing].Script.Population = 152
          CompositeFactor Mace
            Specifications:
              [Sowing].Script.SowDate = 15-May
              [Clock].StartDate = 2025-04-01
              [Sowing].Script.CultivarName = Mace
              [ManagementSpring].Enabled = true
              [ManagementWinter].Enabled = false
              [Sowing].Script.Population = 173
          CompositeFactor Scepter
            Specifications:
              [Sowing].Script.SowDate = 15-May
              [Clock].StartDate = 2025-04-01
              [Sowing].Script.CultivarName = Scepter
              [ManagementSpring].Enabled = true
              [ManagementWinter].Enabled = false
              [Sowing].Script.Population = 111
          CompositeFactor Sunmaster
            Specifications:
              [Sowing].Script.SowDate = 15-May
              [Clock].StartDate = 2025-04-01
              [Sowing].Script.CultivarName = Sunmaster
              [ManagementSpring].Enabled = true
              [ManagementWinter].Enabled = false
              [Sowing].Script.Population = 111
    Simulation GrassPatch2025Base
      Weather: FileName=Met/GrassPatch2025.met
      Clock: Start=2025-03-03; End=2025-11-30
      Summary
      SoilArbitrator
      MicroClimate: a_interception=0; b_interception=1; c_interception=0; d_interception=0; SoilHeatFluxFraction=0.4; MinimumHeightDiffForNewLayer=0; NightInterceptionFraction=0.5; ReferenceHeight=2
      Manager LocationInfo
        Country = Australia
        State = Western Australia
        Region = West
```csharp
using Models.Soils;
using System;
using Models.Core;
using Models.PMF;
using APSIM.Shared.Utilities;

namespace Models
{
    [Serializable]
    public class Script : Model
    {
        [Link] Clock Clock;
        [Link] Fertiliser Fertiliser;
        [Link] Summary Summary;
        
        [Description("Country")]
        public string Country { get; set; }

        [Description("State")]
        public string State { get; set; }

        [Description("Region")]
        public string Region { get; set; }

    }
}
```
      Zone Field: Area=1; Slope=0; AspectAngle=0; Altitude=50
        Report DailyReport: EventNames=[Wheat].Harvesting
          VariableNames:
            [Clock].Today
            [Wheat].Phenology.FloweringDAS
            [Wheat].Phenology.FlagLeafDAS
            [Wheat].Phenology.TerminalSpikeletDAS
        Report HarvestReport: EventNames=[Clock].DoReport
          VariableNames:
            [Clock].Today
            [Wheat].Phenology.Stage
            [Wheat].Phenology.Zadok.Stage
            [Wheat].Phenology.FloweringDAS
            [Wheat].Phenology.FlagLeafDAS
            [Wheat].Phenology.TerminalSpikeletDAS
        Fertiliser
        SurfaceOrganicMatter: InitialResidueName=lentil_stubble; InitialResidueType=lentil; InitialResidueMass=250; InitialStandingFraction=0.8; InitialCPR=0; InitialCNR=40
        Plant Wheat
          Cultivar Meering
            Command:
              [Phenology].Phyllochron.BasePhyllochron.FixedValue = 90
              [Phenology].PhyllochronPpSensitivity.FixedValue = 0.212225680614483
              [Phenology].CAMP.FLNparams.MinLN = 8
              [Phenology].CAMP.FLNparams.PpLN = 3.0
              [Phenology].CAMP.FLNparams.VrnLN = 1.0
              [Phenology].CAMP.FLNparams.VxPLN = 1.0
              [Phenology].CAMP.EnvData.VrnTreatTemp = 5.8
              [Phenology].CAMP.EnvData.VrnTreatDuration = 60
              [Phenology].HeadEmergenceLongDayBase.FixedValue = 170
              [Phenology].HeadEmergencePpSensitivity.FixedValue = 0.0
          Cultivar Sunmaster: same as GrassPatch2025.GrassPatch2025Base.Field.Wheat.Meering
          Cultivar Osprey
            Command:
              [Phenology].Phyllochron.BasePhyllochron.FixedValue = 95
              [Phenology].PhyllochronPpSensitivity.FixedValue = 0.212225680614483
              [Phenology].CAMP.FLNparams.MinLN = 8.5
              [Phenology].CAMP.FLNparams.PpLN = 3.0
              [Phenology].CAMP.FLNparams.VrnLN = 5.0
              [Phenology].CAMP.FLNparams.VxPLN = 1.0
              [Phenology].CAMP.EnvData.VrnTreatTemp = 5.8
              [Phenology].CAMP.EnvData.VrnTreatDuration = 60
              [Phenology].HeadEmergenceLongDayBase.FixedValue = 170
              [Phenology].HeadEmergencePpSensitivity.FixedValue = 0.0
          Cultivar Wylah: same as GrassPatch2025.GrassPatch2025Base.Field.Wheat.Osprey
          Cultivar Mowhawk: same as GrassPatch2025.GrassPatch2025Base.Field.Wheat.Osprey
        Manager Sowing
          SowDate =
          Treat =
          CultivarName =
          SowingDepth = 30
          RowSpacing = 225
          Population = 150
```csharp
using Newtonsoft.Json;
using System.Data;
using System.Xml.Serialization;
using Models;
using System.Text;
using System.Collections.Generic;
using Models.Interfaces;
using System;
using Models.Core;
using Models.PMF;
using Models.Soils;
using Models.Utilities;
using APSIM.Shared.Utilities;

namespace Models
{
    [Serializable]
    public class Script : Model
    {
        [Link] Clock Clock;
        [Link] Fertiliser Fertiliser;
        [Link] Summary Summary;
        [Link] Soil Soil;
        [Link] Plant Wheat;
        [Link] Simulation Simulation;
        Accumulator accumulatedRain;
        
        [Description("Sowing date (d-mmm)")]
        public string SowDate { get; set; }
        [Description("Treatment Name")]
        public string Treat { get; set; }
        [Display(Type = DisplayType.CultivarName)]
        [Description("Cultivar to be sown")]
        public string CultivarName { get; set; }
        [Description("Sowing depth (mm)")]
        public double SowingDepth { get; set; }
        [Description("Row spacing (mm)")]
        public double RowSpacing { get; set; }
        [Description("Plant population (/m2)")]
        public double Population { get; set; }



        [EventSubscribe("DoManagement")]
        private void OnDoManagement(object sender, EventArgs e)
        {

            if (DateUtilities.WithinDates(SowDate, Clock.Today, SowDate))
            {
               Wheat.Sow(population: Population, cultivar: CultivarName, depth: SowingDepth, rowSpacing: RowSpacing);    
            }            
        
        }
        
    }
}
```
        Manager Harvesting
```csharp
using APSIM.Core;
using System;
using Models.Core;
using Models.PMF;
using Models.Soils;
using Models.Utilities;
using APSIM.Shared.Utilities;

namespace Models
{
    [Serializable]
    public class Script : Model, IStructureDependency
    {
        [Link] private Plant Wheat;
        [Link] private Clock Clock;
        [Link] private Simulation sim;
        public IStructure Structure { private get; set; }


        

        [EventSubscribe("DoManagement")]
        private void OnDoManagement(object sender, EventArgs e)
        {
            if (Wheat.IsReadyForHarvesting)
            {
               Wheat.Harvest();
               Wheat.EndCrop();  
               Structure.Set("Clock.EndDate", Clock.Today.AddDays(1), relativeTo: sim);  
            }
        
        }
        
    }
}
```
        Irrigation
        Soil Clay(Scaddan NT 30 No1104): ASCOrder=Dermosol; ASCSubOrder=Yellow Dermosol; SoilType=Clay loam; LocalName=Clays & shallow loamy duplexes; Site=Scaddan; NearestTown=Scaddan; Region=Southern Region; State=Western Australia; Country=Australia; ApsoilNumber=1104; Latitude=-33.3343; Longitude=121.55; LocationAccuracy=+/- 20m; YearOfSampling=2010; DataSource=CSIRO Yvette Oliver - PA and SW project 2014
          Comments=Clay - NT 30 PAWC from 2010, Chem from 2015, other parameters estimated
          Physical
            Thickness  ParticleSizeSand  ParticleSizeSilt  ParticleSizeClay  Rocks  BD   AirDry  LL15      DUL       SAT
            100        76.14             1                 22.86             0      1.5  0.083   0.166589  0.301285  0.394
            100        51.54             7.76              40.7              0      1.4  0.176   0.22      0.385224  0.442
            100        59.12             5.85              35.03             0      1.4  0.18    0.23      0.364775  0.442
            100        61.6              4.81              33.6              0      1.4  0.18    0.22      0.334719  0.442
            100        58.65             7.7               33.65             0      1.5  0.18    0.214933  0.286095  0.383962
            100        60.94             6.84              32.22             0      1.5  0.18    0.214933  0.299963  0.383962
            200        59.52             1.93              38.55             0      1.5  0.18    0.214933  0.276096  0.383962
            BD, LL15 source: Estimated based on local knowledge
            DUL source: Field measured and checked for sensibility
            SAT source: Calculated from measured, estimated or calculated BD
            SoilCrop wheatSoil: LL=[0.12, 0.19, 0.18, 0.18, 0.24, 0.24, 0.18]; KL=[0.06, 0.06, 0.06, 0.06, 0.06, 0.04, 0.04]; XF=[1, 1, 1, 1, 1, 1, 1]
            SoilCrop barleySoil: LL=[0.166589, 0.22, 0.23, 0.22, 0.214933, 0.216371, 0.222357]; KL=[0.06, 0.06, 0.06, 0.06, 0.06, 0.04, 0.04]; XF=[1, 1, 1, 1, 1, 1, 1]
              LL source: Estimated based on local knowledge
            SoilCrop canolaSoil: same as GrassPatch2025.GrassPatch2025Base.Field.Clay(Scaddan NT 30 No1104).Physical.barleySoil
            SoilCrop SCRUMSoil: LL=[0.166589, 0.22, 0.23, 0.22, 0.214933, 0.216371, 0.222357]; KL=[0.06, 0.06, 0.06, 0.06, 0.06, 0.04, 0.04]; XF=[1, 1, 1, 1, 1, 1, 1]
              LL source: Field measured and checked for sensibility
          WaterBalance SoilWater: SummerDate=1-Nov; SummerU=6; SummerCona=3.5; WinterDate=1-Apr; WinterU=2; WinterCona=2; DiffusConst=40; DiffusSlope=16; Salb=0.13; CN2Bare=73; CNRed=20; CNCov=0.8; PSIDul=-100; Thickness=[100, 100, 100, 100, 100, 100, 200]; SWCON=[0.5, 0.3, 0.3, 0.5, 0.3, 0.3, 0.5]
          Organic: FOMCNRatio=40; CarbonUnits=WalkleyBlack
            Thickness  Carbon  SoilCNRatio  FBiom  FInert  FOM
            100        0.61    12           0.04   0.4     340.921
            100        0.26    12           0.03   0.5     234.311
            100        0.21    12           0.02   0.5     161.04
            100        0.21    12           0.01   0.7     110.681
            100        0.12    12           0.01   0.7     76.0697
            100        0.06    12           0.01   0.95    52.2819
            200        0.09    12           0.01   0.95    24.6962
          Chemical: PHUnits=1
            Thickness  PH   EC     ESP      CEC
            100        7.1  0.266  22.7523  12.5775
            100        8.3  0.525  29.5165  14.9051
            100        8.5  0.448  34.8273  13.7866
            100        8.4  0.585  37.0433  13.5709
            100        8.3  0.683  40.0573  13.1841
            100        8.2  0.649  44.4648  12.8207
            200        8    0.594  49.7682  14.48319
            EC, PH source: Measured
            CEC source: Calculated
            ESP source: C
          Nutrient
          Solute NO3: Thickness=[100, 100, 100, 100, 100, 100, 200]; InitialValues=[10, 8, 5, 5, 2, 2, 1]; InitialValuesUnits=kg/ha; WaterTableConcentration=0; D0=0; DepthConstant=0; MaxDepthSoluteAccessible=0; RunoffEffectivenessAtMovingSolute=0; MaxEffectiveRunoff=0
          Solute NH4: Thickness=[100, 100, 100, 100, 100, 100, 200]; InitialValues=[2, 1.5, 1.5, 1, 1, 1, 0]; InitialValuesUnits=kg/ha; WaterTableConcentration=0; D0=0; DepthConstant=0; MaxDepthSoluteAccessible=0; RunoffEffectivenessAtMovingSolute=0; MaxEffectiveRunoff=0
          Solute Urea: Thickness=[100, 100, 100, 100, 100, 100, 200]; InitialValues=[0, 0, 0, 0, 0, 0, 0]; InitialValuesUnits=kg/ha; WaterTableConcentration=0; D0=0; DepthConstant=0; MaxDepthSoluteAccessible=0; RunoffEffectivenessAtMovingSolute=0; MaxEffectiveRunoff=0
          Water: Thickness=[100, 100, 100, 100, 100, 100, 200]; FilledFromTop=false
            InitialValues=[0.233937, 0.302612, 0.297388, 0.27736, 0.250514, 0.257448, 0.245514]
          SoilTemperature Temperature
        Manager IrrDate (disabled)
          IrrigateDates = 10-Apr
          Amount = 0
          Depth = 0
          Efficiency = 1
          WillRunoff = False
```csharp
using Models.Soils;
using System;
using System.Linq;
using Models.Core;
using Models.PMF;
using APSIM.Shared.Utilities;
namespace Models
{
    [Serializable]
    public class Script : Model
    {
        [Link] Clock Clock;
        [Link] Irrigation Irrigation;
        
        [Separator("A component to apply irrigation on one or more dates on every year of the simulation")]

        [Description("Enter the irrigation dates as dd-mmm with comma separation (any year information entered will be ignored)")] 
        public string[] IrrigateDates { get; set; }
        
        [Description("Amount of irrigation to be applied (mm)")] 
        public double Amount { get; set; }
        
        [Description("Depth in the soil to apply the  irrigation (mm)")] 
        public double Depth { get; set; }
        
        [Description("Efficiency of irrigation (0-1)")] 
        public double Efficiency { get; set; }
        
        [Description("Will the irrigation runoff?")] 
        public bool WillRunoff { get; set; }
        
        [EventSubscribe("DoManagement")]
        private void OnDoManagement(object sender, EventArgs e)
        {
            foreach (string ddMMM in IrrigateDates)
            {
                if (DateUtilities.DatesEqual(ddMMM, Clock.Today))
                    Irrigation.Apply(amount: Amount, depth: Depth, efficiency: Efficiency, willRunoff: WillRunoff);
            }
        }
    }
}
```
        Manager FertDate0 (disabled)
          FertiliserType = UreaGranular
          FertiliserDates = 12-jun
          Amount = 75
```csharp
using Models.Soils;
using System;
using System.Linq;
using Models.Core;
using Models.PMF;
using APSIM.Shared.Utilities;
namespace Models
{
    [Serializable]
    public class Script : Model
    {
        [Link] Clock Clock;
        [Link] Fertiliser Fertiliser;
        
        [Separator("A component to apply fertiliser on one or more dates on every year of the simulation")]

        [Description("Type of fertiliser to apply? ")] 
        [Display(Type = DisplayType.FertiliserType)]public string FertiliserType { get; set; }

        [Description("Enter the fertilisation dates as dd-mmm with comma separation (any year information entered will be ignored): ")] 
        public string[] FertiliserDates { get; set; } 

        [Description("Amount of fertiliser to be applied each time (kg /ha)")] 
        public double Amount { get; set; }

      
        [EventSubscribe("DoManagement")]
        private void OnDoManagement(object sender, EventArgs e)
        {
            foreach (string ddMMM in FertiliserDates)
            {
                if (DateUtilities.DatesEqual(ddMMM, Clock.Today))
                {
                    Fertiliser.Apply(amount: Amount, type: FertiliserType);
                }
            }
        }
    }
}
```
        Spectral: DrySoilNDVI=0.1; WetSoilNDVI=0.12; GreenCropNDVI=0.85; DeadCropNDVI=0.1
        SetModelParamsBySimulation ConstantBaseCv: SetEventName=[Plant].PlantSowing; ParameterFile=Inputs/GrassPatch2025_ConstantPhenology.csv
        SetModelParamsBySimulation SetGermDatesExternally: SetEventName=[Plant].PlantSowing; ParameterFile=Inputs/GrassPatch2025_GermDatesInput.csv
        SetModelParamsBySimulation SetPhenoDatesExternally: SetEventName=[Plant].PlantSowing; ParameterFile=Inputs/GrassPatch2025_PhenoDatesInput.csv
        SetModelParamsBySimulation SetHaunRelatedExternally: SetEventName=[Plant].PlantSowing; ParameterFile=Inputs/GrassPatch2025_HaunStagesInput.csv
        Manager SowingFertiliser (disabled)
          Amount = 120
          CropName = wheat
```csharp
using Models.Soils;
using System;
using Models.Core;
using Models.PMF;
namespace Models
{
    [Serializable]
    public class Script : Model
    {
        [Link] Clock Clock;
        [Link] Fertiliser Fertiliser;
        [Link] Summary Summary;
        
        
        [Description("Amount of fertiliser to be applied (50:50 Urea:MAP, kg/ha)")]
        public double Amount { get; set;}
        
        [Description("Crop to be fertilised")]
        public string CropName { get; set;}
        
        
        

        [EventSubscribe("Sowing")]
        private void OnSowing(object sender, EventArgs e)
        {
            Model crop = sender as Model;
            if (crop.Name.ToLower()==CropName.ToLower())
                Fertiliser.Apply(amount: Amount*0.5, type: "MAP");
                Fertiliser.Apply(amount: Amount*0.5, type: "UreaGranular");
        }
        
    }
}
```
        Operations ManagementWinter
          2025-04-17  [Fertiliser].Apply(amount: 60, type: "MAP")
          2025-04-17  [Fertiliser].Apply(amount: 60, type: "UreaGranular")
          2025-07-12  [Fertiliser].Apply(amount: 75, type: "UreaGranular")
          2025-08-11  [Fertiliser].Apply(amount: 125, type: "UreaGranular")
          Memo
            Irrigation from previous auto irr IrrDate

            Fertliliser from previous auto fert FertDate0
        Operations ManagementSpring
          2025-05-15  [Fertiliser].Apply(amount: 60, type: "MAP")
          2025-05-15  [Fertiliser].Apply(amount: 60, type: "UreaGranular")
          2025-07-12  [Fertiliser].Apply(amount: 75, type: "UreaGranular")
          2025-08-11  [Fertiliser].Apply(amount: 125, type: "UreaGranular")
          Memo
            Irrigation from previous auto irr IrrDate

            Fertliliser from previous auto fert FertDate0
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