Simulations: Version=146
  Memo TitlePage
    # The APSIM Wheat Model

    _Brown, H.E., Huth, N.I. and Holzworth, D.P._
  Memo Introduction
    The APSIM wheat model has been developed using the Plant Modelling Framework (PMF) of [brown_plant_2014]. This new framework provides a library of plant organ and process submodels that can be coupled, at runtime, to construct a model in much the same way that models can be coupled to construct a simulation. This means that dynamic composition of lower level process and organ classes (e.g. photosynthesis, leaf) into larger constructions (e.g. maize, wheat, sorghum) can be achieved by the model developer without additional coding.

    The wheat model consists of:

    * a phenology model to simulate development through sequential developmental phases
    * a structure model to simulate plant morphology
    * a collection of organs to simulate the various plant parts
    * an arbitrator to allocate resources (N, biomass) to the various plant organs

    This work builds upon earlier APSIM Wheat models such as NWheat ([Asseng200225], [KeatingNWheat]), NWheatS ([Asseng1998163]), Cropmod-Wheat ([Wang2002GenericCropModel]), and the earlier versions developed in Plant (<a href=\"http://www.apsim.info/Documentation/Model,CropandSoil/CropModuleDocumentation/Wheat.aspx">APSIM Wheat 7.5</a>") and then within the Plant Modelling Framework ([brown_plant_2014]).
  Replacements
    Report HarvestReport: EventNames=[Wheat].Harvesting
      VariableNames:
        [Clock].Today
        [Wheat].SowingDate
        [Wheat].SowingData.Cultivar
        [Wheat].Phenology.CurrentPhase.Name
        [Wheat].Phenology.CurrentStageName
        [Wheat].Phenology.EmergenceDAS
        [Wheat].Phenology.TerminalSpikeletDAS
        [Wheat].Phenology.FlagLeafDAS
        [Wheat].Phenology.HeadingDAS
        [Wheat].Phenology.FloweringDAS
        [Wheat].Phenology.MaturityDAS
        [Wheat].Grain.Wt
        [Wheat].Grain.N
        [Wheat].Grain.Number
        [Wheat].Grain.Size
        [Wheat].Grain.Nconc
        [Wheat].AboveGround.Wt
        [Wheat].AboveGround.N
        [Wheat].Grain.Protein
        [Wheat].Grain.Size
        [Wheat].Phenology.FinalLeafNumber
        [Wheat].Structure.MainStemPopn
        [Wheat].SowingData.Cultivar
        [Wheat].SowingDate.DayOfYear
        [Wheat].Leaf.CohortMaxSize
        [Clock].StartDate
        ([Wheat].Phenology.FloweringDAS - [Wheat].Phenology.EmergenceDAS) as FloweringDAE
        [IWeather].Latitude
        [IWeather].Longitude
        [IWeather].FileName
        [IWeather].CO2
        [IWeather].Amp
        [IWeather].Tav
        [LocationInfo].Script.Country
        [LocationInfo].Script.State
        [LocationInfo].Script.Region
    Report DailyReport
    Manager Harvesting
```csharp
using Models.PMF.Phen;
using APSIM.Shared.Utilities;
using System.Xml.Serialization;
using Models;
using Models.PMF;
using Models.Soils;
using System.Text;
using System.Collections.Generic;
using Models.Core;
using System;
using Models.Soils.Nutrients;

namespace Models
{
    [Serializable] 
    public class Script : Model
    {
        [Link] private Plant Wheat;
        [Link] private Simulation sim;
        [Link] private Clock clock;
        [Link(Type = LinkType.Path, Path = "[Wheat].Phenology")]
        private Phenology phenology;

        [EventSubscribe("DoManagement")]
        private void OnDoManagement(object sender, EventArgs e)
        {
            if (phenology.CurrentPhase.Name == "Maturing")
            {
                Wheat.Harvest();
                Wheat.EndCrop();
                sim.Set("Clock.EndDate", clock.Today);  
            }
        }

        [EventSubscribe("EndOfDay")]
        private void OnEndOfDay(object sender, EventArgs e)
        {
        	if ((clock.Today.Equals(clock.EndDate))&&(Wheat.IsAlive))
        	{
        		Wheat.Harvest();
                Wheat.EndCrop();
                sim.Set("Clock.EndDate", clock.Today);  
        	}
        }

    }
}
```
    Report SowingReport: EventNames=[Wheat].Sowing
      VariableNames:
        [Clock].Today
        [Wheat].SowingData.Cultivar
        [IWeather].Latitude
        [IWeather].Longitude
        [LocationInfo].Script.Country
        [LocationInfo].Script.State
        [LocationInfo].Script.Region
    Manager SetCropParameters
```csharp
using Models.Core;
using System;
namespace Models
{
	[Serializable]
    public class Script : Model
    {
        [Link] Zone zone;
        [EventSubscribe("Sowing")]
        private void OnSowing(object sender, EventArgs e)
     {
        object Pval = 0; 
             Pval =9;
         zone.Set("[Phenology].CAMP.FLNparams.LV", Pval);  
         Pval =19;
         zone.Set("[Phenology].CAMP.FLNparams.LN", Pval);  
         Pval =15;
         zone.Set("[Phenology].CAMP.FLNparams.SV", Pval);  
         Pval =22;
         zone.Set("[Phenology].CAMP.FLNparams.SN", Pval);  

}
}
  }
```
  DataStore
    ExcelInput ExcelMultiInput: SheetNames=[Observed, MaxLeafSize]
      FileNames=[Observed.xlsx, LaTrobeCE_Obs.xlsx, LincolnCE_Obs.xlsx, PalmerstonNorthCE_Obs.xlsx, Gatton2014_2016.xlsx, 2020Results.xlsx, PalmerstonNorth1989.xlsx, Obs_APSIMX_NPIField2019_Wheat.xlsx, NPIValidation.xlsx, Obs_APSIMX_NPIField2020_Wheat.xlsx]
    PredictedObserved HarvestObsPred: PredictedTableName=HarvestReport; ObservedTableName=Observed; FieldNameUsedForMatch=Wheat.Phenology.CurrentStageName; AllColumns=false
      Tests: POName=HarvestObsPred
        AcceptedStats:
          Name                                  n    Slope      Intercept   SEslope     SEintercept  R2          RMSE        NSE         ME           MAE         RSR
          Wheat.AboveGround.N                   67   1.12809    -1.00273    0.0391678   0.525848     0.927336    2.09151     0.875576    0.540148     1.59606     0.350095
          Wheat.AboveGround.Wt                  211  1.01911    34.1751     0.0202867   28.6588      0.923515    188.663     0.904426    58.5184      140.453     0.308417
          Wheat.Grain.N                         135  1.07639    -0.257745   0.0362834   0.353004     0.868717    1.79883     0.808865    0.415699     1.36719     0.435568
          Wheat.Grain.Nconc                     136  0.52548    0.0109277   0.0578165   0.00130116   0.381364    0.00332647  0.31597     0.000420536  0.00251003  0.824015
          Wheat.Grain.Number                    195  0.819153   2260.06     0.0213448   308.959      0.88414     2247.71     0.879203    -81.8409     1634.74     0.346666
          Wheat.Grain.Protein                   114  0.424157   7.85561     0.0562272   0.726492     0.336911    2.10436     0.263918    0.550644     1.57133     0.854181
          Wheat.Grain.Wt                        233  0.978713   11.017      0.0292591   15.5104      0.828875    103.644     0.801774    0.879252     78.6576     0.444269
          Wheat.Leaf.CohortMaxSize(1)           10   0.0270759  255.563     0.0327969   7.48653      0.078506    51.271      -0.92608    36.4016      40.5202     1.31661
          Wheat.Leaf.CohortMaxSize(10)          10   1.11919    -412.466    0.256733    521.362      0.703745    224.554     -0.300948   -171.57      207.903     1.08206
          Wheat.Leaf.CohortMaxSize(11)          10   0.825212   365.905     0.266736    598.083      0.54471     196.601     0.391552    -23.5263     115.224     0.740002
          Wheat.Leaf.CohortMaxSize(12)          10   0.848404   253.801     0.223896    493.954      0.642195    151.745     0.416747    -79.2873     105.917     0.724519
          Wheat.Leaf.CohortMaxSize(13)          10   1.09708    -403.529    1.01788     2346.69      0.126797    703.826     -7.88491    -180.887     351.071     2.82779
          Wheat.Leaf.CohortMaxSize(14)          10   1.30676    -642.351    0.429337    1019.71      0.536608    603.245     -0.59098    71.3164      415.854     1.19661
          Wheat.Leaf.CohortMaxSize(15)          9    -0.26027   2713.41     0.159916    364.78       0.274529    585.946     -0.830732   -109.076     515.056     1.27566
          Wheat.Leaf.CohortMaxSize(16)          3    -0.645839  2788.84     7.95817     13511.1      0.00654291  1245.82     -65.0428    6.01155      1116.21     6.6354
          Wheat.Leaf.CohortMaxSize(17)          2    3.1965     -3522.2732  0           0            1           590.025     -4.43529    -197.771     555.892     1.64853
          Wheat.Leaf.CohortMaxSize(18)          1    -          -           -           -            -           985.267     -           985.267      985.267     -
          Wheat.Leaf.CohortMaxSize(2)           10   0.0630555  275.197     0.29264     121.589      0.00577     139.081     -3.00585    -108.611     115.388     1.89875
          Wheat.Leaf.CohortMaxSize(3)           10   0.289291   221.125     0.270354    144.318      0.125205    181.922     -2.6244     -152.132     163.333     1.80609
          Wheat.Leaf.CohortMaxSize(4)           10   0.345581   263.167     0.345159    223.342      0.111353    208.379     -1.99176    -152.884     173.867     1.64091
          Wheat.Leaf.CohortMaxSize(5)           10   0.249259   458.154     0.277019    225.53       0.0919017   229.975     -0.868592   -139.856     146.902     1.29682
          Wheat.Leaf.CohortMaxSize(6)           10   0.345905   476.527     0.195687    187.624      0.280871    242.414     -0.0368856  -130.978     145.477     0.966021
          Wheat.Leaf.CohortMaxSize(7)           10   0.441949   501.987     0.142766    157.184      0.545013    176.986     0.296106    -101.041     122.714     0.79593
          Wheat.Leaf.CohortMaxSize(8)           10   0.589766   515.86      0.179194    229.582      0.575192    169.291     0.574802    1.17705      117.592     0.61861
          Wheat.Leaf.CohortMaxSize(9)           10   0.793068   300.515     0.327977    507.562      0.422258    241.916     0.0929616   -15.3812     161.582     0.903512
          Wheat.Phenology.FlagLeafDAS.Value()   255  0.974146   6.29479     0.00979673  1.35981      0.97505     8.03204     0.971245    2.92157      5.87059     0.16924
          Wheat.Phenology.FloweringDAS.Value()  299  0.943644   8.35638     0.00705763  1.10217      0.983658    6.98781     0.982029    0.0602007    4.93645     0.133831
        AcceptedStatsName=Name n Slope Intercept SEslope SEintercept R2 RMSE NSE ME MAE RSR
  Folder Validation
    Memo
      A test dataset has been developed to test the APSIM Wheat model for a range of environmental (soil and climate) conditions, management options (sowing dates, populations, nitrogen rates, row spacing, irrigation), genetic backgrounds (different regions, cultivar types) and for special considerations such as crop damage.  These tests have been grouped into various geographical regions to allow the user to evaluate the suitability of the model for their particular region of interest.  Graphs of model performance are provided for yield, biomass production, canopy development, phenological development, water and nitrogen uptake, and grain yield components.
    Folder Combined Results
      Memo Combined Results
        Simulation results for the combined datasets from the various countries are shown in the following graphs.  The model is able to adequately capture the influence of growing conditions (soil, climate) and management (population, Nitrogen, irrigation, sowing date).
    Folder New Zealand
      Experiment Leeston2013
        Memo
          The design, management and yield results of this trial have been described in full by [Craigie_Wheat_2015].  In brief, this trial was conducted to assess the impact of earlier sowing on potential yields of 'Wakanui' wheat grown at Wakanui (the cultivar was named after the area) in Mid Canterbury, New Zealand.  it was a 4 x 4 factorial with 4 replicates of the following treatments:

          1. Sowing date (20 February, 10 March, 28 March, 23 April)
          2. Sowing density (50,100,150 and 200 plants/m^2^

          In addition to yield, measurements of leaf appearance and senescence and canopy cover (measured with NDVI)  were measured at 10 - 14 day intervals and biomass measurements were taken at growth stages 32 and 65.

          Considerable canopy decay was observed during the winter for the early sown treatments and we have not introduced mechanisms into the model to capture this yet so there is a genral over prediction of canopy size and biomass in these first sowing dates.
        Factors
          Permutation
            Factor Sow: Specification=[Sowing].Script.SowDate = 20-Feb,26-Mar,16-Apr
            Factor Popn: Specification=[Sowing].Script.Population = 50,100,150,200,250
        Simulation Leeston2013Base
          Clock: Start=2013-02-01; End=2014-02-15
          Summary summaryfile
          Weather: FileName=Leeston.met
          Zone paddock: Area=1; Slope=0; AspectAngle=0; Altitude=50
            Folder Manager folder
              Operations IrrigationEvents
              Operations FertiliserEvents
                2013-10-17  [Fertiliser].Apply(92, Fertiliser.Types.UreaN, 10);
                2013-10-30  [Fertiliser].Apply(32, Fertiliser.Types.UreaN, 10);
              Manager Sowing
                SowDate =
                Population = 150
                CultivarName = Wakanui
                SowingDepth = 50
                RowSpacing = 150
```csharp
using Models.Soils.Nutrients;
using System;
using Models.Core;
using Models.PMF;
using Models.Soils;
using Models.Soils.Nutrients;
using Models.Utilities;
using APSIM.Shared.Utilities;

namespace Models
{
    [Serializable]
    public class Script : Model
    {
        [Link] Clock Clock;
        [Link] Summary Summary;
        [Link] Soil Soil;
        [Link] Plant Wheat;
        Accumulator accumulatedRain;
        
        [Description("Sowing date (d-mmm)")]
        public string SowDate { get; set; }
        [Description("Cultivar to be sown")]
        public string CultivarName { get; set; }
        [Description("Sowing depth (mm)")]
        public double SowingDepth { get; set; }
        [Description("Row spacing (mm)")]
        public double RowSpacing { get; set; }
        [Description("Plant population (/m2)")]
        public double Population { get; set; }
        


        [EventSubscribe("DoManagement")]
        private void OnDoManagement(object sender, EventArgs e)
        {
            if (DateUtilities.WithinDates(SowDate, Clock.Today, SowDate))
            {
                Wheat.Sow(population: Population, cultivar: CultivarName, depth: SowingDepth, rowSpacing: RowSpacing);    
                if(SowDate == "20-Feb")
                {
                    Wheat.SetEmergenceDate("27-Feb");
                }
                if(SowDate == "26-Mar")
                {
                    Wheat.SetEmergenceDate("3-Apr");
                }
                if(SowDate == "16-Apr")
                {
                    Wheat.SetEmergenceDate("28-Apr");
                }
            }
        
        }
        
    }
}
```
              Operations HarvestEvents
                2014-02-04  [Wheat].Harvest();
                2014-02-04  [Wheat].EndCrop();
            Irrigation
            Soil: SoilType=LincolnSoil; LocalName=Lincoln; Site=Lincoln; NearestTown=Unknown; Region=NZ; NaturalVegetation=Unknown; Latitude=0; Longitude=0
              Physical
                Thickness  BD   AirDry  LL15  DUL   SAT
                100        1.3  0.05    0.08  0.31  0.44
                200        1.3  0.05    0.07  0.3   0.44
                200        1.3  0.05    0.07  0.28  0.44
                200        1.3  0.05    0.09  0.31  0.44
                200        1.3  0.05    0.11  0.3   0.44
                200        1.3  0.05    0.16  0.28  0.44
                200        1.3  0.05    0.15  0.3   0.44
                200        1.3  0.05    0.12  0.34  0.44
                1000       1.3  0.05    0.12  0.34  0.44
                SoilCrop WheatSoil: LL=[0.08, 0.07, 0.07, 0.09, 0.11, 0.16, 0.15, 0.12, 0.12]; KL=[0.06, 0.06, 0.06, 0.06, 0.03, 0.02, 0.02, 0.02, 0.02]; XF=[1, 1, 1, 1, 1, 1, 1, 1, 1]
              WaterBalance SoilWater: SummerDate=1-Nov; SummerU=7; SummerCona=3; WinterDate=1-Apr; WinterU=7; WinterCona=3; DiffusConst=40; DiffusSlope=16; Salb=0.2; CN2Bare=75; CNRed=20; CNCov=0.8; DischargeWidth=0; CatchmentArea=0
                Thickness  SWCON  KLAT
                100        0.6    0
                200        0.6    0
                200        0.6    0
                200        0.6    0
                200        0.6    0
                200        0.6    0
                200        0.6    0
                200        0.6    0
              Organic: FOMCNRatio=15
                Thickness  Carbon  SoilCNRatio  FBiom  FInert  FOM
                100        4       11           0.04   0.31    1031.07
                200        3       11           0.03   0.4     691.146
                200        2       11           0.02   0.5     463.289
                200        1       11           0.01   0.6     310.552
                200        1       11           0.01   0.7     208.169
                200        1       11           0.01   0.9     139.54
                200        0.9     11           0.01   0.99    93.5364
                200        0.9     11           0.01   0.99    62.6993
              Chemical
                Thickness  NO3N     NH4N  PH
                100        30.7692  1.3   6
                200        11.5385  1     6
                200        7.69231  1     6
                200        3.84615  0.8   6
                200        3.84615  0.8   6
                200        3.84615  0.5   6
                200        3.84615  0.5   6
                200        3.84615  0.5   6
              Sample Initial water: Thickness=[100, 200, 200, 200, 200, 200, 200, 200]; SW=[0.24, 0.27, 0.26, 0.23, 0.24, 0.23, 0.23, 0.18]; SWUnits=Volumetric; OCUnits=Total; PHUnits=Water
              CERESSoilTemperature Temperature
              Nutrient
            SurfaceOrganicMatter Surface Organic Matter: InitialResidueName=wheat_stubble; InitialResidueType=whiteclover; InitialResidueMass=1000; InitialStandingFraction=0; InitialCPR=0; InitialCNR=25
            Fertiliser
            MicroClimate: a_interception=0; b_interception=1; c_interception=0; d_interception=0; SoilHeatFluxFraction=0.4; MinimumHeightDiffForNewLayer=0; NightInterceptionFraction=0.5; ReferenceHeight=2
            Plant Wheat
            Report DailyReport
            Report HarvestReport
            Report SupReport: EventNames=[Clock].DoReport
              VariableNames:
                [Clock].Today
                [Leaf].CohortSize
                [Wheat].Arbitrator.DM.Allocated
                [Wheat].Arbitrator.DM.TotalPlantDemand
                [Wheat].Arbitrator.DM.NutrientLimitation
                [Wheat].Arbitrator.DM.SinkLimitation
                [Wheat].Arbitrator.DM.TotalFixationSupply
                [Wheat].Arbitrator.FN
                [Wheat].Arbitrator.N.TotalPlantDemand
                [Wheat].Leaf.CohortMaxSize
                [Wheat].Leaf.CohortParameters.GrowthDuration
                [Wheat].Leaf.CohortParameters.LagDuration
                [Wheat].Leaf.CohortParameters.MaxArea
                [Wheat].Leaf.CohortParameters.SenescenceDuration
                [Wheat].Leaf.CohortParameters.SpecificLeafAreaMax
                [Wheat].Leaf.CohortParameters.SpecificLeafAreaMin
                [Wheat].Leaf.Photosynthesis.FT
                [Wheat].Leaf.Photosynthesis.FVPD
                [Wheat].Leaf.Photosynthesis.RueAct
            Manager MaxLeafSize
```csharp
using APSIM.Shared.Utilities;
using Models.Interfaces;
using Models.Core;
using System.Xml.Serialization;
using System.Collections.Generic;
using System;



namespace Models
{
    [Serializable] 
    public class Script : Model
    {
    
        
    }
}
```
            Report MaxLeafSizeReport
            Report SowingReport
            Manager SetCropParameters
            Manager SetCropParameters
            Manager SetCropParameters
            Manager SetCropParameters
            Manager SetCropParameters
            Manager SetCropParameters
            Manager SetCropParameters
            Manager SetCropParameters
            Manager SetCropParameters
            Manager SetCropParameters
            Manager SetCropParameters
            Manager SetCropParameters
            Manager SetCropParameters
            Manager SetCropParameters
            Manager SetCropParameters
            Manager SetCropParameters
            Manager SetCropParameters
            Manager SetCropParameters
            Manager SetCropParameters
            Manager SetCropParameters
            Manager SetCropParameters
            Manager SetCropParameters
            Manager SetCropParameters
            Manager SetCropParameters
            Manager SetCropParameters
            Manager SetCropParameters
            Manager SetCropParameters
            Manager SetCropParameters
            Manager SetCropParameters
            Manager SetCropParameters
            Manager SetCropParameters
            Manager SetCropParameters
            Manager SetCropParameters
            Manager SetCropParameters
            Manager SetCropParameters
            Manager SetCropParameters
            Manager SetCropParameters
            Manager SetCropParameters
            Manager SetCropParameters
            Manager SetCropParameters
            Manager SetCropParameters
            Manager SetCropParameters
            Manager SetCropParameters
            Manager SetCropParameters
            Manager SetCropParameters
            Manager SetCropParameters
            Manager SetCropParameters
            Manager SetCropParameters
            Manager SetCropParameters
            Manager SetCropParameters
            Manager SetCropParameters
            Manager SetCropParameters
            Manager SetCropParameters
            Manager SetCropParameters
            Manager SetCropParameters
            Manager SetCropParameters
            Manager SetCropParameters
            Manager SetCropParameters
            Manager SetCropParameters
            Manager SetCropParameters
            Manager SetCropParameters
            Manager SetCropParameters
            Manager SetCropParameters
            Manager SetCropParameters
            Manager SetCropParameters
            Manager SetCropParameters
            Manager SetCropParameters
            Manager SetCropParameters
            Manager SetCropParameters
            Manager SetCropParameters
            Manager SetCropParameters
            Manager SetCropParameters
            Manager SetCropParameters
            Manager SetCropParameters
            Manager SetCropParameters
            Manager SetCropParameters
            Manager SetCropParameters
            Manager SetCropParameters
            Manager SetCropParameters
            Manager SetCropParameters
            Manager SetCropParameters
            Manager SetCropParameters
            Manager SetCropParameters
            Manager SetCropParameters
            Manager SetCropParameters
            Manager SetCropParameters
            Manager SetCropParameters
            Manager SetCropParameters
            Manager SetCropParameters
            Manager SetCropParameters
            Manager SetCropParameters
            Manager SetCropParameters
            Manager SetCropParameters
            Manager SetCropParameters
            Manager SetCropParameters
            Manager SetCropParameters
            Manager SetCropParameters
            Manager SetCropParameters
            Manager SetCropParameters
            Manager SetCropParameters
            Manager SetCropParameters
            Manager SetCropParameters
            Manager SetCropParameters
            Manager SetCropParameters
            Manager SetCropParameters
            Manager SetCropParameters
            Manager SetCropParameters
            Manager SetCropParameters
            Manager SetCropParameters
            Manager SetCropParameters
            Manager SetCropParameters
            Manager SetCropParameters
            Manager SetCropParameters
            Manager SetCropParameters
            Manager SetCropParameters
            Manager SetCropParameters
            Manager SetCropParameters
            Manager SetCropParameters
            Manager SetCropParameters
            Manager SetCropParameters
            Manager SetCropParameters
            Manager SetCropParameters
            Manager SetCropParameters
            Manager SetCropParameters
            Manager SetCropParameters
            Manager SetCropParameters
            Manager SetCropParameters
            Manager SetCropParameters
            Manager SetCropParameters
            Manager SetCropParameters
            Manager SetCropParameters
            Manager SetCropParameters
            Manager SetCropParameters
            Manager SetCropParameters
            Manager SetCropParameters
            Manager SetCropParameters
            Manager SetCropParameters
            Manager SetCropParameters
            Manager SetCropParameters
            Manager SetCropParameters
            Manager SetCropParameters
            Manager SetCropParameters
            Manager SetCropParameters
            Manager SetCropParameters
            Manager SetCropParameters
            Manager SetCropParameters
            Manager SetCropParameters
            Manager SetCropParameters
            Manager SetCropParameters
            Manager SetCropParameters
            Manager SetCropParameters
            Manager SetCropParameters
            Manager SetCropParameters
            Manager SetCropParameters
            Manager SetCropParameters
            Manager SetCropParameters
            Manager SetCropParameters
            Manager SetCropParameters
            Manager SetCropParameters
            Manager SetCropParameters
            Manager SetCropParameters
            Manager SetCropParameters
            Manager SetCropParameters
            Manager SetCropParameters
            Manager SetCropParameters
            Manager SetCropParameters
            Manager SetCropParameters
            Manager SetCropParameters
            Manager SetCropParameters
            Manager SetCropParameters
            Manager SetCropParameters
            Manager SetCropParameters
            Manager SetCropParameters
            Manager SetCropParameters
            Manager SetCropParameters
            Manager SetCropParameters
            Manager SetCropParameters
            Manager SetCropParameters
            Manager SetCropParameters
            Manager SetCropParameters
            Manager SetCropParameters
            Manager SetCropParameters
            Manager SetCropParameters
            Manager SetCropParameters
            Manager SetCropParameters
            Manager SetCropParameters
            Manager SetCropParameters
            Manager SetCropParameters
            Manager SetCropParameters
            Manager SetCropParameters
            Manager SetCropParameters
            Manager SetCropParameters
            Manager SetCropParameters
            Manager SetCropParameters
            Manager SetCropParameters
            Manager SetCropParameters
            Manager SetCropParameters
            Manager SetCropParameters
            Manager SetCropParameters
            Manager SetCropParameters
            Manager SetCropParameters
            Manager SetCropParameters
            Manager SetCropParameters
            Manager SetCropParameters
            Manager SetCropParameters
            Manager SetCropParameters
            Manager SetCropParameters
            Manager SetCropParameters
            Manager SetCropParameters
            Manager SetCropParameters
            Manager SetCropParameters
            Manager SetCropParameters
            Manager SetCropParameters
            Manager SetCropParameters
            Manager SetCropParameters
            Manager SetCropParameters
            Manager SetCropParameters
            Manager SetCropParameters
            Manager SetCropParameters
            Manager SetCropParameters
            Manager SetCropParameters
            Manager SetCropParameters
            Manager SetCropParameters
            Manager SetCropParameters
            Manager SetCropParameters
            Manager SetCropParameters
            Manager SetCropParameters
            Manager SetCropParameters
            Manager SetCropParameters
            Manager SetCropParameters
            Manager SetCropParameters
            Manager SetCropParameters
            Manager SetCropParameters
            Manager SetCropParameters
            Manager SetCropParameters
            Manager SetCropParameters
            Manager SetCropParameters
            Manager SetCropParameters
            Manager SetCropParameters
            Manager SetCropParameters
            Manager SetCropParameters
            Manager SetCropParameters
            Manager SetCropParameters
            Manager SetCropParameters
            Manager SetCropParameters
            Manager SetCropParameters
            Manager SetCropParameters
            Manager SetCropParameters
            Manager SetCropParameters
            Manager SetCropParameters
            Manager SetCropParameters
            Manager SetCropParameters
            Manager SetCropParameters
            Manager SetCropParameters
            Manager SetCropParameters
            Manager SetCropParameters
            Manager SetCropParameters
            Manager SetCropParameters
            Manager SetCropParameters
            Manager SetCropParameters
            Manager SetCropParameters
            Manager SetCropParameters
            Manager SetCropParameters
            Manager SetCropParameters
            Manager SetCropParameters
            Manager SetCropParameters
            Manager SetCropParameters
            Manager SetCropParameters
            Manager SetCropParameters
            Manager SetCropParameters
            Manager SetCropParameters
            Manager SetCropParameters
            Manager SetCropParameters
            Manager SetCropParameters
            Manager SetCropParameters
            Manager SetCropParameters
            Manager SetCropParameters
            Manager SetCropParameters
            Manager SetCropParameters
            Manager SetCropParameters
            Manager SetCropParameters
            Manager SetCropParameters
            Manager SetCropParameters
            Manager SetCropParameters
            Manager SetCropParameters
            Manager SetCropParameters
            Manager SetCropParameters
            Manager SetCropParameters
            Manager SetCropParameters
            Manager SetCropParameters
            Manager SetCropParameters
            Manager SetCropParameters
            Manager SetCropParameters
            Manager SetCropParameters
            Manager SetCropParameters
            Manager SetCropParameters
            Manager SetCropParameters
            Manager SetCropParameters
            Manager SetCropParameters
            Manager SetCropParameters
            Manager SetCropParameters
            Manager SetCropParameters
            Manager SetCropParameters
            Manager SetCropParameters
            Manager SetCropParameters
            Manager SetCropParameters
            Manager SetCropParameters
            Manager SetCropParameters
            Manager SetCropParameters
            Manager SetCropParameters
            Manager SetCropParameters
            Manager SetCropParameters
            Manager SetCropParameters
            Manager SetCropParameters
            Manager SetCropParameters
            Manager SetCropParameters
            Manager SetCropParameters
            Manager SetCropParameters
            Manager SetCropParameters
            Manager SetCropParameters
            Manager SetCropParameters
            Manager SetCropParameters
            Manager SetCropParameters
            Manager SetCropParameters
            Manager SetCropParameters
            Manager SetCropParameters
            Manager SetCropParameters
            Manager SetCropParameters
            Manager SetCropParameters
            Manager SetCropParameters
            Manager SetCropParameters
            Manager SetCropParameters
            Manager SetCropParameters
            Manager SetCropParameters
            Manager SetCropParameters
            Manager SetCropParameters
            Manager SetCropParameters
            Manager SetCropParameters
            Manager SetCropParameters
            Manager SetCropParameters
            Manager SetCropParameters
            Manager SetCropParameters
            Manager SetCropParameters
            Manager SetCropParameters
            Manager SetCropParameters
            Manager SetCropParameters
            Manager SetCropParameters
            Manager SetCropParameters
            Manager SetCropParameters
            Manager SetCropParameters
            Manager SetCropParameters
            Manager SetCropParameters
            Manager SetCropParameters
            Manager SetCropParameters
            Manager SetCropParameters
            Manager SetCropParameters
            Manager SetCropParameters
            Manager SetCropParameters
            Manager SetCropParameters
            Manager SetCropParameters
            Manager SetCropParameters
            Manager SetCropParameters
            Manager SetCropParameters
            Manager SetCropParameters
            Manager SetCropParameters
            Manager SetCropParameters
            Manager SetCropParameters
            Manager SetCropParameters
            Manager SetCropParameters
            Manager SetCropParameters
            Manager SetCropParameters
            Manager SetCropParameters
            Manager SetCropParameters
            Manager SetCropParameters
            Manager SetCropParameters
            Manager SetCropParameters
            Manager SetCropParameters
            Manager SetCropParameters
            Manager SetCropParameters
            Manager SetCropParameters
            Manager SetCropParameters
            Manager SetCropParameters
            Manager SetCropParameters
            Manager SetCropParameters
            Manager SetCropParameters
            Manager SetCropParameters
            Manager SetCropParameters
            Manager SetCropParameters
            Manager SetCropParameters
            Manager SetCropParameters
            Manager SetCropParameters
            Manager SetCropParameters
            Manager SetCropParameters
            Manager SetCropParameters
            Manager SetCropParameters
            Manager SetCropParameters
            Manager SetCropParameters
            Manager SetCropParameters
            Manager SetCropParameters
            Manager SetCropParameters
            Manager SetCropParameters
            Manager SetCropParameters
            Manager SetCropParameters
            Manager SetCropParameters
            Manager SetCropParameters
            Manager SetCropParameters
            Manager SetCropParameters
            Manager SetCropParameters
            Manager SetCropParameters
            Manager SetCropParameters
            Manager SetCropParameters
            Manager SetCropParameters
            Manager SetCropParameters
            Manager SetCropParameters
            Manager SetCropParameters
            Manager SetCropParameters
            Manager SetCropParameters
            Manager SetCropParameters
            Manager SetCropParameters
            Manager SetCropParameters
            Manager SetCropParameters
            Manager SetCropParameters
            Manager SetCropParameters
            Manager SetCropParameters
            Manager SetCropParameters
            Manager SetCropParameters
            Manager SetCropParameters
            Manager SetCropParameters
            Manager SetCropParameters
            Manager SetCropParameters
            Manager SetCropParameters
            Manager SetCropParameters
            Manager SetCropParameters
            Manager SetCropParameters
            Manager SetCropParameters
            Manager SetCropParameters
            Manager SetCropParameters
            Manager SetCropParameters
            Manager SetCropParameters
            Manager SetCropParameters
            Manager SetCropParameters
            Manager SetCropParameters
            Manager SetCropParameters
            Manager SetCropParameters
            Manager SetCropParameters
            Manager SetCropParameters
            Manager SetCropParameters
            Manager SetCropParameters
            Manager SetCropParameters
            Manager SetCropParameters
            Manager SetCropParameters
            Manager SetCropParameters
            Manager SetCropParameters
            Manager SetCropParameters
            Manager SetCropParameters
            Manager SetCropParameters
            Manager SetCropParameters
            Manager SetCropParameters
            Manager SetCropParameters
            Manager SetCropParameters
            Manager SetCropParameters
            Manager SetCropParameters
            Manager SetCropParameters
            Manager SetCropParameters
            Manager SetCropParameters
            Manager SetCropParameters
            Manager SetCropParameters
            Manager SetCropParameters
            Manager SetCropParameters
            Manager SetCropParameters
            Manager SetCropParameters
            Manager SetCropParameters
            Manager SetCropParameters
            Manager SetCropParameters
            Manager SetCropParameters
            Manager SetCropParameters
            Manager SetCropParameters
            Manager SetCropParameters
            Manager SetCropParameters
            Manager SetCropParameters
            Manager SetCropParameters
            Manager SetCropParameters
            Manager SetCropParameters
            Manager SetCropParameters
            Manager SetCropParameters
            Manager SetCropParameters
            Manager SetCropParameters
            Manager SetCropParameters
            Manager SetCropParameters
            Manager SetCropParameters
            Manager SetCropParameters
            Manager SetCropParameters
            Manager SetCropParameters
            Manager SetCropParameters
            Manager SetCropParameters
            Manager SetCropParameters
            Manager SetCropParameters
            Manager SetCropParameters
            Manager SetCropParameters
            Manager SetCropParameters
            Manager SetCropParameters
            Manager SetCropParameters
            Manager SetCropParameters
            Manager SetCropParameters
            Manager SetCropParameters
            Manager SetCropParameters
            Manager SetCropParameters
            Manager SetCropParameters
            Manager SetCropParameters
            Manager SetCropParameters
            Manager SetCropParameters
            Manager SetCropParameters
            Manager SetCropParameters
            Manager SetCropParameters
            Manager SetCropParameters
            Manager SetCropParameters
            Manager SetCropParameters
            Manager SetCropParameters
            Manager SetCropParameters
            Manager SetCropParameters
            Manager SetCropParameters
            Manager SetCropParameters
            Manager SetCropParameters
            Manager SetCropParameters
            Manager SetCropParameters
            Manager SetCropParameters
            Manager SetCropParameters
            Manager SetCropParameters
            Manager SetCropParameters
            Manager SetCropParameters
            Manager SetCropParameters
            Manager SetCropParameters
            Manager SetCropParameters
            Manager SetCropParameters
            Manager SetCropParameters
            Manager SetCropParameters
            Manager SetCropParameters
            Manager SetCropParameters
            Manager SetCropParameters
            Manager SetCropParameters
            Manager SetCropParameters
            Manager SetCropParameters
            Manager SetCropParameters
            Manager SetCropParameters
            Manager SetCropParameters
            Manager SetCropParameters
            Manager SetCropParameters
            Manager SetCropParameters
            Manager SetCropParameters
            Manager SetCropParameters
            Manager SetCropParameters
            Manager SetCropParameters
            Manager SetCropParameters
            Manager SetCropParameters
            Manager SetCropParameters
            Manager SetCropParameters
            Manager SetCropParameters
            Manager SetCropParameters
            Manager SetCropParameters
            Manager SetCropParameters
            Manager SetCropParameters
            Manager SetCropParameters
            Manager SetCropParameters
            Manager SetCropParameters
            Manager SetCropParameters
            Manager SetCropParameters
            Manager SetCropParameters
            Manager SetCropParameters
            Manager SetCropParameters
            Manager SetCropParameters
            Manager SetCropParameters
            Manager SetCropParameters
            Manager SetCropParameters
            Manager SetCropParameters
            Manager SetCropParameters
            Manager SetCropParameters
            Manager SetCropParameters
            Manager SetCropParameters
            Manager SetCropParameters
            Manager SetCropParameters
            Manager SetCropParameters
            Manager SetCropParameters
            Manager SetCropParameters
            Manager SetCropParameters
            Manager SetCropParameters
            Manager SetCropParameters
            Manager SetCropParameters
            Manager SetCropParameters
            Manager SetCropParameters
            Manager SetCropParameters
            Manager SetCropParameters
            Manager SetCropParameters
            Manager SetCropParameters
            Manager SetCropParameters
            Manager SetCropParameters
            Manager SetCropParameters
            Manager SetCropParameters
            Manager SetCropParameters
            Manager SetCropParameters
            Manager SetCropParameters
            Manager SetCropParameters
            Manager SetCropParameters
            Manager SetCropParameters
            Manager SetCropParameters
            Manager SetCropParameters
            Manager SetCropParameters
            Manager SetCropParameters
            Manager SetCropParameters
            Manager SetCropParameters
            Manager SetCropParameters
            Manager SetCropParameters
            Manager SetCropParameters
            Manager SetCropParameters
            Manager SetCropParameters
            Manager SetCropParameters
            Manager SetCropParameters
            Manager SetCropParameters
            Manager SetCropParameters
            Manager SetCropParameters
            Manager SetCropParameters
            Manager SetCropParameters
            Manager SetCropParameters
            Manager SetCropParameters
            Manager SetCropParameters
            Manager SetCropParameters
            Manager SetCropParameters
            Manager SetCropParameters
            Manager SetCropParameters
            Manager SetCropParameters
            Manager SetCropParameters
            Manager SetCropParameters
            Manager SetCropParameters
            Manager SetCropParameters
            Manager SetCropParameters
            Manager SetCropParameters
            Manager SetCropParameters
            Manager SetCropParameters
            Manager SetCropParameters
            Manager SetCropParameters
            Manager SetCropParameters
            Manager SetCropParameters
            Manager SetCropParameters
            Manager SetCropParameters
            Manager SetCropParameters
            Manager SetCropParameters
            Manager SetCropParameters
            Manager SetCropParameters
            Manager SetCropParameters
            Manager SetCropParameters
            Manager SetCropParameters
            Manager SetCropParameters
            Manager SetCropParameters
            Manager SetCropParameters
            Manager SetCropParameters
            Manager SetCropParameters
            Manager SetCropParameters
            Manager SetCropParameters
            Manager SetCropParameters
            Manager SetCropParameters
            Manager SetCropParameters
            Manager SetCropParameters
            Manager SetCropParameters
            Manager SetCropParameters
            Manager SetCropParameters
            Manager SetCropParameters
            Manager SetCropParameters
            Manager SetCropParameters
            Manager SetCropParameters
            Manager SetCropParameters
            Manager SetCropParameters
            Manager SetCropParameters
            Manager SetCropParameters
            Manager SetCropParameters
            Manager SetCropParameters
            Manager SetCropParameters
            Manager SetCropParameters
            Manager SetCropParameters
            Manager SetCropParameters
            Manager SetCropParameters
            Manager SetCropParameters
            Manager SetCropParameters
            Manager SetCropParameters
            Manager SetCropParameters
            Manager SetCropParameters
            Manager SetCropParameters
            Manager SetCropParameters
            Manager SetCropParameters
            Manager SetCropParameters
            Manager SetCropParameters
            Manager SetCropParameters
            Manager SetCropParameters
            Manager SetCropParameters
            Manager SetCropParameters
            Manager SetCropParameters
            Manager SetCropParameters
            Manager SetCropParameters
            Manager SetCropParameters
            Manager SetCropParameters
            Manager SetCropParameters
            Manager SetCropParameters
            Manager SetCropParameters
            Manager SetCropParameters
            Manager SetCropParameters
            Manager SetCropParameters
            Manager SetCropParameters
            Manager SetCropParameters
            Manager SetCropParameters
            Manager SetCropParameters
            Manager SetCropParameters
            Manager SetCropParameters
            Manager SetCropParameters
            Manager SetCropParameters
            Manager SetCropParameters
            Manager SetCropParameters
            Manager SetCropParameters
            Manager SetCropParameters
            Manager SetCropParameters
            Manager SetCropParameters
            Manager SetCropParameters
            Manager SetCropParameters
            Manager SetCropParameters
            Manager SetCropParameters
            Manager SetCropParameters
            Manager SetCropParameters
            Manager SetCropParameters
            Manager SetCropParameters
            Manager SetCropParameters
            Manager SetCropParameters
            Manager SetCropParameters
            Manager SetCropParameters
            Manager SetCropParameters
            Manager SetCropParameters
            Manager SetCropParameters
            Manager SetCropParameters
            Manager SetCropParameters
            Manager SetCropParameters
            Manager SetCropParameters
            Manager SetCropParameters
            Manager SetCropParameters
            Manager SetCropParameters
            Manager SetCropParameters
            Manager SetCropParameters
            Manager SetCropParameters
            Manager SetCropParameters
            Manager SetCropParameters
            Manager SetCropParameters
            Manager SetCropParameters
            Manager SetCropParameters
            Manager SetCropParameters
            Manager SetCropParameters
            Manager SetCropParameters
            Manager SetCropParameters
            Manager SetCropParameters
            Manager SetCropParameters
            Manager SetCropParameters
            Manager SetCropParameters
            Manager SetCropParameters
            Manager SetCropParameters
            Manager SetCropParameters
            Manager SetCropParameters
            Manager SetCropParameters
            Manager SetCropParameters
            Manager SetCropParameters
            Manager SetCropParameters
            Manager SetCropParameters
            Manager SetCropParameters
            Manager SetCropParameters
            Manager SetCropParameters
            Manager SetCropParameters
            Manager SetCropParameters
            Manager SetCropParameters
            Manager SetCropParameters
            Manager SetCropParameters
            Manager SetCropParameters
            Manager SetCropParameters
            Manager SetCropParameters
            Manager SetCropParameters
            Manager SetCropParameters
            Manager SetCropParameters
            Manager SetCropParameters
            Manager SetCropParameters
            Manager SetCropParameters
            Manager SetCropParameters
            Manager SetCropParameters
            Manager SetCropParameters
            Manager SetCropParameters
            Manager SetCropParameters
            Manager SetCropParameters
            Manager SetCropParameters
            Manager SetCropParameters
            Manager SetCropParameters
            Manager SetCropParameters
            Manager SetCropParameters
            Manager SetCropParameters
            Manager SetCropParameters
            Manager SetCropParameters
            Manager SetCropParameters
            Manager SetCropParameters
            Manager SetCropParameters
            Manager SetCropParameters
            Manager SetCropParameters
            Manager SetCropParameters
            Manager SetCropParameters
            Manager SetCropParameters
            Manager SetCropParameters
            Manager SetCropParameters
            Manager SetCropParameters
            Manager SetCropParameters
            Manager SetCropParameters
            Manager SetCropParameters
            Manager SetCropParameters
            Manager SetCropParameters
            Manager SetCropParameters
            Manager SetCropParameters
            Manager SetCropParameters
            Manager SetCropParameters
            Manager SetCropParameters
            Manager SetCropParameters
            Manager SetCropParameters
            Manager SetCropParameters
            Manager SetCropParameters
            Manager SetCropParameters
            Manager SetCropParameters
            Manager SetCropParameters
            Manager SetCropParameters
            Manager SetCropParameters
            Manager SetCropParameters
            Manager SetCropParameters
            Manager SetCropParameters
            Manager SetCropParameters
            Manager SetCropParameters
            Manager SetCropParameters
            Manager SetCropParameters
            Manager SetCropParameters
            Manager SetCropParameters
            Manager SetCropParameters
            Manager SetCropParameters
            Manager SetCropParameters
            Manager SetCropParameters
            Manager SetCropParameters
            Manager SetCropParameters
            Manager SetCropParameters
            Manager SetCropParameters
            Manager SetCropParameters
            Manager SetCropParameters
            Manager SetCropParameters
            Manager SetCropParameters
            Manager SetCropParameters
            Manager SetCropParameters
            Manager SetCropParameters
            Manager SetCropParameters
            Manager SetCropParameters
            Manager SetCropParameters
            Manager SetCropParameters
            Manager SetCropParameters
            Manager SetCropParameters
            Manager SetCropParameters
            Manager SetCropParameters
            Manager SetCropParameters
            Manager SetCropParameters
            Manager SetCropParameters
            Manager SetCropParameters
            Manager SetCropParameters
            Manager SetCropParameters
            Manager SetCropParameters
            Manager SetCropParameters
            Manager SetCropParameters
            Manager SetCropParameters
            Manager SetCropParameters
            Manager SetCropParameters
            Manager SetCropParameters
            Manager SetCropParameters
            Manager SetCropParameters
            Manager SetCropParameters
            Manager SetCropParameters
            Manager SetCropParameters
            Manager SetCropParameters
            Manager SetCropParameters
            Manager SetCropParameters
            Manager SetCropParameters
            Manager SetCropParameters
            Manager SetCropParameters
            Manager SetCropParameters
            Manager SetCropParameters
            Manager SetCropParameters
            Manager SetCropParameters
            Manager SetCropParameters
            Manager SetCropParameters
            Manager SetCropParameters
            Manager SetCropParameters
            Manager SetCropParameters
            Manager SetCropParameters
            Manager SetCropParameters
            Manager SetCropParameters
            Manager SetCropParameters
            Manager SetCropParameters
            Manager SetCropParameters
            Manager SetCropParameters
            Manager SetCropParameters
            Manager SetCropParameters
            Manager SetCropParameters
            Manager SetCropParameters
            Manager SetCropParameters
            Manager SetCropParameters
            Manager SetCropParameters
            Manager SetCropParameters
            Manager SetCropParameters
            Manager SetCropParameters
            Manager SetCropParameters
            Manager SetCropParameters
            Manager SetCropParameters
            Manager SetCropParameters
            Manager SetCropParameters
            Manager SetCropParameters
            Manager SetCropParameters
            Manager SetCropParameters
            Manager SetCropParameters
            Manager SetCropParameters
            Manager SetCropParameters
            Manager SetCropParameters
            Manager SetCropParameters
            Manager SetCropParameters
            Manager SetCropParameters
            Manager SetCropParameters
            Manager SetCropParameters
            Manager SetCropParameters
            Manager SetCropParameters
            Manager SetCropParameters
            Manager SetCropParameters
            Manager SetCropParameters
            Manager SetCropParameters
            Manager SetCropParameters
            Manager SetCropParameters
            Manager SetCropParameters
            Manager SetCropParameters
            Manager SetCropParameters
            Manager SetCropParameters
            Manager SetCropParameters
            Manager SetCropParameters
            Manager SetCropParameters
            Manager SetCropParameters
            Manager SetCropParameters
            Manager SetCropParameters
            Manager SetCropParameters
            Manager SetCropParameters
            Manager SetCropParameters
            Manager SetCropParameters
            Manager SetCropParameters
            Manager SetCropParameters
            Manager SetCropParameters
            Manager SetCropParameters
            Manager SetCropParameters
            Manager SetCropParameters
            Manager SetCropParameters
            Manager SetCropParameters
            Manager SetCropParameters
            Manager SetCropParameters
            Manager SetCropParameters
            Manager SetCropParameters
            Manager SetCropParameters
            Manager SetCropParameters
            Manager SetCropParameters
            Manager SetCropParameters
            Manager SetCropParameters
            Manager SetCropParameters
            Manager SetCropParameters
            Manager SetCropParameters
            Manager SetCropParameters
            Manager SetCropParameters
            Manager SetCropParameters
            Manager SetCropParameters
            Manager SetCropParameters
            Manager SetCropParameters
            Manager SetCropParameters
            Manager SetCropParameters
            Manager SetCropParameters
            Manager SetCropParameters
            Manager SetCropParameters
            Manager SetCropParameters
            Manager SetCropParameters
            Manager SetCropParameters
            Manager SetCropParameters
            Manager SetCropParameters
            Manager SetCropParameters
            Manager SetCropParameters
            Manager SetCropParameters
            Manager SetCropParameters
            Manager SetCropParameters
            Manager SetCropParameters
            Manager SetCropParameters
            Manager SetCropParameters
            Manager SetCropParameters
            Manager SetCropParameters
            Manager SetCropParameters
            Manager SetCropParameters
            Manager SetCropParameters
            Manager SetCropParameters
            Manager SetCropParameters
            Manager SetCropParameters
            Manager SetCropParameters
            Manager SetCropParameters
            Manager SetCropParameters
            Manager SetCropParameters
            Manager SetCropParameters
            Manager SetCropParameters
            Manager SetCropParameters
            Manager SetCropParameters
            Manager SetCropParameters
            Manager SetCropParameters
            Manager SetCropParameters
            Manager SetCropParameters
            Manager SetCropParameters
            Manager SetCropParameters
            Manager SetCropParameters
            Manager SetCropParameters
            Manager SetCropParameters
            Manager SetCropParameters
            Manager SetCropParameters
            Manager SetCropParameters
            Manager SetCropParameters
            Manager SetCropParameters
            Manager SetCropParameters
            Manager SetCropParameters
            Manager SetCropParameters
            Manager SetCropParameters
            Manager SetCropParameters
            Manager SetCropParameters
            Manager SetCropParameters
            Manager SetCropParameters
            Manager SetCropParameters
            Manager SetCropParameters
            Manager SetCropParameters
            Manager SetCropParameters
            Manager SetCropParameters
            Manager SetCropParameters
            Manager SetCropParameters
            Manager SetCropParameters
            Manager SetCropParameters
            Manager SetCropParameters
            Manager SetCropParameters
            Manager SetCropParameters
            Manager SetCropParameters
            Manager SetCropParameters
            Manager SetCropParameters
            Manager SetCropParameters
            Manager SetCropParameters
            Manager SetCropParameters
            Manager SetCropParameters
            Manager SetCropParameters
            Manager SetCropParameters
            Manager SetCropParameters
            Manager SetCropParameters
            Manager SetCropParameters
            Manager SetCropParameters
            Manager SetCropParameters
            Manager SetCropParameters
            Manager SetCropParameters
            Manager SetCropParameters
            Manager SetCropParameters
            Manager SetCropParameters
            Manager SetCropParameters
            Manager SetCropParameters
            Manager SetCropParameters
            Manager SetCropParameters
            Manager SetCropParameters
            Manager SetCropParameters
            Manager SetCropParameters
            Manager SetCropParameters
            Manager SetCropParameters
            Manager SetCropParameters
            Manager SetCropParameters
            Manager SetCropParameters
            Manager SetCropParameters
            Manager SetCropParameters
            Manager SetCropParameters
            Manager SetCropParameters
            Manager SetCropParameters
            Manager SetCropParameters
            Manager SetCropParameters
            Manager SetCropParameters
            Manager SetCropParameters
            Manager SetCropParameters
            Manager SetCropParameters
            Manager SetCropParameters
            Manager SetCropParameters
            Manager SetCropParameters
            Manager SetCropParameters
            Manager SetCropParameters
            Manager SetCropParameters
            Manager SetCropParameters
            Manager SetCropParameters
            Manager SetCropParameters
            Manager SetCropParameters
            Manager SetCropParameters
            Manager SetCropParameters
            Manager SetCropParameters
            Manager SetCropParameters
            Manager SetCropParameters
            Manager SetCropParameters
            Manager SetCropParameters
            Manager SetCropParameters
            Manager SetCropParameters
            Manager SetCropParameters
          SoilArbitrator Soil Arbitrator
          Manager LocationInfo
            Country = New Zealand
            State = Canterbury Region
            Region =
```csharp
using APSIM.Shared.Utilities;
using Models.PMF;
using Models.Core;
using System;

namespace Models
{
    [Serializable]
    public class Script : Model
    {
        [Link] Clock Clock;
        [Link] Fertiliser Fertiliser;
        [Link] Summary Summary;
        
        [Description("Country")]
        public string Country { get; set; }

        [Description("State")]
        public string State { get; set; }

        [Description("Region")]
        public string Region { get; set; }

    }
}
```
      Experiment Leeston2014
        Memo: same as Validation.New Zealand.Leeston2013.Memo
        Factors
          Permutation
            Factor Sow: Specification=[Sowing].Script.SowDate = 20-Feb,10-Mar,26-Mar,23-Apr
            Factor Popn: Specification=[Sowing].Script.Population = 50,200
        Simulation Wakanui2014Base
          Clock: Start=2014-02-01; End=2015-02-15
          Summary summaryfile
          Weather: FileName=Leeston.met
          Zone paddock: Area=1; Slope=0; AspectAngle=0; Altitude=50
            Folder Manager folder
              Operations IrrigationEvents
                2014-11-05  [Irrigation].Apply(50.0);
                2014-11-18  [Irrigation].Apply(50.0);
                2014-12-05  [Irrigation].Apply(50.0);
                2014-12-18  [Irrigation].Apply(50.0);
              Operations FertiliserEvents
                2014-09-10  [Fertiliser].Apply(101, Fertiliser.Types.UreaN, 10);
                2014-10-10  [Fertiliser].Apply(87, Fertiliser.Types.UreaN, 10);
              Manager Sowing
                SowDate =
                Population = 150
                CultivarName = Wakanui
                SowingDepth = 50
                RowSpacing = 150
```csharp
using Models.Soils.Nutrients;
using System;
using Models.Core;
using Models.PMF;
using Models.Soils;
using Models.Soils.Nutrients;
using Models.Utilities;
using APSIM.Shared.Utilities;

namespace Models
{
    [Serializable]
    public class Script : Model
    {
        [Link] Clock Clock;
        [Link] Summary Summary;
        [Link] Soil Soil;
        [Link] Plant Wheat;
        Accumulator accumulatedRain;
        
        [Description("Sowing date (d-mmm)")]
        public string SowDate { get; set; }
        [Display(Type = DisplayType.CultivarName)]
        [Description("Cultivar to be sown")]
        public string CultivarName { get; set; }
        [Description("Sowing depth (mm)")]
        public double SowingDepth { get; set; }
        [Description("Row spacing (mm)")]
        public double RowSpacing { get; set; }
        [Description("Plant population (/m2)")]
        public double Population { get; set; }
        


        [EventSubscribe("DoManagement")]
        private void OnDoManagement(object sender, EventArgs e)
        {
            if (DateUtilities.WithinDates(SowDate, Clock.Today, SowDate))
            {
                Wheat.Sow(population: Population, cultivar: CultivarName, depth: SowingDepth, rowSpacing: RowSpacing);    
                if(SowDate == "20-Feb")
                {
                    Wheat.SetEmergenceDate("26-Feb");
                }
                if(SowDate == "10-Mar")
                {
                    Wheat.SetEmergenceDate("17-Mar");
                }
                if(SowDate == "26-Mar")
                {
                    Wheat.SetEmergenceDate("6-Apr");
                }
                if(SowDate == "23-Apr")
                {
                    Wheat.SetEmergenceDate("8-May");
                }
            }
        
        }
        
    }
}
```
              Operations HarvestEvents
                2015-02-04  [Wheat].Harvest();
                2015-02-04  [Wheat].EndCrop();
            Irrigation
            Soil: SoilType=LincolnSoil; LocalName=Lincoln; Site=Lincoln; NearestTown=Unknown; Region=NZ; NaturalVegetation=Unknown; Latitude=0; Longitude=0
              Physical
                Thickness  BD   AirDry  LL15  DUL   SAT
                100        1.3  0.05    0.08  0.31  0.44
                200        1.3  0.05    0.07  0.3   0.44
                200        1.3  0.05    0.07  0.28  0.44
                200        1.3  0.05    0.09  0.31  0.44
                200        1.3  0.05    0.11  0.3   0.44
                200        1.3  0.05    0.16  0.28  0.44
                200        1.3  0.05    0.15  0.3   0.44
                200        1.3  0.05    0.12  0.34  0.44
                SoilCrop WheatSoil: LL=[0.08, 0.07, 0.07, 0.09, 0.11, 0.16, 0.15, 0.12]; KL=[0.06, 0.06, 0.06, 0.06, 0.03, 0.02, 0.02, 0.02]; XF=[1, 1, 1, 1, 1, 1, 1, 1]
              WaterBalance SoilWater: same as Validation.New Zealand.Leeston2013.Leeston2013Base.paddock.Soil.SoilWater
              Organic: same as Validation.New Zealand.Leeston2013.Leeston2013Base.paddock.Soil.Organic
              Chemical: same as Validation.New Zealand.Leeston2013.Leeston2013Base.paddock.Soil.Chemical
              Sample Initial water: same as Validation.New Zealand.Leeston2013.Leeston2013Base.paddock.Soil.Initial water
              CERESSoilTemperature Temperature
              Nutrient
            SurfaceOrganicMatter Surface Organic Matter: InitialResidueName=wheat_stubble; InitialResidueType=wheat; InitialResidueMass=1000; InitialStandingFraction=0; InitialCPR=0; InitialCNR=80
            Fertiliser
            MicroClimate: a_interception=0; b_interception=1; c_interception=0; d_interception=0; SoilHeatFluxFraction=0.4; MinimumHeightDiffForNewLayer=0; NightInterceptionFraction=0.5; ReferenceHeight=2
            Plant Wheat
            Report DailyReport
            Report HarvestReport
            Report SupReport: same as Validation.New Zealand.Leeston2013.Leeston2013Base.paddock.SupReport
            Manager MaxLeafSize
              script: same as in Validation.New Zealand.Leeston2013.Leeston2013Base.paddock.MaxLeafSize
            Report MaxLeafSizeReport
            Report SowingReport
            Manager SetCropParameters
            Manager SetCropParameters
            Manager SetCropParameters
            Manager SetCropParameters
            Manager SetCropParameters
            Manager SetCropParameters
            Manager SetCropParameters
            Manager SetCropParameters
            Manager SetCropParameters
            Manager SetCropParameters
            Manager SetCropParameters
            Manager SetCropParameters
            Manager SetCropParameters
            Manager SetCropParameters
            Manager SetCropParameters
            Manager SetCropParameters
            Manager SetCropParameters
            Manager SetCropParameters
            Manager SetCropParameters
            Manager SetCropParameters
            Manager SetCropParameters
            Manager SetCropParameters
            Manager SetCropParameters
            Manager SetCropParameters
            Manager SetCropParameters
            Manager SetCropParameters
            Manager SetCropParameters
            Manager SetCropParameters
            Manager SetCropParameters
            Manager SetCropParameters
            Manager SetCropParameters
            Manager SetCropParameters
            Manager SetCropParameters
            Manager SetCropParameters
            Manager SetCropParameters
            Manager SetCropParameters
            Manager SetCropParameters
            Manager SetCropParameters
            Manager SetCropParameters
            Manager SetCropParameters
            Manager SetCropParameters
            Manager SetCropParameters
            Manager SetCropParameters
            Manager SetCropParameters
            Manager SetCropParameters
            Manager SetCropParameters
            Manager SetCropParameters
            Manager SetCropParameters
            Manager SetCropParameters
            Manager SetCropParameters
            Manager SetCropParameters
            Manager SetCropParameters
            Manager SetCropParameters
            Manager SetCropParameters
            Manager SetCropParameters
            Manager SetCropParameters
            Manager SetCropParameters
            Manager SetCropParameters
            Manager SetCropParameters
            Manager SetCropParameters
            Manager SetCropParameters
            Manager SetCropParameters
            Manager SetCropParameters
            Manager SetCropParameters
            Manager SetCropParameters
            Manager SetCropParameters
            Manager SetCropParameters
            Manager SetCropParameters
            Manager SetCropParameters
            Manager SetCropParameters
            Manager SetCropParameters
            Manager SetCropParameters
            Manager SetCropParameters
            Manager SetCropParameters
            Manager SetCropParameters
            Manager SetCropParameters
            Manager SetCropParameters
            Manager SetCropParameters
            Manager SetCropParameters
            Manager SetCropParameters
            Manager SetCropParameters
            Manager SetCropParameters
            Manager SetCropParameters
            Manager SetCropParameters
            Manager SetCropParameters
            Manager SetCropParameters
            Manager SetCropParameters
            Manager SetCropParameters
            Manager SetCropParameters
            Manager SetCropParameters
            Manager SetCropParameters
            Manager SetCropParameters
            Manager SetCropParameters
            Manager SetCropParameters
            Manager SetCropParameters
            Manager SetCropParameters
            Manager SetCropParameters
            Manager SetCropParameters
            Manager SetCropParameters
            Manager SetCropParameters
            Manager SetCropParameters
            Manager SetCropParameters
            Manager SetCropParameters
            Manager SetCropParameters
            Manager SetCropParameters
            Manager SetCropParameters
            Manager SetCropParameters
            Manager SetCropParameters
            Manager SetCropParameters
            Manager SetCropParameters
            Manager SetCropParameters
            Manager SetCropParameters
            Manager SetCropParameters
            Manager SetCropParameters
            Manager SetCropParameters
            Manager SetCropParameters
            Manager SetCropParameters
            Manager SetCropParameters
            Manager SetCropParameters
            Manager SetCropParameters
            Manager SetCropParameters
            Manager SetCropParameters
            Manager SetCropParameters
            Manager SetCropParameters
            Manager SetCropParameters
            Manager SetCropParameters
            Manager SetCropParameters
            Manager SetCropParameters
            Manager SetCropParameters
            Manager SetCropParameters
            Manager SetCropParameters
            Manager SetCropParameters
            Manager SetCropParameters
            Manager SetCropParameters
            Manager SetCropParameters
            Manager SetCropParameters
            Manager SetCropParameters
            Manager SetCropParameters
            Manager SetCropParameters
            Manager SetCropParameters
            Manager SetCropParameters
            Manager SetCropParameters
            Manager SetCropParameters
            Manager SetCropParameters
            Manager SetCropParameters
            Manager SetCropParameters
            Manager SetCropParameters
            Manager SetCropParameters
            Manager SetCropParameters
            Manager SetCropParameters
            Manager SetCropParameters
            Manager SetCropParameters
            Manager SetCropParameters
            Manager SetCropParameters
            Manager SetCropParameters
            Manager SetCropParameters
            Manager SetCropParameters
            Manager SetCropParameters
            Manager SetCropParameters
            Manager SetCropParameters
            Manager SetCropParameters
            Manager SetCropParameters
            Manager SetCropParameters
            Manager SetCropParameters
            Manager SetCropParameters
            Manager SetCropParameters
            Manager SetCropParameters
            Manager SetCropParameters
            Manager SetCropParameters
            Manager SetCropParameters
            Manager SetCropParameters
            Manager SetCropParameters
            Manager SetCropParameters
            Manager SetCropParameters
            Manager SetCropParameters
            Manager SetCropParameters
            Manager SetCropParameters
            Manager SetCropParameters
            Manager SetCropParameters
            Manager SetCropParameters
            Manager SetCropParameters
            Manager SetCropParameters
            Manager SetCropParameters
            Manager SetCropParameters
            Manager SetCropParameters
            Manager SetCropParameters
            Manager SetCropParameters
            Manager SetCropParameters
            Manager SetCropParameters
            Manager SetCropParameters
            Manager SetCropParameters
            Manager SetCropParameters
            Manager SetCropParameters
            Manager SetCropParameters
            Manager SetCropParameters
            Manager SetCropParameters
            Manager SetCropParameters
            Manager SetCropParameters
            Manager SetCropParameters
            Manager SetCropParameters
            Manager SetCropParameters
            Manager SetCropParameters
            Manager SetCropParameters
            Manager SetCropParameters
            Manager SetCropParameters
            Manager SetCropParameters
            Manager SetCropParameters
            Manager SetCropParameters
            Manager SetCropParameters
            Manager SetCropParameters
            Manager SetCropParameters
            Manager SetCropParameters
            Manager SetCropParameters
            Manager SetCropParameters
            Manager SetCropParameters
            Manager SetCropParameters
            Manager SetCropParameters
            Manager SetCropParameters
            Manager SetCropParameters
            Manager SetCropParameters
            Manager SetCropParameters
            Manager SetCropParameters
            Manager SetCropParameters
            Manager SetCropParameters
            Manager SetCropParameters
            Manager SetCropParameters
            Manager SetCropParameters
            Manager SetCropParameters
            Manager SetCropParameters
            Manager SetCropParameters
            Manager SetCropParameters
            Manager SetCropParameters
            Manager SetCropParameters
            Manager SetCropParameters
            Manager SetCropParameters
            Manager SetCropParameters
            Manager SetCropParameters
            Manager SetCropParameters
            Manager SetCropParameters
            Manager SetCropParameters
            Manager SetCropParameters
            Manager SetCropParameters
            Manager SetCropParameters
            Manager SetCropParameters
            Manager SetCropParameters
            Manager SetCropParameters
            Manager SetCropParameters
            Manager SetCropParameters
            Manager SetCropParameters
            Manager SetCropParameters
            Manager SetCropParameters
            Manager SetCropParameters
            Manager SetCropParameters
            Manager SetCropParameters
            Manager SetCropParameters
            Manager SetCropParameters
            Manager SetCropParameters
            Manager SetCropParameters
            Manager SetCropParameters
            Manager SetCropParameters
            Manager SetCropParameters
            Manager SetCropParameters
            Manager SetCropParameters
            Manager SetCropParameters
            Manager SetCropParameters
            Manager SetCropParameters
            Manager SetCropParameters
            Manager SetCropParameters
            Manager SetCropParameters
            Manager SetCropParameters
            Manager SetCropParameters
            Manager SetCropParameters
            Manager SetCropParameters
            Manager SetCropParameters
            Manager SetCropParameters
            Manager SetCropParameters
            Manager SetCropParameters
            Manager SetCropParameters
            Manager SetCropParameters
            Manager SetCropParameters
            Manager SetCropParameters
            Manager SetCropParameters
            Manager SetCropParameters
            Manager SetCropParameters
            Manager SetCropParameters
            Manager SetCropParameters
            Manager SetCropParameters
            Manager SetCropParameters
            Manager SetCropParameters
            Manager SetCropParameters
            Manager SetCropParameters
            Manager SetCropParameters
            Manager SetCropParameters
            Manager SetCropParameters
            Manager SetCropParameters
            Manager SetCropParameters
            Manager SetCropParameters
            Manager SetCropParameters
            Manager SetCropParameters
            Manager SetCropParameters
            Manager SetCropParameters
            Manager SetCropParameters
            Manager SetCropParameters
            Manager SetCropParameters
            Manager SetCropParameters
            Manager SetCropParameters
            Manager SetCropParameters
            Manager SetCropParameters
            Manager SetCropParameters
            Manager SetCropParameters
            Manager SetCropParameters
            Manager SetCropParameters
            Manager SetCropParameters
            Manager SetCropParameters
            Manager SetCropParameters
            Manager SetCropParameters
            Manager SetCropParameters
            Manager SetCropParameters
            Manager SetCropParameters
            Manager SetCropParameters
            Manager SetCropParameters
            Manager SetCropParameters
            Manager SetCropParameters
            Manager SetCropParameters
            Manager SetCropParameters
            Manager SetCropParameters
            Manager SetCropParameters
            Manager SetCropParameters
            Manager SetCropParameters
            Manager SetCropParameters
            Manager SetCropParameters
            Manager SetCropParameters
            Manager SetCropParameters
            Manager SetCropParameters
            Manager SetCropParameters
            Manager SetCropParameters
            Manager SetCropParameters
            Manager SetCropParameters
            Manager SetCropParameters
            Manager SetCropParameters
            Manager SetCropParameters
            Manager SetCropParameters
            Manager SetCropParameters
            Manager SetCropParameters
            Manager SetCropParameters
            Manager SetCropParameters
            Manager SetCropParameters
            Manager SetCropParameters
            Manager SetCropParameters
            Manager SetCropParameters
            Manager SetCropParameters
            Manager SetCropParameters
            Manager SetCropParameters
            Manager SetCropParameters
            Manager SetCropParameters
            Manager SetCropParameters
            Manager SetCropParameters
            Manager SetCropParameters
            Manager SetCropParameters
            Manager SetCropParameters
            Manager SetCropParameters
            Manager SetCropParameters
            Manager SetCropParameters
            Manager SetCropParameters
            Manager SetCropParameters
            Manager SetCropParameters
            Manager SetCropParameters
            Manager SetCropParameters
            Manager SetCropParameters
            Manager SetCropParameters
            Manager SetCropParameters
            Manager SetCropParameters
            Manager SetCropParameters
            Manager SetCropParameters
            Manager SetCropParameters
            Manager SetCropParameters
            Manager SetCropParameters
            Manager SetCropParameters
            Manager SetCropParameters
            Manager SetCropParameters
            Manager SetCropParameters
            Manager SetCropParameters
            Manager SetCropParameters
            Manager SetCropParameters
            Manager SetCropParameters
            Manager SetCropParameters
            Manager SetCropParameters
            Manager SetCropParameters
            Manager SetCropParameters
            Manager SetCropParameters
            Manager SetCropParameters
            Manager SetCropParameters
            Manager SetCropParameters
            Manager SetCropParameters
            Manager SetCropParameters
            Manager SetCropParameters
            Manager SetCropParameters
            Manager SetCropParameters
            Manager SetCropParameters
            Manager SetCropParameters
            Manager SetCropParameters
            Manager SetCropParameters
            Manager SetCropParameters
            Manager SetCropParameters
            Manager SetCropParameters
            Manager SetCropParameters
            Manager SetCropParameters
            Manager SetCropParameters
            Manager SetCropParameters
            Manager SetCropParameters
            Manager SetCropParameters
            Manager SetCropParameters
            Manager SetCropParameters
            Manager SetCropParameters
            Manager SetCropParameters
            Manager SetCropParameters
            Manager SetCropParameters
            Manager SetCropParameters
            Manager SetCropParameters
            Manager SetCropParameters
            Manager SetCropParameters
            Manager SetCropParameters
            Manager SetCropParameters
            Manager SetCropParameters
            Manager SetCropParameters
            Manager SetCropParameters
            Manager SetCropParameters
            Manager SetCropParameters
            Manager SetCropParameters
            Manager SetCropParameters
            Manager SetCropParameters
            Manager SetCropParameters
            Manager SetCropParameters
            Manager SetCropParameters
            Manager SetCropParameters
            Manager SetCropParameters
            Manager SetCropParameters
            Manager SetCropParameters
            Manager SetCropParameters
            Manager SetCropParameters
            Manager SetCropParameters
            Manager SetCropParameters
            Manager SetCropParameters
            Manager SetCropParameters
            Manager SetCropParameters
            Manager SetCropParameters
            Manager SetCropParameters
            Manager SetCropParameters
            Manager SetCropParameters
            Manager SetCropParameters
            Manager SetCropParameters
            Manager SetCropParameters
            Manager SetCropParameters
            Manager SetCropParameters
            Manager SetCropParameters
            Manager SetCropParameters
            Manager SetCropParameters
            Manager SetCropParameters
            Manager SetCropParameters
            Manager SetCropParameters
            Manager SetCropParameters
            Manager SetCropParameters
            Manager SetCropParameters
            Manager SetCropParameters
            Manager SetCropParameters
            Manager SetCropParameters
            Manager SetCropParameters
            Manager SetCropParameters
            Manager SetCropParameters
            Manager SetCropParameters
            Manager SetCropParameters
            Manager SetCropParameters
            Manager SetCropParameters
            Manager SetCropParameters
            Manager SetCropParameters
            Manager SetCropParameters
            Manager SetCropParameters
            Manager SetCropParameters
            Manager SetCropParameters
            Manager SetCropParameters
            Manager SetCropParameters
            Manager SetCropParameters
            Manager SetCropParameters
            Manager SetCropParameters
            Manager SetCropParameters
            Manager SetCropParameters
            Manager SetCropParameters
            Manager SetCropParameters
            Manager SetCropParameters
            Manager SetCropParameters
            Manager SetCropParameters
            Manager SetCropParameters
            Manager SetCropParameters
            Manager SetCropParameters
            Manager SetCropParameters
            Manager SetCropParameters
            Manager SetCropParameters
            Manager SetCropParameters
            Manager SetCropParameters
            Manager SetCropParameters
            Manager SetCropParameters
            Manager SetCropParameters
            Manager SetCropParameters
            Manager SetCropParameters
            Manager SetCropParameters
            Manager SetCropParameters
            Manager SetCropParameters
            Manager SetCropParameters
            Manager SetCropParameters
            Manager SetCropParameters
            Manager SetCropParameters
            Manager SetCropParameters
            Manager SetCropParameters
            Manager SetCropParameters
            Manager SetCropParameters
            Manager SetCropParameters
            Manager SetCropParameters
            Manager SetCropParameters
            Manager SetCropParameters
            Manager SetCropParameters
            Manager SetCropParameters
            Manager SetCropParameters
            Manager SetCropParameters
            Manager SetCropParameters
            Manager SetCropParameters
            Manager SetCropParameters
            Manager SetCropParameters
            Manager SetCropParameters
            Manager SetCropParameters
            Manager SetCropParameters
            Manager SetCropParameters
            Manager SetCropParameters
            Manager SetCropParameters
            Manager SetCropParameters
            Manager SetCropParameters
            Manager SetCropParameters
            Manager SetCropParameters
            Manager SetCropParameters
            Manager SetCropParameters
            Manager SetCropParameters
            Manager SetCropParameters
            Manager SetCropParameters
            Manager SetCropParameters
            Manager SetCropParameters
            Manager SetCropParameters
            Manager SetCropParameters
            Manager SetCropParameters
            Manager SetCropParameters
            Manager SetCropParameters
            Manager SetCropParameters
            Manager SetCropParameters
            Manager SetCropParameters
            Manager SetCropParameters
            Manager SetCropParameters
            Manager SetCropParameters
            Manager SetCropParameters
            Manager SetCropParameters
            Manager SetCropParameters
            Manager SetCropParameters
            Manager SetCropParameters
            Manager SetCropParameters
            Manager SetCropParameters
            Manager SetCropParameters
            Manager SetCropParameters
            Manager SetCropParameters
            Manager SetCropParameters
            Manager SetCropParameters
            Manager SetCropParameters
            Manager SetCropParameters
            Manager SetCropParameters
            Manager SetCropParameters
            Manager SetCropParameters
            Manager SetCropParameters
            Manager SetCropParameters
            Manager SetCropParameters
            Manager SetCropParameters
            Manager SetCropParameters
            Manager SetCropParameters
            Manager SetCropParameters
            Manager SetCropParameters
            Manager SetCropParameters
            Manager SetCropParameters
            Manager SetCropParameters
            Manager SetCropParameters
            Manager SetCropParameters
            Manager SetCropParameters
            Manager SetCropParameters
            Manager SetCropParameters
            Manager SetCropParameters
            Manager SetCropParameters
            Manager SetCropParameters
            Manager SetCropParameters
            Manager SetCropParameters
            Manager SetCropParameters
            Manager SetCropParameters
            Manager SetCropParameters
            Manager SetCropParameters
            Manager SetCropParameters
            Manager SetCropParameters
            Manager SetCropParameters
            Manager SetCropParameters
            Manager SetCropParameters
            Manager SetCropParameters
            Manager SetCropParameters
            Manager SetCropParameters
            Manager SetCropParameters
            Manager SetCropParameters
            Manager SetCropParameters
            Manager SetCropParameters
            Manager SetCropParameters
            Manager SetCropParameters
            Manager SetCropParameters
            Manager SetCropParameters
            Manager SetCropParameters
            Manager SetCropParameters
            Manager SetCropParameters
            Manager SetCropParameters
            Manager SetCropParameters
            Manager SetCropParameters
            Manager SetCropParameters
            Manager SetCropParameters
            Manager SetCropParameters
            Manager SetCropParameters
            Manager SetCropParameters
            Manager SetCropParameters
            Manager SetCropParameters
            Manager SetCropParameters
            Manager SetCropParameters
            Manager SetCropParameters
            Manager SetCropParameters
            Manager SetCropParameters
            Manager SetCropParameters
            Manager SetCropParameters
            Manager SetCropParameters
            Manager SetCropParameters
            Manager SetCropParameters
            Manager SetCropParameters
            Manager SetCropParameters
            Manager SetCropParameters
            Manager SetCropParameters
            Manager SetCropParameters
            Manager SetCropParameters
            Manager SetCropParameters
            Manager SetCropParameters
            Manager SetCropParameters
            Manager SetCropParameters
            Manager SetCropParameters
            Manager SetCropParameters
            Manager SetCropParameters
            Manager SetCropParameters
            Manager SetCropParameters
            Manager SetCropParameters
            Manager SetCropParameters
            Manager SetCropParameters
            Manager SetCropParameters
            Manager SetCropParameters
            Manager SetCropParameters
            Manager SetCropParameters
            Manager SetCropParameters
            Manager SetCropParameters
            Manager SetCropParameters
            Manager SetCropParameters
            Manager SetCropParameters
            Manager SetCropParameters
            Manager SetCropParameters
            Manager SetCropParameters
            Manager SetCropParameters
            Manager SetCropParameters
            Manager SetCropParameters
            Manager SetCropParameters
            Manager SetCropParameters
            Manager SetCropParameters
            Manager SetCropParameters
            Manager SetCropParameters
            Manager SetCropParameters
            Manager SetCropParameters
            Manager SetCropParameters
            Manager SetCropParameters
            Manager SetCropParameters
            Manager SetCropParameters
            Manager SetCropParameters
            Manager SetCropParameters
            Manager SetCropParameters
            Manager SetCropParameters
            Manager SetCropParameters
            Manager SetCropParameters
            Manager SetCropParameters
            Manager SetCropParameters
            Manager SetCropParameters
            Manager SetCropParameters
            Manager SetCropParameters
            Manager SetCropParameters
            Manager SetCropParameters
            Manager SetCropParameters
            Manager SetCropParameters
            Manager SetCropParameters
            Manager SetCropParameters
            Manager SetCropParameters
            Manager SetCropParameters
            Manager SetCropParameters
            Manager SetCropParameters
            Manager SetCropParameters
            Manager SetCropParameters
            Manager SetCropParameters
            Manager SetCropParameters
            Manager SetCropParameters
            Manager SetCropParameters
            Manager SetCropParameters
            Manager SetCropParameters
            Manager SetCropParameters
            Manager SetCropParameters
            Manager SetCropParameters
            Manager SetCropParameters
            Manager SetCropParameters
            Manager SetCropParameters
            Manager SetCropParameters
            Manager SetCropParameters
            Manager SetCropParameters
            Manager SetCropParameters
            Manager SetCropParameters
            Manager SetCropParameters
            Manager SetCropParameters
            Manager SetCropParameters
            Manager SetCropParameters
            Manager SetCropParameters
            Manager SetCropParameters
            Manager SetCropParameters
            Manager SetCropParameters
            Manager SetCropParameters
            Manager SetCropParameters
            Manager SetCropParameters
            Manager SetCropParameters
            Manager SetCropParameters
            Manager SetCropParameters
            Manager SetCropParameters
            Manager SetCropParameters
            Manager SetCropParameters
            Manager SetCropParameters
            Manager SetCropParameters
            Manager SetCropParameters
            Manager SetCropParameters
            Manager SetCropParameters
            Manager SetCropParameters
            Manager SetCropParameters
            Manager SetCropParameters
            Manager SetCropParameters
            Manager SetCropParameters
            Manager SetCropParameters
            Manager SetCropParameters
            Manager SetCropParameters
            Manager SetCropParameters
            Manager SetCropParameters
            Manager SetCropParameters
            Manager SetCropParameters
            Manager SetCropParameters
            Manager SetCropParameters
            Manager SetCropParameters
            Manager SetCropParameters
            Manager SetCropParameters
            Manager SetCropParameters
            Manager SetCropParameters
            Manager SetCropParameters
            Manager SetCropParameters
            Manager SetCropParameters
            Manager SetCropParameters
            Manager SetCropParameters
            Manager SetCropParameters
            Manager SetCropParameters
            Manager SetCropParameters
            Manager SetCropParameters
            Manager SetCropParameters
            Manager SetCropParameters
            Manager SetCropParameters
            Manager SetCropParameters
            Manager SetCropParameters
            Manager SetCropParameters
            Manager SetCropParameters
            Manager SetCropParameters
            Manager SetCropParameters
            Manager SetCropParameters
            Manager SetCropParameters
            Manager SetCropParameters
            Manager SetCropParameters
            Manager SetCropParameters
            Manager SetCropParameters
            Manager SetCropParameters
            Manager SetCropParameters
            Manager SetCropParameters
            Manager SetCropParameters
            Manager SetCropParameters
            Manager SetCropParameters
            Manager SetCropParameters
            Manager SetCropParameters
            Manager SetCropParameters
            Manager SetCropParameters
            Manager SetCropParameters
            Manager SetCropParameters
            Manager SetCropParameters
            Manager SetCropParameters
            Manager SetCropParameters
            Manager SetCropParameters
            Manager SetCropParameters
            Manager SetCropParameters
            Manager SetCropParameters
            Manager SetCropParameters
            Manager SetCropParameters
            Manager SetCropParameters
            Manager SetCropParameters
            Manager SetCropParameters
            Manager SetCropParameters
            Manager SetCropParameters
            Manager SetCropParameters
            Manager SetCropParameters
            Manager SetCropParameters
            Manager SetCropParameters
            Manager SetCropParameters
            Manager SetCropParameters
            Manager SetCropParameters
            Manager SetCropParameters
            Manager SetCropParameters
            Manager SetCropParameters
            Manager SetCropParameters
            Manager SetCropParameters
            Manager SetCropParameters
            Manager SetCropParameters
            Manager SetCropParameters
            Manager SetCropParameters
            Manager SetCropParameters
            Manager SetCropParameters
            Manager SetCropParameters
            Manager SetCropParameters
            Manager SetCropParameters
            Manager SetCropParameters
            Manager SetCropParameters
            Manager SetCropParameters
            Manager SetCropParameters
            Manager SetCropParameters
            Manager SetCropParameters
            Manager SetCropParameters
            Manager SetCropParameters
            Manager SetCropParameters
            Manager SetCropParameters
            Manager SetCropParameters
            Manager SetCropParameters
            Manager SetCropParameters
            Manager SetCropParameters
            Manager SetCropParameters
            Manager SetCropParameters
            Manager SetCropParameters
            Manager SetCropParameters
            Manager SetCropParameters
            Manager SetCropParameters
            Manager SetCropParameters
            Manager SetCropParameters
            Manager SetCropParameters
            Manager SetCropParameters
            Manager SetCropParameters
            Manager SetCropParameters
            Manager SetCropParameters
            Manager SetCropParameters
            Manager SetCropParameters
            Manager SetCropParameters
            Manager SetCropParameters
            Manager SetCropParameters
            Manager SetCropParameters
            Manager SetCropParameters
            Manager SetCropParameters
            Manager SetCropParameters
            Manager SetCropParameters
            Manager SetCropParameters
            Manager SetCropParameters
            Manager SetCropParameters
            Manager SetCropParameters
            Manager SetCropParameters
            Manager SetCropParameters
            Manager SetCropParameters
            Manager SetCropParameters
            Manager SetCropParameters
            Manager SetCropParameters
            Manager SetCropParameters
            Manager SetCropParameters
            Manager SetCropParameters
            Manager SetCropParameters
            Manager SetCropParameters
            Manager SetCropParameters
            Manager SetCropParameters
            Manager SetCropParameters
            Manager SetCropParameters
            Manager SetCropParameters
            Manager SetCropParameters
            Manager SetCropParameters
            Manager SetCropParameters
            Manager SetCropParameters
            Manager SetCropParameters
            Manager SetCropParameters
            Manager SetCropParameters
            Manager SetCropParameters
            Manager SetCropParameters
            Manager SetCropParameters
            Manager SetCropParameters
            Manager SetCropParameters
            Manager SetCropParameters
            Manager SetCropParameters
            Manager SetCropParameters
            Manager SetCropParameters
            Manager SetCropParameters
            Manager SetCropParameters
            Manager SetCropParameters
            Manager SetCropParameters
            Manager SetCropParameters
            Manager SetCropParameters
            Manager SetCropParameters
            Manager SetCropParameters
            Manager SetCropParameters
            Manager SetCropParameters
            Manager SetCropParameters
            Manager SetCropParameters
            Manager SetCropParameters
            Manager SetCropParameters
            Manager SetCropParameters
            Manager SetCropParameters
            Manager SetCropParameters
            Manager SetCropParameters
            Manager SetCropParameters
            Manager SetCropParameters
            Manager SetCropParameters
            Manager SetCropParameters
            Manager SetCropParameters
            Manager SetCropParameters
            Manager SetCropParameters
            Manager SetCropParameters
            Manager SetCropParameters
            Manager SetCropParameters
            Manager SetCropParameters
            Manager SetCropParameters
            Manager SetCropParameters
            Manager SetCropParameters
            Manager SetCropParameters
            Manager SetCropParameters
            Manager SetCropParameters
            Manager SetCropParameters
            Manager SetCropParameters
            Manager SetCropParameters
            Manager SetCropParameters
            Manager SetCropParameters
            Manager SetCropParameters
            Manager SetCropParameters
            Manager SetCropParameters
            Manager SetCropParameters
            Manager SetCropParameters
            Manager SetCropParameters
            Manager SetCropParameters
            Manager SetCropParameters
            Manager SetCropParameters
            Manager SetCropParameters
            Manager SetCropParameters
            Manager SetCropParameters
            Manager SetCropParameters
            Manager SetCropParameters
            Manager SetCropParameters
            Manager SetCropParameters
            Manager SetCropParameters
            Manager SetCropParameters
            Manager SetCropParameters
            Manager SetCropParameters
            Manager SetCropParameters
            Manager SetCropParameters
            Manager SetCropParameters
            Manager SetCropParameters
            Manager SetCropParameters
            Manager SetCropParameters
            Manager SetCropParameters
            Manager SetCropParameters
            Manager SetCropParameters
            Manager SetCropParameters
            Manager SetCropParameters
            Manager SetCropParameters
            Manager SetCropParameters
            Manager SetCropParameters
            Manager SetCropParameters
            Manager SetCropParameters
            Manager SetCropParameters
            Manager SetCropParameters
            Manager SetCropParameters
            Manager SetCropParameters
            Manager SetCropParameters
            Manager SetCropParameters
            Manager SetCropParameters
            Manager SetCropParameters
            Manager SetCropParameters
            Manager SetCropParameters
            Manager SetCropParameters
            Manager SetCropParameters
            Manager SetCropParameters
            Manager SetCropParameters
            Manager SetCropParameters
            Manager SetCropParameters
            Manager SetCropParameters
            Manager SetCropParameters
            Manager SetCropParameters
            Manager SetCropParameters
            Manager SetCropParameters
            Manager SetCropParameters
            Manager SetCropParameters
            Manager SetCropParameters
            Manager SetCropParameters
            Manager SetCropParameters
            Manager SetCropParameters
            Manager SetCropParameters
            Manager SetCropParameters
            Manager SetCropParameters
            Manager SetCropParameters
            Manager SetCropParameters
            Manager SetCropParameters
            Manager SetCropParameters
            Manager SetCropParameters
            Manager SetCropParameters
            Manager SetCropParameters
            Manager SetCropParameters
            Manager SetCropParameters
            Manager SetCropParameters
            Manager SetCropParameters
            Manager SetCropParameters
            Manager SetCropParameters
            Manager SetCropParameters
            Manager SetCropParameters
            Manager SetCropParameters
            Manager SetCropParameters
            Manager SetCropParameters
            Manager SetCropParameters
            Manager SetCropParameters
            Manager SetCropParameters
            Manager SetCropParameters
            Manager SetCropParameters
            Manager SetCropParameters
            Manager SetCropParameters
            Manager SetCropParameters
            Manager SetCropParameters
            Manager SetCropParameters
            Manager SetCropParameters
            Manager SetCropParameters
            Manager SetCropParameters
            Manager SetCropParameters
            Manager SetCropParameters
            Manager SetCropParameters
            Manager SetCropParameters
            Manager SetCropParameters
            Manager SetCropParameters
            Manager SetCropParameters
            Manager SetCropParameters
            Manager SetCropParameters
            Manager SetCropParameters
            Manager SetCropParameters
            Manager SetCropParameters
            Manager SetCropParameters
            Manager SetCropParameters
            Manager SetCropParameters
            Manager SetCropParameters
            Manager SetCropParameters
            Manager SetCropParameters
            Manager SetCropParameters
            Manager SetCropParameters
            Manager SetCropParameters
            Manager SetCropParameters
            Manager SetCropParameters
            Manager SetCropParameters
            Manager SetCropParameters
            Manager SetCropParameters
            Manager SetCropParameters
            Manager SetCropParameters
            Manager SetCropParameters
            Manager SetCropParameters
            Manager SetCropParameters
            Manager SetCropParameters
            Manager SetCropParameters
            Manager SetCropParameters
            Manager SetCropParameters
            Manager SetCropParameters
            Manager SetCropParameters
            Manager SetCropParameters
            Manager SetCropParameters
            Manager SetCropParameters
            Manager SetCropParameters
            Manager SetCropParameters
            Manager SetCropParameters
            Manager SetCropParameters
            Manager SetCropParameters
            Manager SetCropParameters
            Manager SetCropParameters
            Manager SetCropParameters
            Manager SetCropParameters
            Manager SetCropParameters
            Manager SetCropParameters
            Manager SetCropParameters
            Manager SetCropParameters
            Manager SetCropParameters
            Manager SetCropParameters
            Manager SetCropParameters
            Manager SetCropParameters
            Manager SetCropParameters
            Manager SetCropParameters
            Manager SetCropParameters
            Manager SetCropParameters
          SoilArbitrator Soil Arbitrator
          Manager LocationInfo: same as Validation.New Zealand.Leeston2013.Leeston2013Base.LocationInfo
        Memo Leaf Size Predictions
          This graph shows different leaf size profiles measured for winter wheat sown on a range of different dates.  Leaves that emerge during cooler conditions achieve a smallter maximum size than the equivelent leaf appearanign in warm conditions.
      Experiment Wakanui2015
        Memo: same as Validation.New Zealand.Leeston2013.Memo
        Factors
          Permutation
            Factor Sow: Specification=[Sowing].Script.SowDate = 20-Feb,10-Mar,20-Mar,09-Apr
            Factor Cm: Specification=[Sowing].Script.PGRTreatment = Normal
        Simulation Wakanui2015Base
          Clock: Start=2015-02-01; End=2016-02-15
          Summary summaryfile
          Weather: FileName=Wakanui.met
          Zone paddock: Area=1; Slope=0; AspectAngle=0; Altitude=50
            Folder Manager folder
              Operations IrrigationEvents
                2015-10-19  [Irrigation].Apply(40.0);
                2015-11-08  [Irrigation].Apply(40.0);
                2015-11-26  [Irrigation].Apply(40.0);
                2015-12-12  [Irrigation].Apply(45.0);
                2015-12-28  [Irrigation].Apply(45.0);
              Operations FertiliserEvents
                2015-09-18  [Fertiliser].Apply(26, Fertiliser.Types.UreaN, 10);
                2015-09-26  [Fertiliser].Apply(51, Fertiliser.Types.UreaN, 10);
                2015-10-10  [Fertiliser].Apply(92, Fertiliser.Types.UreaN, 10);
                2015-10-29  [Fertiliser].Apply(115, Fertiliser.Types.UreaN, 10);
              Manager Sowing
                SowDate = 24-Jul
                CultivarName = Wakanui
                SowingDepth = 50
                RowSpacing = 150
                PGRTreatment = 0
```csharp
using Models.Soils.Nutrients;
using System;
using Models.Core;
using Models.PMF;
using Models.Soils;
using Models.Soils.Nutrients;
using Models.Utilities;
using APSIM.Shared.Utilities;

namespace Models
{
    [Serializable]
    public class Script : Model
    {
        [Link] Clock Clock;
        [Link] Summary Summary;
        [Link] Soil Soil;
        [Link] Plant Wheat;
        Accumulator accumulatedRain;
        
        [Description("Sowing date (d-mmm)")]
        public string SowDate { get; set; }
        [Description("Cultivar to be sown")]
        public string CultivarName { get; set; }
        [Description("Sowing depth (mm)")]
        public double SowingDepth { get; set; }
        [Description("Row spacing (mm)")]
        public double RowSpacing { get; set; }
        [Description("PGR treatment applied")]
        public string PGRTreatment { get; set; }
        


        [EventSubscribe("DoManagement")]
        private void OnDoManagement(object sender, EventArgs e)
        {
            if (DateUtilities.WithinDates(SowDate, Clock.Today, SowDate))
            {
                Wheat.Sow(population: 150, cultivar: CultivarName, depth: SowingDepth, rowSpacing: RowSpacing);    
                if(SowDate == "20-Feb")
                {
                    Wheat.SetEmergenceDate("27-Feb");
                }
                if(SowDate == "10-Mar")
                {
                    Wheat.SetEmergenceDate("17-Mar");
                }
                if(SowDate == "20-Mar")
                {
                    Wheat.SetEmergenceDate("29-Mar");
                }
                if(SowDate == "09-Apr")
                {
                    Wheat.SetEmergenceDate("22-Apr");
                }
            }
        
        }
        
    }
}
```
              Operations HarvestEvents
                2016-02-12  [Wheat].Harvest();
                2016-02-12  [Wheat].EndCrop();
            Irrigation
            Soil: SoilType=LincolnSoil; LocalName=Lincoln; Site=Lincoln; NearestTown=Unknown; Region=NZ; NaturalVegetation=Unknown; Latitude=0; Longitude=0
              Physical: same as Validation.New Zealand.Leeston2014.Wakanui2014Base.paddock.Soil.Physical
              WaterBalance SoilWater: same as Validation.New Zealand.Leeston2013.Leeston2013Base.paddock.Soil.SoilWater
              Organic: same as Validation.New Zealand.Leeston2013.Leeston2013Base.paddock.Soil.Organic
              Chemical
                Thickness  NO3N     NH4N  PH
                100        30.7692  1.3   6
                200        3.84615  1     6
                200        7.69231  1     6
                200        3.84615  0.8   6
                200        3.84615  0.8   6
                200        3.84615  0.5   6
                200        3.84615  0.5   6
                200        3.84615  0.5   6
              Sample Initial water: same as Validation.New Zealand.Leeston2013.Leeston2013Base.paddock.Soil.Initial water
              CERESSoilTemperature Temperature
              Nutrient
            SurfaceOrganicMatter Surface Organic Matter: InitialResidueName=wheat_stubble; InitialResidueType=whiteclover; InitialResidueMass=1000; InitialStandingFraction=0; InitialCPR=0; InitialCNR=80
            Fertiliser
            MicroClimate: a_interception=0; b_interception=1; c_interception=0; d_interception=0; SoilHeatFluxFraction=0.4; MinimumHeightDiffForNewLayer=0; NightInterceptionFraction=0.5; ReferenceHeight=2
            Plant Wheat
            Report DailyReport
            Report HarvestReport
            Report SupReport: same as Validation.New Zealand.Leeston2013.Leeston2013Base.paddock.SupReport
            Manager MaxLeafSize
              script: same as in Validation.New Zealand.Leeston2013.Leeston2013Base.paddock.MaxLeafSize
            Report MaxLeafSizeReport
            Report SowingReport
            Manager SetCropParameters
            Manager SetCropParameters
            Manager SetCropParameters
            Manager SetCropParameters
            Manager SetCropParameters
            Manager SetCropParameters
            Manager SetCropParameters
            Manager SetCropParameters
            Manager SetCropParameters
            Manager SetCropParameters
            Manager SetCropParameters
            Manager SetCropParameters
            Manager SetCropParameters
            Manager SetCropParameters
            Manager SetCropParameters
            Manager SetCropParameters
            Manager SetCropParameters
            Manager SetCropParameters
            Manager SetCropParameters
            Manager SetCropParameters
            Manager SetCropParameters
            Manager SetCropParameters
            Manager SetCropParameters
            Manager SetCropParameters
            Manager SetCropParameters
            Manager SetCropParameters
            Manager SetCropParameters
            Manager SetCropParameters
            Manager SetCropParameters
            Manager SetCropParameters
            Manager SetCropParameters
            Manager SetCropParameters
            Manager SetCropParameters
            Manager SetCropParameters
            Manager SetCropParameters
            Manager SetCropParameters
            Manager SetCropParameters
            Manager SetCropParameters
            Manager SetCropParameters
            Manager SetCropParameters
            Manager SetCropParameters
            Manager SetCropParameters
            Manager SetCropParameters
            Manager SetCropParameters
            Manager SetCropParameters
            Manager SetCropParameters
            Manager SetCropParameters
            Manager SetCropParameters
            Manager SetCropParameters
            Manager SetCropParameters
            Manager SetCropParameters
            Manager SetCropParameters
            Manager SetCropParameters
            Manager SetCropParameters
            Manager SetCropParameters
            Manager SetCropParameters
            Manager SetCropParameters
            Manager SetCropParameters
            Manager SetCropParameters
            Manager SetCropParameters
            Manager SetCropParameters
            Manager SetCropParameters
            Manager SetCropParameters
            Manager SetCropParameters
            Manager SetCropParameters
            Manager SetCropParameters
            Manager SetCropParameters
            Manager SetCropParameters
            Manager SetCropParameters
            Manager SetCropParameters
            Manager SetCropParameters
            Manager SetCropParameters
            Manager SetCropParameters
            Manager SetCropParameters
            Manager SetCropParameters
            Manager SetCropParameters
            Manager SetCropParameters
            Manager SetCropParameters
            Manager SetCropParameters
            Manager SetCropParameters
            Manager SetCropParameters
            Manager SetCropParameters
            Manager SetCropParameters
            Manager SetCropParameters
            Manager SetCropParameters
            Manager SetCropParameters
            Manager SetCropParameters
            Manager SetCropParameters
            Manager SetCropParameters
            Manager SetCropParameters
            Manager SetCropParameters
            Manager SetCropParameters
            Manager SetCropParameters
            Manager SetCropParameters
            Manager SetCropParameters
            Manager SetCropParameters
            Manager SetCropParameters
            Manager SetCropParameters
            Manager SetCropParameters
            Manager SetCropParameters
            Manager SetCropParameters
            Manager SetCropParameters
            Manager SetCropParameters
            Manager SetCropParameters
            Manager SetCropParameters
            Manager SetCropParameters
            Manager SetCropParameters
            Manager SetCropParameters
            Manager SetCropParameters
            Manager SetCropParameters
            Manager SetCropParameters
            Manager SetCropParameters
            Manager SetCropParameters
            Manager SetCropParameters
            Manager SetCropParameters
            Manager SetCropParameters
            Manager SetCropParameters
            Manager SetCropParameters
            Manager SetCropParameters
            Manager SetCropParameters
            Manager SetCropParameters
            Manager SetCropParameters
            Manager SetCropParameters
            Manager SetCropParameters
            Manager SetCropParameters
            Manager SetCropParameters
            Manager SetCropParameters
            Manager SetCropParameters
            Manager SetCropParameters
            Manager SetCropParameters
            Manager SetCropParameters
            Manager SetCropParameters
            Manager SetCropParameters
            Manager SetCropParameters
            Manager SetCropParameters
            Manager SetCropParameters
            Manager SetCropParameters
            Manager SetCropParameters
            Manager SetCropParameters
            Manager SetCropParameters
            Manager SetCropParameters
            Manager SetCropParameters
            Manager SetCropParameters
            Manager SetCropParameters
            Manager SetCropParameters
            Manager SetCropParameters
            Manager SetCropParameters
            Manager SetCropParameters
            Manager SetCropParameters
            Manager SetCropParameters
            Manager SetCropParameters
            Manager SetCropParameters
            Manager SetCropParameters
            Manager SetCropParameters
            Manager SetCropParameters
            Manager SetCropParameters
            Manager SetCropParameters
            Manager SetCropParameters
            Manager SetCropParameters
            Manager SetCropParameters
            Manager SetCropParameters
            Manager SetCropParameters
            Manager SetCropParameters
            Manager SetCropParameters
            Manager SetCropParameters
            Manager SetCropParameters
            Manager SetCropParameters
            Manager SetCropParameters
            Manager SetCropParameters
            Manager SetCropParameters
            Manager SetCropParameters
            Manager SetCropParameters
            Manager SetCropParameters
            Manager SetCropParameters
            Manager SetCropParameters
            Manager SetCropParameters
            Manager SetCropParameters
            Manager SetCropParameters
            Manager SetCropParameters
            Manager SetCropParameters
            Manager SetCropParameters
            Manager SetCropParameters
            Manager SetCropParameters
            Manager SetCropParameters
            Manager SetCropParameters
            Manager SetCropParameters
            Manager SetCropParameters
            Manager SetCropParameters
            Manager SetCropParameters
            Manager SetCropParameters
            Manager SetCropParameters
            Manager SetCropParameters
            Manager SetCropParameters
            Manager SetCropParameters
            Manager SetCropParameters
            Manager SetCropParameters
            Manager SetCropParameters
            Manager SetCropParameters
            Manager SetCropParameters
            Manager SetCropParameters
            Manager SetCropParameters
            Manager SetCropParameters
            Manager SetCropParameters
            Manager SetCropParameters
            Manager SetCropParameters
            Manager SetCropParameters
            Manager SetCropParameters
            Manager SetCropParameters
            Manager SetCropParameters
            Manager SetCropParameters
            Manager SetCropParameters
            Manager SetCropParameters
            Manager SetCropParameters
            Manager SetCropParameters
            Manager SetCropParameters
            Manager SetCropParameters
            Manager SetCropParameters
            Manager SetCropParameters
            Manager SetCropParameters
            Manager SetCropParameters
            Manager SetCropParameters
            Manager SetCropParameters
            Manager SetCropParameters
            Manager SetCropParameters
            Manager SetCropParameters
            Manager SetCropParameters
            Manager SetCropParameters
            Manager SetCropParameters
            Manager SetCropParameters
            Manager SetCropParameters
            Manager SetCropParameters
            Manager SetCropParameters
            Manager SetCropParameters
            Manager SetCropParameters
            Manager SetCropParameters
            Manager SetCropParameters
            Manager SetCropParameters
            Manager SetCropParameters
            Manager SetCropParameters
            Manager SetCropParameters
            Manager SetCropParameters
            Manager SetCropParameters
            Manager SetCropParameters
            Manager SetCropParameters
            Manager SetCropParameters
            Manager SetCropParameters
            Manager SetCropParameters
            Manager SetCropParameters
            Manager SetCropParameters
            Manager SetCropParameters
            Manager SetCropParameters
            Manager SetCropParameters
            Manager SetCropParameters
            Manager SetCropParameters
            Manager SetCropParameters
            Manager SetCropParameters
            Manager SetCropParameters
            Manager SetCropParameters
            Manager SetCropParameters
            Manager SetCropParameters
            Manager SetCropParameters
            Manager SetCropParameters
            Manager SetCropParameters
            Manager SetCropParameters
            Manager SetCropParameters
            Manager SetCropParameters
            Manager SetCropParameters
            Manager SetCropParameters
            Manager SetCropParameters
            Manager SetCropParameters
            Manager SetCropParameters
            Manager SetCropParameters
            Manager SetCropParameters
            Manager SetCropParameters
            Manager SetCropParameters
            Manager SetCropParameters
            Manager SetCropParameters
            Manager SetCropParameters
            Manager SetCropParameters
            Manager SetCropParameters
            Manager SetCropParameters
            Manager SetCropParameters
            Manager SetCropParameters
            Manager SetCropParameters
            Manager SetCropParameters
            Manager SetCropParameters
            Manager SetCropParameters
            Manager SetCropParameters
            Manager SetCropParameters
            Manager SetCropParameters
            Manager SetCropParameters
            Manager SetCropParameters
            Manager SetCropParameters
            Manager SetCropParameters
            Manager SetCropParameters
            Manager SetCropParameters
            Manager SetCropParameters
            Manager SetCropParameters
            Manager SetCropParameters
            Manager SetCropParameters
            Manager SetCropParameters
            Manager SetCropParameters
            Manager SetCropParameters
            Manager SetCropParameters
            Manager SetCropParameters
            Manager SetCropParameters
            Manager SetCropParameters
            Manager SetCropParameters
            Manager SetCropParameters
            Manager SetCropParameters
            Manager SetCropParameters
            Manager SetCropParameters
            Manager SetCropParameters
            Manager SetCropParameters
            Manager SetCropParameters
            Manager SetCropParameters
            Manager SetCropParameters
            Manager SetCropParameters
            Manager SetCropParameters
            Manager SetCropParameters
            Manager SetCropParameters
            Manager SetCropParameters
            Manager SetCropParameters
            Manager SetCropParameters
            Manager SetCropParameters
            Manager SetCropParameters
            Manager SetCropParameters
            Manager SetCropParameters
            Manager SetCropParameters
            Manager SetCropParameters
            Manager SetCropParameters
            Manager SetCropParameters
            Manager SetCropParameters
            Manager SetCropParameters
            Manager SetCropParameters
            Manager SetCropParameters
            Manager SetCropParameters
            Manager SetCropParameters
            Manager SetCropParameters
            Manager SetCropParameters
            Manager SetCropParameters
            Manager SetCropParameters
            Manager SetCropParameters
            Manager SetCropParameters
            Manager SetCropParameters
            Manager SetCropParameters
            Manager SetCropParameters
            Manager SetCropParameters
            Manager SetCropParameters
            Manager SetCropParameters
            Manager SetCropParameters
            Manager SetCropParameters
            Manager SetCropParameters
            Manager SetCropParameters
            Manager SetCropParameters
            Manager SetCropParameters
            Manager SetCropParameters
            Manager SetCropParameters
            Manager SetCropParameters
            Manager SetCropParameters
            Manager SetCropParameters
            Manager SetCropParameters
            Manager SetCropParameters
            Manager SetCropParameters
            Manager SetCropParameters
            Manager SetCropParameters
            Manager SetCropParameters
            Manager SetCropParameters
            Manager SetCropParameters
            Manager SetCropParameters
            Manager SetCropParameters
            Manager SetCropParameters
            Manager SetCropParameters
            Manager SetCropParameters
            Manager SetCropParameters
            Manager SetCropParameters
            Manager SetCropParameters
            Manager SetCropParameters
            Manager SetCropParameters
            Manager SetCropParameters
            Manager SetCropParameters
            Manager SetCropParameters
            Manager SetCropParameters
            Manager SetCropParameters
            Manager SetCropParameters
            Manager SetCropParameters
            Manager SetCropParameters
            Manager SetCropParameters
            Manager SetCropParameters
            Manager SetCropParameters
            Manager SetCropParameters
            Manager SetCropParameters
            Manager SetCropParameters
            Manager SetCropParameters
            Manager SetCropParameters
            Manager SetCropParameters
            Manager SetCropParameters
            Manager SetCropParameters
            Manager SetCropParameters
            Manager SetCropParameters
            Manager SetCropParameters
            Manager SetCropParameters
            Manager SetCropParameters
            Manager SetCropParameters
            Manager SetCropParameters
            Manager SetCropParameters
            Manager SetCropParameters
            Manager SetCropParameters
            Manager SetCropParameters
            Manager SetCropParameters
            Manager SetCropParameters
            Manager SetCropParameters
            Manager SetCropParameters
            Manager SetCropParameters
            Manager SetCropParameters
            Manager SetCropParameters
            Manager SetCropParameters
            Manager SetCropParameters
            Manager SetCropParameters
            Manager SetCropParameters
            Manager SetCropParameters
            Manager SetCropParameters
            Manager SetCropParameters
            Manager SetCropParameters
            Manager SetCropParameters
            Manager SetCropParameters
            Manager SetCropParameters
            Manager SetCropParameters
            Manager SetCropParameters
            Manager SetCropParameters
            Manager SetCropParameters
            Manager SetCropParameters
            Manager SetCropParameters
            Manager SetCropParameters
            Manager SetCropParameters
            Manager SetCropParameters
            Manager SetCropParameters
            Manager SetCropParameters
            Manager SetCropParameters
            Manager SetCropParameters
            Manager SetCropParameters
            Manager SetCropParameters
            Manager SetCropParameters
            Manager SetCropParameters
            Manager SetCropParameters
            Manager SetCropParameters
            Manager SetCropParameters
            Manager SetCropParameters
            Manager SetCropParameters
            Manager SetCropParameters
            Manager SetCropParameters
            Manager SetCropParameters
            Manager SetCropParameters
            Manager SetCropParameters
            Manager SetCropParameters
            Manager SetCropParameters
            Manager SetCropParameters
            Manager SetCropParameters
            Manager SetCropParameters
            Manager SetCropParameters
            Manager SetCropParameters
            Manager SetCropParameters
            Manager SetCropParameters
            Manager SetCropParameters
            Manager SetCropParameters
            Manager SetCropParameters
            Manager SetCropParameters
            Manager SetCropParameters
            Manager SetCropParameters
            Manager SetCropParameters
            Manager SetCropParameters
            Manager SetCropParameters
            Manager SetCropParameters
            Manager SetCropParameters
            Manager SetCropParameters
            Manager SetCropParameters
            Manager SetCropParameters
            Manager SetCropParameters
            Manager SetCropParameters
            Manager SetCropParameters
            Manager SetCropParameters
            Manager SetCropParameters
            Manager SetCropParameters
            Manager SetCropParameters
            Manager SetCropParameters
            Manager SetCropParameters
            Manager SetCropParameters
            Manager SetCropParameters
            Manager SetCropParameters
            Manager SetCropParameters
            Manager SetCropParameters
            Manager SetCropParameters
            Manager SetCropParameters
            Manager SetCropParameters
            Manager SetCropParameters
            Manager SetCropParameters
            Manager SetCropParameters
            Manager SetCropParameters
            Manager SetCropParameters
            Manager SetCropParameters
            Manager SetCropParameters
            Manager SetCropParameters
            Manager SetCropParameters
            Manager SetCropParameters
            Manager SetCropParameters
            Manager SetCropParameters
            Manager SetCropParameters
            Manager SetCropParameters
            Manager SetCropParameters
            Manager SetCropParameters
            Manager SetCropParameters
            Manager SetCropParameters
            Manager SetCropParameters
            Manager SetCropParameters
            Manager SetCropParameters
            Manager SetCropParameters
            Manager SetCropParameters
            Manager SetCropParameters
            Manager SetCropParameters
            Manager SetCropParameters
            Manager SetCropParameters
            Manager SetCropParameters
            Manager SetCropParameters
            Manager SetCropParameters
            Manager SetCropParameters
            Manager SetCropParameters
            Manager SetCropParameters
            Manager SetCropParameters
            Manager SetCropParameters
            Manager SetCropParameters
            Manager SetCropParameters
            Manager SetCropParameters
            Manager SetCropParameters
            Manager SetCropParameters
            Manager SetCropParameters
            Manager SetCropParameters
            Manager SetCropParameters
            Manager SetCropParameters
            Manager SetCropParameters
            Manager SetCropParameters
            Manager SetCropParameters
            Manager SetCropParameters
            Manager SetCropParameters
            Manager SetCropParameters
            Manager SetCropParameters
            Manager SetCropParameters
            Manager SetCropParameters
            Manager SetCropParameters
            Manager SetCropParameters
            Manager SetCropParameters
            Manager SetCropParameters
            Manager SetCropParameters
            Manager SetCropParameters
            Manager SetCropParameters
            Manager SetCropParameters
            Manager SetCropParameters
            Manager SetCropParameters
            Manager SetCropParameters
            Manager SetCropParameters
            Manager SetCropParameters
            Manager SetCropParameters
            Manager SetCropParameters
            Manager SetCropParameters
            Manager SetCropParameters
            Manager SetCropParameters
            Manager SetCropParameters
            Manager SetCropParameters
            Manager SetCropParameters
            Manager SetCropParameters
            Manager SetCropParameters
            Manager SetCropParameters
            Manager SetCropParameters
            Manager SetCropParameters
            Manager SetCropParameters
            Manager SetCropParameters
            Manager SetCropParameters
            Manager SetCropParameters
            Manager SetCropParameters
            Manager SetCropParameters
            Manager SetCropParameters
            Manager SetCropParameters
            Manager SetCropParameters
            Manager SetCropParameters
            Manager SetCropParameters
            Manager SetCropParameters
            Manager SetCropParameters
            Manager SetCropParameters
            Manager SetCropParameters
            Manager SetCropParameters
            Manager SetCropParameters
            Manager SetCropParameters
            Manager SetCropParameters
            Manager SetCropParameters
            Manager SetCropParameters
            Manager SetCropParameters
            Manager SetCropParameters
            Manager SetCropParameters
            Manager SetCropParameters
            Manager SetCropParameters
            Manager SetCropParameters
            Manager SetCropParameters
            Manager SetCropParameters
            Manager SetCropParameters
            Manager SetCropParameters
            Manager SetCropParameters
            Manager SetCropParameters
            Manager SetCropParameters
            Manager SetCropParameters
            Manager SetCropParameters
            Manager SetCropParameters
            Manager SetCropParameters
            Manager SetCropParameters
            Manager SetCropParameters
            Manager SetCropParameters
            Manager SetCropParameters
            Manager SetCropParameters
            Manager SetCropParameters
            Manager SetCropParameters
            Manager SetCropParameters
            Manager SetCropParameters
            Manager SetCropParameters
            Manager SetCropParameters
            Manager SetCropParameters
            Manager SetCropParameters
            Manager SetCropParameters
            Manager SetCropParameters
            Manager SetCropParameters
            Manager SetCropParameters
            Manager SetCropParameters
            Manager SetCropParameters
            Manager SetCropParameters
            Manager SetCropParameters
            Manager SetCropParameters
            Manager SetCropParameters
            Manager SetCropParameters
            Manager SetCropParameters
            Manager SetCropParameters
            Manager SetCropParameters
            Manager SetCropParameters
            Manager SetCropParameters
            Manager SetCropParameters
            Manager SetCropParameters
            Manager SetCropParameters
            Manager SetCropParameters
            Manager SetCropParameters
            Manager SetCropParameters
            Manager SetCropParameters
            Manager SetCropParameters
            Manager SetCropParameters
            Manager SetCropParameters
            Manager SetCropParameters
            Manager SetCropParameters
            Manager SetCropParameters
            Manager SetCropParameters
            Manager SetCropParameters
            Manager SetCropParameters
            Manager SetCropParameters
            Manager SetCropParameters
            Manager SetCropParameters
            Manager SetCropParameters
            Manager SetCropParameters
            Manager SetCropParameters
            Manager SetCropParameters
            Manager SetCropParameters
            Manager SetCropParameters
            Manager SetCropParameters
            Manager SetCropParameters
            Manager SetCropParameters
            Manager SetCropParameters
            Manager SetCropParameters
            Manager SetCropParameters
            Manager SetCropParameters
            Manager SetCropParameters
            Manager SetCropParameters
            Manager SetCropParameters
            Manager SetCropParameters
            Manager SetCropParameters
            Manager SetCropParameters
            Manager SetCropParameters
            Manager SetCropParameters
            Manager SetCropParameters
            Manager SetCropParameters
            Manager SetCropParameters
            Manager SetCropParameters
            Manager SetCropParameters
            Manager SetCropParameters
            Manager SetCropParameters
            Manager SetCropParameters
            Manager SetCropParameters
            Manager SetCropParameters
            Manager SetCropParameters
            Manager SetCropParameters
            Manager SetCropParameters
            Manager SetCropParameters
            Manager SetCropParameters
            Manager SetCropParameters
            Manager SetCropParameters
            Manager SetCropParameters
            Manager SetCropParameters
            Manager SetCropParameters
            Manager SetCropParameters
            Manager SetCropParameters
            Manager SetCropParameters
            Manager SetCropParameters
            Manager SetCropParameters
            Manager SetCropParameters
            Manager SetCropParameters
            Manager SetCropParameters
            Manager SetCropParameters
            Manager SetCropParameters
            Manager SetCropParameters
            Manager SetCropParameters
            Manager SetCropParameters
            Manager SetCropParameters
            Manager SetCropParameters
            Manager SetCropParameters
            Manager SetCropParameters
            Manager SetCropParameters
            Manager SetCropParameters
            Manager SetCropParameters
            Manager SetCropParameters
            Manager SetCropParameters
            Manager SetCropParameters
            Manager SetCropParameters
            Manager SetCropParameters
            Manager SetCropParameters
            Manager SetCropParameters
            Manager SetCropParameters
            Manager SetCropParameters
            Manager SetCropParameters
            Manager SetCropParameters
            Manager SetCropParameters
            Manager SetCropParameters
            Manager SetCropParameters
            Manager SetCropParameters
            Manager SetCropParameters
            Manager SetCropParameters
            Manager SetCropParameters
            Manager SetCropParameters
            Manager SetCropParameters
            Manager SetCropParameters
            Manager SetCropParameters
            Manager SetCropParameters
            Manager SetCropParameters
            Manager SetCropParameters
            Manager SetCropParameters
            Manager SetCropParameters
            Manager SetCropParameters
            Manager SetCropParameters
            Manager SetCropParameters
            Manager SetCropParameters
            Manager SetCropParameters
            Manager SetCropParameters
            Manager SetCropParameters
            Manager SetCropParameters
            Manager SetCropParameters
            Manager SetCropParameters
            Manager SetCropParameters
            Manager SetCropParameters
            Manager SetCropParameters
            Manager SetCropParameters
            Manager SetCropParameters
            Manager SetCropParameters
            Manager SetCropParameters
            Manager SetCropParameters
            Manager SetCropParameters
            Manager SetCropParameters
            Manager SetCropParameters
            Manager SetCropParameters
            Manager SetCropParameters
            Manager SetCropParameters
            Manager SetCropParameters
            Manager SetCropParameters
            Manager SetCropParameters
            Manager SetCropParameters
            Manager SetCropParameters
            Manager SetCropParameters
            Manager SetCropParameters
            Manager SetCropParameters
            Manager SetCropParameters
            Manager SetCropParameters
            Manager SetCropParameters
            Manager SetCropParameters
            Manager SetCropParameters
            Manager SetCropParameters
            Manager SetCropParameters
            Manager SetCropParameters
            Manager SetCropParameters
            Manager SetCropParameters
            Manager SetCropParameters
            Manager SetCropParameters
            Manager SetCropParameters
            Manager SetCropParameters
            Manager SetCropParameters
            Manager SetCropParameters
            Manager SetCropParameters
            Manager SetCropParameters
            Manager SetCropParameters
            Manager SetCropParameters
            Manager SetCropParameters
            Manager SetCropParameters
            Manager SetCropParameters
            Manager SetCropParameters
            Manager SetCropParameters
            Manager SetCropParameters
            Manager SetCropParameters
            Manager SetCropParameters
            Manager SetCropParameters
            Manager SetCropParameters
            Manager SetCropParameters
            Manager SetCropParameters
            Manager SetCropParameters
            Manager SetCropParameters
            Manager SetCropParameters
            Manager SetCropParameters
            Manager SetCropParameters
            Manager SetCropParameters
            Manager SetCropParameters
            Manager SetCropParameters
            Manager SetCropParameters
            Manager SetCropParameters
            Manager SetCropParameters
            Manager SetCropParameters
            Manager SetCropParameters
            Manager SetCropParameters
            Manager SetCropParameters
            Manager SetCropParameters
            Manager SetCropParameters
            Manager SetCropParameters
            Manager SetCropParameters
            Manager SetCropParameters
            Manager SetCropParameters
            Manager SetCropParameters
            Manager SetCropParameters
            Manager SetCropParameters
            Manager SetCropParameters
            Manager SetCropParameters
            Manager SetCropParameters
            Manager SetCropParameters
            Manager SetCropParameters
            Manager SetCropParameters
            Manager SetCropParameters
            Manager SetCropParameters
            Manager SetCropParameters
            Manager SetCropParameters
            Manager SetCropParameters
            Manager SetCropParameters
            Manager SetCropParameters
            Manager SetCropParameters
            Manager SetCropParameters
            Manager SetCropParameters
            Manager SetCropParameters
            Manager SetCropParameters
            Manager SetCropParameters
            Manager SetCropParameters
            Manager SetCropParameters
            Manager SetCropParameters
            Manager SetCropParameters
            Manager SetCropParameters
            Manager SetCropParameters
            Manager SetCropParameters
            Manager SetCropParameters
            Manager SetCropParameters
            Manager SetCropParameters
            Manager SetCropParameters
            Manager SetCropParameters
            Manager SetCropParameters
            Manager SetCropParameters
            Manager SetCropParameters
            Manager SetCropParameters
            Manager SetCropParameters
            Manager SetCropParameters
            Manager SetCropParameters
            Manager SetCropParameters
            Manager SetCropParameters
            Manager SetCropParameters
            Manager SetCropParameters
            Manager SetCropParameters
            Manager SetCropParameters
            Manager SetCropParameters
            Manager SetCropParameters
            Manager SetCropParameters
            Manager SetCropParameters
            Manager SetCropParameters
            Manager SetCropParameters
            Manager SetCropParameters
            Manager SetCropParameters
            Manager SetCropParameters
            Manager SetCropParameters
            Manager SetCropParameters
            Manager SetCropParameters
            Manager SetCropParameters
            Manager SetCropParameters
            Manager SetCropParameters
            Manager SetCropParameters
            Manager SetCropParameters
            Manager SetCropParameters
            Manager SetCropParameters
            Manager SetCropParameters
            Manager SetCropParameters
            Manager SetCropParameters
            Manager SetCropParameters
            Manager SetCropParameters
            Manager SetCropParameters
            Manager SetCropParameters
            Manager SetCropParameters
            Manager SetCropParameters
            Manager SetCropParameters
            Manager SetCropParameters
            Manager SetCropParameters
            Manager SetCropParameters
            Manager SetCropParameters
            Manager SetCropParameters
            Manager SetCropParameters
            Manager SetCropParameters
            Manager SetCropParameters
            Manager SetCropParameters
            Manager SetCropParameters
            Manager SetCropParameters
            Manager SetCropParameters
            Manager SetCropParameters
            Manager SetCropParameters
            Manager SetCropParameters
            Manager SetCropParameters
            Manager SetCropParameters
            Manager SetCropParameters
            Manager SetCropParameters
            Manager SetCropParameters
            Manager SetCropParameters
            Manager SetCropParameters
            Manager SetCropParameters
            Manager SetCropParameters
            Manager SetCropParameters
            Manager SetCropParameters
            Manager SetCropParameters
            Manager SetCropParameters
            Manager SetCropParameters
            Manager SetCropParameters
            Manager SetCropParameters
            Manager SetCropParameters
            Manager SetCropParameters
            Manager SetCropParameters
            Manager SetCropParameters
            Manager SetCropParameters
            Manager SetCropParameters
            Manager SetCropParameters
            Manager SetCropParameters
            Manager SetCropParameters
            Manager SetCropParameters
            Manager SetCropParameters
            Manager SetCropParameters
            Manager SetCropParameters
            Manager SetCropParameters
            Manager SetCropParameters
            Manager SetCropParameters
            Manager SetCropParameters
            Manager SetCropParameters
            Manager SetCropParameters
            Manager SetCropParameters
            Manager SetCropParameters
            Manager SetCropParameters
            Manager SetCropParameters
            Manager SetCropParameters
            Manager SetCropParameters
            Manager SetCropParameters
            Manager SetCropParameters
            Manager SetCropParameters
            Manager SetCropParameters
            Manager SetCropParameters
            Manager SetCropParameters
            Manager SetCropParameters
            Manager SetCropParameters
            Manager SetCropParameters
            Manager SetCropParameters
            Manager SetCropParameters
            Manager SetCropParameters
            Manager SetCropParameters
            Manager SetCropParameters
            Manager SetCropParameters
            Manager SetCropParameters
            Manager SetCropParameters
            Manager SetCropParameters
            Manager SetCropParameters
            Manager SetCropParameters
            Manager SetCropParameters
            Manager SetCropParameters
            Manager SetCropParameters
            Manager SetCropParameters
            Manager SetCropParameters
            Manager SetCropParameters
            Manager SetCropParameters
            Manager SetCropParameters
            Manager SetCropParameters
            Manager SetCropParameters
            Manager SetCropParameters
            Manager SetCropParameters
            Manager SetCropParameters
            Manager SetCropParameters
            Manager SetCropParameters
            Manager SetCropParameters
            Manager SetCropParameters
            Manager SetCropParameters
            Manager SetCropParameters
            Manager SetCropParameters
            Manager SetCropParameters
            Manager SetCropParameters
            Manager SetCropParameters
            Manager SetCropParameters
            Manager SetCropParameters
            Manager SetCropParameters
            Manager SetCropParameters
            Manager SetCropParameters
            Manager SetCropParameters
            Manager SetCropParameters
            Manager SetCropParameters
            Manager SetCropParameters
            Manager SetCropParameters
            Manager SetCropParameters
            Manager SetCropParameters
            Manager SetCropParameters
            Manager SetCropParameters
            Manager SetCropParameters
            Manager SetCropParameters
            Manager SetCropParameters
            Manager SetCropParameters
            Manager SetCropParameters
            Manager SetCropParameters
            Manager SetCropParameters
            Manager SetCropParameters
            Manager SetCropParameters
            Manager SetCropParameters
            Manager SetCropParameters
            Manager SetCropParameters
            Manager SetCropParameters
            Manager SetCropParameters
            Manager SetCropParameters
            Manager SetCropParameters
            Manager SetCropParameters
            Manager SetCropParameters
            Manager SetCropParameters
            Manager SetCropParameters
            Manager SetCropParameters
            Manager SetCropParameters
            Manager SetCropParameters
            Manager SetCropParameters
            Manager SetCropParameters
            Manager SetCropParameters
            Manager SetCropParameters
            Manager SetCropParameters
            Manager SetCropParameters
            Manager SetCropParameters
            Manager SetCropParameters
            Manager SetCropParameters
            Manager SetCropParameters
            Manager SetCropParameters
            Manager SetCropParameters
            Manager SetCropParameters
            Manager SetCropParameters
            Manager SetCropParameters
            Manager SetCropParameters
            Manager SetCropParameters
            Manager SetCropParameters
            Manager SetCropParameters
            Manager SetCropParameters
            Manager SetCropParameters
            Manager SetCropParameters
            Manager SetCropParameters
            Manager SetCropParameters
            Manager SetCropParameters
            Manager SetCropParameters
            Manager SetCropParameters
            Manager SetCropParameters
            Manager SetCropParameters
            Manager SetCropParameters
            Manager SetCropParameters
            Manager SetCropParameters
            Manager SetCropParameters
            Manager SetCropParameters
            Manager SetCropParameters
            Manager SetCropParameters
            Manager SetCropParameters
            Manager SetCropParameters
            Manager SetCropParameters
            Manager SetCropParameters
            Manager SetCropParameters
            Manager SetCropParameters
            Manager SetCropParameters
            Manager SetCropParameters
            Manager SetCropParameters
            Manager SetCropParameters
            Manager SetCropParameters
            Manager SetCropParameters
            Manager SetCropParameters
            Manager SetCropParameters
            Manager SetCropParameters
            Manager SetCropParameters
            Manager SetCropParameters
            Manager SetCropParameters
            Manager SetCropParameters
            Manager SetCropParameters
            Manager SetCropParameters
            Manager SetCropParameters
            Manager SetCropParameters
          SoilArbitrator Soil Arbitrator
          Manager LocationInfo: same as Validation.New Zealand.Leeston2013.Leeston2013Base.LocationInfo
        Memo Leaf Size Predictions
          This graph shows different leaf size profiles measured for winter wheat sown on a range of different dates.  Leaves that emerge during cooler conditions achieve a smallter maximum size than the equivelent leaf appearanign in warm conditions.
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