Simulations: Version=131
  Memo TitlePage
    # The APSIM Wheat Model

    _Brown, H.E., Huth, N.I. and Holzworth, D.P._
  Memo Introduction
    The APSIM wheat model has been developed using the Plant Modelling Framework (PMF) of [brown_plant_2014]. This new framework provides a library of plant organ and process submodels that can be coupled, at runtime, to construct a model in much the same way that models can be coupled to construct a simulation. This means that dynamic composition of lower level process and organ classes (e.g. photosynthesis, leaf) into larger constructions (e.g. maize, wheat, sorghum) can be achieved by the model developer without additional coding.

    The wheat model consists of:

    * a phenology model to simulate development through sequential developmental phases
    * a structure model to simulate plant morphology
    * a collection of organs to simulate the various plant parts
    * an arbitrator to allocate resources (N, biomass) to the various plant organs

    This work builds upon earlier APSIM Wheat models such as NWheat ([Asseng200225], [KeatingNWheat]), NWheatS ([Asseng1998163]), Cropmod-Wheat ([Wang2002GenericCropModel]), and the earlier versions developed in Plant (<a href=\"http://www.apsim.info/Documentation/Model,CropandSoil/CropModuleDocumentation/Wheat.aspx">APSIM Wheat 7.5</a>") and then within the Plant Modelling Framework ([brown_plant_2014]).
  Replacements
    Report HarvestReport: EventNames=[Wheat].Harvesting
      VariableNames:
        [Clock].Today
        [Wheat].SowingDate
        [Wheat].SowingData.Cultivar
        [Wheat].Phenology.CurrentPhase.Name
        [Wheat].Phenology.CurrentStageName
        [Wheat].Phenology.EmergenceDAS
        [Wheat].Phenology.TerminalSpikeletDAS
        [Wheat].Phenology.FlagLeafDAS
        [Wheat].Phenology.HeadingDAS
        [Wheat].Phenology.FloweringDAS
        [Wheat].Phenology.MaturityDAS
        [Wheat].Grain.Wt
        [Wheat].Grain.N
        [Wheat].Grain.Number
        [Wheat].Grain.Size
        [Wheat].Grain.Nconc
        [Wheat].AboveGround.Wt
        [Wheat].AboveGround.N
        [Wheat].Grain.Protein
        [Wheat].Grain.Size
        [Wheat].Phenology.FinalLeafNumber
        [Wheat].Structure.MainStemPopn
        [Wheat].SowingData.Cultivar
        [Wheat].SowingDate.DayOfYear
        [Wheat].Leaf.CohortMaxSize
        [Clock].StartDate
        ([Wheat].Phenology.FloweringDAS - [Wheat].Phenology.EmergenceDAS) as FloweringDAE
        [IWeather].Latitude
        [IWeather].Longitude
        [IWeather].FileName
        [IWeather].CO2
        [IWeather].Amp
        [IWeather].Tav
        [LocationInfo].Script.Country
        [LocationInfo].Script.State
        [LocationInfo].Script.Region
    Report DailyReport: EventNames=[Clock].DoReport
      VariableNames:
        [Clock].Today
        [Soil].SoilWater.SW
        sum([Soil].SoilWater.SWmm) as ProfileWater
        sum([Soil].Nutrient.NO3.kgha) as TotalNO3
        [IWeather].Radn
        [IWeather].MeanT
        [Wheat].AboveGround.N
        [Wheat].AboveGround.Wt
        [Wheat].AboveGroundLive.N
        [Wheat].AboveGroundLive.Wt
        [Wheat].AboveGroundDead.N
        [Wheat].AboveGroundDead.Wt
        [Wheat].Ear.N
        [Wheat].Ear.Nconc
        [Wheat].Ear.Wt
        [Wheat].Grain.N
        [Wheat].Grain.NConc
        [Wheat].Grain.Number
        [Wheat].Grain.Size
        [Wheat].Grain.Wt
        [Wheat].Leaf.AppearedCohortNo
        [Wheat].Leaf.CoverGreen
        [Wheat].Leaf.CoverTotal
        [Wheat].Leaf.Dead.N
        [Wheat].Leaf.Dead.NConc
        [Wheat].Leaf.Dead.Wt
        [Wheat].Leaf.DeadCohortNo
        [Wheat].Leaf.SenescingCohortNo
        [Wheat].Leaf.ExpandedCohortNo
        [Wheat].Leaf.Fn
        [Wheat].Leaf.Fw
        [Wheat].Leaf.Height
        [Wheat].Leaf.InitialisedCohortNo
        [Wheat].Leaf.LAI
        [Wheat].Leaf.Live.N
        [Wheat].Leaf.Live.NConc
        [Wheat].Leaf.Live.Wt
        [Wheat].Leaf.SpecificArea
        [Wheat].Leaf.SpecificNitrogen
        [Wheat].Leaf.Transpiration
        [Wheat].Phenology.CurrentPhase.Name
        [Wheat].Phenology.CurrentStageName
        [Wheat].Phenology.EmergenceDAS
        [Wheat].Phenology.Stage
        [Wheat].Phenology.ThermalTime
        [Wheat].Phenology.Zadok.Stage
        [Wheat].Root.Depth
        [Wheat].Root.N
        [Wheat].Root.Wt
        [Wheat].Root.Nconc
        [Wheat].Spike.N
        [Wheat].Spike.NConc
        [Wheat].Spike.Wt
        [Wheat].Stem.N
        [Wheat].Stem.NConc
        [Wheat].Stem.Wt
        [Wheat].StemPlusSpike.Wt
        [Wheat].StemPlusSpike.N
        [Wheat].SowingData.Cultivar
        [Wheat].Phenology.HaunStage
        [Wheat].Phenology.HaunStage
        [Wheat].Structure.Height
        [Wheat].Structure.LeafTipsAppeared
        [Wheat].Structure.FinalLeafNumber
        [Wheat].Structure.MainStemPopn
        [Wheat].Structure.TotalStemPopn
        [Wheat].Phenology.PTQ
        [Wheat].Structure.Phyllochron
        [Wheat].Total.N
        [Wheat].Total.Wt
        ([Wheat].Leaf.Transpiration + [Soil].SoilWater.Es + [MicroClimate].PrecipitationInterception) as ET
        [IWeather].MeanT
        [Wheat].Phenology.Photoperiod
        [Wheat].Phenology.AccumulatedTT
    Manager MaxLeafSize
```csharp
using Models.PMF.Struct;
using System;
using System.Collections.Generic;
using System.Xml.Serialization;
using Models.Core;
using Models.Interfaces;
using Models.PMF;
using Models.PMF.Organs;
using Models.Soils.Arbitrator;
using APSIM.Shared.Utilities;



namespace Models
{
    [Serializable] 
    public class Script : Model
    {
        [Link] private Clock Clock;
        [Link] private Plant Wheat;
        public  event EventHandler LeafReport;
        [Link(Type = LinkType.Path, Path = "[Wheat].Structure")]
        private Structure structure;
        
        
        [XmlIgnore] public int LeafPosition { get; set; }
        [XmlIgnore] public double MaxLeafSize { get; set; }
        
        [EventSubscribe("DoManagement")]
        private void OnDoManagement(object sender, EventArgs e)
        {
            var leaf = Wheat.Leaf as Leaf;
            if ((leaf.ExpandedCohortNo > LeafPosition) & (structure.NextLeafProportion == 1))
            {
                LeafPosition = (int)
                leaf.ExpandedCohortNo;
                MaxLeafSize = leaf.CohortSize[LeafPosition - 1];
                LeafReport.Invoke(this, new EventArgs());
            }
        }
    }
}
```
    Report MaxLeafSizeReport: EventNames=[MaxLeafSize].Script.LeafReport
      VariableNames:
        [MaxLeafSize].Script.MaxLeafSize
        [MaxLeafSize].Script.LeafPosition
    Manager Harvesting
```csharp
using Models.PMF.Phen;
using APSIM.Shared.Utilities;
using System.Xml.Serialization;
using Models;
using Models.PMF;
using Models.Soils;
using System.Text;
using System.Collections.Generic;
using Models.Core;
using System;
using Models.Soils.Nutrients;

namespace Models
{
    [Serializable] 
    public class Script : Model
    {
        [Link] private Plant Wheat;
        [Link] private Simulation sim;
        [Link] private Clock clock;
        [Link(Type = LinkType.Path, Path = "[Wheat].Phenology")]
        private Phenology phenology;

        [EventSubscribe("DoManagement")]
        private void OnDoManagement(object sender, EventArgs e)
        {
            if (phenology.CurrentPhase.Name == "Maturing")
            {
                Wheat.Harvest();
                Wheat.EndCrop();
                sim.Set("Clock.EndDate", clock.Today.AddDays(1));  
            }
        }

        [EventSubscribe("EndOfDay")]
        private void OnEndOfDay(object sender, EventArgs e)
        {
        	if ((clock.Today.Equals(clock.EndDate))&&(Wheat.IsAlive))
        	{
        		Wheat.Harvest();
                Wheat.EndCrop();
                sim.Set("Clock.EndDate", clock.Today);  
        	}
        }

    }
}
```
    Report SowingReport: EventNames=[Wheat].Sowing
      VariableNames:
        [Clock].Today
        [Wheat].SowingData.Cultivar
        [IWeather].Latitude
        [IWeather].Longitude
        [LocationInfo].Script.Country
        [LocationInfo].Script.State
        [LocationInfo].Script.Region
    Manager SetCropParameters
```csharp
using Models.Core;
using System;
namespace Models
{
	[Serializable]
    public class Script : Model
    {
        [Link] Zone zone;
        [EventSubscribe("Sowing")]
        private void OnSowing(object sender, EventArgs e)
     {
        object Pval = 0; 
             Pval =130.0;
         zone.Set("[Phenology].Phyllochron.BasePhyllochron.FixedValue", Pval);  
         Pval =1.0;
         zone.Set("[Phenology].PhyllochronPpSensitivity.FixedValue", Pval);  

}
}
  }
```
  DataStore
    ExcelInput ExcelMultiInput: SheetNames=[Observed, MaxLeafSize]
      FileNames=[Observed.xlsx, LaTrobeCE_Obs.xlsx, LincolnCE_Obs.xlsx, PalmerstonNorthCE_Obs.xlsx, Gatton2014_2016.xlsx, 2020Results.xlsx, PalmerstonNorth1989.xlsx, Obs_APSIMX_NPIField2019_Wheat.xlsx, NPIValidation.xlsx]
    PredictedObserved HarvestObsPred: PredictedTableName=HarvestReport; ObservedTableName=Observed; FieldNameUsedForMatch=Wheat.Phenology.CurrentStageName; AllColumns=false
      Tests: POName=HarvestObsPred
        AcceptedStats:
          Name                                  n    Slope    Intercept   SEslope  SEintercept  R2      RMSE       NSE       ME         MAE        RSR
          Wheat.AboveGround.N                   67   1.1281   -1.0027     0.0392   0.5258       0.9273  2.0915     0.8756    0.5401     1.5961     0.3501
          Wheat.AboveGround.Wt                  211  1.0191   34.1751     0.0203   28.6588      0.9235  188.6633   0.9044    58.5184    140.4534   0.3084
          Wheat.Grain.N                         135  1.0764   -0.2577     0.0363   0.353        0.8687  1.7988     0.8089    0.4157     1.3672     0.4356
          Wheat.Grain.Nconc                     136  0.5255   0.0109      0.0578   0.0013       0.3814  0.0033     0.316     0.0004     0.0025     0.824
          Wheat.Grain.Number                    195  0.8192   2260.0622   0.0213   308.9591     0.8841  2247.7059  0.8792    -81.8409   1634.738   0.3467
          Wheat.Grain.Protein                   114  0.4242   7.8556      0.0562   0.7265       0.3369  2.1044     0.2639    0.5506     1.5713     0.8542
          Wheat.Grain.Wt                        233  0.9787   11.017      0.0293   15.5104      0.8289  103.6443   0.8018    0.8793     78.6576    0.4443
          Wheat.Leaf.CohortMaxSize(1)           10   0.0271   255.5628    0.0328   7.4865       0.0785  51.271     -0.9261   36.4016    40.5202    1.3166
          Wheat.Leaf.CohortMaxSize(10)          10   1.1192   -412.4658   0.2567   521.3619     0.7037  224.5544   -0.3009   -171.5696  207.903    1.0821
          Wheat.Leaf.CohortMaxSize(11)          10   0.8252   365.9051    0.2667   598.0829     0.5447  196.6006   0.3916    -23.5263   115.2236   0.74
          Wheat.Leaf.CohortMaxSize(12)          10   0.8484   253.8013    0.2239   493.9545     0.6422  151.7447   0.4167    -79.2873   105.9173   0.7245
          Wheat.Leaf.CohortMaxSize(13)          10   1.0971   -403.5291   1.0179   2346.6903    0.1268  703.8258   -7.8849   -180.8866  351.0707   2.8278
          Wheat.Leaf.CohortMaxSize(14)          10   1.3068   -642.3512   0.4293   1019.7107    0.5366  603.245    -0.591    71.3164    415.854    1.1966
          Wheat.Leaf.CohortMaxSize(15)          9    -0.2603  2713.4138   0.1599   364.7796     0.2745  585.9458   -0.8307   -109.0765  515.0564   1.2757
          Wheat.Leaf.CohortMaxSize(16)          3    -0.6458  2788.839    7.9582   13511.0796   0.0065  1245.8199  -65.0428  6.0116     1116.2116  6.6354
          Wheat.Leaf.CohortMaxSize(17)          2    3.1965   -3522.2732  0        0            1       590.0246   -4.4353   -197.7712  555.8917   1.6485
          Wheat.Leaf.CohortMaxSize(18)          1    -        -           -        -            -       985.2673   -         985.2673   985.2673   -
          Wheat.Leaf.CohortMaxSize(2)           10   0.0631   275.1973    0.2926   121.589      0.0058  139.0814   -3.0058   -108.6107  115.3879   1.8988
          Wheat.Leaf.CohortMaxSize(3)           10   0.2893   221.1252    0.2704   144.318      0.1252  181.9224   -2.6244   -152.1317  163.3331   1.8061
          Wheat.Leaf.CohortMaxSize(4)           10   0.3456   263.167     0.3452   223.3415     0.1114  208.3794   -1.9918   -152.8835  173.8667   1.6409
          Wheat.Leaf.CohortMaxSize(5)           10   0.2493   458.154     0.277    225.5301     0.0919  229.9747   -0.8686   -139.8561  146.9018   1.2968
          Wheat.Leaf.CohortMaxSize(6)           10   0.3459   476.527     0.1957   187.6237     0.2809  242.4141   -0.0369   -130.9778  145.4772   0.966
          Wheat.Leaf.CohortMaxSize(7)           10   0.4419   501.9871    0.1428   157.1844     0.545   176.9862   0.2961    -101.0414  122.714    0.7959
          Wheat.Leaf.CohortMaxSize(8)           10   0.5898   515.86      0.1792   229.5818     0.5752  169.2913   0.5748    1.1771     117.5918   0.6186
          Wheat.Leaf.CohortMaxSize(9)           10   0.7931   300.5148    0.328    507.5624     0.4223  241.9158   0.093     -15.3812   161.5822   0.9035
          Wheat.Phenology.FlagLeafDAS.Value()   255  0.9741   6.2948      0.0098   1.3598       0.9751  8.032      0.9712    2.9216     5.8706     0.1692
          Wheat.Phenology.FloweringDAS.Value()  299  0.9436   8.3564      0.0071   1.1022       0.9837  6.9878     0.982     0.0602     4.9365     0.1338
        AcceptedStatsName=Name n Slope Intercept SEslope SEintercept R2 RMSE NSE ME MAE RSR
    PredictedObserved DailyObsPred: PredictedTableName=DailyReport; ObservedTableName=Observed; FieldNameUsedForMatch=Clock.Today; AllColumns=false
      Tests: POName=DailyObsPred
        AcceptedStats:
          Name                   n     Slope    Intercept  SEslope  SEintercept  R2      RMSE     NSE      ME       MAE     RSR
          ET                     123   1.1317   -0.4285    0.0437   0.1696       0.8471  0.7571   0.7507   0.0417   0.5582  0.4973
          ProfileWater           1327  0.8766   76.0389    0.013    5.4795       0.7738  58.7876  0.7027   25.8355  33.06   0.545
          Soil.SoilWater.SW(1)   1300  0.0002   0.2093     0.0001   0.0022       0.0021  18.9789  -0.081   -5.2076  5.2855  1.0393
          Soil.SoilWater.SW(10)  8     -0.4112  0.6124     0.2042   0.0875       0.4033  0.0114   -3.1581  0.0077   0.0092  1.9074
          Soil.SoilWater.SW(2)   1323  -0.0001  0.2371     0.0001   0.0019       0.001   23.4358  -0.0849  -6.5481  6.6005  1.0412
          Soil.SoilWater.SW(3)   1323  0.0001   0.2258     0.0001   0.0019       0.0009  29.1595  -0.0857  -8.1994  8.2209  1.0416
          Soil.SoilWater.SW(4)   1323  0.0003   0.2098     0.0001   0.0018       0.0239  31.9313  -0.0848  -8.9594  8.9769  1.0411
          Soil.SoilWater.SW(5)   1323  0.0002   0.2442     0.0001   0.0018       0.0086  33.0939  -0.0857  -9.3154  9.3309  1.0416
          Soil.SoilWater.SW(6)   1218  0.9832   0.0067     0.0058   0.0017       0.9594  0.0169   0.9582   0.002    0.0089  0.2045
          Soil.SoilWater.SW(7)   1194  0.9958   0.0014     0.0055   0.0014       0.9652  0.0121   0.9642   0.0004   0.0067  0.1892
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        AcceptedStatsName=Name n Slope Intercept SEslope SEintercept R2 RMSE NSE ME MAE RSR
  Folder Validation
    Memo
      A test dataset has been developed to test the APSIM Wheat model for a range of environmental (soil and climate) conditions, management options (sowing dates, populations, nitrogen rates, row spacing, irrigation), genetic backgrounds (different regions, cultivar types) and for special considerations such as crop damage.  These tests have been grouped into various geographical regions to allow the user to evaluate the suitability of the model for their particular region of interest.  Graphs of model performance are provided for yield, biomass production, canopy development, phenological development, water and nitrogen uptake, and grain yield components.
    Folder New Zealand
      Experiment Lincoln2014
        Memo
          This is a water response trial run in the rain out shelter at Plant and Food Research in Lincoln, New Zealand.  It is described in full by [Chakwizira_wheat_2014] but briefly.  An Autumn crop of 'Wakanui' wheat was sown at 165 plants/m^2^ on the 28th of March 2013 and 6 irrigation timing treatments were applied:

          1. Full irrigation where measured ET was replaced weekly
          .
          2. Nill irrigation.
          3. Very Early Drought where irrigation was withheld from sowing until the beginning of stem extension.
          4. Early Drought where irrigation was withheld between Flag leaf and the beginning of grain fill.
          5. Middle Drought where irrigation was withheld between Flag leaf and 1 week into grain fill.
          6. Late Drought where irrigation was withheld from heading until harvest.

          Irrigation was applied at weekly intervals through and assemply of low rate drip emitters on each plot.  Soil water content was measured weekly with a neutron probe and biomass was measured on 5 occasions throughout the crop.  Samples throughtout the crop were from a 0.43m^2^ quatrant and the final harvest sample was from a 1 m^2^ quadrant.  Each treatment was replicated four times and there was considerable soil variation from plot to plot so each treatment was initianilised with unique soil parameters which best described the soil they were growing on.
        Factors
          Factor Irrig
            CompositeFactor Full
              Specifications:
                [IrrigationEvents]
                [Physical]
                [Sample]
              Operations IrrigationEvents
                2013-05-14  [Irrigation].Apply(25);
                2013-05-29  [Irrigation].Apply(9.2);
                2013-06-11  [Irrigation].Apply(12);
                2013-09-16  [Irrigation].Apply(34.6);
                2013-09-25  [Irrigation].Apply(46.3);
                2013-10-01  [Irrigation].Apply(19.3);
                2013-10-08  [Irrigation].Apply(24.9);
                2013-10-15  [Irrigation].Apply(21);
                2013-10-22  [Irrigation].Apply(39);
                2013-10-29  [Irrigation].Apply(44,1);
                2013-11-05  [Irrigation].Apply(40,1);
                2013-11-12  [Irrigation].Apply(35,1);
                2013-11-19  [Irrigation].Apply(33,1);
                2013-11-26  [Irrigation].Apply(32,1);
                2013-12-03  [Irrigation].Apply(35,1);
                2013-12-10  [Irrigation].Apply(49,1);
                2013-12-17  [Irrigation].Apply(47,1);
                2013-12-24  [Irrigation].Apply(0);
                2013-12-31  [Irrigation].Apply(0);
                2013-09-10  [Irrigation].Apply(5);
              Physical
                Thickness  BD     AirDry  LL15  DUL   SAT
                200        1      0.05    0.1   0.32  0.42
                200        1.324  0.12    0.15  0.3   0.41
                200        1.35   0.1     0.1   0.28  0.37
                200        1.301  0.08    0.08  0.31  0.37
                200        1.301  0.06    0.07  0.27  0.33
                200        1.301  0.06    0.08  0.25  0.32
                200        1.301  0.1     0.1   0.21  0.3
                200        1.301  0.1     0.1   0.23  0.31
                200        1.3    0.1     0.1   0.23  0.31
                200        1.3    0.1     0.1   0.23  0.31
                SoilCrop WheatSoil
                  LL=[0.1, 0.12, 0.1, 0.08, 0.06, 0.08, 0.1, 0.1, 0.1, 0.1]
                  KL=[0.06, 0.03, 0.03, 0.03, 0.03, 0.03, 0.03, 0.02, 0.02, 0.02]
                  XF=[1, 1, 1, 1, 1, 1, 1, 1, 1, 1]
              Sample: Thickness=[200, 200, 200, 200, 200, 200, 200, 200]; SWUnits=Volumetric; OCUnits=Total; PHUnits=Water
                SW=[0.32, 0.2782, 0.276, 0.2502, 0.2507, 0.2398, 0.1892, 0.1962]
            CompositeFactor Nil
              Specifications:
                [IrrigationEvents]
                [Physical]
                [Sample]
              Physical
                Thickness  BD     AirDry  LL15  DUL   SAT
                200        1      0.06    0.1   0.32  0.36
                200        1.324  0.11    0.11  0.29  0.36
                200        1.35   0.08    0.08  0.28  0.4
                200        1.301  0.05    0.05  0.25  0.33
                200        1.301  0.07    0.07  0.3   0.33
                200        1.301  0.1     0.1   0.3   0.32
                200        1.301  0.1     0.1   0.23  0.3
                200        1.301  0.08    0.08  0.22  0.31
                200        1.3    0.08    0.08  0.22  0.31
                200        1.3    0.08    0.08  0.22  0.31
                SoilCrop WheatSoil
                  LL=[0.1, 0.11, 0.09, 0.05, 0.07, 0.1, 0.1, 0.11, 0.11, 0.11]
                  KL=[0.06, 0.03, 0.03, 0.03, 0.03, 0.03, 0.03, 0.02, 0.02, 0.02]
                  XF=[1, 1, 1, 1, 1, 1, 1, 1, 1, 1]
              Operations IrrigationEvents
                2013-09-16  [Irrigation].Apply(4.6);
                2013-09-25  [Irrigation].Apply(3.5);
                2013-09-10  [Irrigation].Apply(5);
                2013-09-10  [Irrigation].Apply(5);
              Sample: Thickness=[200, 200, 200, 200, 200, 200, 200, 200, 200, 200]; SWUnits=Volumetric; OCUnits=Total; PHUnits=Water
                SW=[0.32, 0.2825, 0.2638, 0.2062, 0.2425, 0.2425, 0.1882, 0.1822, 0.182, 0.182]
            CompositeFactor VeryEarly
              Specifications:
                [IrrigationEvents]
                [Physical]
                [Sample]
              Physical
                Thickness  BD     AirDry  LL15  DUL   SAT
                200        1      0.06    0.06  0.32  0.419
                200        1.324  0.12    0.12  0.29  0.405
                200        1.35   0.09    0.09  0.28  0.37
                200        1.301  0.08    0.08  0.27  0.37
                200        1.301  0.06    0.07  0.3   0.33
                200        1.301  0.06    0.08  0.25  0.32
                200        1.301  0.1     0.1   0.23  0.3
                200        1.301  0.1     0.1   0.21  0.31
                200        1.3    0.1     0.1   0.21  0.31
                200        1.3    0.1     0.1   0.21  0.31
                SoilCrop WheatSoil
                  LL=[0.06, 0.12, 0.09, 0.08, 0.07, 0.08, 0.1, 0.1, 0.1, 0.1]
                  KL=[0.06, 0.03, 0.03, 0.03, 0.03, 0.03, 0.03, 0.02, 0.02, 0.02]
                  XF=[1, 1, 1, 1, 1, 1, 1, 1, 1, 1]
              Operations IrrigationEvents
                2013-09-16  [Irrigation].Apply(4.6);
                2013-09-25  [Irrigation].Apply(3.5);
                2013-11-19  [Irrigation].Apply(33,1);
                2013-11-26  [Irrigation].Apply(32,1);
                2013-12-03  [Irrigation].Apply(35,18);
                2013-12-10  [Irrigation].Apply(49,1);
                2013-12-17  [Irrigation].Apply(47,1);
                2013-12-24  [Irrigation].Apply(49,1);
                2013-09-10  [Irrigation].Apply(5);
              Sample: Thickness=[200, 200, 200, 200, 200, 200, 200, 200]; SWUnits=Volumetric; OCUnits=Total; PHUnits=Water
                SW=[0.32, 0.2865, 0.276, 0.2745, 0.2912, 0.2228, 0.2037, 0.1818]
            CompositeFactor Early
              Specifications:
                [IrrigationEvents]
                [Physical]
                [Sample]
              Physical
                Thickness  BD     AirDry  LL15  DUL   SAT
                200        1      0.05    0.06  0.32  0.42
                200        1.324  0.1     0.1   0.3   0.405
                200        1.35   0.1     0.1   0.3   0.37
                200        1.301  0.08    0.08  0.3   0.37
                200        1.301  0.07    0.07  0.32  0.33
                200        1.301  0.08    0.08  0.3   0.32
                200        1.301  0.08    0.08  0.21  0.3
                200        1.301  0.08    0.08  0.21  0.31
                200        1.3    0.08    0.08  0.21  0.31
                200        1.3    0.08    0.08  0.21  0.31
                SoilCrop WheatSoil
                  LL=[0.06, 0.1, 0.1, 0.08, 0.07, 0.08, 0.08, 0.08, 0.08, 0.08]
                  KL=[0.06, 0.03, 0.03, 0.03, 0.03, 0.03, 0.03, 0.02, 0.02, 0.02]
                  XF=[1, 1, 1, 1, 1, 1, 1, 1, 1, 1]
              Operations IrrigationEvents
                2013-05-14  [Irrigation].Apply(25);
                2013-05-29  [Irrigation].Apply(9.2);
                2013-06-11  [Irrigation].Apply(12);
                2013-09-16  [Irrigation].Apply(34.6);
                2013-09-25  [Irrigation].Apply(46.5);
                2013-12-10  [Irrigation].Apply(49,1);
                2013-12-17  [Irrigation].Apply(47,1);
                2013-12-24  [Irrigation].Apply(49,1);
                2013-12-31  [Irrigation].Apply(20.3,1);
                2013-12-24  [Irrigation].Apply(49,1);
                2013-12-31  [Irrigation].Apply(20.3,1);
                2013-09-10  [Irrigation].Apply(5);
              Sample: Thickness=[200, 200, 200, 200, 200, 200, 200, 200]; SWUnits=Volumetric; OCUnits=Total; PHUnits=Water
                SW=[0.32, 0.278, 0.2695, 0.2698, 0.2572, 0.2442, 0.1508, 0.1605]
            CompositeFactor Middle
              Specifications:
                [IrrigationEvents]
                [Physical]
                [Sample]
              Physical
                Thickness  BD     AirDry  LL15  DUL   SAT
                200        1      0.06    0.06  0.32  0.419
                200        1.324  0.12    0.12  0.3   0.405
                200        1.35   0.09    0.09  0.29  0.37
                200        1.301  0.05    0.05  0.3   0.37
                200        1.301  0.05    0.05  0.25  0.33
                200        1.301  0.05    0.05  0.24  0.32
                200        1.301  0.12    0.12  0.26  0.3
                200        1.301  0.1     0.1   0.26  0.31
                200        1.3    0.1     0.1   0.26  0.31
                200        1.3    0.1     0.1   0.26  0.31
                SoilCrop WheatSoil
                  LL=[0.06, 0.12, 0.09, 0.05, 0.05, 0.05, 0.12, 0.1, 0.1, 0.1]
                  KL=[0.06, 0.03, 0.03, 0.03, 0.03, 0.03, 0.03, 0.02, 0.02, 0.02]
                  XF=[1, 1, 1, 1, 1, 1, 1, 1, 1, 1]
              Operations IrrigationEvents
                2013-05-14  [Irrigation].Apply(25);
                2013-05-29  [Irrigation].Apply(9.2);
                2013-06-11  [Irrigation].Apply(12);
                2013-09-16  [Irrigation].Apply(34.6);
                2013-09-25  [Irrigation].Apply(46.3);
                2013-10-01  [Irrigation].Apply(19.3);
                2013-12-17  [Irrigation].Apply(47,1);
                2013-12-24  [Irrigation].Apply(49,1);
                2013-12-31  [Irrigation].Apply(20.3,1);
                2013-09-10  [Irrigation].Apply(5);
              Sample: Thickness=[200, 200, 200, 200, 200, 200, 200, 200]; SWUnits=Volumetric; OCUnits=Total; PHUnits=Water
                SW=[0.32, 0.2788, 0.271, 0.2795, 0.2275, 0.1905, 0.2318, 0.2385]
            CompositeFactor Late
              Specifications:
                [IrrigationEvents]
                [Physical]
                [Sample]
              Physical
                Thickness  BD     AirDry  LL15  DUL   SAT
                200        1      0.05    0.05  0.32  0.419
                200        1.324  0.12    0.12  0.3   0.405
                200        1.35   0.1     0.1   0.29  0.37
                200        1.301  0.05    0.05  0.32  0.37
                200        1.301  0.06    0.06  0.3   0.33
                200        1.301  0.06    0.06  0.3   0.32
                200        1.301  0.1     0.1   0.27  0.3
                200        1.301  0.1     0.1   0.26  0.31
                200        1.3    0.1     0.1   0.26  0.31
                200        1.3    0.1     0.1   0.26  0.31
                SoilCrop WheatSoil
                  LL=[0.1, 0.12, 0.1, 0.08, 0.06, 0.08, 0.1, 0.1, 0.1, 0.1]
                  KL=[0.06, 0.03, 0.03, 0.03, 0.03, 0.03, 0.03, 0.02, 0.02, 0.02]
                  XF=[1, 1, 1, 1, 1, 1, 1, 1, 1, 1]
              Operations IrrigationEvents
                2013-05-14  [Irrigation].Apply(25);
                2013-05-29  [Irrigation].Apply(9.2);
                2013-06-11  [Irrigation].Apply(12);
                2013-09-16  [Irrigation].Apply(34.6);
                2013-09-25  [Irrigation].Apply(46.3);
                2013-10-01  [Irrigation].Apply(19.3);
                2013-10-08  [Irrigation].Apply(24.9);
                2013-10-15  [Irrigation].Apply(21);
                2013-10-22  [Irrigation].Apply(39);
                2013-10-29  [Irrigation].Apply(0);
              Sample: Thickness=[200, 200, 200, 200, 200, 200, 200, 200]; SW=[0.32, 0.2785, 0.274, 0.2708, 0.2715, 0.2312, 0.199, 0.228]; SWUnits=Volumetric; OCUnits=Total; PHUnits=Water
        Simulation Rainshelter2013
          Clock: Start=2013-03-22; End=2014-04-01
          Summary summaryfile
          Weather: FileName=lincoln.met
          SoilArbitrator Soil Arbitrator
          Zone paddock: Area=1; Slope=0; AspectAngle=0; Altitude=50
            Soil TempletonSiltLoam: SoilType=NZ_sedementary; Region=Plains; State=Canterbury; Country=New Zealand; Latitude=0; Longitude=0
              DataSource=Generic profile descriptions provided by Trevor Webb and data for functional horizions based on SWAMP project results
              Comments=Bulk density values were measured on the fine earth fraction so values entered into apsim soil are adjusted down to account for stone content (assuming stones are inert from all soil process so their mass and volume is removed from model paramaters).  SAT, DUL, LL15 and Air dry have been adjusted down to account for stone content.  OC has not been adjusted so the model will get the correct carbon and N amounts using the adjusted BD.
              Chemical
                Thickness  NO3N     NH4N    PH
                180        265      1.5     6
                150        40.2427  0.8546  6
                400        5.0181   0.4423  6
                270        2.4198   0.3843  6
                500        1.9216   0.3843  6
              Physical
                Thickness  BD     AirDry  LL15  DUL   SAT
                200        1      0.05    0.1   0.32  0.42
                200        1.324  0.12    0.15  0.35  0.41
                200        1.35   0.1     0.1   0.3   0.37
                200        1.301  0.08    0.08  0.3   0.37
                200        1.301  0.06    0.07  0.28  0.33
                200        1.301  0.06    0.08  0.25  0.32
                200        1.301  0.1     0.1   0.23  0.3
                200        1.301  0.1     0.1   0.24  0.31
                SoilCrop WheatSoil: LL=[0.1, 0.12, 0.1, 0.08, 0.06, 0.08, 0.1, 0.1]; KL=[0.06, 0.06, 0.1, 0.1, 0.05, 0.03, 0.02, 0.01]; XF=[1, 1, 1, 1, 1, 1, 1, 1]
              WaterBalance SoilWater: SummerDate=1-oct; SummerU=6; SummerCona=3; WinterDate=1-Apr; WinterU=2; WinterCona=1; DiffusConst=0; DiffusSlope=0; Salb=0.13; CN2Bare=0; CNRed=0; CNCov=0.8; Thickness=[200, 200, 200, 200, 200, 200, 200, 200]; SWCON=[1, 1, 1, 1, 1, 1, 1, 1]
              Organic: FOMCNRatio=40
                Thickness  Carbon  SoilCNRatio  FBiom   FInert  FOM
                180        2.6251  11           0.0333  0.4371  427.5275
                150        1.2469  11           0.0187  0.6569  316.7202
                400        0.316   11           0.0117  0.8496  142.3116
                270        0.208   11           0.0102  0.945   82.9318
                500        0.2004  11           0.01    0.9827  30.5089
              Sample: Thickness=[200, 200, 200, 200, 200, 200, 200, 200]; SW=[0.35, 0.35, 0.25, 0.25, 0.25, 0.2, 0.18, 0.2]; SWUnits=Volumetric; OCUnits=Total; PHUnits=Water
              CERESSoilTemperature Temperature
              Nutrient
            Plant Wheat
            Folder Manager folder
              Operations SowingAndHarvest
                2013-03-25  [Wheat].Sow(population:165, cultivar:"Wakanui", depth:30, rowSpacing:130);
                2014-01-26  [Wheat].Harvest();
                2014-01-26  [Wheat].EndCrop();
              Operations IrrigationEvents
                2013-05-14  [Irrigation].Apply(25);
                2013-05-29  [Irrigation].Apply(9.2);
                2013-06-11  [Irrigation].Apply(12);
                2013-09-16  [Irrigation].Apply(34.6);
                2013-09-25  [Irrigation].Apply(43);
                2013-10-01  [Irrigation].Apply(19.3);
                2013-10-08  [Irrigation].Apply(24.9);
                2013-10-15  [Irrigation].Apply(21);
                2013-10-22  [Irrigation].Apply(39);
                2013-10-29  [Irrigation].Apply(44);
                2013-11-05  [Irrigation].Apply(40);
                2013-11-12  [Irrigation].Apply(35);
                2013-11-19  [Irrigation].Apply(33);
                2013-11-26  [Irrigation].Apply(32);
                2013-12-03  [Irrigation].Apply(35);
                2013-12-10  [Irrigation].Apply(49);
                2013-12-17  [Irrigation].Apply(47);
                2013-12-24  [Irrigation].Apply(0);
                2013-12-31  [Irrigation].Apply(0);
              Operations FertiliserEvents
                2013-09-26  [Fertiliser].Apply(100, Fertiliser.Types.UreaN, 10);
                2013-11-13  [Fertiliser].Apply(100, Fertiliser.Types.UreaN, 10);
              Operations Flood
                2013-06-18  [Irrigation].Apply(120);
                2013-04-12  [Irrigation].Apply(5);
            Irrigation
            Manager ClimateControl
              StartDate = 2013-04-15
              EndDate = 2014-05-01
```csharp
using Models.Climate;
using System;
using Models.Core;
using APSIM.Shared.Utilities;
using System.Collections.Generic;
using System.Text;
using Models.PMF;
using Models;
using System.Xml.Serialization;

namespace Models
{
    [Serializable] 
    [System.Xml.Serialization.XmlInclude(typeof(Model))]
    public class Script : Model
    {
        [Link] Weather Met;
        [Link] Clock Clock;
    
        [Description("Start Date")]
        public DateTime StartDate { get; set; }
        
        [Description("End Date")]
        public DateTime EndDate { get; set; }
 
    
        [EventSubscribe("PreparingNewWeatherData")]
        private void OnPreparingNewWeatherData(object sender, EventArgs e)
        {
            if ((Clock.Today.Date >= StartDate) && (Clock.Today.Date <= EndDate))
                Met.Rain = 0;        
        }
    }
}
```
            SurfaceOrganicMatter Surface Organic Matter: InitialResidueName=wheat_stubble; InitialResidueType=wheat; InitialResidueMass=500; InitialStandingFraction=0; InitialCPR=0; InitialCNR=80
            Fertiliser
            MicroClimate: a_interception=0; b_interception=1; c_interception=0; d_interception=0; soil_albedo=0.23; SoilHeatFluxFraction=0.4; MinimumHeightDiffForNewLayer=0; NightInterceptionFraction=0.5; ReferenceHeight=2
            Report DailyReport
            Report SupReport: EventNames=[Clock].DoReport
              VariableNames:
                [Clock].Today
                [Leaf].CohortSize
                [Wheat].Arbitrator.DM.Allocated
                [Wheat].Arbitrator.DM.TotalPlantDemand
                [Wheat].Arbitrator.DM.NutrientLimitation
                [Wheat].Arbitrator.DM.SinkLimitation
                [Wheat].Arbitrator.DM.TotalFixationSupply
                [Wheat].Arbitrator.FN
                [Wheat].Arbitrator.N.TotalPlantDemand
                [Wheat].Leaf.CohortMaxSize
                [Wheat].Leaf.CohortParameters.GrowthDuration
                [Wheat].Leaf.CohortParameters.LagDuration
                [Wheat].Leaf.CohortParameters.MaxArea
                [Wheat].Leaf.CohortParameters.SenescenceDuration
                [Wheat].Leaf.CohortParameters.SpecificLeafAreaMax
                [Wheat].Leaf.CohortParameters.SpecificLeafAreaMin
                [Wheat].Leaf.Photosynthesis.FT
                [Wheat].Leaf.Photosynthesis.FVPD
                [Wheat].Leaf.Photosynthesis.RueAct
                [Wheat].Leaf.NextExpandingLeafProportion
                [Wheat].Structure.MeanTillerGrowthRate
                sum([Soil].SoilWater.SWmm[1:8]) as ProfileWater
            Report HarvestReport
            Manager MaxLeafSize
```csharp
using APSIM.Shared.Utilities;
using Models.Interfaces;
using Models.Core;
using System.Xml.Serialization;
using System.Collections.Generic;
using System;



namespace Models
{
    [Serializable] 
    public class Script : Model
    {
    
        
    }
}
```
            Report MaxLeafSizeReport
            Report SowingReport
            Manager SetCropParameters
            Manager SetCropParameters
            Manager SetCropParameters
            Manager SetCropParameters
            Manager SetCropParameters
            Manager SetCropParameters
            Manager SetCropParameters
            Manager SetCropParameters
            Manager SetCropParameters
            Manager SetCropParameters
            Manager SetCropParameters
            Manager SetCropParameters
            Manager SetCropParameters
            Manager SetCropParameters
            Manager SetCropParameters
            Manager SetCropParameters
            Manager SetCropParameters
            Manager SetCropParameters
            Manager SetCropParameters
            Manager SetCropParameters
            Manager SetCropParameters
            Manager SetCropParameters
            Manager SetCropParameters
            Manager SetCropParameters
            Manager SetCropParameters
            Manager SetCropParameters
            Manager SetCropParameters
            Manager SetCropParameters
            Manager SetCropParameters
            Manager SetCropParameters
            Manager SetCropParameters
            Manager SetCropParameters
            Manager SetCropParameters
            Manager SetCropParameters
            Manager SetCropParameters
            Manager SetCropParameters
            Manager SetCropParameters
            Manager SetCropParameters
            Manager SetCropParameters
            Manager SetCropParameters
            Manager SetCropParameters
            Manager SetCropParameters
            Manager SetCropParameters
            Manager SetCropParameters
            Manager SetCropParameters
            Manager SetCropParameters
            Manager SetCropParameters
            Manager SetCropParameters
            Manager SetCropParameters
            Manager SetCropParameters
            Manager SetCropParameters
            Manager SetCropParameters
            Manager SetCropParameters
            Manager SetCropParameters
            Manager SetCropParameters
            Manager SetCropParameters
            Manager SetCropParameters
            Manager SetCropParameters
            Manager SetCropParameters
            Manager SetCropParameters
            Manager SetCropParameters
            Manager SetCropParameters
            Manager SetCropParameters
            Manager SetCropParameters
            Manager SetCropParameters
            Manager SetCropParameters
            Manager SetCropParameters
            Manager SetCropParameters
            Manager SetCropParameters
            Manager SetCropParameters
            Manager SetCropParameters
            Manager SetCropParameters
            Manager SetCropParameters
            Manager SetCropParameters
            Manager SetCropParameters
            Manager SetCropParameters
            Manager SetCropParameters
            Manager SetCropParameters
            Manager SetCropParameters
            Manager SetCropParameters
            Manager SetCropParameters
            Manager SetCropParameters
            Manager SetCropParameters
            Manager SetCropParameters
            Manager SetCropParameters
            Manager SetCropParameters
            Manager SetCropParameters
            Manager SetCropParameters
            Manager SetCropParameters
            Manager SetCropParameters
            Manager SetCropParameters
            Manager SetCropParameters
            Manager SetCropParameters
            Manager SetCropParameters
            Manager SetCropParameters
            Manager SetCropParameters
            Manager SetCropParameters
            Manager SetCropParameters
            Manager SetCropParameters
            Manager SetCropParameters
            Manager SetCropParameters
            Manager SetCropParameters
            Manager SetCropParameters
            Manager SetCropParameters
            Manager SetCropParameters
          Manager LocationInfo
            Country = New Zealand
            State = Canterbury Region
            Region =
```csharp
using APSIM.Shared.Utilities;
using Models.PMF;
using Models.Core;
using System;

namespace Models
{
    [Serializable]
    public class Script : Model
    {
        [Link] Clock Clock;
        [Link] Fertiliser Fertiliser;
        [Link] Summary Summary;
        
        [Description("Country")]
        public string Country { get; set; }

        [Description("State")]
        public string State { get; set; }

        [Description("Region")]
        public string Region { get; set; }

    }
}
```
      Experiment Leeston2013
        Memo
          The design, management and yield results of this trial have been described in full by [Craigie_Wheat_2015].  In brief, this trial was conducted to assess the impact of earlier sowing on potential yields of 'Wakanui' wheat grown at Wakanui (the cultivar was named after the area) in Mid Canterbury, New Zealand.  it was a 4 x 4 factorial with 4 replicates of the following treatments:

          1. Sowing date (20 February, 10 March, 28 March, 23 April)
          2. Sowing density (50,100,150 and 200 plants/m^2^

          In addition to yield, measurements of leaf appearance and senescence and canopy cover (measured with NDVI)  were measured at 10 - 14 day intervals and biomass measurements were taken at growth stages 32 and 65.

          Considerable canopy decay was observed during the winter for the early sown treatments and we have not introduced mechanisms into the model to capture this yet so there is a genral over prediction of canopy size and biomass in these first sowing dates.
        Factors
          Permutation
            Factor Sow: Specification=[Sowing].Script.SowDate = 20-Feb,26-Mar,16-Apr
            Factor Popn: Specification=[Sowing].Script.Population = 50,100,150,200,250
        Simulation Leeston2013Base
          Clock: Start=2013-02-01; End=2014-02-15
          Summary summaryfile
          Weather: FileName=Leeston.met
          Zone paddock: Area=1; Slope=0; AspectAngle=0; Altitude=50
            Folder Manager folder
              Operations IrrigationEvents
              Operations FertiliserEvents
                2013-10-17  [Fertiliser].Apply(92, Fertiliser.Types.UreaN, 10);
                2013-10-30  [Fertiliser].Apply(32, Fertiliser.Types.UreaN, 10);
              Manager Sowing
                SowDate =
                Population = 150
                CultivarName = Wakanui
                SowingDepth = 50
                RowSpacing = 150
```csharp
using Models.Soils.Nutrients;
using System;
using Models.Core;
using Models.PMF;
using Models.Soils;
using Models.Soils.Nutrients;
using Models.Utilities;
using APSIM.Shared.Utilities;

namespace Models
{
    [Serializable]
    public class Script : Model
    {
        [Link] Clock Clock;
        [Link] Summary Summary;
        [Link] Soil Soil;
        [Link] Plant Wheat;
        Accumulator accumulatedRain;
        
        [Description("Sowing date (d-mmm)")]
        public string SowDate { get; set; }
        [Description("Cultivar to be sown")]
        public string CultivarName { get; set; }
        [Description("Sowing depth (mm)")]
        public double SowingDepth { get; set; }
        [Description("Row spacing (mm)")]
        public double RowSpacing { get; set; }
        [Description("Plant population (/m2)")]
        public double Population { get; set; }
        


        [EventSubscribe("DoManagement")]
        private void OnDoManagement(object sender, EventArgs e)
        {
            if (DateUtilities.WithinDates(SowDate, Clock.Today, SowDate))
            {
                Wheat.Sow(population: Population, cultivar: CultivarName, depth: SowingDepth, rowSpacing: RowSpacing);    
                if(SowDate == "20-Feb")
                {
                    Wheat.SetEmergenceDate("27-Feb");
                }
                if(SowDate == "26-Mar")
                {
                    Wheat.SetEmergenceDate("3-Apr");
                }
                if(SowDate == "16-Apr")
                {
                    Wheat.SetEmergenceDate("28-Apr");
                }
            }
        
        }
        
    }
}
```
              Operations HarvestEvents
                2014-02-04  [Wheat].Harvest();
                2014-02-04  [Wheat].EndCrop();
            Irrigation
            Soil: SoilType=LincolnSoil; LocalName=Lincoln; Site=Lincoln; NearestTown=Unknown; Region=NZ; NaturalVegetation=Unknown; Latitude=0; Longitude=0
              Physical
                Thickness  BD   AirDry  LL15  DUL   SAT
                100        1.3  0.05    0.08  0.31  0.44
                200        1.3  0.05    0.07  0.3   0.44
                200        1.3  0.05    0.07  0.28  0.44
                200        1.3  0.05    0.09  0.31  0.44
                200        1.3  0.05    0.11  0.3   0.44
                200        1.3  0.05    0.16  0.28  0.44
                200        1.3  0.05    0.15  0.3   0.44
                200        1.3  0.05    0.12  0.34  0.44
                1000       1.3  0.05    0.12  0.34  0.44
                SoilCrop WheatSoil: LL=[0.08, 0.07, 0.07, 0.09, 0.11, 0.16, 0.15, 0.12, 0.12]; KL=[0.06, 0.06, 0.06, 0.06, 0.03, 0.02, 0.02, 0.02, 0.02]; XF=[1, 1, 1, 1, 1, 1, 1, 1, 1]
              WaterBalance SoilWater: SummerDate=1-Nov; SummerU=7; SummerCona=3; WinterDate=1-Apr; WinterU=7; WinterCona=3; DiffusConst=40; DiffusSlope=16; Salb=0.2; CN2Bare=75; CNRed=20; CNCov=0.8; DischargeWidth=0; CatchmentArea=0
                Thickness  SWCON  KLAT
                100        0.6    0
                200        0.6    0
                200        0.6    0
                200        0.6    0
                200        0.6    0
                200        0.6    0
                200        0.6    0
                200        0.6    0
              Organic: FOMCNRatio=15
                Thickness  Carbon  SoilCNRatio  FBiom  FInert  FOM
                100        4       11           0.04   0.31    1031.0685
                200        3       11           0.03   0.4     691.1459
                200        2       11           0.02   0.5     463.2889
                200        1       11           0.01   0.6     310.5519
                200        1       11           0.01   0.7     208.1691
                200        1       11           0.01   0.9     139.5399
                200        0.9     11           0.01   0.99    93.5364
                200        0.9     11           0.01   0.99    62.6993
              Chemical
                Thickness  NO3N     NH4N  PH
                100        30.7692  1.3   6
                200        11.5385  1     6
                200        7.6923   1     6
                200        3.8462   0.8   6
                200        3.8462   0.8   6
                200        3.8462   0.5   6
                200        3.8462   0.5   6
                200        3.8462   0.5   6
              Sample Initial water: Thickness=[100, 200, 200, 200, 200, 200, 200, 200]; SW=[0.24, 0.27, 0.26, 0.23, 0.24, 0.23, 0.23, 0.18]; SWUnits=Volumetric; OCUnits=Total; PHUnits=Water
              CERESSoilTemperature Temperature
              Nutrient
            SurfaceOrganicMatter Surface Organic Matter: InitialResidueName=wheat_stubble; InitialResidueType=whiteclover; InitialResidueMass=1000; InitialStandingFraction=0; InitialCPR=0; InitialCNR=25
            Fertiliser
            MicroClimate: a_interception=0; b_interception=1; c_interception=0; d_interception=0; soil_albedo=0.23; SoilHeatFluxFraction=0.4; MinimumHeightDiffForNewLayer=0; NightInterceptionFraction=0.5; ReferenceHeight=2
            Plant Wheat
            Report DailyReport
            Report HarvestReport
            Report SupReport: EventNames=[Clock].DoReport
              VariableNames:
                [Clock].Today
                [Leaf].CohortSize
                [Wheat].Arbitrator.DM.Allocated
                [Wheat].Arbitrator.DM.TotalPlantDemand
                [Wheat].Arbitrator.DM.NutrientLimitation
                [Wheat].Arbitrator.DM.SinkLimitation
                [Wheat].Arbitrator.DM.TotalFixationSupply
                [Wheat].Arbitrator.FN
                [Wheat].Arbitrator.N.TotalPlantDemand
                [Wheat].Leaf.CohortMaxSize
                [Wheat].Leaf.CohortParameters.GrowthDuration
                [Wheat].Leaf.CohortParameters.LagDuration
                [Wheat].Leaf.CohortParameters.MaxArea
                [Wheat].Leaf.CohortParameters.SenescenceDuration
                [Wheat].Leaf.CohortParameters.SpecificLeafAreaMax
                [Wheat].Leaf.CohortParameters.SpecificLeafAreaMin
                [Wheat].Leaf.Photosynthesis.FT
                [Wheat].Leaf.Photosynthesis.FVPD
                [Wheat].Leaf.Photosynthesis.RueAct
            Manager MaxLeafSize
              script: same as in Validation.New Zealand.Lincoln2014.Rainshelter2013.paddock.MaxLeafSize
            Report MaxLeafSizeReport
            Report SowingReport
            Manager SetCropParameters
            Manager SetCropParameters
            Manager SetCropParameters
            Manager SetCropParameters
            Manager SetCropParameters
            Manager SetCropParameters
            Manager SetCropParameters
            Manager SetCropParameters
            Manager SetCropParameters
            Manager SetCropParameters
            Manager SetCropParameters
            Manager SetCropParameters
            Manager SetCropParameters
            Manager SetCropParameters
            Manager SetCropParameters
            Manager SetCropParameters
            Manager SetCropParameters
            Manager SetCropParameters
            Manager SetCropParameters
            Manager SetCropParameters
            Manager SetCropParameters
            Manager SetCropParameters
            Manager SetCropParameters
            Manager SetCropParameters
            Manager SetCropParameters
            Manager SetCropParameters
            Manager SetCropParameters
            Manager SetCropParameters
            Manager SetCropParameters
            Manager SetCropParameters
            Manager SetCropParameters
            Manager SetCropParameters
            Manager SetCropParameters
            Manager SetCropParameters
            Manager SetCropParameters
            Manager SetCropParameters
            Manager SetCropParameters
            Manager SetCropParameters
            Manager SetCropParameters
            Manager SetCropParameters
            Manager SetCropParameters
            Manager SetCropParameters
            Manager SetCropParameters
            Manager SetCropParameters
            Manager SetCropParameters
            Manager SetCropParameters
            Manager SetCropParameters
            Manager SetCropParameters
            Manager SetCropParameters
            Manager SetCropParameters
            Manager SetCropParameters
            Manager SetCropParameters
            Manager SetCropParameters
            Manager SetCropParameters
            Manager SetCropParameters
            Manager SetCropParameters
            Manager SetCropParameters
            Manager SetCropParameters
            Manager SetCropParameters
            Manager SetCropParameters
            Manager SetCropParameters
            Manager SetCropParameters
            Manager SetCropParameters
            Manager SetCropParameters
            Manager SetCropParameters
            Manager SetCropParameters
            Manager SetCropParameters
            Manager SetCropParameters
            Manager SetCropParameters
            Manager SetCropParameters
            Manager SetCropParameters
            Manager SetCropParameters
            Manager SetCropParameters
            Manager SetCropParameters
            Manager SetCropParameters
            Manager SetCropParameters
            Manager SetCropParameters
            Manager SetCropParameters
            Manager SetCropParameters
            Manager SetCropParameters
            Manager SetCropParameters
            Manager SetCropParameters
            Manager SetCropParameters
            Manager SetCropParameters
            Manager SetCropParameters
            Manager SetCropParameters
            Manager SetCropParameters
            Manager SetCropParameters
            Manager SetCropParameters
            Manager SetCropParameters
            Manager SetCropParameters
            Manager SetCropParameters
            Manager SetCropParameters
            Manager SetCropParameters
            Manager SetCropParameters
            Manager SetCropParameters
            Manager SetCropParameters
            Manager SetCropParameters
            Manager SetCropParameters
            Manager SetCropParameters
            Manager SetCropParameters
            Manager SetCropParameters
            Manager SetCropParameters
            Manager SetCropParameters
            Manager SetCropParameters
          SoilArbitrator Soil Arbitrator
          Manager LocationInfo: same as Validation.New Zealand.Lincoln2014.Rainshelter2013.LocationInfo
      Experiment Leeston2014
        Memo: same as Validation.New Zealand.Leeston2013.Memo
        Factors
          Permutation
            Factor Sow: Specification=[Sowing].Script.SowDate = 20-Feb,10-Mar,26-Mar,23-Apr
            Factor Popn: Specification=[Sowing].Script.Population = 50,200
        Simulation Wakanui2014Base
          Clock: Start=2014-02-01; End=2015-02-15
          Summary summaryfile
          Weather: FileName=Leeston.met
          Zone paddock: Area=1; Slope=0; AspectAngle=0; Altitude=50
            Folder Manager folder
              Operations IrrigationEvents
                2014-11-05  [Irrigation].Apply(50.0);
                2014-11-18  [Irrigation].Apply(50.0);
                2014-12-05  [Irrigation].Apply(50.0);
                2014-12-18  [Irrigation].Apply(50.0);
              Operations FertiliserEvents
                2014-09-10  [Fertiliser].Apply(101, Fertiliser.Types.UreaN, 10);
                2014-10-10  [Fertiliser].Apply(87, Fertiliser.Types.UreaN, 10);
              Manager Sowing
                SowDate =
                Population = 150
                CultivarName = Wakanui
                SowingDepth = 50
                RowSpacing = 150
```csharp
using Models.Soils.Nutrients;
using System;
using Models.Core;
using Models.PMF;
using Models.Soils;
using Models.Soils.Nutrients;
using Models.Utilities;
using APSIM.Shared.Utilities;

namespace Models
{
    [Serializable]
    public class Script : Model
    {
        [Link] Clock Clock;
        [Link] Summary Summary;
        [Link] Soil Soil;
        [Link] Plant Wheat;
        Accumulator accumulatedRain;
        
        [Description("Sowing date (d-mmm)")]
        public string SowDate { get; set; }
        [Display(Type = DisplayType.CultivarName)]
        [Description("Cultivar to be sown")]
        public string CultivarName { get; set; }
        [Description("Sowing depth (mm)")]
        public double SowingDepth { get; set; }
        [Description("Row spacing (mm)")]
        public double RowSpacing { get; set; }
        [Description("Plant population (/m2)")]
        public double Population { get; set; }
        


        [EventSubscribe("DoManagement")]
        private void OnDoManagement(object sender, EventArgs e)
        {
            if (DateUtilities.WithinDates(SowDate, Clock.Today, SowDate))
            {
                Wheat.Sow(population: Population, cultivar: CultivarName, depth: SowingDepth, rowSpacing: RowSpacing);    
                if(SowDate == "20-Feb")
                {
                    Wheat.SetEmergenceDate("26-Feb");
                }
                if(SowDate == "10-Mar")
                {
                    Wheat.SetEmergenceDate("17-Mar");
                }
                if(SowDate == "26-Mar")
                {
                    Wheat.SetEmergenceDate("6-Apr");
                }
                if(SowDate == "23-Apr")
                {
                    Wheat.SetEmergenceDate("8-May");
                }
            }
        
        }
        
    }
}
```
              Operations HarvestEvents
                2015-02-04  [Wheat].Harvest();
                2015-02-04  [Wheat].EndCrop();
            Irrigation
            Soil: SoilType=LincolnSoil; LocalName=Lincoln; Site=Lincoln; NearestTown=Unknown; Region=NZ; NaturalVegetation=Unknown; Latitude=0; Longitude=0
              Physical
                Thickness  BD   AirDry  LL15  DUL   SAT
                100        1.3  0.05    0.08  0.31  0.44
                200        1.3  0.05    0.07  0.3   0.44
                200        1.3  0.05    0.07  0.28  0.44
                200        1.3  0.05    0.09  0.31  0.44
                200        1.3  0.05    0.11  0.3   0.44
                200        1.3  0.05    0.16  0.28  0.44
                200        1.3  0.05    0.15  0.3   0.44
                200        1.3  0.05    0.12  0.34  0.44
                SoilCrop WheatSoil: LL=[0.08, 0.07, 0.07, 0.09, 0.11, 0.16, 0.15, 0.12]; KL=[0.06, 0.06, 0.06, 0.06, 0.03, 0.02, 0.02, 0.02]; XF=[1, 1, 1, 1, 1, 1, 1, 1]
              WaterBalance SoilWater: same as Validation.New Zealand.Leeston2013.Leeston2013Base.paddock.Soil.SoilWater
              Organic: same as Validation.New Zealand.Leeston2013.Leeston2013Base.paddock.Soil.Organic
              Chemical: same as Validation.New Zealand.Leeston2013.Leeston2013Base.paddock.Soil.Chemical
              Sample Initial water: same as Validation.New Zealand.Leeston2013.Leeston2013Base.paddock.Soil.Initial water
              CERESSoilTemperature Temperature
              Nutrient
            SurfaceOrganicMatter Surface Organic Matter: InitialResidueName=wheat_stubble; InitialResidueType=wheat; InitialResidueMass=1000; InitialStandingFraction=0; InitialCPR=0; InitialCNR=80
            Fertiliser
            MicroClimate: a_interception=0; b_interception=1; c_interception=0; d_interception=0; soil_albedo=0.23; SoilHeatFluxFraction=0.4; MinimumHeightDiffForNewLayer=0; NightInterceptionFraction=0.5; ReferenceHeight=2
            Plant Wheat
            Report DailyReport
            Report HarvestReport
            Report SupReport: same as Validation.New Zealand.Leeston2013.Leeston2013Base.paddock.SupReport
            Manager MaxLeafSize
              script: same as in Validation.New Zealand.Lincoln2014.Rainshelter2013.paddock.MaxLeafSize
            Report MaxLeafSizeReport
            Report SowingReport
            Manager SetCropParameters
            Manager SetCropParameters
            Manager SetCropParameters
            Manager SetCropParameters
            Manager SetCropParameters
            Manager SetCropParameters
            Manager SetCropParameters
            Manager SetCropParameters
            Manager SetCropParameters
            Manager SetCropParameters
            Manager SetCropParameters
            Manager SetCropParameters
            Manager SetCropParameters
            Manager SetCropParameters
            Manager SetCropParameters
            Manager SetCropParameters
            Manager SetCropParameters
            Manager SetCropParameters
            Manager SetCropParameters
            Manager SetCropParameters
            Manager SetCropParameters
            Manager SetCropParameters
            Manager SetCropParameters
            Manager SetCropParameters
            Manager SetCropParameters
            Manager SetCropParameters
            Manager SetCropParameters
            Manager SetCropParameters
            Manager SetCropParameters
            Manager SetCropParameters
            Manager SetCropParameters
            Manager SetCropParameters
            Manager SetCropParameters
            Manager SetCropParameters
            Manager SetCropParameters
            Manager SetCropParameters
            Manager SetCropParameters
            Manager SetCropParameters
            Manager SetCropParameters
            Manager SetCropParameters
            Manager SetCropParameters
            Manager SetCropParameters
            Manager SetCropParameters
            Manager SetCropParameters
            Manager SetCropParameters
            Manager SetCropParameters
            Manager SetCropParameters
            Manager SetCropParameters
            Manager SetCropParameters
            Manager SetCropParameters
            Manager SetCropParameters
            Manager SetCropParameters
            Manager SetCropParameters
            Manager SetCropParameters
            Manager SetCropParameters
            Manager SetCropParameters
            Manager SetCropParameters
            Manager SetCropParameters
            Manager SetCropParameters
            Manager SetCropParameters
            Manager SetCropParameters
            Manager SetCropParameters
            Manager SetCropParameters
            Manager SetCropParameters
            Manager SetCropParameters
            Manager SetCropParameters
            Manager SetCropParameters
            Manager SetCropParameters
            Manager SetCropParameters
            Manager SetCropParameters
            Manager SetCropParameters
            Manager SetCropParameters
            Manager SetCropParameters
            Manager SetCropParameters
            Manager SetCropParameters
            Manager SetCropParameters
            Manager SetCropParameters
            Manager SetCropParameters
            Manager SetCropParameters
            Manager SetCropParameters
            Manager SetCropParameters
            Manager SetCropParameters
            Manager SetCropParameters
            Manager SetCropParameters
            Manager SetCropParameters
            Manager SetCropParameters
            Manager SetCropParameters
            Manager SetCropParameters
            Manager SetCropParameters
            Manager SetCropParameters
            Manager SetCropParameters
            Manager SetCropParameters
            Manager SetCropParameters
            Manager SetCropParameters
            Manager SetCropParameters
            Manager SetCropParameters
            Manager SetCropParameters
            Manager SetCropParameters
            Manager SetCropParameters
            Manager SetCropParameters
            Manager SetCropParameters
            Manager SetCropParameters
            Manager SetCropParameters
            Manager SetCropParameters
            Manager SetCropParameters
          SoilArbitrator Soil Arbitrator
          Manager LocationInfo: same as Validation.New Zealand.Lincoln2014.Rainshelter2013.LocationInfo
        Memo Leaf Size Predictions
          This graph shows different leaf size profiles measured for winter wheat sown on a range of different dates.  Leaves that emerge during cooler conditions achieve a smallter maximum size than the equivelent leaf appearanign in warm conditions.
      Experiment Wakanui2015
        Memo: same as Validation.New Zealand.Leeston2013.Memo
        Factors
          Permutation
            Factor Sow: Specification=[Sowing].Script.SowDate = 20-Feb,10-Mar,20-Mar,09-Apr
            Factor Cm: Specification=[Sowing].Script.PGRTreatment = Normal
        Simulation Wakanui2015Base
          Clock: Start=2015-02-01; End=2016-02-15
          Summary summaryfile
          Weather: FileName=Wakanui.met
          Zone paddock: Area=1; Slope=0; AspectAngle=0; Altitude=50
            Folder Manager folder
              Operations IrrigationEvents
                2015-10-19  [Irrigation].Apply(40.0);
                2015-11-08  [Irrigation].Apply(40.0);
                2015-11-26  [Irrigation].Apply(40.0);
                2015-12-12  [Irrigation].Apply(45.0);
                2015-12-28  [Irrigation].Apply(45.0);
              Operations FertiliserEvents
                2015-09-18  [Fertiliser].Apply(26, Fertiliser.Types.UreaN, 10);
                2015-09-26  [Fertiliser].Apply(51, Fertiliser.Types.UreaN, 10);
                2015-10-10  [Fertiliser].Apply(92, Fertiliser.Types.UreaN, 10);
                2015-10-29  [Fertiliser].Apply(115, Fertiliser.Types.UreaN, 10);
              Manager Sowing
                SowDate = 24-Jul
                CultivarName = Wakanui
                SowingDepth = 50
                RowSpacing = 150
                PGRTreatment = 0
```csharp
using Models.Soils.Nutrients;
using System;
using Models.Core;
using Models.PMF;
using Models.Soils;
using Models.Soils.Nutrients;
using Models.Utilities;
using APSIM.Shared.Utilities;

namespace Models
{
    [Serializable]
    public class Script : Model
    {
        [Link] Clock Clock;
        [Link] Summary Summary;
        [Link] Soil Soil;
        [Link] Plant Wheat;
        Accumulator accumulatedRain;
        
        [Description("Sowing date (d-mmm)")]
        public string SowDate { get; set; }
        [Description("Cultivar to be sown")]
        public string CultivarName { get; set; }
        [Description("Sowing depth (mm)")]
        public double SowingDepth { get; set; }
        [Description("Row spacing (mm)")]
        public double RowSpacing { get; set; }
        [Description("PGR treatment applied")]
        public string PGRTreatment { get; set; }
        


        [EventSubscribe("DoManagement")]
        private void OnDoManagement(object sender, EventArgs e)
        {
            if (DateUtilities.WithinDates(SowDate, Clock.Today, SowDate))
            {
                Wheat.Sow(population: 150, cultivar: CultivarName, depth: SowingDepth, rowSpacing: RowSpacing);    
                if(SowDate == "20-Feb")
                {
                    Wheat.SetEmergenceDate("27-Feb");
                }
                if(SowDate == "10-Mar")
                {
                    Wheat.SetEmergenceDate("17-Mar");
                }
                if(SowDate == "20-Mar")
                {
                    Wheat.SetEmergenceDate("29-Mar");
                }
                if(SowDate == "09-Apr")
                {
                    Wheat.SetEmergenceDate("22-Apr");
                }
            }
        
        }
        
    }
}
```
              Operations HarvestEvents
                2016-02-12  [Wheat].Harvest();
                2016-02-12  [Wheat].EndCrop();
            Irrigation
            Soil: SoilType=LincolnSoil; LocalName=Lincoln; Site=Lincoln; NearestTown=Unknown; Region=NZ; NaturalVegetation=Unknown; Latitude=0; Longitude=0
              Physical: same as Validation.New Zealand.Leeston2014.Wakanui2014Base.paddock.Soil.Physical
              WaterBalance SoilWater: same as Validation.New Zealand.Leeston2013.Leeston2013Base.paddock.Soil.SoilWater
              Organic: same as Validation.New Zealand.Leeston2013.Leeston2013Base.paddock.Soil.Organic
              Chemical
                Thickness  NO3N     NH4N  PH
                100        30.7692  1.3   6
                200        3.8462   1     6
                200        7.6923   1     6
                200        3.8462   0.8   6
                200        3.8462   0.8   6
                200        3.8462   0.5   6
                200        3.8462   0.5   6
                200        3.8462   0.5   6
              Sample Initial water: same as Validation.New Zealand.Leeston2013.Leeston2013Base.paddock.Soil.Initial water
              CERESSoilTemperature Temperature
              Nutrient
            SurfaceOrganicMatter Surface Organic Matter: InitialResidueName=wheat_stubble; InitialResidueType=whiteclover; InitialResidueMass=1000; InitialStandingFraction=0; InitialCPR=0; InitialCNR=80
            Fertiliser
            MicroClimate: a_interception=0; b_interception=1; c_interception=0; d_interception=0; soil_albedo=0.23; SoilHeatFluxFraction=0.4; MinimumHeightDiffForNewLayer=0; NightInterceptionFraction=0.5; ReferenceHeight=2
            Plant Wheat
            Report DailyReport
            Report HarvestReport
            Report SupReport: same as Validation.New Zealand.Leeston2013.Leeston2013Base.paddock.SupReport
            Manager MaxLeafSize
              script: same as in Validation.New Zealand.Lincoln2014.Rainshelter2013.paddock.MaxLeafSize
            Report MaxLeafSizeReport
            Report SowingReport
            Manager SetCropParameters
            Manager SetCropParameters
            Manager SetCropParameters
            Manager SetCropParameters
            Manager SetCropParameters
            Manager SetCropParameters
            Manager SetCropParameters
            Manager SetCropParameters
            Manager SetCropParameters
            Manager SetCropParameters
            Manager SetCropParameters
            Manager SetCropParameters
            Manager SetCropParameters
            Manager SetCropParameters
            Manager SetCropParameters
            Manager SetCropParameters
            Manager SetCropParameters
            Manager SetCropParameters
            Manager SetCropParameters
            Manager SetCropParameters
            Manager SetCropParameters
            Manager SetCropParameters
            Manager SetCropParameters
            Manager SetCropParameters
            Manager SetCropParameters
            Manager SetCropParameters
            Manager SetCropParameters
            Manager SetCropParameters
            Manager SetCropParameters
            Manager SetCropParameters
            Manager SetCropParameters
            Manager SetCropParameters
            Manager SetCropParameters
            Manager SetCropParameters
            Manager SetCropParameters
            Manager SetCropParameters
            Manager SetCropParameters
            Manager SetCropParameters
            Manager SetCropParameters
            Manager SetCropParameters
            Manager SetCropParameters
            Manager SetCropParameters
            Manager SetCropParameters
            Manager SetCropParameters
            Manager SetCropParameters
            Manager SetCropParameters
            Manager SetCropParameters
            Manager SetCropParameters
            Manager SetCropParameters
            Manager SetCropParameters
            Manager SetCropParameters
            Manager SetCropParameters
            Manager SetCropParameters
            Manager SetCropParameters
            Manager SetCropParameters
            Manager SetCropParameters
            Manager SetCropParameters
            Manager SetCropParameters
            Manager SetCropParameters
            Manager SetCropParameters
            Manager SetCropParameters
            Manager SetCropParameters
            Manager SetCropParameters
            Manager SetCropParameters
            Manager SetCropParameters
            Manager SetCropParameters
            Manager SetCropParameters
            Manager SetCropParameters
            Manager SetCropParameters
            Manager SetCropParameters
            Manager SetCropParameters
            Manager SetCropParameters
            Manager SetCropParameters
            Manager SetCropParameters
            Manager SetCropParameters
            Manager SetCropParameters
            Manager SetCropParameters
            Manager SetCropParameters
            Manager SetCropParameters
            Manager SetCropParameters
            Manager SetCropParameters
            Manager SetCropParameters
            Manager SetCropParameters
            Manager SetCropParameters
            Manager SetCropParameters
            Manager SetCropParameters
            Manager SetCropParameters
            Manager SetCropParameters
            Manager SetCropParameters
            Manager SetCropParameters
            Manager SetCropParameters
            Manager SetCropParameters
            Manager SetCropParameters
            Manager SetCropParameters
            Manager SetCropParameters
            Manager SetCropParameters
            Manager SetCropParameters
            Manager SetCropParameters
            Manager SetCropParameters
            Manager SetCropParameters
            Manager SetCropParameters
            Manager SetCropParameters
            Manager SetCropParameters
            Manager SetCropParameters
            Manager SetCropParameters
          SoilArbitrator Soil Arbitrator
          Manager LocationInfo: same as Validation.New Zealand.Lincoln2014.Rainshelter2013.LocationInfo
        Memo Leaf Size Predictions
          This graph shows different leaf size profiles measured for winter wheat sown on a range of different dates.  Leaves that emerge during cooler conditions achieve a smallter maximum size than the equivelent leaf appearanign in warm conditions.
      Experiment Wakanui2016
        Memo: same as Validation.New Zealand.Leeston2013.Memo
        Factors
          Permutation
            Factor Sow: Specification=[Sowing].Script.SowDate = 24-Feb,08-Mar,29-Mar,14-Apr
            Factor Cm: Specification=[Defoliation].Script.Defoliated = Normal
        Simulation Wakanui2016Base
          Clock: Start=2016-02-01; End=2017-02-15
          Summary summaryfile
          Weather: FileName=Wakanui.met
          Zone paddock: Area=1; Slope=0; AspectAngle=0; Altitude=50
            Folder Manager folder
              Operations IrrigationEvents
                2016-11-20  [Irrigation].Apply(25.0);
                2016-12-10  [Irrigation].Apply(25.0);
              Operations FertiliserEvents
                2016-09-11  [Fertiliser].Apply(92, Fertiliser.Types.UreaN, 10);
                2016-10-28  [Fertiliser].Apply(97, Fertiliser.Types.UreaN, 10);
                2016-11-02  [Fertiliser].Apply(69, Fertiliser.Types.UreaN, 10);
              Manager Sowing
                SowDate =
                CultivarName = Wakanui
                SowingDepth = 50
                RowSpacing = 150
                Population = 150
```csharp
using Models.Soils.Nutrients;
using System;
using Models.Core;
using Models.PMF;
using Models.Soils;
using Models.Soils.Nutrients;
using Models.Utilities;
using APSIM.Shared.Utilities;

namespace Models
{
    [Serializable]
    public class Script : Model
    {
        [Link] Clock Clock;
        [Link] Summary Summary;
        [Link] Soil Soil;
        [Link] Plant Wheat;
        Accumulator accumulatedRain;
        
        [Description("Sowing date (d-mmm)")]
        public string SowDate { get; set; }
        [Description("Cultivar to be sown")]
        public string CultivarName { get; set; }
        [Description("Sowing depth (mm)")]
        public double SowingDepth { get; set; }
        [Description("Row spacing (mm)")]
        public double RowSpacing { get; set; }
        [Description("Plant population (/m2)")]
        public double Population { get; set; }
        


        [EventSubscribe("DoManagement")]
        private void OnDoManagement(object sender, EventArgs e)
        {
            if (DateUtilities.WithinDates(SowDate, Clock.Today, SowDate))
            {
                Wheat.Sow(population: Population, cultivar: CultivarName, depth: SowingDepth, rowSpacing: RowSpacing);    
                if(SowDate == "24-Feb")
                {
                    Wheat.SetEmergenceDate("2-Mar");
                }
                if(SowDate == "08-Mar")
                {
                    Wheat.SetEmergenceDate("17-Mar");
                }
                if(SowDate == "29-Mar")
                {
                    Wheat.SetEmergenceDate("11-Apr");
                }
                if(SowDate == "14-Apr")
                {
                    Wheat.SetEmergenceDate("26-Apr");
                }
            }
        
        }
        
    }
}
```
              Operations HarvestEvents
                2017-02-12  [Wheat].Harvest();
                2017-02-12  [Wheat].EndCrop();
              Manager Defoliation
                NibblingDate = 10/31/2002 00:00:00
                ProportionNibbled = 0.5
                Defoliated = False
```csharp
using System.Xml.Serialization;
using Models.PMF.Interfaces;
using Models.PMF;
using Models.Core;
using System.Collections.Generic;
using System;

namespace Models
{
    [Serializable] 
    [System.Xml.Serialization.XmlInclude(typeof(Model))]
    public class Script : Model
    {
        [Link] Plant Wheat;
        [Link] Clock Clock;

        [Description("Date that mouse damage event occurs")]
        public DateTime NibblingDate { get; set; }
        [Description("Proportion of the crop removed by mice")]
        public double ProportionNibbled { get; set; }
        [Description("Switch if crop is defoliated")]
        public string Defoliated {get; set;}
        
        [XmlIgnore] private RemovalFractions Remove { get; set; }
        
        [EventSubscribe("StartOfSimulation")]
        private void OnSimulationCommencing(object sender, EventArgs e)
        {
            Remove = new RemovalFractions();
        }
        
        [EventSubscribe("DoManagement")]
        private void OnDoManagement(object sender, EventArgs e)
        {
            //Set up  array of remove fractions to send with Cut method.  Each member in the array corresponds to an organ in the same order they are set up in.

            if (Clock.Today.Date == NibblingDate)
            {
                //Harvest with manager specified removal fractions
                Remove.SetFractionToRemove("Grain", 0);
                Remove.SetFractionToRemove("Leaf", 0, "live");
                Remove.SetFractionToRemove("Leaf", 0, "dead");
                Remove.SetFractionToRemove("Stem", 0);
                Remove.SetFractionToRemove("Spike", 0);
                Remove.SetFractionToRemove("Root", 0);
                Remove.SetFractionToResidue("Grain", ProportionNibbled);
                Remove.SetFractionToResidue("Leaf", ProportionNibbled, "live");
                Remove.SetFractionToResidue("Leaf", ProportionNibbled, "dead");
                Remove.SetFractionToResidue("Stem", ProportionNibbled);
                Remove.SetFractionToResidue("Spike", ProportionNibbled);
                Remove.SetFractionToResidue("Root", 0);
                Remove.SetThinningProportion = ProportionNibbled;
                Wheat.RemoveBiomass("Thin", Remove);
            }
        }
    }
}
```
            Irrigation
            Soil: same as Validation.New Zealand.Leeston2014.Wakanui2014Base.paddock.Soil
            SurfaceOrganicMatter Surface Organic Matter: InitialResidueName=wheat_stubble; InitialResidueType=wheat; InitialResidueMass=1000; InitialStandingFraction=0; InitialCPR=0; InitialCNR=80
            Fertiliser
            MicroClimate: a_interception=0; b_interception=1; c_interception=0; d_interception=0; soil_albedo=0.23; SoilHeatFluxFraction=0.4; MinimumHeightDiffForNewLayer=0; NightInterceptionFraction=0.5; ReferenceHeight=2
            Plant Wheat
            Report DailyReport
            Report HarvestReport
            Report SupReport: same as Validation.New Zealand.Leeston2013.Leeston2013Base.paddock.SupReport
            Manager MaxLeafSize
              script: same as in Validation.New Zealand.Lincoln2014.Rainshelter2013.paddock.MaxLeafSize
            Report MaxLeafSizeReport
            Report SowingReport
            Manager SetCropParameters
            Manager SetCropParameters
            Manager SetCropParameters
            Manager SetCropParameters
            Manager SetCropParameters
            Manager SetCropParameters
            Manager SetCropParameters
            Manager SetCropParameters
            Manager SetCropParameters
            Manager SetCropParameters
            Manager SetCropParameters
            Manager SetCropParameters
            Manager SetCropParameters
            Manager SetCropParameters
            Manager SetCropParameters
            Manager SetCropParameters
            Manager SetCropParameters
            Manager SetCropParameters
            Manager SetCropParameters
            Manager SetCropParameters
            Manager SetCropParameters
            Manager SetCropParameters
            Manager SetCropParameters
            Manager SetCropParameters
            Manager SetCropParameters
            Manager SetCropParameters
            Manager SetCropParameters
            Manager SetCropParameters
            Manager SetCropParameters
            Manager SetCropParameters
            Manager SetCropParameters
            Manager SetCropParameters
            Manager SetCropParameters
            Manager SetCropParameters
            Manager SetCropParameters
            Manager SetCropParameters
            Manager SetCropParameters
            Manager SetCropParameters
            Manager SetCropParameters
            Manager SetCropParameters
            Manager SetCropParameters
            Manager SetCropParameters
            Manager SetCropParameters
            Manager SetCropParameters
            Manager SetCropParameters
            Manager SetCropParameters
            Manager SetCropParameters
            Manager SetCropParameters
            Manager SetCropParameters
            Manager SetCropParameters
            Manager SetCropParameters
            Manager SetCropParameters
            Manager SetCropParameters
            Manager SetCropParameters
            Manager SetCropParameters
            Manager SetCropParameters
            Manager SetCropParameters
            Manager SetCropParameters
            Manager SetCropParameters
            Manager SetCropParameters
            Manager SetCropParameters
            Manager SetCropParameters
            Manager SetCropParameters
            Manager SetCropParameters
            Manager SetCropParameters
            Manager SetCropParameters
            Manager SetCropParameters
            Manager SetCropParameters
            Manager SetCropParameters
            Manager SetCropParameters
            Manager SetCropParameters
            Manager SetCropParameters
            Manager SetCropParameters
            Manager SetCropParameters
            Manager SetCropParameters
            Manager SetCropParameters
            Manager SetCropParameters
            Manager SetCropParameters
            Manager SetCropParameters
            Manager SetCropParameters
            Manager SetCropParameters
            Manager SetCropParameters
            Manager SetCropParameters
            Manager SetCropParameters
            Manager SetCropParameters
            Manager SetCropParameters
            Manager SetCropParameters
            Manager SetCropParameters
            Manager SetCropParameters
            Manager SetCropParameters
            Manager SetCropParameters
            Manager SetCropParameters
            Manager SetCropParameters
            Manager SetCropParameters
            Manager SetCropParameters
            Manager SetCropParameters
            Manager SetCropParameters
            Manager SetCropParameters
            Manager SetCropParameters
            Manager SetCropParameters
            Manager SetCropParameters
            Manager SetCropParameters
            Manager SetCropParameters
            Manager SetCropParameters
            Manager SetCropParameters
          SoilArbitrator Soil Arbitrator
          Manager LocationInfo: same as Validation.New Zealand.Lincoln2014.Rainshelter2013.LocationInfo
        Memo Leaf Size Predictions
          This graph shows different leaf size profiles measured for winter wheat sown on a range of different dates.  Leaves that emerge during cooler conditions achieve a smallter maximum size than the equivelent leaf appearanign in warm conditions.
      Experiment Wakanui2017
        Memo: same as Validation.New Zealand.Leeston2013.Memo
        Factors
          Permutation
            Factor Sow: Specification=[Sowing].Script.SowDate = 09-Mar,30-Mar,19-Apr
            Factor Cm: Specification=[Defoliation].Script.Defoliated = Normal
        Simulation Wakanui2017Base
          Clock: Start=2017-02-01; End=2018-02-15
          Summary summaryfile
          Weather: FileName=Wakanui.met
          Zone paddock: Area=1; Slope=0; AspectAngle=0; Altitude=50
            Folder Manager folder
              Operations IrrigationEvents
                2017-11-11  [Irrigation].Apply(40.0);
                2017-12-02  [Irrigation].Apply(40.0);
                2017-12-24  [Irrigation].Apply(45.0);
              Operations FertiliserEvents
                2017-09-13  [Fertiliser].Apply(100, Fertiliser.Types.UreaN, 10);
                2017-10-13  [Fertiliser].Apply(100, Fertiliser.Types.UreaN, 10);
                2017-11-02  [Fertiliser].Apply(70, Fertiliser.Types.UreaN, 10);
              Manager Sowing
                SowDate =
                CultivarName = Wakanui
                SowingDepth = 50
                RowSpacing = 150
                Population = 150
```csharp
using Models.Soils.Nutrients;
using System;
using Models.Core;
using Models.PMF;
using Models.Soils;
using Models.Soils.Nutrients;
using Models.Utilities;
using APSIM.Shared.Utilities;

namespace Models
{
    [Serializable]
    public class Script : Model
    {
        [Link] Clock Clock;
        [Link] Summary Summary;
        [Link] Soil Soil;
        [Link] Plant Wheat;
        Accumulator accumulatedRain;
        
        [Description("Sowing date (d-mmm)")]
        public string SowDate { get; set; }
        [Description("Cultivar to be sown")]
        public string CultivarName { get; set; }
        [Description("Sowing depth (mm)")]
        public double SowingDepth { get; set; }
        [Description("Row spacing (mm)")]
        public double RowSpacing { get; set; }
        [Description("Plant population (/m2)")]
        public double Population { get; set; }
        


        [EventSubscribe("DoManagement")]
        private void OnDoManagement(object sender, EventArgs e)
        {
            if (DateUtilities.WithinDates(SowDate, Clock.Today, SowDate))
            {
                Wheat.Sow(population: Population, cultivar: CultivarName, depth: SowingDepth, rowSpacing: RowSpacing);    
            }
                if(SowDate == "09-Mar")
                {
                    Wheat.SetEmergenceDate("16-Mar");
                }
                if(SowDate == "30-Mar")
                {
                    Wheat.SetEmergenceDate("11-Apr");
                }
                if(SowDate == "19-Apr")
                {
                    Wheat.SetEmergenceDate("30-Apr");
                }
        }
        
    }
}
```
              Operations HarvestEvents
                2018-02-04  [Wheat].Harvest();
                2018-02-04  [Wheat].EndCrop();
              Manager Defoliation: same as Validation.New Zealand.Wakanui2016.Wakanui2016Base.paddock.Manager folder.Defoliation
            Irrigation
            Soil: same as Validation.New Zealand.Leeston2014.Wakanui2014Base.paddock.Soil
            SurfaceOrganicMatter Surface Organic Matter: InitialResidueName=wheat_stubble; InitialResidueType=wheat; InitialResidueMass=1000; InitialStandingFraction=0; InitialCPR=0; InitialCNR=80
            Fertiliser
            MicroClimate: a_interception=0; b_interception=1; c_interception=0; d_interception=0; soil_albedo=0.23; SoilHeatFluxFraction=0.4; MinimumHeightDiffForNewLayer=0; NightInterceptionFraction=0.5; ReferenceHeight=2
            Plant Wheat
            Report DailyReport
            Report HarvestReport
            Report SupReport: same as Validation.New Zealand.Leeston2013.Leeston2013Base.paddock.SupReport
            Manager MaxLeafSize
              script: same as in Validation.New Zealand.Lincoln2014.Rainshelter2013.paddock.MaxLeafSize
            Report MaxLeafSizeReport
            Report SowingReport
            Manager SetCropParameters
            Manager SetCropParameters
            Manager SetCropParameters
            Manager SetCropParameters
            Manager SetCropParameters
            Manager SetCropParameters
            Manager SetCropParameters
            Manager SetCropParameters
            Manager SetCropParameters
            Manager SetCropParameters
            Manager SetCropParameters
            Manager SetCropParameters
            Manager SetCropParameters
            Manager SetCropParameters
            Manager SetCropParameters
            Manager SetCropParameters
            Manager SetCropParameters
            Manager SetCropParameters
            Manager SetCropParameters
            Manager SetCropParameters
            Manager SetCropParameters
            Manager SetCropParameters
            Manager SetCropParameters
            Manager SetCropParameters
            Manager SetCropParameters
            Manager SetCropParameters
            Manager SetCropParameters
            Manager SetCropParameters
            Manager SetCropParameters
            Manager SetCropParameters
            Manager SetCropParameters
            Manager SetCropParameters
            Manager SetCropParameters
            Manager SetCropParameters
            Manager SetCropParameters
            Manager SetCropParameters
            Manager SetCropParameters
            Manager SetCropParameters
            Manager SetCropParameters
            Manager SetCropParameters
            Manager SetCropParameters
            Manager SetCropParameters
            Manager SetCropParameters
            Manager SetCropParameters
            Manager SetCropParameters
            Manager SetCropParameters
            Manager SetCropParameters
            Manager SetCropParameters
            Manager SetCropParameters
            Manager SetCropParameters
            Manager SetCropParameters
            Manager SetCropParameters
            Manager SetCropParameters
            Manager SetCropParameters
            Manager SetCropParameters
            Manager SetCropParameters
            Manager SetCropParameters
            Manager SetCropParameters
            Manager SetCropParameters
            Manager SetCropParameters
            Manager SetCropParameters
            Manager SetCropParameters
            Manager SetCropParameters
            Manager SetCropParameters
            Manager SetCropParameters
            Manager SetCropParameters
            Manager SetCropParameters
            Manager SetCropParameters
            Manager SetCropParameters
            Manager SetCropParameters
            Manager SetCropParameters
            Manager SetCropParameters
            Manager SetCropParameters
            Manager SetCropParameters
            Manager SetCropParameters
            Manager SetCropParameters
            Manager SetCropParameters
            Manager SetCropParameters
            Manager SetCropParameters
            Manager SetCropParameters
            Manager SetCropParameters
            Manager SetCropParameters
            Manager SetCropParameters
            Manager SetCropParameters
            Manager SetCropParameters
            Manager SetCropParameters
            Manager SetCropParameters
            Manager SetCropParameters
            Manager SetCropParameters
            Manager SetCropParameters
            Manager SetCropParameters
            Manager SetCropParameters
            Manager SetCropParameters
            Manager SetCropParameters
            Manager SetCropParameters
            Manager SetCropParameters
            Manager SetCropParameters
            Manager SetCropParameters
            Manager SetCropParameters
            Manager SetCropParameters
            Manager SetCropParameters
            Manager SetCropParameters
            Manager SetCropParameters
            Manager SetCropParameters
            Manager SetCropParameters
          SoilArbitrator Soil Arbitrator
          Manager LocationInfo: same as Validation.New Zealand.Lincoln2014.Rainshelter2013.LocationInfo
      Folder CPTPhenology
        Memo
          A range of soon to be released cultivars have their phenology assesed each year at Plant and Food Research in Lincoln, New Zealand.  Each cultivar is planted on 4 sowing dates representing Autumn, Winter, Early Spring and Late Spring sowings. (approx April, June, Aug, Nov).  Each cultivar is observed for 3 years but a number of standards are included each year or for more than 3 years bacause of the value of the data they provided.
        Experiment CPTCultWakanui
          Factors
            Factor Sow
              Specification=[Clock].StartDate = 2005-04-04,2005-05-27,2006-03-13,2006-05-10,2008-04-11,2008-06-06
          Simulation LincolnCPTWakanui
            Clock: Start=1991-06-08; End=2013-07-01
            Summary summaryfile
            Weather: FileName=lincoln.met
            Zone paddock: Area=1; Slope=0; AspectAngle=0; Altitude=50
              Irrigation
              Soil: SoilType=LincolnSoil; LocalName=Lincoln; Site=Lincoln; NearestTown=Unknown; Region=NZ; NaturalVegetation=Unknown; Latitude=0; Longitude=0
                Physical
                  Thickness  BD   AirDry  LL15  DUL   SAT
                  100        1.3  0.05    0.08  0.31  0.44
                  200        1.3  0.05    0.07  0.3   0.44
                  200        1.3  0.05    0.07  0.28  0.44
                  200        1.3  0.05    0.09  0.31  0.44
                  200        1.3  0.05    0.11  0.3   0.44
                  200        1.3  0.05    0.16  0.28  0.44
                  200        1.3  0.05    0.15  0.3   0.44
                  200        1.3  0.05    0.12  0.34  0.44
                  SoilCrop WheatSoil: LL=[0.08, 0.07, 0.07, 0.09, 0.11, 0.16, 0.15, 0.12]; KL=[0.06, 0.06, 0.06, 0.04, 0.03, 0.02, 0.02, 0.02]; XF=[1, 1, 1, 1, 0.6, 0.4, 0.4, 0.4]
                WaterBalance SoilWater: same as Validation.New Zealand.Leeston2013.Leeston2013Base.paddock.Soil.SoilWater
                Organic: FOMCNRatio=0
                  Thickness  Carbon  SoilCNRatio  FBiom  FInert  FOM
                  100        0.35    0            0.04   0.31    0
                  200        0.27    0            0.03   0.31    0
                  200        0.24    0            0.02   0.31    0
                  200        0.16    0            0.01   0.31    0
                  200        0.16    0            0.01   0.31    0
                  200        0.3     0            0.01   0.25    0
                  200        0.1     0            0.01   0.2     0
                  200        0.1     0            0.01   0.2     0
                Chemical
                  Thickness  NO3N  NH4N  PH
                  100        24.9  1.3   8.5
                  200        16    1     8.5
                  200        9.8   1     8.6
                  200        9.8   0.8   8.6
                  200        2.1   0.8   8.6
                  200        2.1   0.5   8.6
                  200        2.1   0.5   8.6
                  200        2.1   0.5   8.6
                Sample Initial water: Thickness=[100, 200, 200, 200, 200, 200, 200, 200]; SW=[0.27, 0.3, 0.28, 0.25, 0.24, 0.27, 0.27, 0.21]; SWUnits=Volumetric; OCUnits=Total; PHUnits=Water
                CERESSoilTemperature Temperature
                Nutrient
              SurfaceOrganicMatter Surface Organic Matter: InitialResidueName=wheat_stubble; InitialResidueType=wheat; InitialResidueMass=1000; InitialStandingFraction=0; InitialCPR=0; InitialCNR=80
              Fertiliser
              MicroClimate: a_interception=0; b_interception=1; c_interception=0; d_interception=0; soil_albedo=0.23; SoilHeatFluxFraction=0.4; MinimumHeightDiffForNewLayer=0; NightInterceptionFraction=0.5; ReferenceHeight=2
              Plant Wheat
              Report HarvestReport
              Manager SowAndHarvest
                Cultivar = Wakanui
```csharp
using Models.PMF.Phen;
using System;
using Models.Core;
using Models.PMF;
using APSIM.Shared.Utilities;
using System.Xml.Serialization;
        
namespace Models
{
    [Serializable] 
    [System.Xml.Serialization.XmlInclude(typeof(Model))]
    public class Script : Model
    {
        [Link] private Plant Wheat;
        [Link] private Clock Clock;
        [Link] private Simulation sim;
        [Link] private Summary Summary;
        [Link(Type = LinkType.Path, Path = "[Wheat].Phenology")]
        private Phenology phenology;
        
        [Description("Cultivar")]
        public string Cultivar { get; set; }
        
        [XmlIgnore] public bool Sown { get; set; }
        [XmlIgnore] public bool Harvested { get; set; }
        [XmlIgnore] public bool EndSet { get; set; }
        
        [EventSubscribe("StartOfSimulation")]
        private void OnSimulationCommencing(object sender, EventArgs e)
        {
            Sown = false;
            Harvested = false;
            EndSet = false;
        }
        
        [EventSubscribe("DoManagement")]
        private void OnDoManagement(object sender, EventArgs e)
        {
            if (Sown == false)
            {
                Wheat.Sow(population: 200, cultivar: Cultivar, depth: 15, rowSpacing: 150, budNumber: 1);
                Sown = true;
            }
            
            if (phenology.CurrentPhase.Name == "ReadyForHarvesting")
            {
                Wheat.Harvest();
                Wheat.EndCrop();
                Harvested = true;
                Summary.WriteMessage(this, "Flowering reached so setting end date to stop simulation");
            }
            
            if ((Harvested == true) && (EndSet == false))
            {
                sim.Set("Clock.EndDate", Clock.Today.AddDays(1));
                EndSet = true;
            }
        }
    }
}
```
              Report SowingReport
              Manager SetCropParameters
              Manager SetCropParameters
              Manager SetCropParameters
              Manager SetCropParameters
              Manager SetCropParameters
              Manager SetCropParameters
              Manager SetCropParameters
              Manager SetCropParameters
              Manager SetCropParameters
              Manager SetCropParameters
              Manager SetCropParameters
              Manager SetCropParameters
              Manager SetCropParameters
              Manager SetCropParameters
              Manager SetCropParameters
              Manager SetCropParameters
              Manager SetCropParameters
              Manager SetCropParameters
              Manager SetCropParameters
              Manager SetCropParameters
              Manager SetCropParameters
              Manager SetCropParameters
              Manager SetCropParameters
              Manager SetCropParameters
              Manager SetCropParameters
              Manager SetCropParameters
              Manager SetCropParameters
              Manager SetCropParameters
              Manager SetCropParameters
              Manager SetCropParameters
              Manager SetCropParameters
              Manager SetCropParameters
              Manager SetCropParameters
              Manager SetCropParameters
              Manager SetCropParameters
              Manager SetCropParameters
              Manager SetCropParameters
              Manager SetCropParameters
              Manager SetCropParameters
              Manager SetCropParameters
              Manager SetCropParameters
              Manager SetCropParameters
              Manager SetCropParameters
              Manager SetCropParameters
              Manager SetCropParameters
              Manager SetCropParameters
              Manager SetCropParameters
              Manager SetCropParameters
              Manager SetCropParameters
              Manager SetCropParameters
              Manager SetCropParameters
              Manager SetCropParameters
              Manager SetCropParameters
              Manager SetCropParameters
              Manager SetCropParameters
              Manager SetCropParameters
              Manager SetCropParameters
              Manager SetCropParameters
              Manager SetCropParameters
              Manager SetCropParameters
              Manager SetCropParameters
              Manager SetCropParameters
              Manager SetCropParameters
              Manager SetCropParameters
              Manager SetCropParameters
              Manager SetCropParameters
              Manager SetCropParameters
              Manager SetCropParameters
              Manager SetCropParameters
              Manager SetCropParameters
              Manager SetCropParameters
              Manager SetCropParameters
              Manager SetCropParameters
              Manager SetCropParameters
              Manager SetCropParameters
              Manager SetCropParameters
              Manager SetCropParameters
              Manager SetCropParameters
              Manager SetCropParameters
              Manager SetCropParameters
              Manager SetCropParameters
              Manager SetCropParameters
              Manager SetCropParameters
              Manager SetCropParameters
              Manager SetCropParameters
              Manager SetCropParameters
              Manager SetCropParameters
              Manager SetCropParameters
              Manager SetCropParameters
              Manager SetCropParameters
              Manager SetCropParameters
              Manager SetCropParameters
              Manager SetCropParameters
              Manager SetCropParameters
              Manager SetCropParameters
              Manager SetCropParameters
              Manager SetCropParameters
              Manager SetCropParameters
              Manager SetCropParameters
              Manager SetCropParameters
              Manager SetCropParameters
              Manager SetCropParameters
              Manager SetCropParameters
              Manager SetCropParameters
              Manager SetCropParameters
              Report DailyReport: same as Replacements.DailyReport
            SoilArbitrator Soil Arbitrator
            Manager LocationInfo: same as Validation.New Zealand.Lincoln2014.Rainshelter2013.LocationInfo
      PredictedObserved NZObsPred: PredictedTableName=HarvestReport; ObservedTableName=Observed; FieldNameUsedForMatch=Wheat.Phenology.CurrentStageName; AllColumns=false
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