Simulations: Version=213
  DataStore
    ExcelInput: FileNames=[Obs.xlsx]; SheetNames=[wheat]
    PredictedObserved: PredictedTableName=Report_ALL; ObservedTableName=Wheat; FieldNameUsedForMatch=SimulationName; FieldName2UsedForMatch=Clock.Today; AllColumns=false
  Folder Replacements
    Report Report_ALL: EventNames=[Clock].EndOfDay
      VariableNames:
        [Clock].Today
        [Wheat].Phenology.Zadok.Stage
        [Wheat].Phenology.CurrentStageName
        [Wheat].AboveGround.Wt
        [Wheat].Grain.Number
        [Wheat].Grain.Wt
        [Wheat].Leaf.Photosynthesis.FN
        [Swim3].WaterTable
        [Wheat].Leaf.LAI
        [Weather].MaxT as Maxt
        [Weather].MinT as Mint
        [Weather].Radn as Radn
        [Weather].Rain as Rainfall
        [Wheat].Phenology.FloweringDAS
        [Wheat].Phenology.MaturityDAS
        [Weather].Rain
        [Root].WetRootFraction
        [Spike].Wt
        [Leaf].Wt
        [Root].Wt
        [Stem].Wt
        [Spike].HeadNumber
        [Root].Depth
        [Swim3].SW[1]
        [Swim3].SW[3]
        [Leaf].Photosynthesis.RueAct
  Folder Wheat
    Memo
      experimental data from DOI: 10.1111/jac.12486

      Outdoor experiments using canopies of wheat (Triticum aestivum L.), barley
      (Hordeum vulgare L.), oilseed rape (Brassica napus L.) and field pea (Pisum sativum L.)
      were subjected to a 14-day-
      waterlogging
      at early (vegetative) or late (reproductive)
      stages and a non-waterlogged
      treatment (as control). Leaf area index (LAI), radiation
      interception, radiation use efficiency (RUE) and aerial dry matter were monitored
      along the life-cycle;
      quantifying yield and its components at maturity. Wheat was
      able to withstand waterlogging, with similar yields than controls. Barley showed no
      differences in yield at early stage, but late-waterlogging
      resulted in 64%–66%
      lower
      yield owing to fewer spikes/m2 and poor recovery of radiation interception and RUE
    Simulation CK
      Clock: Start=2017-01-01; End=2018-12-31
      Summary SummaryFile
      Weather: FileName=Argentina.met
      SoilArbitrator Soil Arbitrator
      MicroClimate: a_interception=0; b_interception=1; c_interception=0; d_interception=0; SoilHeatFluxFraction=0.4; MinimumHeightDiffForNewLayer=0; NightInterceptionFraction=0.5; ReferenceHeight=2
      Zone Field: Area=1; Slope=0; AspectAngle=0; Altitude=50
        Report Report_ALL: EventNames=[Clock].EndOfDay
          VariableNames:
            [Clock].Today
            [Wheat].Phenology.Zadok.Stage
            [Wheat].Phenology.CurrentStageName
            [Wheat].AboveGround.Wt*10 as Biomass
            [Wheat].Grain.Number
            [Wheat].Grain.Wt*10 as Yield
            [Wheat].Leaf.Photosynthesis.FN
            [Wheat].Leaf.Photosynthesis.FOX
            [Swim3].WaterTable
            [Wheat].Leaf.LAI
            [Weather].MaxT as Maxt
            [Weather].MinT as Mint
            [Weather].Radn as Radn
            [Weather].Rain as Rainfall
        Fertiliser
        Soil: ASCOrder=NA; ASCSubOrder=NA; Country=Argentina; NaturalVegetation=Unknown; Latitude=-34.583; Longitude=-58.483
          Physical
            Thickness  ParticleSizeSand  ParticleSizeSilt  ParticleSizeClay  Rocks  BD     AirDry  LL15   DUL    SAT    KS
            150        5                 65                30                0      1.303  0.059   0.177  0.331  0.438  60.746
            150        5                 65                30                0      1.38   0.057   0.171  0.293  0.422  27.853
            150        5                 65                30                0      1.379  0.065   0.194  0.302  0.432  10.428
            150        5                 65                30                0      1.364  0.069   0.207  0.307  0.444  5.597
            200        5                 65                30                0      1.38   0.07    0.209  0.306  0.44   4.921
            200        5                 65                30                0      1.407  0.069   0.206  0.303  0.43   5.418
            200        5                 65                30                0      1.421  0.068   0.203  0.3    0.424  0.1
            Rocks, ParticleSizeSand, ParticleSizeSilt, ParticleSizeClay source: Calculated
            SoilCrop WheatSoil: LL=[0.2, 0.22, 0.21, 0.214, 0.215, 0.21, 0.207]; KL=[0.07, 0.07, 0.07, 0.065, 0.058, 0.049, 0.041]; XF=[1, 1, 1, 1, 1, 1, 1]
          Organic: FOMCNRatio=40; CarbonUnits=Total
            Thickness  Carbon  SoilCNRatio  FBiom  FInert  FOM
            150        3.626   14           0.04   0.134   417.668
            150        1.915   14           0.031  0.246   287.059
            150        1.151   14           0.014  0.414   197.293
            150        0.622   14           0.01   0.761   135.597
            200        0.464   14           0.01   0.995   82.244
            200        0.476   14           0.01   0.988   49.883
            200        0.458   14           0.01   0.999   30.256
          Chemical: PHUnits=Water
            Thickness  PH     CEC
            150        5.862  16.5035
            150        5.856  12.65375
            150        5.936  10.9348
            150        6.04   9.7445
            200        6.154  9.389
            200        6.252  9.416
            200        6.31   9.3755
            CEC source: Calculated
          Water: Thickness=[150, 150, 150, 150, 200, 200, 200]; InitialValues=[0.331, 0.293, 0.302, 0.307, 0.306, 0.303, 0.3]; FilledFromTop=false
          Nutrient
          Solute NO3: InitialValuesUnits=kg/ha; WaterTableConcentration=0; D0=0; DepthConstant=0; MaxDepthSoluteAccessible=0; RunoffEffectivenessAtMovingSolute=0; MaxEffectiveRunoff=0
            Thickness  InitialValues  Exco  FIP
            150        0              1     1
            150        0              1     1
            150        0              1     1
            150        0              1     1
            200        0              1     1
            200        0              1     1
            200        0              1     1
          Solute NH4: InitialValuesUnits=kg/ha; WaterTableConcentration=0; D0=0; DepthConstant=0; MaxDepthSoluteAccessible=0; RunoffEffectivenessAtMovingSolute=0; MaxEffectiveRunoff=0
            Thickness  InitialValues  Exco  FIP
            150        18.304         1     1
            150        9.152          1     1
            150        18.304         1     1
            150        9.152          1     1
            200        9.152          1     1
            200        9.152          1     1
            200        9.152          1     1
          Solute Urea: same as Wheat.CK.Field.Soil.NO3
          SoilTemperature Temperature
          Swim3: Salb=0.13; CN2Bare=50; CNRed=20; CNCov=0.8; KDul=0.1; PSIDul=-260; VC=true; DTMin=0; DTMax=1440; MaxWaterIncrement=5; SpaceWeightingFactor=0.5; SoluteSpaceWeightingFactor=0.5; Dis=15; Disp=1; A=1; DTHC=0; DTHP=1; vcon1=7.28e-09; vcon2=7.26e-07; eo_time=06:00; eo_durn=720; default_rain_time=00:00; default_rain_duration=720; Diagnostics=false
            SwimSubsurfaceDrain: DrainDepth=10; DrainSpacing=30000; DrainRadius=50; Klat=1000; ImpermDepth=2000; Open=true
        SurfaceOrganicMatter: InitialResidueName=wheat_stubble; InitialResidueType=wheat; InitialResidueMass=500; InitialStandingFraction=0; InitialCPR=0; InitialCNR=100
        Plant Wheat
        Irrigation
        Operations
          2017-07-26  [Wheat].Sow(AGP_FAST,275,30,40)
          2018-07-24  [Wheat].Sow(AGP_FAST,275,30,40)
        Manager Harvesting
          Crop = [Wheat]
```csharp
using APSIM.Shared.Utilities;
using Models.Utilities;
using Models.Soils;
using Models.PMF;
using Models.Core;
using System;
using System.Linq;

namespace Models
{
    [Serializable] 
    public class Script : Model
    {
        [Description("Crop")]
        public IPlant Crop { get; set; }
        
        [EventSubscribe("DoManagement")]
        private void OnDoManagement(object sender, EventArgs e)
        {
            if (Crop.IsReadyForHarvesting)
            {
                Crop.Harvest();
                Crop.EndCrop();
            }
        }
    }
}
```
        Manager Automatic irrigation based on water deficit
          Crop = [Wheat]
          AutoIrrigationOn = True
          FASWThreshold = 0.98
          FASWDepth = 1200
          weeks = 1
          afterSowing = 2
```csharp
using APSIM.Numerics;
using Models.Interfaces;
using APSIM.Shared.Utilities;
using System.Xml.Serialization;
using Models;
using Models.PMF;
using Models.Soils;
using System.Text;
using System.Collections.Generic;
using Models.Core;
using System.Linq;
using System;
using Models.Interfaces;
namespace Models
{
    [Serializable] 
    public class Script : Model
    {
        [Link] private Zone zone;
        [Link] private Irrigation irrigation;
        [Link] private ISoilWater waterBalance;
        [Link] private IPhysical soilPhysical;
        public double FASW { get; set; }
        public double WaterDeficit  { get; set; }
    


        [Description("Crop to irrigate")]
        public IPlant Crop { get; set; }
        
        [Description("Auto irrigation on?")]
        public bool AutoIrrigationOn { get; set; }

        [Description("Threshold fraction available water (0-1)")]
        public double FASWThreshold { get; set; }

        [Description("Soil depth (mm) to which fraction available water is calculated")]
        public double FASWDepth { get; set; }

        [Description("Minimum weeks between irrigations")]
        public double weeks { get; set; }

        [Description("Minimum days after sowing for first irrigation")]
        public int afterSowing { get; set; }

        private double irrigationGap = 0;    // gap between irrigations

        /// <summary>Called at start of simulation. Performs some basic error checking. </summary>
        [EventSubscribe("StartOfSimulation")]
        private void ErrorChecking(object sender, EventArgs args)
        {
            if (Crop == null)
                throw new Exception("No crop was specified in script " + Parent.Name);
        }

        [EventSubscribe("DoManagement")]
        private void OnDoManagement(object sender, EventArgs e)
        {
            if (AutoIrrigationOn && Crop.IsAlive)
            {
                   irrigationGap += 1;                // increment gap between irrigations
                CalculateFASW();                // calc FASW and WaterDeficit
                if ((FASW < FASWThreshold) && (irrigationGap >= weeks * 7))
                {
                    irrigation.Apply(WaterDeficit, depth: 0);
                    irrigationGap = 0;            // reset
                }
            }
            else
            {
                irrigationGap = weeks * 7 - afterSowing - 1;    // allow irrigation a number of days after it becomes alive/sown
            }
        }

        // Calculate the fraction of the potential available sw
        // Calculate the deficit amount from DUL
        private void CalculateFASW()
        {
            double[] LL15 = MathUtilities.Multiply(soilPhysical.LL15, soilPhysical.Thickness);
            double[] DUL = MathUtilities.Multiply(soilPhysical.DUL, soilPhysical.Thickness);
        
            int nlayr = GetLayerIndex(FASWDepth);
            nlayr = Math.Min(nlayr, soilPhysical.Thickness.Length-1);
            double cumdep = MathUtilities.Sum(soilPhysical.Thickness, 0, nlayr, 0.0);    // tricky function that sums up to before nlayr

            double part_layer = MathUtilities.Divide((FASWDepth - cumdep), soilPhysical.Thickness[nlayr], 0.0);

            // note that results may be strange if swdep < ll15
            double avail_sw = (MathUtilities.Sum(waterBalance.SWmm, 0, nlayr, 0.0) + part_layer * waterBalance.SWmm[nlayr])
                            - (MathUtilities.Sum(LL15, 0, nlayr, 0.0) + part_layer * LL15[nlayr]);

            double pot_avail_sw = (MathUtilities.Sum(DUL, 0, nlayr, 0.0) + part_layer * DUL[nlayr])
                                - (MathUtilities.Sum(LL15, 0, nlayr, 0.0) + part_layer * LL15[nlayr]);
            
            FASW = MathUtilities.Divide(avail_sw, pot_avail_sw, 0.0);
            WaterDeficit = MathUtilities.Constrain(pot_avail_sw - avail_sw, 0.0, 100000);
        }

        // Get index of the layer that has this depth in it 
        private int GetLayerIndex(double pointDepth)
        {
            double[] cumThickness = soilPhysical.ThicknessCumulative;
            int layerIdx = 0;
            while ((layerIdx < cumThickness.Length) && (pointDepth > cumThickness[layerIdx]))
            {
                layerIdx += 1;
            }

            return layerIdx;
        }
    }
}
```
        Manager Fertilise at sowing
          Crop = [Wheat]
          FertiliserType = NO3N
          Amount = 200
          FertiliseDepth = 0
```csharp
using Models.Soils;
using System;
using System.Linq;
using Models.Core;
using Models.PMF;
namespace Models
{
    [Serializable]
    public class Script : Model
    {
        [Link] Clock Clock;
        [Link] Fertiliser Fertiliser;
        
        [Description("Crop to be fertilised")]
        public IPlant Crop { get; set; }

        [Description("Type of fertiliser to apply? ")] 
        [Display(Type = DisplayType.FertiliserType)]public string FertiliserType { get; set; }
    
        [Description("Amount of fertiliser to be applied (kg/ha)")]
        public double Amount { get; set; }
        
        [Description("Fertilise depth (mm)")]
        public double FertiliseDepth { get; set; }
        
        [EventSubscribe("Sowing")]
        private void OnSowing(object sender, EventArgs e)
        {
            Model crop = sender as Model;
            if (Crop != null && crop.Name.ToLower() == (Crop as IModel).Name.ToLower())
                Fertiliser.Apply(amount: Amount, type: FertiliserType, depth: FertiliseDepth);
        }
    }
}
```
        Manager Fertilise topup
          FertiliserType = NO3N
          Threshold = 50
          FertiliseDepth = 0
```csharp
using APSIM.Numerics;
using Models.Soils.Nutrients;
using System.Linq;
using System;
using Models.Core;
using Models.PMF;
using Models.Soils.Nutrients;
using APSIM.Shared.Utilities;
using Models.Soils;
namespace Models
{
    [Serializable]
    public class Script : Model
    {
        [Link] Clock Clock;
        [Link] Fertiliser Fertiliser;
        [Link(ByName=true)] Solute NO3;

        [Description("Type of fertiliser to apply? ")] 
        [Display(Type = DisplayType.FertiliserType)]public string FertiliserType { get; set; }
    
        [Description("Threshold amount of NO3 to topup to (kg/ha)")]
        public double Threshold { get; set;}
        
        [Description("Fertilise depth (mm)")]
        public double FertiliseDepth { get; set; }
        
        [EventSubscribe("DoManagement")]
        private void OnDoManagement(object sender, EventArgs e)
        {
            double Amount = Threshold - MathUtilities.Sum(NO3.kgha);
            Fertiliser.Apply(amount: Amount, type: FertiliserType, depth: FertiliseDepth);
        }
    }
}
```
    Simulation Early WL
      Clock: Start=2017-01-01; End=2018-12-31
      Summary SummaryFile
      Weather: FileName=Argentina.met
      SoilArbitrator Soil Arbitrator
      Zone Field: Area=1; Slope=0; AspectAngle=0; Altitude=50
        Report Report_ALL: VariableNames=[Clock].Today; EventNames=[Clock].EndOfDay
        Fertiliser
        Soil: ASCOrder=NA; ASCSubOrder=NA; Country=Argentina; Latitude=-34.583; Longitude=-58.483
          Water: Thickness=[150, 150, 150, 150, 200, 200, 200]; InitialValues=[0.331, 0.293, 0.302, 0.307, 0.306, 0.303, 0.3]; FilledFromTop=false
          Physical: same as Wheat.CK.Field.Soil.Physical
          Organic: same as Wheat.CK.Field.Soil.Organic
          Chemical: same as Wheat.CK.Field.Soil.Chemical
          Solute NO3: same as Wheat.CK.Field.Soil.NO3
          Solute NH4: same as Wheat.CK.Field.Soil.NH4
          Solute Urea: same as Wheat.CK.Field.Soil.NO3
          Nutrient
          Swim3: same as Wheat.CK.Field.Soil.Swim3
          SoilTemperature CERESSoilTemperature
        SurfaceOrganicMatter: InitialResidueName=wheat_stubble; InitialResidueType=wheat; InitialResidueMass=500; InitialStandingFraction=0; InitialCPR=0; InitialCNR=100
        Irrigation
        Plant Wheat
        MicroClimate: a_interception=0; b_interception=1; c_interception=0; d_interception=0; SoilHeatFluxFraction=0.4; MinimumHeightDiffForNewLayer=0; NightInterceptionFraction=0.5; ReferenceHeight=2
        Manager Watertable depth
```csharp
using System;
using Models.Core;
using Models.Interfaces;
using Models.PMF;
using Models.Soils;
using APSIM.Shared.Utilities;

namespace Models
{
    [Serializable]
    public class Script : Model
    {
        [Link] Clock clock;
        [Link] IClock Clock;
        [Link] ISummary Summary;
        [Link] Swim3 swim;
        [Link] SwimSubsurfaceDrain ssd;

        [EventSubscribe("DoManagement")]
        private void DoDailyCalculations(object sender, EventArgs e)
        {
            TimeSpan span = clock.EndDate - clock.StartDate;
            double simulation_days = Clock.FractionComplete * span.TotalDays;
            
            if (simulation_days <= 247) {
                // we are in the period prior to the water table treatment
                // Water is flowing in to keep water table at 20cm and outflow tap is open
                swim.SetLowerBCForGivenPotential(15); //bbc_potential = 15;
                
                // subsurface_drain_open = true
            }

            if (simulation_days >= 248 && simulation_days < 262) {
                // we are in the period after to the water table treatment but prior to anthesis
                // Water is flowing in to keep water table at 20cm and outflow tap is open
                swim.SetLowerBCForGivenPotential(120); //bbc_potential = 15;
                //subsurface_drain_open = true
            }

            if (simulation_days >= 262 && simulation_days < 300) {
                // we are in the period after to the water table treatment but prior to anthesis
                // Water is flowing in to keep water table at 20cm and outflow tap is open
                swim.SetLowerBCForGivenPotential(15); //bbc_potential = 15;
                //subsurface_drain_open = true
            }


            if (simulation_days >= 300 && simulation_days < 530) {
                // we are in the period after anthesis
                // No water flowing in and outflow tap is open
                swim.SetLowerBCForGradient(-1); //bbc_gradient = -1;
                //subsurface_drain_open = true
            }
   
               if (simulation_days >= 624 && simulation_days < 638) {
                // we are in the period after to the water table treatment but prior to anthesis
                // Water is flowing in to keep water table at 20cm and outflow tap is open
                swim.SetLowerBCForGivenPotential(120); //bbc_potential = 15;
                //subsurface_drain_open = true
            }
            
               if (simulation_days >= 638 && simulation_days < 660) {
                // we are in the period after to the water table treatment but prior to anthesis
                // Water is flowing in to keep water table at 20cm and outflow tap is open
                swim.SetLowerBCForGivenPotential(15); //bbc_potential = 15;
                //subsurface_drain_open = true
            }        
            
               if (simulation_days >= 661) {
                // we are in the period after anthesis
                // No water flowing in and outflow tap is open
                swim.SetLowerBCForGradient(-1); //bbc_gradient = -1;
                //subsurface_drain_open = true
            }
        
        }
    }
}
```
        Operations: same as Wheat.CK.Field.Operations
        Manager Harvesting: same as Wheat.CK.Field.Harvesting
        Manager Automatic irrigation based on water deficit: same as Wheat.CK.Field.Automatic irrigation based on water deficit
        Manager Fertilise at sowing: same as Wheat.CK.Field.Fertilise at sowing
        Manager Fertilise topup
          FertiliserType = NO3N
          Threshold = 100
          FertiliseDepth = 0
          script: same as in Wheat.CK.Field.Fertilise topup
    Simulation Late WL
      Clock: Start=2017-01-01; End=2018-12-31
      Summary SummaryFile
      Weather: FileName=Argentina.met
      SoilArbitrator Soil Arbitrator
      Zone Field: Area=1; Slope=0; AspectAngle=0; Altitude=50
        Report Report_ALL: EventNames=[Clock].EndOfDay
          VariableNames:
            [Clock].Today
            [Wheat].Phenology.Zadok.Stage
            [Wheat].Phenology.CurrentStageName
            [Wheat].Phenology.FloweringDAS
            [Wheat].Phenology.MaturityDAS
            [Wheat].AboveGround.Wt*10 as Biomass
            [Wheat].Grain.Number
            [Wheat].Grain.Wt*10 as Yield
            [Wheat].Leaf.Photosynthesis.FN
            [Wheat].Leaf.Photosynthesis.FOX
            [Swim3].WaterTable
            [Weather].Rain
            [Wheat].Leaf.LAI
            [Root].WetRootFraction
            [Spike].Wt
            [Leaf].Wt
            [Root].Wt
            [Stem].Wt
            [Spike].HeadNumber
            [Leaf].Photosynthesis.FOX.PersistentReduction
            [Leaf].Photosynthesis.FOX.FOXToday
        Fertiliser
        Soil: ASCOrder=NA; ASCSubOrder=NA; Country=Argentina; NaturalVegetation=Unknown; Latitude=-34.583; Longitude=-58.483
          Water: FilledFromTop=false
            Thickness=[10, 10, 10, 10, 10, 10, 240, 100, 50, 50, 50, 50, 50, 50, 50, 50, 50, 50, 50, 50, 50, 60, 40, 50]
            InitialValues=[0.331, 0.331, 0.331, 0.293, 0.293, 0.293, 0.302, 0.302, 0.302, 0.307, 0.307, 0.307, 0.306, 0.306, 0.306, 0.306, 0.303, 0.303, 0.303, 0.303, 0.331, 0.331, 0.331, 0.331]
          Physical
            Thickness  ParticleSizeSand  ParticleSizeSilt  ParticleSizeClay  Rocks  BD     AirDry  LL15   DUL    SAT    KS
            10         5                 65                30                0      1.303  0.059   0.177  0.331  0.438  60.746
            10         5                 65                30                0      1.303  0.059   0.177  0.331  0.438  60.746
            10         5                 65                30                0      1.303  0.059   0.177  0.331  0.438  60.746
            10         5                 65                30                0      1.38   0.057   0.171  0.293  0.422  27.853
            10         5                 65                30                0      1.38   0.057   0.171  0.293  0.422  27.853
            10         5                 65                30                0      1.38   0.057   0.171  0.293  0.422  27.853
            240        5                 65                30                0      1.379  0.065   0.194  0.302  0.432  10.428
            100        5                 65                30                0      1.379  0.065   0.194  0.302  0.432  10.428
            50         5                 65                30                0      1.379  0.065   0.194  0.302  0.432  10.428
            50         5                 65                30                0      1.364  0.069   0.207  0.307  0.444  5.597
            50         5                 65                30                0      1.364  0.069   0.207  0.307  0.444  5.597
            50         5                 65                30                0      1.364  0.069   0.207  0.307  0.444  5.597
            50         5                 65                30                0      1.38   0.07    0.209  0.306  0.44   4.921
            50         5                 65                30                0      1.38   0.07    0.209  0.306  0.44   4.921
            50         5                 65                30                0      1.38   0.07    0.209  0.306  0.44   4.921
            50         5                 65                30                0      1.38   0.07    0.209  0.306  0.44   4.921
            50         5                 65                30                0      1.407  0.069   0.206  0.303  0.43   5.418
            50         5                 65                30                0      1.407  0.069   0.206  0.303  0.43   5.418
            50         5                 65                30                0      1.407  0.069   0.206  0.303  0.43   5.418
            50         5                 65                30                0      1.407  0.069   0.206  0.303  0.43   5.418
            50         5                 65                30                0      1.303  0.059   0.177  0.331  0.438  60.746
            60         5                 65                30                0      1.303  0.059   0.177  0.331  0.438  60.746
            40         5                 65                30                0      1.303  0.059   0.177  0.331  0.438  60.746
            50         5                 65                30                0      1.303  0.059   0.177  0.331  0.438  60.746
            Rocks, ParticleSizeSand, ParticleSizeSilt, ParticleSizeClay source: Calculated (layer 1, 2, 3, 4, 5, 6, 7)
            SoilCrop WheatSoil
              LL=[0.2, 0.2, 0.2, 0.22, 0.22, 0.22, 0.21, 0.21, 0.21, 0.214, 0.214, 0.214, 0.215, 0.215, 0.215, 0.215, 0.21, 0.21, 0.21, 0.21, 0.2, 0.2, 0.2, 0.2]
              KL=[0.07, 0.07, 0.07, 0.07, 0.07, 0.07, 0.07, 0.07, 0.07, 0.065, 0.065, 0.065, 0.058, 0.058, 0.058, 0.058, 0.049, 0.049, 0.049, 0.049, 0.07, 0.07, 0.07, 0.07]
              XF=[1, 1, 1, 1, 1, 1, 1, 1, 1, 1, 1, 1, 1, 1, 1, 1, 1, 1, 1, 1, 1, 1, 1, 1]
          Organic: same as Wheat.CK.Field.Soil.Organic
          Chemical: same as Wheat.CK.Field.Soil.Chemical
          Solute NO3: InitialValuesUnits=kg/ha; WaterTableConcentration=0; D0=0; DepthConstant=0; MaxDepthSoluteAccessible=0; RunoffEffectivenessAtMovingSolute=0; MaxEffectiveRunoff=0
            Thickness  InitialValues  Exco  FIP
            10         30.506         1     1
            10         15.253         1     1
            10         30.506         1     1
            10         15.253         1     1
            10         15.253         1     1
            10         15.253         1     1
            240        15.253         1     1
            100        30.506         1     1
            50         15.253         1     1
            50         30.506         1     1
            50         15.253         1     1
            50         15.253         1     1
            50         15.253         1     1
            50         15.253         1     1
            50         30.506         1     1
            50         15.253         1     1
            50         30.506         1     1
            50         15.253         1     1
            50         30.506         1     1
            50         15.253         1     1
            50         15.253         1     1
            60         15.253         1     1
            40         15.253         1     1
            50         15.253         1     1
          Solute NH4: InitialValuesUnits=kg/ha; WaterTableConcentration=0; D0=0; DepthConstant=0; MaxDepthSoluteAccessible=0; RunoffEffectivenessAtMovingSolute=0; MaxEffectiveRunoff=0
            Thickness=[10, 10, 10, 10, 10, 10, 240, 100, 50, 50, 50, 50, 50, 50, 50, 50, 50, 50, 50, 50, 50, 60, 40, 50]
            InitialValues=[18.304, 9.152, 18.304, 9.152, 9.152, 9.152, 9.152, 18.304, 9.152, 18.304, 9.152, 9.152, 9.152, 9.152, 18.304, 9.152, 18.304, 9.152, 18.304, 9.152, 18.304, 9.152, 9.152, 9.152, 9.152]
            Exco=[1, 1, 1, 1, 1, 1, 1, 1, 1, 1, 1, 1, 1, 1, 1, 1, 1, 1, 1, 1, 1, 1, 1, 1, 1]
            FIP=[1, 1, 1, 1, 1, 1, 1, 1, 1, 1, 1, 1, 1, 1, 1, 1, 1, 1, 1, 1, 1, 1, 1, 1, 1]
          Solute Urea: InitialValuesUnits=kg/ha; WaterTableConcentration=0; D0=0; DepthConstant=0; MaxDepthSoluteAccessible=0; RunoffEffectivenessAtMovingSolute=0; MaxEffectiveRunoff=0
            Thickness  InitialValues  Exco  FIP
            10         0              1     1
            10         0              1     1
            10         0              1     1
            10         0              1     1
            10         0              1     1
            10         0              1     1
            240        0              1     1
            100        0              1     1
            50         0              1     1
            50         0              1     1
            50         0              1     1
            50         0              1     1
            50         0              1     1
            50         0              1     1
            50         0              1     1
            50         0              1     1
            50         0              1     1
            50         0              1     1
            50         0              1     1
            50         0              1     1
            50         0              1     1
            60         0              1     1
            40         0              1     1
            50         0              1     1
          Nutrient
          Swim3: Salb=0.13; CN2Bare=50; CNRed=20; CNCov=0.8; KDul=0.1; PSIDul=-260; VC=true; DTMin=0; DTMax=1440; MaxWaterIncrement=2; SpaceWeightingFactor=0.5; SoluteSpaceWeightingFactor=0.5; Dis=15; Disp=1; A=1; DTHC=0; DTHP=1; vcon1=7.28e-09; vcon2=7.26e-07; eo_time=06:00; eo_durn=720; default_rain_time=00:00; default_rain_duration=720; Diagnostics=false
            SwimSubsurfaceDrain: DrainDepth=10; DrainSpacing=30000; DrainRadius=50; Klat=1000; ImpermDepth=2000; Open=true
          SoilTemperature CERESSoilTemperature
        SurfaceOrganicMatter: InitialResidueName=wheat_stubble; InitialResidueType=wheat; InitialResidueMass=500; InitialStandingFraction=0; InitialCPR=0; InitialCNR=100
        Irrigation
        Plant Wheat
        MicroClimate: a_interception=0; b_interception=1; c_interception=0; d_interception=0; SoilHeatFluxFraction=0.4; MinimumHeightDiffForNewLayer=0; NightInterceptionFraction=0.5; ReferenceHeight=2
        Operations: same as Wheat.CK.Field.Operations
        Manager Harvesting: same as Wheat.CK.Field.Harvesting
        Manager Automatic irrigation based on water deficit: same as Wheat.CK.Field.Automatic irrigation based on water deficit
        Manager Fertilise at sowing
          Crop = [Wheat]
          FertiliserType = UreaN
          Amount = 150
          FertiliseDepth = 30
          script: same as in Wheat.CK.Field.Fertilise at sowing
        Manager Watertable depth
```csharp
using System;
using Models.Core;
using Models.Interfaces;
using Models.PMF;
using Models.Soils;
using APSIM.Shared.Utilities;

namespace Models
{
    [Serializable]
    public class Script : Model
    {
        [Link] Clock clock;
        [Link] IClock Clock;
        [Link] ISummary Summary;
        [Link] Swim3 swim;
        [Link] SwimSubsurfaceDrain ssd;

        [EventSubscribe("DoManagement")]
        private void DoDailyCalculations(object sender, EventArgs e)
        {
            TimeSpan span = clock.EndDate - clock.StartDate;
            double simulation_days = Clock.FractionComplete * span.TotalDays;
            
            if (simulation_days <= 277) {
                // we are in the period prior to the water table treatment
                // Water is flowing in to keep water table at 20cm and outflow tap is open
                swim.SetLowerBCForGivenPotential(15); //bbc_potential = 15;
                
                // subsurface_drain_open = true
            }

            if (simulation_days >= 278 && simulation_days < 292) {
                // we are in the period after to the water table treatment but prior to anthesis
                // Water is flowing in to keep water table at 20cm and outflow tap is open
                swim.SetLowerBCForGivenPotential(120); //bbc_potential = 15;
                //subsurface_drain_open = true
            }

            if (simulation_days >= 292 && simulation_days < 300) {
                // we are in the period after to the water table treatment but prior to anthesis
                // Water is flowing in to keep water table at 20cm and outflow tap is open
                swim.SetLowerBCForGivenPotential(15); //bbc_potential = 15;
                //subsurface_drain_open = true
            }


            if (simulation_days >= 300 && simulation_days < 654) {
                // we are in the period after anthesis
                // No water flowing in and outflow tap is open
                swim.SetLowerBCForGradient(-1); //bbc_gradient = -1;
                //subsurface_drain_open = true
            }
   
               if (simulation_days >= 654 && simulation_days < 668) {
                // we are in the period after to the water table treatment but prior to anthesis
                // Water is flowing in to keep water table at 20cm and outflow tap is open
                swim.SetLowerBCForGivenPotential(120); //bbc_potential = 15;
                //subsurface_drain_open = true
            }
            
               if (simulation_days >= 668 && simulation_days < 700) {
                // we are in the period after to the water table treatment but prior to anthesis
                // Water is flowing in to keep water table at 20cm and outflow tap is open
                swim.SetLowerBCForGivenPotential(15); //bbc_potential = 15;
                //subsurface_drain_open = true
            }        
            
               if (simulation_days >= 701) {
                // we are in the period after anthesis
                // No water flowing in and outflow tap is open
                swim.SetLowerBCForGradient(-1); //bbc_gradient = -1;
                //subsurface_drain_open = true
            }
        
        }
    }
}
```
        Manager Fertilise topup
          FertiliserType = UreaN
          Threshold = 300
          FertiliseDepth = 30
          script: same as in Wheat.CK.Field.Fertilise topup
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