Simulations: Version=26
  Memo TitlePage
    # The APSIM Wheat Model

    _Brown, H.E., Huth, N.I. and Holzworth, D.P._
  Memo Introduction
    The APSIM wheat model has been developed using the Plant Modelling Framework (PMF) of [brown_plant_2014]. This new framework provides a library of plant organ and process submodels that can be coupled, at runtime, to construct a model in much the same way that models can be coupled to construct a simulation. This means that dynamic composition of lower level process and organ classes (e.g. photosynthesis, leaf) into larger constructions (e.g. maize, wheat, sorghum) can be achieved by the model developer without additional coding.

    The wheat model consists of:

    * a phenology model to simulate development through sequential developmental phases
    * a structure model to simulate plant morphology
    * a collection of organs to simulate the various plant parts
    * an arbitrator to allocate resources (N, biomass) to the various plant organs

    This work builds upon earlier APSIM Wheat models such as NWheat ([Asseng200225], [KeatingNWheat]), NWheatS ([Asseng1998163]), Cropmod-Wheat ([Wang2002GenericCropModel]), and the earlier versions developed in Plant (<a href=\"http://www.apsim.info/Documentation/Model,CropandSoil/CropModuleDocumentation/Wheat.aspx">APSIM Wheat 7.5</a>") and then within the Plant Modelling Framework ([brown_plant_2014]).
  Replacements
    Report HarvestReport: EventNames=[Wheat].Harvesting
      VariableNames:
        [Clock].Today
        [Wheat].Phenology.CurrentPhaseName
        [Wheat].Phenology.CurrentStageName
        [Wheat].Phenology.FlagLeafDAS.Value()
        [Wheat].Phenology.FloweringDAS.Value()
        [Wheat].Phenology.MaturityDAS.Value()
        [Wheat].Grain.Wt
        [Wheat].Grain.N
        [Wheat].Grain.Number
        [Wheat].Grain.Nconc
        [Wheat].AboveGround.Wt
        [Wheat].AboveGround.N
        [Wheat].Grain.Protein
        [Wheat].Grain.Size
        [Wheat].Structure.HaunStage.Value()TerminalSpikelet.Value()
        [Wheat].Structure.FinalLeafNumber.Value()
        [Wheat].Structure.MainStemPopn
        [Wheat].SowingData.Cultivar
        [Wheat].SowingDate.DayOfYear
        [Wheat].Leaf.CohortMaxSize
        [Clock].StartDate
    Report DailyReport: EventNames=[Clock].DoReport
      VariableNames:
        [Clock].Today
        [Weather].Mint
        [Soil].SoilWater.SW
        sum([Soil].SoilWater.SWmm) as ProfileWater
        ([Soil].SoilWater.Eo * [Wheat].Leaf.CoverGreen) as ETestimate
        sum([Soil].SoilNitrogen.NO3) as TotalNO3
        [Wheat].AboveGround.N
        [Wheat].AboveGround.Wt
        [Wheat].AboveGroundLive.N
        [Wheat].AboveGroundLive.Wt
        [Wheat].AboveGroundDead.N
        [Wheat].AboveGroundDead.Wt
        [Wheat].Arbitrator.DM.TotalPlantDemand
        [Wheat].Arbitrator.DM.TotalFixationSupply
        [Wheat].Arbitrator.DM.NotAllocated
        [Wheat].Ear.N
        [Wheat].Ear.Nconc
        [Wheat].Ear.Wt
        [Wheat].Grain.N
        [Wheat].Grain.NConc
        [Wheat].Grain.Number
        [Wheat].Grain.Size
        [Wheat].Grain.Wt
        [Wheat].Leaf.AppearedCohortNo
        [Wheat].Leaf.CoverDead
        [Wheat].Leaf.CoverGreen
        [Wheat].Leaf.CoverTotal
        [Wheat].Leaf.Dead.N
        [Wheat].Leaf.Dead.NConc
        [Wheat].Leaf.Dead.Wt
        [Wheat].Leaf.DeadCohortNo
        [Wheat].Leaf.SenescingCohortNo
        [Wheat].Leaf.ExpandedCohortNo
        [Wheat].Leaf.Fn
        [Wheat].Leaf.Fw
        [Wheat].Leaf.Height
        [Wheat].Leaf.InitialisedCohortNo
        [Wheat].Leaf.LAI
        [Wheat].Leaf.Live.N
        [Wheat].Leaf.Live.NConc
        [Wheat].Leaf.Live.Wt
        [Wheat].Leaf.SpecificArea
        [Wheat].Leaf.SpecificNitrogen
        [Wheat].Leaf.Transpiration
        [Wheat].Leaf.Photosynthesis.FVPD
        [Wheat].Leaf.Photosynthesis.Ft
        [Wheat].Phenology.CurrentPhaseName
        [Wheat].Phenology.CurrentStageName
        [Wheat].Phenology.DailyVernalisation.Value()
        [Wheat].Phenology.MeanTemp.Value()
        [Wheat].Phenology.Photoperiod.Value()
        [Wheat].Phenology.Stage
        [Wheat].Phenology.ThermalTime.Value()
        [Wheat].Phenology.Vrn1.Value()
        [Wheat].Phenology.Vrn2.Value()
        [Wheat].Phenology.Vrn4.Value()
        [Wheat].Phenology.Zadok.Stage
        [Wheat].Root.Depth
        [Wheat].Root.N
        [Wheat].Root.Wt
        [Wheat].Root.Nconc
        [Wheat].Root.WaterUptake
        [Wheat].Root.WaterTensionFactor
        [Wheat].Root.RootFrontVelocity.TemperatureFactor.Value()
        [Wheat].Spike.N
        [Wheat].Spike.NConc
        [Wheat].Spike.Wt
        [Wheat].Spike.Live.StorageWt
        [Wheat].Stem.N
        [Wheat].Stem.NConc
        [Wheat].Stem.Wt
        [Wheat].Stem.PercentWSC
        [Wheat].Stem.Live.StorageWt
        [Wheat].StemPlusSpike.Wt
        [Wheat].StemPlusSpike.N
        [Wheat].SowingData.Cultivar
        [Wheat].Structure.HaunStage.Value()TerminalSpikelet.Value()
        [Wheat].Structure.HaunStage.Value()
        [Wheat].Structure.Height
        [Wheat].Structure.LeafTipsAppeared
        [Wheat].Structure.FinalLeafNumber.Value()
        [Wheat].Structure.FinalLeafNumber.ValueToHold.PhotoPLeaves.Value()
        [Wheat].Structure.MainStemPopn
        [Wheat].Structure.MeanTillerGrowthRate.Value()
        [Wheat].Structure.TotalStemPopn
        [Wheat].Total.N
        [Wheat].Total.Wt
        [SurfaceOrganicMatter].Wt
        ([Wheat].Leaf.Transpiration + [Soil].SoilWater.Es + [MicroClimate].interception) as ET
        sum([Soil].SoilNitrogen.NO3) as TotalSoilNitrogen
    Manager MaxLeafSize
```csharp
using System;
using System.Collections.Generic;
using System.Xml.Serialization;
using Models.Core;
using Models.Interfaces;
using Models.PMF;
using Models.Soils.Arbitrator;
using APSIM.Shared.Utilities;



namespace Models
{
    [Serializable] 
    public class Script : Model
    {
        [Link] Clock Clock;
        [Link] Plant Wheat;
        
        public event EventHandler LeafReport;
        
        [XmlIgnore] public int LeafPosition { get; set; }
        [XmlIgnore] public double MaxLeafSize { get; set; }
        
        [EventSubscribe("DoManagement")]
        private void OnDoManagement(object sender, EventArgs e)
        {
            if ((Wheat.Leaf.ExpandedCohortNo > LeafPosition) & (Wheat.Structure.NextLeafProportion == 1))
            {
                LeafPosition = (int)
                Wheat.Leaf.ExpandedCohortNo;
                MaxLeafSize = Wheat.Leaf.CohortSize[LeafPosition - 1];
                LeafReport.Invoke(this, new EventArgs());
            }
        }
    }
}
```
    Report MaxLeafSizeReport: EventNames=[MaxLeafSize].Script.LeafReport
      VariableNames:
        [MaxLeafSize].Script.MaxLeafSize
        [MaxLeafSize].Script.LeafPosition
    Manager Harvesting
```csharp
using System;
using Models.Core;
using System.Collections.Generic;
using System.Text;
using Models.Soils;
using Models.PMF;
using Models;
using System.Xml.Serialization;
using APSIM.Shared.Utilities;

namespace Models
{
    [Serializable] 
    public class Script : Model
    {
        [Link] Plant Wheat;
        [EventSubscribe("DoManagement")]
        private void OnDoManagement(object sender, EventArgs e)
        {
            if (Wheat.Phenology.CurrentPhaseName == "Maturing")
            {
                Wheat.Harvest();
                Wheat.EndCrop();
            }
        }
    }
}
```
  DataStore
    ExcelInput Observed: FileName=Observed.xlsx; SheetNames=[Observed, MaxLeafSize]
    PredictedObserved DailyObsPred: PredictedTableName=DailyReport; ObservedTableName=Observed; FieldNameUsedForMatch=Clock.Today
      Tests: POName=DailyObsPred
        AcceptedStats:
          Name                   n     Slope         Intercept   SEslope      SEintercept  R2           RMSE       NSE         ME          MAE         RSR
          ET                     123   1.13169       -0.428525   0.0437149    0.169573     0.847065     0.75711    0.750672    0.0416707   0.558234    0.497294
          ProfileWater           1327  0.876588      76.0389     0.0130203    5.47947      0.7738       58.7876    0.702733    25.8355     33.06       0.545016
          Soil.SoilWater.SW(1)   1300  0.000187106   0.209326    0.000113886  0.00216848   0.00207521   18.9789    -0.0810339  -5.20763    5.28548     1.03933
          Soil.SoilWater.SW(10)  8     -0.411168     0.612361    0.204164     0.087484     0.403332     0.0113816  -3.15811    0.00772724  0.00919543  1.90744
          Soil.SoilWater.SW(2)   1323  -9.03035e-05  0.237103    7.90585e-05  0.00185795   0.000986689  23.4358    -0.0848838  -6.54813    6.60052     1.04118
          Soil.SoilWater.SW(3)   1323  7.41365e-05   0.225765    6.63683e-05  0.00193967   0.000943693  29.1595    -0.0857037  -8.19945    8.22086     1.04158
          Soil.SoilWater.SW(4)   1323  0.00032245    0.209832    5.67479e-05  0.00181599   0.0238581    31.9313    -0.0847602  -8.95944    8.97693     1.04112
          Soil.SoilWater.SW(5)   1323  0.000184327   0.244192    5.45151e-05  0.00180824   0.00858025   33.0939    -0.0856543  -9.31536    9.33089     1.04155
          Soil.SoilWater.SW(6)   1218  0.983201      0.00665286  0.00580358   0.00166975   0.959354     0.0168556  0.958159    0.00202203  0.00893392  0.204467
          Soil.SoilWater.SW(7)   1194  0.995766      0.00138347  0.00547865   0.00136097   0.965173     0.0121361  0.964171    0.00036727  0.00674653  0.189207
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        AcceptedStatsName=Name n Slope Intercept SEslope SEintercept R2 RMSE NSE ME MAE RSR
    PredictedObserved HarvestObsPred: PredictedTableName=HarvestReport; ObservedTableName=Observed; FieldNameUsedForMatch=Wheat.Phenology.CurrentStageName
      Tests: POName=HarvestObsPred
        AcceptedStats:
          Name                                  n    Slope      Intercept  SEslope     SEintercept  R2          RMSE        NSE         ME           MAE         RSR
          Wheat.AboveGround.N                   67   1.12809    -1.00273   0.0391678   0.525848     0.927336    2.09151     0.875576    0.540148     1.59606     0.350095
          Wheat.AboveGround.Wt                  211  1.01911    34.1751    0.0202867   28.6588      0.923515    188.663     0.904426    58.5184      140.453     0.308417
          Wheat.Grain.N                         135  1.07639    -0.257745  0.0362834   0.353004     0.868717    1.79883     0.808865    0.415699     1.36719     0.435568
          Wheat.Grain.Nconc                     136  0.52548    0.0109277  0.0578165   0.00130116   0.381364    0.00332647  0.31597     0.000420536  0.00251003  0.824015
          Wheat.Grain.Number                    195  0.819153   2260.06    0.0213448   308.959      0.88414     2247.71     0.879203    -81.8409     1634.74     0.346666
          Wheat.Grain.Protein                   114  0.424157   7.85561    0.0562272   0.726492     0.336911    2.10436     0.263918    0.550644     1.57133     0.854181
          Wheat.Grain.Wt                        233  0.978713   11.017     0.0292591   15.5104      0.828875    103.644     0.801774    0.879252     78.6576     0.444269
          Wheat.Leaf.CohortMaxSize(1)           10   0.0270759  255.563    0.0327969   7.48653      0.078506    51.271      -0.92608    36.4016      40.5202     1.31661
          Wheat.Leaf.CohortMaxSize(10)          10   1.11919    -412.466   0.256733    521.362      0.703745    224.554     -0.300948   -171.57      207.903     1.08206
          Wheat.Leaf.CohortMaxSize(11)          10   0.825212   365.905    0.266736    598.083      0.54471     196.601     0.391552    -23.5263     115.224     0.740002
          Wheat.Leaf.CohortMaxSize(12)          10   0.848404   253.801    0.223896    493.954      0.642195    151.745     0.416747    -79.2873     105.917     0.724519
          Wheat.Leaf.CohortMaxSize(13)          10   1.09708    -403.529   1.01788     2346.69      0.126797    703.826     -7.88491    -180.887     351.071     2.82779
          Wheat.Leaf.CohortMaxSize(14)          10   1.30676    -642.351   0.429337    1019.71      0.536608    603.245     -0.59098    71.3164      415.854     1.19661
          Wheat.Leaf.CohortMaxSize(15)          9    -0.26027   2713.41    0.159916    364.78       0.274529    585.946     -0.830732   -109.076     515.056     1.27566
          Wheat.Leaf.CohortMaxSize(16)          3    -0.645839  2788.84    7.95817     13511.1      0.00654291  1245.82     -65.0428    6.01155      1116.21     6.6354
          Wheat.Leaf.CohortMaxSize(17)          2    3.1965     -3522.27   0           0            1           590.025     -4.43529    -197.771     555.892     1.64853
          Wheat.Leaf.CohortMaxSize(18)          1    -          -          -           -            -           985.267     -INF        985.267      985.267     -
          Wheat.Leaf.CohortMaxSize(2)           10   0.0630555  275.197    0.29264     121.589      0.00577     139.081     -3.00585    -108.611     115.388     1.89875
          Wheat.Leaf.CohortMaxSize(3)           10   0.289291   221.125    0.270354    144.318      0.125205    181.922     -2.6244     -152.132     163.333     1.80609
          Wheat.Leaf.CohortMaxSize(4)           10   0.345581   263.167    0.345159    223.342      0.111353    208.379     -1.99176    -152.884     173.867     1.64091
          Wheat.Leaf.CohortMaxSize(5)           10   0.249259   458.154    0.277019    225.53       0.0919017   229.975     -0.868592   -139.856     146.902     1.29682
          Wheat.Leaf.CohortMaxSize(6)           10   0.345905   476.527    0.195687    187.624      0.280871    242.414     -0.0368856  -130.978     145.477     0.966021
          Wheat.Leaf.CohortMaxSize(7)           10   0.441949   501.987    0.142766    157.184      0.545013    176.986     0.296106    -101.041     122.714     0.79593
          Wheat.Leaf.CohortMaxSize(8)           10   0.589766   515.86     0.179194    229.582      0.575192    169.291     0.574802    1.17705      117.592     0.61861
          Wheat.Leaf.CohortMaxSize(9)           10   0.793068   300.515    0.327977    507.562      0.422258    241.916     0.0929616   -15.3812     161.582     0.903512
          Wheat.Phenology.FlagLeafDAS.Value()   255  0.974146   6.29479    0.00979673  1.35981      0.97505     8.03204     0.971245    2.92157      5.87059     0.16924
          Wheat.Phenology.FloweringDAS.Value()  299  0.943644   8.35638    0.00705763  1.10217      0.983658    6.98781     0.982029    0.0602007    4.93645     0.133831
        AcceptedStatsName=Name n Slope Intercept SEslope SEintercept R2 RMSE NSE ME MAE RSR
    PredictedObserved LeafSizeObsPred: PredictedTableName=MaxLeafSizeReport; ObservedTableName=MaxLeafSize; FieldNameUsedForMatch=MaxLeafSize.Script.LeafPosition
      Tests: POName=LeafSizeObsPred
        AcceptedStats:
          {Name=MaxLeafSize.Script.MaxLeafSize, n=137, Slope=1.02499, Intercept=-87.8829, SEslope=0.0272033, SEintercept=36.3386, R2=0.913166, RMSE=220.842, NSE=0.89174, ME=-59.0224, MAE=153.413, RSR=0.327826}
        AcceptedStatsName=Name n Slope Intercept SEslope SEintercept R2 RMSE NSE ME MAE RSR
    ExcelInput ObservedSystem: FileName=%root%\Tests\Validation\System\Pendleton\observed.xlsx; SheetNames=[ObsSoil, ObsCrop]
    PredictedObserved PredictedObservedSoil: PredictedTableName=SoilHarvestReport; ObservedTableName=ObsSoil; FieldNameUsedForMatch=Clock.Today.Year
  Folder Validation
    Memo
      A test dataset has been developed to test the APSIM Wheat model for a range of environmental (soil and climate) conditions, management options (sowing dates, populations, nitrogen rates, row spacing, irrigation), genetic backgrounds (different regions, cultivar types) and for special considerations such as crop damage.  These tests have been groups into various geographical regions to allow the user to evaluate the suitability of the model for their particular region of interest.  Graphs of model performance are provided for yield, biomass production, canopy development, phenological development, water and nitrogen uptake, and grain yield components.
    Folder Combined Results
      Memo Combined Results
        Simulation results for the combined datasets from the various countries are shown in the following graphs.  The model is able to adequately capture the influence of growing conditions (soil, climate) and management (population, Nitrogen, irrigation, sowing date).
    Folder SE Queensland
      Memo
        South-eastern Queensland has a warm subtropical environment.  Daytime temperatures are moderate due to the relatively low latitudes for wheat growing in Australia, but inland continental conditions can provide cool nights with occaisional frosts.  Many of the datasets used here have been published as part of previous APSIM Wheat model tests.  Further datasets have been added to provide information on phenological development of modern cultivars.
      Experiment APS26
        Memo
          This trial was conducted at Gatton in 1995 using the local variety, Hartog.  It consisted of 4 Nitrogen rates (0,40,80,160) with two irrigation rates (minimal amount for establishment, fully irrigated).  Yields ranged from 1.4 t/ha to 5.4 t/ha.
        Factors
          Factor NRate: Specifications=[ApplyFertiliser].Script.Amount=0,40,80,160
          Factor Water: Specifications=[IrrigationSchedule]
            Operations Wet
              1995-05-31  [Irrigation].Apply(amount:31);
              1995-06-01  [Irrigation].Apply(amount:13);
              1995-06-02  [Irrigation].Apply(amount:26);
              1995-06-05  [Irrigation].Apply(amount:26);
              1995-06-06  [Irrigation].Apply(amount:26);
              1995-06-07  [Irrigation].Apply(amount:26);
              1995-06-08  [Irrigation].Apply(amount:26);
              1995-06-15  [Wheat].Sow(population:120, cultivar:"Hartog", depth:40, rowSpacing:250);
              1995-07-05  [Irrigation].Apply(amount:26);
              1995-07-21  [Irrigation].Apply(amount:14);
              1995-08-01  [Irrigation].Apply(amount:28);
              1995-08-11  [Irrigation].Apply(amount:30);
              1995-08-25  [Irrigation].Apply(amount:15);
              1995-08-31  [Irrigation].Apply(amount:14);
              1995-09-04  [Irrigation].Apply(amount:15);
              1995-09-15  [Irrigation].Apply(amount:25);
              1995-09-22  [Irrigation].Apply(amount:20);
              1995-10-02  [Irrigation].Apply(amount:11);
            Operations Dry
              1995-06-15  [Wheat].Sow(population:120, cultivar:"Hartog", depth:40, rowSpacing:250);
        Simulation APS26NRate160WaterWet
          Clock: StartDate=1995-06-13; EndDate=1995-10-31
          Summary summaryfile
          Weather: FileName=APS26Silo.met
          SoilArbitrator Soil Arbitrator
          Zone paddock: Area=1; Slope=0
            Plant Wheat: CropType=Wheat
            Soil APS26Field: SoilType=APS26Soil; LocalName=APS26Site; Site=APS26Site; NearestTown=Unknown; Region=Lawes; NaturalVegetation=Unknown; Latitude=0; Longitude=0
              Water
                Thickness  BD    AirDry  LL15  DUL   SAT
                150        1.38  0.1     0.2   0.38  0.44
                150        1.38  0.1     0.2   0.38  0.44
                300        1.38  0.1     0.2   0.38  0.44
                300        1.38  0.1     0.2   0.38  0.44
                300        1.46  0.1     0.21  0.38  0.43
                300        1.51  0.1     0.19  0.4   0.42
                300        1.49  0.1     0.14  0.38  0.43
                300        1.47  0.1     0.14  0.38  0.43
                300        1.47  0.1     0.19  0.33  0.43
                SoilCrop WheatSoil: LL=[0.24, 0.24, 0.22, 0.24, 0.23, 0.23, 0.18, 0.18, 0.18]; KL=[0.06, 0.045, 0.045, 0.04, 0.04, 0.06, 0.06, 0.06, 0.06]; XF=[1, 1, 1, 1, 1, 1, 1, 1, 1]
              SoilWater: SummerDate=1-Nov; SummerU=6; SummerCona=3.5; WinterDate=1-Apr; WinterU=6; WinterCona=3.5; DiffusConst=10; DiffusSlope=16; Salb=0.13; CN2Bare=78; CNRed=20; CNCov=0.8; slope=0; discharge_width=0; catchment_area=0; max_pond=0; residueinterception=0
                Thickness  SWCON  KLAT
                150        0.3    0
                150        0.3    0
                150        0.3    0
                150        0.3    0
                300        0.3    0
                300        0.3    0
                300        0.3    0
                300        0.3    0
                300        0.3    0
                300        0.3    0
              SoilNitrogen: fom_type=[default, manure, mucuna, lablab, shemp, stable]; fract_carb=[0.2, 0.3, 0.54, 0.57, 0.45, 0]; fract_cell=[0.7, 0.3, 0.37, 0.37, 0.47, 0.1]; fract_lign=[0.1, 0.4, 0.09, 0.06, 0.08, 0.9]
              SoilOrganicMatter: RootCN=40; RootWt=500; SoilCN=14.5; EnrACoeff=1; EnrBCoeff=1; OCUnits=Total
                Thickness  OC    FBiom  FInert
                150        2.2   0.024  0.45
                150        1.6   0.024  0.6
                150        1.35  0.01   0.7
                150        0.95  0.01   0.85
                300        1     0.01   0.9
                300        0.8   0.01   0.95
                300        0.45  0.01   0.95
                300        0.45  0.01   0.95
                300        0.45  0.01   0.95
                300        0.45  0.01   0.95
              Analysis: Thickness=[150, 150, 150, 150, 300, 300, 300, 300, 300, 300]; PH=[7.5, 8, 8, 8, 8, 8, 8, 8, 8, 8]; PHUnits=Water; BoronUnits=HotWater
              Sample Initial Water: Thickness=[150, 150, 150, 150, 300, 300, 300, 300, 300, 300]; NO3Units=ppm; NH4Units=ppm; SWUnits=Volumetric; OCUnits=Total; PHUnits=Water
                SW=[0.327449, 0.34295, 0.334038, 0.334038, 0.330344, 0.310632, 0.30604, 0.269447, 0.269, 0.269]
              Sample Initial Nitrogen: NO3Units=ppm; NH4Units=ppm; SWUnits=Volumetric; OCUnits=Total; PHUnits=Water
                Thickness  NO3  NH4
                150        1.5  0.5
                150        1.8  0.8
                150        1.5  0.5
                150        1.5  0.5
                300        0.4  0.42
                300        0.2  0.42
                300        0.4  0.37
                300        0.3  0.25
                300        0.3  0.3
                300        0.3  0.3
              CERESSoilTemperature
            Manager ApplyFertiliser
              FertDayOfYear = 186
              Amount = 160
```csharp
using System;
using Models.Core;
using Models.PMF;
using APSIM.Shared.Utilities;

namespace Models
{
    [Serializable]
    public class Script : Model
    {
        [Link] Clock Clock;
        [Link] Fertiliser Fertiliser;
        [Link] Summary Summary;
        
        [Description("Day of year fertiliser is to be applied")]
        public int FertDayOfYear { get; set; }

        [Description("Amount of fertiliser to be applied")]
        public double Amount { get; set; }

        [EventSubscribe("DoManagement")]
        private void OnDoManagement(object sender, EventArgs e)
        {
            if (Clock.Today.DayOfYear == FertDayOfYear)
            {
                Fertiliser.Apply(Amount: Amount, Type: Fertiliser.Types.NO3N);
            }
        
        }
        
    }
}
```
            Fertiliser
            Operations IrrigationSchedule: same as Validation.SE Queensland.APS26.Factors.Water.Wet
            Irrigation
            SurfaceOrganicMatter: PoolName=wheat_stubble; type=Wheat; mass=0; standing_fraction=0; cpr=0; cnr=80; CriticalResidueWeight=2000; OptimumDecompTemp=20; MaxCumulativeEOS=20; CNRatioDecompCoeff=0.277; CNRatioDecompThreshold=25; TotalLeachRain=25; MinRainToLeach=10; CriticalMinimumOrganicC=0.004; DefaultCPRatio=0; DefaultStandingFraction=0; StandingExtinctCoeff=0.5; FractionFaecesAdded=0.5
              Pools:
                {PoolName=wheat_stubble, ResidueType=Wheat, Mass=0, CNRatio=80, CPRatio=0, StandingFraction=0}
              ResidueTypes: LoadFromResource=ResidueTypes
            MicroClimate: a_interception=0; b_interception=1; c_interception=0; d_interception=0; soil_albedo=0.3; sun_angle=15; soil_heat_flux_fraction=0.4; night_interception_fraction=0.5; refheight=2; albedo=0.15; emissivity=0.96; RadIntTotal=0
            Manager Harvesting
```csharp
using System;
using Models.Core;
using System.Collections.Generic;
using System.Text;
using Models.Soils;
using Models.PMF;
using Models;
using System.Xml.Serialization;
using APSIM.Shared.Utilities;

namespace Models
{
    [Serializable] 
    public class Script : Model
    {
        [Link] Plant Wheat;
        [EventSubscribe("DoManagement")]
        private void OnDoManagement(object sender, EventArgs e)
        {
            if (Wheat.Phenology.CurrentPhaseName == "Ripening")
            {
                Wheat.Harvest();
                Wheat.EndCrop();
            }
        }
    }
}
```
            Manager Calculations
              NitTot = 27077.4
              CarbonTot = 0
```csharp
using System;
using Models.Core;
using Models.PMF;
using Models.PMF.OilPalm;
using Models.Soils;
using Models.SurfaceOM;
using APSIM.Shared.Utilities;

namespace Models
{
    [Serializable]
    [System.Xml.Serialization.XmlInclude(typeof(Model))]
    public class Script : Model
    {
        [Link] Clock Clock;
        [Link] Soil Soil;
        [Link] SurfaceOrganicMatter SurfaceOM;
        [Link] Summary Summary;
        
        public double NitTot { get; set; }
        public double CarbonTot { get; set; }
        
        [EventSubscribe("Commencing")]
        private void OnSimulationCommencing(object sender, EventArgs e)
        {    
            NitTot = 0;
            CarbonTot = 0;
        }
        
        
        [EventSubscribe("DoManagement")]
        private void OnDoManagement(object sender, EventArgs e)
        {
            NitTot = MathUtilities.Sum(Soil.SoilNitrogen.TotalN);
            CarbonTot = MathUtilities.Sum(Soil.SoilNitrogen.TotalC);
        }
    }
}
```
            Report DailyReport
            Report HarvestReport
            Report SupReport: EventNames=[Clock].DoReport
              VariableNames:
                [Clock].Today
                [Leaf].CohortSize
                [Wheat].Arbitrator.DM.Allocated
                [Wheat].Arbitrator.DM.TotalPlantDemand
                [Wheat].Arbitrator.DM.NutrientLimitation
                [Wheat].Arbitrator.DM.SinkLimitation
                [Wheat].Arbitrator.DM.TotalFixationSupply
                [Wheat].Arbitrator.FN
                [Wheat].Arbitrator.N.TotalPlantDemand
                [Wheat].Leaf.CohortMaxSize
                [Wheat].Leaf.CohortParameters.GrowthDuration.Value()
                [Wheat].Leaf.CohortParameters.LagDuration.Value()
                [Wheat].Leaf.CohortParameters.MaxArea.Value()
                [Wheat].Leaf.CohortParameters.SenescenceDuration.Value()
                [Wheat].Leaf.CohortParameters.SpecificLeafAreaMax.Value()
                [Wheat].Leaf.CohortParameters.SpecificLeafAreaMin.Value()
                [Wheat].Leaf.Photosynthesis.FT.Value()
                [Wheat].Leaf.Photosynthesis.FVPD.Value()
                [Wheat].Leaf.Photosynthesis.RueAct
                [Wheat].Stem.DMDemandFunction.HightLimitedDMAccumulation.Value()
                [Wheat].Stem.DMDemandFunction.PotentialDMAccumulation.Value()
                sum([Soil].SoilWater.SWmm[2:7]) as ProfileWater180cm
                [Wheat].Root.LengthDensity
                [Wheat].Phenology.CurrentStageName
            SoluteManager
      Experiment APS6
        Memo
          NOTE: High N treatment logdged.  Final grain sizes were less than expected.
        Factors
          Factor NRate: Specifications=[ApplyFertiliser]
            Operations 0
            Operations 40
              1992-06-16  [Fertiliser].Apply(Amount: 40, Type: Fertiliser.Types.NO3N);
            Operations 80
              1992-06-16  [Fertiliser].Apply(Amount: 80, Type: Fertiliser.Types.NO3N);
            Operations 120
              1992-06-16  [Fertiliser].Apply(Amount: 60, Type: Fertiliser.Types.NO3N);
              1992-08-05  [Fertiliser].Apply(Amount: 60, Type: Fertiliser.Types.NO3N);
            Operations 160
              1992-06-16  [Fertiliser].Apply(Amount: 40, Type: Fertiliser.Types.NO3N);
              1992-08-05  [Fertiliser].Apply(Amount: 120, Type: Fertiliser.Types.NO3N);
            Operations 360
              1992-06-16  [Fertiliser].Apply(Amount: 120, Type: Fertiliser.Types.NO3N);
              1992-08-05  [Fertiliser].Apply(Amount: 120, Type: Fertiliser.Types.NO3N);
              1992-09-08  [Fertiliser].Apply(Amount: 120, Type: Fertiliser.Types.NO3N);
        Simulation APS6Base
          Clock: StartDate=1992-06-14; EndDate=1992-11-17
          Summary summaryfile
          Weather: FileName=APS6.met
          Zone paddock: Area=1; Slope=0
            Irrigation
            Fertiliser
            Soil APS6Field: SoilType=APS6Soil; LocalName=APS6Site; Site=APS6Site; NearestTown=Unknown; Region=Lawes; NaturalVegetation=Unknown; Latitude=0; Longitude=0
              Water
                Thickness  BD    AirDry  LL15  DUL   SAT
                150        1.38  0.1     0.2   0.38  0.43
                150        1.34  0.1     0.2   0.38  0.43
                300        1.35  0.1     0.22  0.4   0.43
                300        1.5   0.1     0.18  0.4   0.43
                300        1.49  0.1     0.14  0.39  0.42
                300        1.46  0.1     0.2   0.38  0.4
                300        1.46  0.1     0.2   0.38  0.4
                SoilCrop WheatSoil: LL=[0.2, 0.2, 0.22, 0.18, 0.14, 0.25, 0.28]; KL=[0.06, 0.05, 0.05, 0.04, 0.04, 0.06, 0.06]; XF=[1, 1, 1, 1, 1, 1, 1]
              SoilWater: SummerDate=1-Nov; SummerU=6; SummerCona=3.5; WinterDate=1-Apr; WinterU=6; WinterCona=3.5; DiffusConst=88; DiffusSlope=35.4; Salb=0.13; CN2Bare=60; CNRed=20; CNCov=0.8; slope=0; discharge_width=0; catchment_area=0; max_pond=0; residueinterception=0
                Thickness  SWCON  KLAT
                150        0.3    0
                150        0.3    0
                300        0.3    0
                300        0.3    0
                300        0.3    0
                300        0.3    0
                300        0.3    0
              SoilNitrogen: fom_type=[default, manure, mucuna, lablab, shemp, stable]; fract_carb=[0.2, 0.3, 0.54, 0.57, 0.45, 0]; fract_cell=[0.7, 0.3, 0.37, 0.37, 0.47, 0.1]; fract_lign=[0.1, 0.4, 0.09, 0.06, 0.08, 0.9]
              SoilOrganicMatter: RootCN=60; RootWt=2000; SoilCN=14.5; EnrACoeff=1; EnrBCoeff=1; OCUnits=Total
                Thickness  OC    FBiom  FInert
                150        2.2   0.03   0.45
                150        1.6   0.02   0.6
                300        1.15  0.01   0.78
                300        1     0.01   0.9
                300        0.8   0.01   0.99
                300        0.45  0.01   0.99
                300        0.45  0.01   0.99
              Analysis: Thickness=[150, 150, 300, 300, 300, 300, 300]; PH=[7.5, 8, 8, 8, 8, 8, 8]; PHUnits=Water; BoronUnits=HotWater
              Sample Initial Water: Thickness=[150, 150, 300, 300, 300, 300, 300]; SW=[0.326, 0.326, 0.346, 0.333, 0.315, 0.326, 0.326]; NO3Units=ppm; NH4Units=ppm; SWUnits=Volumetric; OCUnits=Total; PHUnits=Water
              Sample Initial Nitrogen: NO3Units=ppm; NH4Units=ppm; SWUnits=Volumetric; OCUnits=Total; PHUnits=Water
                Thickness  NO3   NH4
                150        1.3   1.3
                150        0.6   1
                300        0.25  1
                300        0.2   0.8
                300        0.1   0.8
                300        0.1   0.5
                300        0.1   0.5
              CERESSoilTemperature
            SurfaceOrganicMatter: PoolName=wheat_stubble; type=wheat; mass=500; standing_fraction=0; cnr=100; CriticalResidueWeight=2000; OptimumDecompTemp=20; MaxCumulativeEOS=20; CNRatioDecompCoeff=0.277; CNRatioDecompThreshold=25; TotalLeachRain=25; MinRainToLeach=10; CriticalMinimumOrganicC=0.004; DefaultCPRatio=0; DefaultStandingFraction=0; StandingExtinctCoeff=0.5; FractionFaecesAdded=0.5
              Pools:
                {PoolName=wheat_stubble, ResidueType=wheat, Mass=500, CNRatio=100, StandingFraction=0}
              ResidueTypes: LoadFromResource=ResidueTypes
            Plant Wheat: CropType=Wheat
            Operations ApplyFertiliser
              1992-06-16  [Fertiliser].Apply(Amount: 0, Type: Fertiliser.Types.NO3N);
            Operations IrrigationSchedule
              1992-06-17  [Wheat].Sow(population:121.61, cultivar:"Hartog", depth:30, rowSpacing:250);
              1992-06-24  [Irrigation].Apply(amount:10);
              1992-06-26  [Irrigation].Apply(amount:10);
              1992-07-28  [Irrigation].Apply(amount:30);
              1992-08-05  [Irrigation].Apply(amount:30);
              1992-08-19  [Irrigation].Apply(amount:40);
              1992-08-26  [Irrigation].Apply(amount:40);
              1992-09-09  [Irrigation].Apply(amount:40);
              1992-09-21  [Irrigation].Apply(amount:40);
              1992-10-01  [Irrigation].Apply(amount:50);
              1992-10-07  [Irrigation].Apply(amount:20);
              1992-10-08  [Irrigation].Apply(amount:20);
              1992-10-09  [Irrigation].Apply(amount:20);
              1992-10-13  [Irrigation].Apply(amount:20);
            MicroClimate: a_interception=0; b_interception=1; c_interception=0; d_interception=0; soil_albedo=0.3; sun_angle=15; soil_heat_flux_fraction=0.4; night_interception_fraction=0.5; refheight=2; albedo=0.15; emissivity=0.96; RadIntTotal=0
            Report DailyReport
            Report HarvestReport
            Manager Harvesting
```csharp
using System;
using Models.Core;
using System.Collections.Generic;
using System.Text;
using Models.Soils;
using Models.PMF;
using Models;
using System.Xml.Serialization;
using APSIM.Shared.Utilities;

namespace Models
{
    [Serializable] 
    public class Script : Model
    {
        [Link] Plant Wheat;
        [EventSubscribe("DoManagement")]
        private void OnDoManagement(object sender, EventArgs e)
        {
            if (Wheat.Phenology.CurrentPhaseName == "ReadyForHarvesting")
            {
                Wheat.Harvest();
                Wheat.EndCrop();
            }
        }
    }
}
```
            Report SupReport: EventNames=[Clock].DoReport
              VariableNames:
                [Clock].Today
                [Leaf].CohortSize
                [Wheat].Arbitrator.DM.Allocated
                [Wheat].Arbitrator.DM.TotalPlantDemand
                [Wheat].Arbitrator.DM.NutrientLimitation
                [Wheat].Arbitrator.DM.SinkLimitation
                [Wheat].Arbitrator.DM.TotalFixationSupply
                [Wheat].Arbitrator.FN
                [Wheat].Arbitrator.N.TotalPlantDemand
                [Wheat].Leaf.CohortMaxSize
                [Wheat].Leaf.CohortParameters.GrowthDuration.Value()
                [Wheat].Leaf.CohortParameters.LagDuration.Value()
                [Wheat].Leaf.CohortParameters.MaxArea.Value()
                [Wheat].Leaf.CohortParameters.SenescenceDuration.Value()
                [Wheat].Leaf.CohortParameters.SpecificLeafAreaMax.Value()
                [Wheat].Leaf.CohortParameters.SpecificLeafAreaMin.Value()
                [Wheat].Leaf.Photosynthesis.FT.Value()
                [Wheat].Leaf.Photosynthesis.FVPD.Value()
                [Wheat].Leaf.Photosynthesis.RueAct
                [Wheat].Stem.DMDemandFunction.HightLimitedDMAccumulation.Value()
                [Wheat].Stem.DMDemandFunction.PotentialDMAccumulation.Value()
                [Wheat].Structure.MeanTillerGrowthRate.Value()
                [Wheat].Stem.StructuralN
                [Wheat].Stem.StorageN
                [Wheat].Stem.StorageNConc
                [Wheat].Stem.StructuralNConc
                [Wheat].Stem.StructuralWt
                [Wheat].Stem.StorageWt
            SoluteManager
          SoilArbitrator Soil Arbitrator
      Experiment APS14
        Factors
          Factor Stubble: Specifications=[OMSchedule]
            Operations Bare
              1993-06-03  [SurfaceOrganicMatter].Incorporate(fraction: 1.0, depth:100);
            Operations Lucerne
              1993-06-03  [SurfaceOrganicMatter].Add(mass: 3560, N: 108.8, P:0.0, type: "lucerne", name: "");
              1993-06-03  [SurfaceOrganicMatter].Incorporate(fraction: 1.0, depth:100);
            Operations Straw
              1993-06-03  [SurfaceOrganicMatter].Add(mass: 3584, N: 28.8, P:0.0, type: "barley", name: "");
              1993-06-03  [SurfaceOrganicMatter].Incorporate(fraction: 1.0, depth:100);
          Factor NRate: Specifications=[FertiliserSchedule]
            Operations 000
              1993-06-18  [Fertiliser].Apply(Amount: 0, Type: Fertiliser.Types.NO3N);
            Operations 040
              1993-06-18  [Fertiliser].Apply(Amount: 40, Type: Fertiliser.Types.NO3N);
            Operations 080
              1993-06-18  [Fertiliser].Apply(Amount: 80, Type: Fertiliser.Types.NO3N);
            Operations 200
              1993-06-18  [Fertiliser].Apply(Amount: 120, Type: Fertiliser.Types.NO3N);
              1993-08-18  [Fertiliser].Apply(Amount: 80, Type: Fertiliser.Types.NO3N);
        Simulation APS14StubbleBareNRate0
          Clock: StartDate=1993-06-02; EndDate=1993-11-26
          Summary summaryfile
          Weather: FileName=APS14.met
          Zone paddock: Area=1; Slope=0
            Irrigation
            Fertiliser
            Soil APS14Field: SoilType=Clay Loam; LocalName=Gatton; Site=Gatton; NearestTown=Gatton; Region=Lockyer Valley; State=Qld; Country=Australia; NaturalVegetation=Unknown; Latitude=0; Longitude=0
              Water
                Thickness  BD    AirDry  LL15  DUL   SAT
                150        1.38  0.1     0.2   0.38  0.43
                150        1.34  0.2     0.2   0.38  0.43
                150        1.31  0.24    0.24  0.4   0.45
                150        1.4   0.19    0.19  0.41  0.45
                300        1.5   0.18    0.18  0.4   0.43
                300        1.49  0.14    0.14  0.39  0.43
                300        1.46  0.2     0.2   0.38  0.4
                300        1.46  0.2     0.2   0.38  0.4
                SoilCrop WheatSoil: LL=[0.2, 0.2, 0.24, 0.19, 0.18, 0.14, 0.25, 0.28]; KL=[0.06, 0.06, 0.06, 0.05, 0.04, 0.03, 0.02, 0.02]; XF=[1, 1, 1, 1, 1, 1, 1, 1]
              SoilWater: SummerDate=1-Nov; SummerU=6; SummerCona=3.5; WinterDate=1-Apr; WinterU=6; WinterCona=3.5; DiffusConst=40; DiffusSlope=16; Salb=0.13; CN2Bare=60; CNRed=20; CNCov=0.8; slope=0; discharge_width=0; catchment_area=0; max_pond=0; residueinterception=0
                Thickness  SWCON  KLAT
                150        0.3    0
                150        0.3    0
                150        0.3    0
                150        0.3    0
                300        0.3    0
                300        0.3    0
                300        0.3    0
                300        0.3    0
              SoilNitrogen: fom_type=[default, manure, mucuna, lablab, shemp, stable]; fract_carb=[0.2, 0.3, 0.54, 0.57, 0.45, 0]; fract_cell=[0.7, 0.3, 0.37, 0.37, 0.47, 0.1]; fract_lign=[0.1, 0.4, 0.09, 0.06, 0.08, 0.9]
              SoilOrganicMatter: RootCN=40; RootWt=1500; SoilCN=14.5; EnrACoeff=0; EnrBCoeff=0; OCUnits=Total
                Thickness  OC    FBiom  FInert
                150        2.2   0.02   0.4
                150        1.6   0.02   0.6
                150        1.35  0.01   0.7
                150        0.95  0.01   0.8
                300        1     0.01   0.9
                300        0.8   0.01   0.9
                300        0.45  0.01   0.9
                300        0.45  0.01   0.9
              Analysis: Thickness=[150, 150, 150, 150, 300, 300, 300, 300]; PH=[7.5, 8, 8, 8, 8, 8, 8, 8]; PHUnits=Water; BoronUnits=HotWater
              Sample Initial Water: Thickness=[150, 150, 150, 150, 300, 300, 300, 300]; SW=[0.336, 0.336, 0.302, 0.302, 0.319, 0.345, 0.294, 0.264]; NO3Units=ppm; NH4Units=ppm; SWUnits=Volumetric; OCUnits=Total; PHUnits=Water
              Sample Initial Nitrogen: NO3Units=ppm; NH4Units=ppm; SWUnits=Volumetric; OCUnits=Total; PHUnits=Water
                Thickness  NO3  NH4
                150        2    0.3
                150        0.5  0.3
                150        0.2  0.2
                150        0.2  0.1
                300        0.2  0.1
                300        0.2  0.1
                300        0.2  0.1
                300        0.2  0.1
              CERESSoilTemperature
            SurfaceOrganicMatter: PoolName=wheat_stubble; type=Wheat; mass=500; standing_fraction=0; cpr=0; cnr=120; CriticalResidueWeight=2000; OptimumDecompTemp=20; MaxCumulativeEOS=20; CNRatioDecompCoeff=0.277; CNRatioDecompThreshold=25; TotalLeachRain=25; MinRainToLeach=10; CriticalMinimumOrganicC=0.004; DefaultCPRatio=0; DefaultStandingFraction=0; StandingExtinctCoeff=0.5; FractionFaecesAdded=0.5
              Pools:
                {PoolName=wheat_stubble, ResidueType=Wheat, Mass=500, CNRatio=120, CPRatio=0, StandingFraction=0}
              ResidueTypes: LoadFromResource=ResidueTypes
            Plant Wheat: CropType=Wheat
            Operations IrrigationSchedule
              1993-06-04  [Irrigation].Apply(amount:14);
              1993-06-18  [Irrigation].Apply(amount:26);
              1993-06-23  [Irrigation].Apply(amount:13);
              1993-07-09  [Irrigation].Apply(amount:25);
              1993-07-22  [Irrigation].Apply(amount:20);
              1993-08-06  [Irrigation].Apply(amount:31);
              1993-08-18  [Irrigation].Apply(amount:36);
              1993-08-27  [Irrigation].Apply(amount:38);
              1993-09-06  [Irrigation].Apply(amount:33);
              1993-09-24  [Irrigation].Apply(amount:35);
              1993-10-01  [Irrigation].Apply(amount:36);
            MicroClimate: a_interception=0; b_interception=1; c_interception=0; d_interception=0; soil_albedo=0.3; sun_angle=15; soil_heat_flux_fraction=0.4; night_interception_fraction=0.5; refheight=2; albedo=0.15; emissivity=0.96; RadIntTotal=0
            Operations FertiliserSchedule
              1993-06-18  [Fertiliser].Apply(Amount: 0, Type: Fertiliser.Types.NO3N);
            Operations OMSchedule
              1993-06-03  [SurfaceOrganicMatter].Add(mass: 0, N: 0, P:0.0, type: "wheat", name: "");
              1993-06-03  [SurfaceOrganicMatter].Incorporate(fraction: 1.0, depth:100);
            Operations SowingSchedule
              1993-06-29  [Wheat].Sow(population:114, cultivar:"GattonHartog", depth:30, rowSpacing:250);
            PredictedObserved: FieldNameUsedForMatch=Wheat.Zadok.Stage
            Manager ExtraVariables
```csharp
        using System;
        using Models.Core;
        using System.Collections.Generic;
        using System.Text;
        using Models.PMF;
        using Models.PMF;
        using Models.Soils;
        using Models;
        using System.Xml.Serialization;
        using APSIM.Shared.Utilities;

        namespace Models
        {
[Serializable] 
public class Script : Model
{      
[Link] Clock Clock;
[Link] Soils.Soil Soil;
[Link] Models.SurfaceOM.SurfaceOrganicMatter SOM;
[Link] Plant Plant;          
[Link] Weather Met;   
[Link] Fertiliser Fert;
[Link] Irrigation Irrig;  
               
[XmlIgnore] public bool InitialDay { get; set; }

[XmlIgnore] public double AccumPlantN { get; set; }
[XmlIgnore] public double AccumMineralisation { get; set; }
[XmlIgnore] public double AccumDenit { get; set; }
[XmlIgnore] public double AccumFert { get; set; }
[XmlIgnore] public double AccumLeach { get; set; }
[XmlIgnore] public double AccumDetach { get; set; }
[XmlIgnore] public double DeltaSoilOMN { get; set; }
[XmlIgnore] public double DeltaSurfaceOMN { get; set; }
[XmlIgnore] public double DeltaSoilMineralN { get; set; }
[XmlIgnore] public double SoilNitrogenContent { get; set; }

[XmlIgnore] public double AccumEO { get; set; }
[XmlIgnore] public double AccumEP { get; set; }
[XmlIgnore] public double AccumES { get; set; }
[XmlIgnore] public double AccumDrainage { get; set; }
[XmlIgnore] public double AccumRunoff { get; set; }
[XmlIgnore] public double AccumOutflowLat { get; set; }
[XmlIgnore] public double AccumIrrigation { get; set; }
[XmlIgnore] public double AccumRainfall { get; set; }
[XmlIgnore] public double SoilWaterDeficit { get; set; }

[XmlIgnore] public double AccumTtemerg { get; set; }

[XmlIgnore] public double  InitialSoilOMN { get; set; }
[XmlIgnore] public double  InitialSurfaceOMN { get; set; }
[XmlIgnore] public double  InitialMineralN { get; set; }

[XmlIgnore] public double SWC { get; set; }
[XmlIgnore] public double DUL { get; set; }
[XmlIgnore] public double OutFlowLat { get; set; }
[XmlIgnore] public double MineralN {get; set;}
[XmlIgnore] public double TotalNO3 {get; set;}
[XmlIgnore] public double TotalNH4 {get; set;}

[EventSubscribe("Initialised")]
private void OnInitialised(object sender, EventArgs e)
{
InitialDay = true;
AccumPlantN = 0;
AccumMineralisation = 0;
AccumDenit = 0;
AccumFert = 0;
AccumLeach = 0;
AccumDetach = 0;
DeltaSoilOMN = 0;
DeltaSurfaceOMN = 0;
DeltaSoilMineralN = 0;
SoilNitrogenContent = 0;

AccumEO = 0;
AccumEP = 0;
AccumES = 0;
AccumDrainage = 0;
AccumRunoff = 0;
AccumOutflowLat = 0;
AccumIrrigation = 0;
AccumRainfall = 0;
SoilWaterDeficit = 0;

AccumTtemerg = 0;

SWC = 0;
DUL = 0;
}       

[EventSubscribe("DoManagementCalculations")]
private void OnDoManagementCalculations(object sender, EventArgs e)
{
    int layers = Soil.Thickness.Length;
    if (InitialDay)
    {
      InitialSurfaceOMN = SOM.N;
      for (int layer = 0; layer < layers; layer++)
      { 
      InitialSoilOMN += (Soil.SoilNitrogen.MicrobialN[layer] + Soil.SoilNitrogen.FOMN[layer] + Soil.SoilNitrogen.HumicN[layer]);
      InitialMineralN += (Soil.NO3N[layer] + Soil.NH4N[layer] + Soil.SoilNitrogen.urea[layer]);
      }
      InitialDay = false;
    }

//!!!!!! Nitrogen balance components !!!!!!
//!!!!!!^^^^^^^^^^^^^^^^^^^^^^^^^^^^^!!!!!!
//AccumPlantN -= (double)this.Get("[Plant].Root.NUptake");
AccumFert += Fert.NitrogenApplied;
DeltaSurfaceOMN = SOM.N - InitialSurfaceOMN;
AccumDetach = 0; //plant2 doesn't detach yet
MineralN = 0;
TotalNO3 = 0;
TotalNH4 = 0;
double OrganicN = 0;
//AccumLeach = AccumLeach - Soil.SoilNitrogen.leach_urea - Soil.SoilNitrogen.leach_no3 - Soil.SoilNitrogen.leach_nh4; //Fails
   for (int layer = 0; layer < layers; layer++)
    { 
    AccumMineralisation += (Soil.SoilNitrogen.MineralisedN[layer] + Soil.SoilNitrogen.dlt_n_min_res[layer]);
    AccumDenit -= MathUtilities.Sum(Soil.SoilNitrogen.Denitrification);
    OrganicN += (Soil.SoilNitrogen.MicrobialN[layer] + Soil.SoilNitrogen.FOMN[layer] + Soil.SoilNitrogen.HumicN[layer]);
    MineralN += (Soil.NO3N[layer] + Soil.NH4N[layer] + Soil.SoilNitrogen.urea[layer]);
    TotalNO3 += Soil.NO3N[layer];
    TotalNH4 += Soil.NH4N[layer];
    }
DeltaSoilOMN = OrganicN - InitialSoilOMN;
DeltaSoilMineralN = MineralN - InitialMineralN;
SoilNitrogenContent = MineralN;
//!!!!!! Water balance components !!!!!!
//!!!!!!^^^^^^^^^^^^^^^^^^^^^^^^^^!!!!!!
AccumEO -= Soil.SoilWater.Eo;
//AccumEP -= (double)this.Get("[Plant].Leaf.Transpiration");
AccumES -= Soil.SoilWater.Es; 
AccumDrainage -= Soil.SoilWater.Drainage; 
AccumRunoff -= Soil.SoilWater.Runoff; 
AccumIrrigation += Irrig.IrrigationApplied; 
AccumRainfall += Met.Rain;
SWC = 0;
DUL = 0;
double OutFlowLat = 0;
   for (int layer = 0; layer < layers; layer++)
   {
     SWC += Soil.SoilWater.SWmm[layer];
     DUL += Soil.DULmm[layer];
     OutFlowLat = Soil.SoilWater.outflow_lat[layer];
   }
AccumOutflowLat -= OutFlowLat;
SoilWaterDeficit =  (SWC - DUL);
}

[EventSubscribe("DoManagement")]
private void OnDoManagement(object sender, EventArgs e)
{
//!!!!!! Thermal time calculation !!!!!!
//!!!!!! ^^^^^^^^^^^^^^^^^^^^^^^^ !!!!!!

}
}
}
```
            Report DailyReport
            Report HarvestReport
            Manager Harvesting: same as Validation.SE Queensland.APS26.APS26NRate160WaterWet.paddock.Harvesting
            SoluteManager
          SoilArbitrator Soil Arbitrator
      Experiment APS2
        Memo
          This simple experiment was conducted to investigate the impact of time of sowing on canopy development and growth of wheat.  Wheat (cv. Hartog) was sown at Gatton on 30th of May and 30th of July in 1991.  Data were collected on canopy development, biomass accumulation and yield.
        Factors
          Factor TOS: Specifications=[Sowing]
            Operations 1
              1991-05-29  [Wheat].Sow(population: 60, cultivar: "Hartog", depth: 30, rowSpacing: 250);
              1991-05-29  [Fertiliser].Apply(Amount: 40, Type: Fertiliser.Types.UreaN);
              1991-06-18  [Fertiliser].Apply(Amount: 60, Type: Fertiliser.Types.UreaN);
              1991-08-20  [Fertiliser].Apply(Amount: 60, Type: Fertiliser.Types.UreaN);
              1991-05-31  [Irrigation].Apply(amount:20, depth:0,efficiency:1, willRunoff:false);
              1991-06-03  [Irrigation].Apply(amount:20, depth:0,efficiency:1, willRunoff:false);
              1991-06-17  [Irrigation].Apply(amount:40, depth:0,efficiency:1, willRunoff:false);
              1991-07-07  [Irrigation].Apply(amount:40, depth:0,efficiency:1, willRunoff:false);
              1991-07-31  [Irrigation].Apply(amount:40, depth:0,efficiency:1, willRunoff:false);
              1991-08-20  [Irrigation].Apply(amount:40, depth:0,efficiency:1, willRunoff:false);
              1991-08-30  [Irrigation].Apply(amount:40, depth:0,efficiency:1, willRunoff:false);
              1991-09-09  [Irrigation].Apply(amount:40, depth:0,efficiency:1, willRunoff:false);
              1991-09-19  [Irrigation].Apply(amount:40, depth:0,efficiency:1, willRunoff:false);
              1991-09-29  [Irrigation].Apply(amount:50, depth:0,efficiency:1, willRunoff:false);
              1991-10-09  [Irrigation].Apply(amount:50, depth:0,efficiency:1, willRunoff:false);
              1991-10-19  [Irrigation].Apply(amount:50, depth:0,efficiency:1, willRunoff:false);
              1991-10-29  [Irrigation].Apply(amount:50, depth:0,efficiency:1, willRunoff:false);
              1991-11-08  [Irrigation].Apply(amount:50, depth:0,efficiency:1, willRunoff:false);
              1991-10-19  [Wheat].Harvest();
              1991-10-19  [Wheat].EndCrop();
            Operations 2
              1991-05-29  [Fertiliser].Apply(Amount: 40, Type: Fertiliser.Types.UreaN);
              1991-07-30  [Wheat].Sow(population: 60, cultivar: "Hartog", depth: 30, rowSpacing: 250);
              1991-08-20  [Fertiliser].Apply(Amount: 40, Type: Fertiliser.Types.UreaN);
              1991-09-02  [Fertiliser].Apply(Amount: 20, Type: Fertiliser.Types.UreaN);
              1991-05-31  [Irrigation].Apply(amount:20, depth:0,efficiency:1, willRunoff:false);
              1991-06-03  [Irrigation].Apply(amount:20, depth:0,efficiency:1, willRunoff:false);
              1991-06-17  [Irrigation].Apply(amount:40, depth:0,efficiency:1, willRunoff:false);
              1991-07-07  [Irrigation].Apply(amount:40, depth:0,efficiency:1, willRunoff:false);
              1991-07-31  [Irrigation].Apply(amount:40, depth:0,efficiency:1, willRunoff:false);
              1991-08-20  [Irrigation].Apply(amount:40, depth:0,efficiency:1, willRunoff:false);
              1991-08-30  [Irrigation].Apply(amount:40, depth:0,efficiency:1, willRunoff:false);
              1991-09-09  [Irrigation].Apply(amount:40, depth:0,efficiency:1, willRunoff:false);
              1991-09-19  [Irrigation].Apply(amount:40, depth:0,efficiency:1, willRunoff:false);
              1991-09-29  [Irrigation].Apply(amount:50, depth:0,efficiency:1, willRunoff:false);
              1991-10-09  [Irrigation].Apply(amount:50, depth:0,efficiency:1, willRunoff:false);
              1991-10-19  [Irrigation].Apply(amount:50, depth:0,efficiency:1, willRunoff:false);
              1991-10-29  [Irrigation].Apply(amount:50, depth:0,efficiency:1, willRunoff:false);
              1991-11-08  [Irrigation].Apply(amount:50, depth:0,efficiency:1, willRunoff:false);
              1991-11-13  [Wheat].Harvest();
              1991-11-13  [Wheat].EndCrop();
        Simulation APS2Base
          Clock: StartDate=1991-05-29; EndDate=1991-12-30
          Summary summaryfile
          Weather: FileName=aps02.met
          SoilArbitrator Soil Arbitrator
          Zone Field: Area=1; Slope=0
            Irrigation
            Fertiliser
            Soil APS6Field: SoilType=APS6Soil; LocalName=APS6Site; Site=APS6Site; NearestTown=Unknown; Region=Lawes; NaturalVegetation=Unknown; Latitude=0; Longitude=0
              Water
                Thickness  BD    AirDry  LL15  DUL   SAT
                150        1.38  0.1     0.2   0.38  0.43
                150        1.34  0.1     0.2   0.38  0.43
                300        1.35  0.1     0.22  0.4   0.43
                300        1.5   0.1     0.18  0.4   0.43
                300        1.49  0.1     0.14  0.39  0.42
                300        1.46  0.1     0.2   0.38  0.4
                300        1.46  0.1     0.2   0.38  0.4
                SoilCrop WheatSoil: LL=[0.2, 0.2, 0.22, 0.18, 0.14, 0.2, 0.2]; KL=[0.06, 0.06, 0.06, 0.06, 0.06, 0.06, 0.06]; XF=[1, 1, 1, 1, 1, 1, 1]
              SoilWater: same as Validation.SE Queensland.APS6.APS6Base.paddock.APS6Field.SoilWater
              SoilNitrogen: fom_type=[default, manure, mucuna, lablab, shemp, stable]; fract_carb=[0.2, 0.3, 0.54, 0.57, 0.45, 0]; fract_cell=[0.7, 0.3, 0.37, 0.37, 0.47, 0.1]; fract_lign=[0.1, 0.4, 0.09, 0.06, 0.08, 0.9]
              SoilOrganicMatter: RootCN=20; RootWt=500; SoilCN=14.5; EnrACoeff=1; EnrBCoeff=1; OCUnits=Total
                Thickness  OC    FBiom  FInert
                150        2.2   0.03   0.45
                150        1.6   0.02   0.6
                300        1.15  0.01   0.78
                300        1     0.01   0.9
                300        0.8   0.01   0.99
                300        0.45  0.01   0.99
                300        0.45  0.01   0.99
              Analysis: Thickness=[150, 150, 300, 300, 300, 300, 300]; PH=[7.5, 8, 8, 8, 8, 8, 8]; PHUnits=Water; BoronUnits=HotWater
              Sample Initial Water: Thickness=[150, 150, 300, 300, 300, 300, 300]; SW=[0.2, 0.28, 0.29, 0.34, 0.32, 0.32, 0.32]; NO3Units=ppm; NH4Units=ppm; SWUnits=Volumetric; OCUnits=Total; PHUnits=Water
              Sample Initial Nitrogen: NO3Units=ppm; NH4Units=ppm; SWUnits=Volumetric; OCUnits=Total; PHUnits=Water
                Thickness  NO3   NH4
                150        14.3  1.5
                150        5.9   1.5
                300        1.35  1
                300        1     1
                300        0.2   0.5
                300        0.1   0.5
                300        0.1   0.5
              CERESSoilTemperature
            Operations Sowing
            SurfaceOrganicMatter: same as Validation.SE Queensland.APS6.APS6Base.paddock.SurfaceOrganicMatter
            Plant Wheat: CropType=Wheat
            MicroClimate: a_interception=0; b_interception=1; c_interception=0; d_interception=0; soil_albedo=0.3; sun_angle=15; soil_heat_flux_fraction=0.4; night_interception_fraction=0.5; refheight=2; albedo=0.15; emissivity=0.96; RadIntTotal=0
            Report DailyReport
            Report HarvestReport
            Manager MaxLeafSize
```csharp
using System;
using System.Collections.Generic;
using System.Xml.Serialization;
using Models.Core;
using Models.Interfaces;
using APSIM.Shared.Utilities;



namespace Models
{
    [Serializable] 
    public class Script : Model
    {
    
        
    }
}
```
            Report MaxLeafSizeReport
            Report SupReport: EventNames=[Clock].DoReport
              VariableNames:
                [Clock].Today
                [Leaf].CohortSize
                [Wheat].Arbitrator.DM.Allocated
                [Wheat].Arbitrator.DM.TotalPlantDemand
                [Wheat].Arbitrator.DM.NutrientLimitation
                [Wheat].Arbitrator.DM.SinkLimitation
                [Wheat].Arbitrator.DM.TotalFixationSupply
                [Wheat].Arbitrator.FN
                [Wheat].Arbitrator.N.TotalPlantDemand
                [Wheat].Leaf.CohortMaxSize
                [Wheat].Leaf.CohortParameters.GrowthDuration.Value()
                [Wheat].Leaf.CohortParameters.LagDuration.Value()
                [Wheat].Leaf.CohortParameters.MaxArea.Value()
                [Wheat].Leaf.CohortParameters.SenescenceDuration.Value()
                [Wheat].Leaf.CohortParameters.SpecificLeafAreaMax.Value()
                [Wheat].Leaf.CohortParameters.SpecificLeafAreaMin.Value()
                [Wheat].Leaf.Photosynthesis.FT.Value()
                [Wheat].Leaf.Photosynthesis.FVPD.Value()
                [Wheat].Leaf.Photosynthesis.RueAct
                [Wheat].Stem.DMDemandFunction.HightLimitedDMAccumulation.Value()
                [Wheat].Stem.DMDemandFunction.PotentialDMAccumulation.Value()
                [Wheat].Leaf.NextExpandingLeafProportion
            SoluteManager
      Experiment GattonRowSpacing
        Memo
          This simple experiment was conducted to investigate the light interception and subsequent growth of wheat under different populations invoked using row spacing.  Wheat was sown at Gatton on 15th of June 2011 at 25cm row spacing.  Soon after emergence, alternate rows were removed from selected plots to produce half populations at 50cm row spacing.  A zero N treatment was used to identfy the inherent fertility of the site to assist in model parameterisation.  Data were collected on light interception,  canopy development, biomass accumulation and yield.
        Factors
          Factor RowSpace: Specifications=[Sowing]
            Operations 25cm
              2011-06-15  [Wheat].Sow(population:160, cultivar:"Hartog", depth:30, rowSpacing:250);
              2011-08-15  [Fertiliser].Apply(Amount: 100, Type: Fertiliser.Types.UreaN);
              2011-11-05  [Wheat].Harvest();
              2011-11-05  [Wheat].EndCrop();
            Operations 50cm
              2011-06-15  [Wheat].Sow(population:80, cultivar:"Hartog", depth:30, rowSpacing:500);
              2011-08-15  [Fertiliser].Apply(Amount: 100, Type: Fertiliser.Types.UreaN);
              2011-11-05  [Wheat].Harvest();
              2011-11-05  [Wheat].EndCrop();
            Operations N0
              2011-06-15  [Wheat].Sow(population:160, cultivar:"Hartog", depth:30, rowSpacing:250);
              2011-11-05  [Wheat].Harvest();
              2011-11-05  [Wheat].EndCrop();
        Simulation RowSpace
          Clock: StartDate=2011-05-01; EndDate=2011-11-12
          Summary summaryfile
          Weather: FileName=Gatton2011.met
          SoilArbitrator Soil Arbitrator
          Zone Field: Area=1; Slope=0
            Irrigation
            Fertiliser
            Operations Sowing
              2011-06-15  [Wheat].Sow(population:160, cultivar:"Hartog", depth:30, rowSpacing:250);
              2011-11-05  [Wheat].Harvest();
              2011-11-05  [Wheat].EndCrop();
            Soil: SoilType=Black Vertosol; Site=Lawes; NearestTown=Lawes, Q 4343; Region=Lockyer; State=Queensland; Country=Australia; NaturalVegetation=Blue Gum, Moreton Bay Ash, Tea Tree; ApsoilNumber=37; Latitude=-27.537; Longitude=152.336; LocationAccuracy=+-20m; DataSource=CSIRO Sustainable Ecosystems, Toowoomba
              Comments=Soil naming structure: \State\Region\Classification-Local Name (Site/district and locator number); oc and ph estimated
              Water
                Thickness  BD    AirDry  LL15  DUL   SAT
                150        1.32  0.13    0.26  0.41  0.47
                150        1.3   0.208   0.26  0.43  0.48
                300        1.23  0.26    0.26  0.46  0.51
                300        1.27  0.26    0.26  0.44  0.49
                300        1.37  0.25    0.25  0.4   0.45
                300        1.35  0.26    0.26  0.41  0.46
                300        1.35  0.26    0.26  0.38  0.46
                SoilCrop WheatSoil: LL=[0.26, 0.26, 0.26, 0.26, 0.25, 0.29, 0.36]; KL=[0.06, 0.06, 0.06, 0.04, 0.04, 0.02, 0.02]; XF=[1, 1, 1, 1, 1, 1, 1]
              SoilWater: SummerDate=1-Nov; SummerU=6; SummerCona=3.5; WinterDate=1-Apr; WinterU=4; WinterCona=2.5; DiffusConst=40; DiffusSlope=16; Salb=0.12; CN2Bare=73; CNRed=20; CNCov=0.8; max_pond=0; Thickness=[150, 150, 300, 300, 300, 300, 300]; SWCON=[0.3, 0.3, 0.3, 0.3, 0.3, 0.3, 0.3]; residueinterception=0
              SoilNitrogen: fom_type=[default, manure, mucuna, lablab, shemp, stable]; fract_carb=[0.2, 0.3, 0.54, 0.57, 0.45, 0]; fract_cell=[0.7, 0.3, 0.37, 0.37, 0.47, 0.1]; fract_lign=[0.1, 0.4, 0.09, 0.06, 0.08, 0.9]
              SoilOrganicMatter: RootCN=40; RootWt=1000; SoilCN=12; EnrACoeff=7.4; EnrBCoeff=0.2; OCUnits=Total
                Thickness  OC        FBiom  FInert
                150        0.953846  0.04   0.4
                150        0.953846  0.02   0.6
                300        0.961538  0.02   0.8
                300        0.846154  0.02   1
                300        0.546154  0.01   1
                300        0.261538  0.01   1
                300        0.2       0.01   1
              Analysis: Thickness=[150, 150, 300, 300, 300, 300, 300]; PH=[8, 8, 8, 8, 8, 8, 8]; PHUnits=Water; BoronUnits=HotWater
              InitialWater: PercentMethod=FilledFromTop; FractionFull=1
              Sample Initial nitrogen: NO3Units=kgha; NH4Units=kgha; SWUnits=Volumetric; OCUnits=Total; PHUnits=Water
                Thickness  NO3  NH4
                200        100  1
                1800       10   1
              CERESSoilTemperature
            SurfaceOrganicMatter: same as Validation.SE Queensland.APS6.APS6Base.paddock.SurfaceOrganicMatter
            Plant Wheat: CropType=Wheat
            MicroClimate: a_interception=0; b_interception=1; c_interception=0; d_interception=0; soil_albedo=0.3; sun_angle=15; soil_heat_flux_fraction=0.4; night_interception_fraction=0.5; refheight=2; albedo=0.15; emissivity=0.96; RadIntTotal=0
            Manager Automatic irrigation based on water deficit
              FASW = 0
              WaterDeficit = 0
              AutoIrrigationOn = True
              FASWThreshold = 0.9
              FASWDepth = 600
```csharp
using System;
using Models.Core;
using System.Collections.Generic;
using System.Text;
using Models.Soils;
using Models.PMF;
using Models;
using System.Xml.Serialization;
using APSIM.Shared.Utilities;

namespace Models
{
    [Serializable] 
    public class Script : Model
    {
        public double FASW { get; set; }
        public double WaterDeficit  { get; set; }
    
        [Link] Zone zone;
        [Link] Irrigation irrigation;
        [Link] Soil soil;
        
        [Description("Auto irrigation on?")]
        public bool AutoIrrigationOn { get; set; }

        [Description("Threshold fraction available water (0-1)")]
        public double FASWThreshold { get; set; }

        [Description("Soil depth (mm) to which fraction available water is calculated")]
        public double FASWDepth { get; set; }

        [EventSubscribe("DoManagement")]
        private void OnDoManagement(object sender, EventArgs e)
        {
            CalculateFASW();
            if (AutoIrrigationOn)
            {
                if (FASW < FASWThreshold)
                {
                    double amount = 10;
                    irrigation.Apply(WaterDeficit, depth: 0);
                }
            }
        }
        
        private void CalculateFASW()
        {
            double[] LL15 = MathUtilities.Multiply(soil.LL15, soil.Thickness);
            double[] DUL = MathUtilities.Multiply(soil.DUL, soil.Thickness);
        
            int nlayr = GetLayerIndex();
            double cumdep = MathUtilities.Sum(soil.Thickness, 0, nlayr, 0.0);

            double excess_fr = MathUtilities.Divide((cumdep - FASWDepth), soil.Thickness[nlayr], 0.0);

            // note that results may be strange if swdep < ll15
            double avail_sw = (MathUtilities.Sum(soil.Water, 0, nlayr, 0.0)
                              - excess_fr * soil.Water[nlayr])
                              - (MathUtilities.Sum(LL15, 0, nlayr, 0.0)
                              - excess_fr * LL15[nlayr]);


            double pot_avail_sw = (MathUtilities.Sum(DUL, 0, nlayr, 0.0)
                                  - excess_fr * DUL[nlayr])
                                  - (MathUtilities.Sum(LL15, 0, nlayr, 0.0)
                                  - excess_fr * LL15[nlayr]);

            FASW = MathUtilities.Divide(avail_sw, pot_avail_sw, 0.0);
            WaterDeficit = MathUtilities.Constrain(pot_avail_sw - avail_sw, 0.0, 100000);
        }

        private int GetLayerIndex()
        {
            double[] cumThickness = Soil.ToCumThickness(soil.Thickness);
            for (int i = 1; i < cumThickness.Length; i++)
            {
                if (FASWDepth < cumThickness[i])
                    return i - 1;
            }
            
            return cumThickness.Length - 1;
        }

    }
}
```
            Report HarvestReport
            Report DailyReport
            SoluteManager
      Experiment Gatton94
        Memo
          This simple experiment was conducted to investigate the impact of time of sowing on  wheat.  Wheat (cv. Hartog) was sown at Gatton on six dates during 1994.  Various data were collected. However final growth data was compromised by mouse damage.  The dataset is used here to study the impact of sowing time on phenological development.
        Factors
          Factor TOS: Specifications=[Sowing]
            Manager 1
              SowDate = 29-Apr
              CultivarName = Hartog
              SowingDepth = 40
              RowSpacing = 250
              Population = 100
```csharp
using System;
using Models.Core;
using Models.PMF;
using Models.Soils;
using Models.Utilities;
using APSIM.Shared.Utilities;

namespace Models
{
    [Serializable]
    public class Script : Model
    {
        [Link] Clock Clock;
        [Link] Fertiliser Fertiliser;
        [Link] Summary Summary;
        [Link] Plant Wheat;
        [Link] Soil Soil;
        Accumulator accumulatedRain;
        
        [Description("Sowing date (d-mmm)")]
        public string SowDate { get; set; }
        [Description("Cultivar to be sown")]
        public string CultivarName { get; set; }
        [Description("Sowing depth (mm)")]
        public double SowingDepth { get; set; }
        [Description("Row spacing (mm)")]
        public double RowSpacing { get; set; }
        [Description("Plant population (/m2)")]
        public double Population { get; set; }
        
        


        [EventSubscribe("DoManagement")]
        private void OnDoManagement(object sender, EventArgs e)
        {
        
            
            if (DateUtilities.WithinDates(SowDate, Clock.Today, SowDate))
            {
                Wheat.Sow(population: Population, cultivar: CultivarName, depth: SowingDepth, rowSpacing: RowSpacing);    
            }
        
        }
        
    }
}
```
            Manager 2
              SowDate = 20-May
              CultivarName = Hartog
              SowingDepth = 40
              RowSpacing = 250
              Population = 100
              script: same as in Validation.SE Queensland.Gatton94.Factors.TOS.1
            Manager 3
              SowDate = 10-Jun
              CultivarName = Hartog
              SowingDepth = 40
              RowSpacing = 250
              Population = 100
              script: same as in Validation.SE Queensland.Gatton94.Factors.TOS.1
            Manager 4
              SowDate = 4-Jul
              CultivarName = Hartog
              SowingDepth = 40
              RowSpacing = 250
              Population = 100
              script: same as in Validation.SE Queensland.Gatton94.Factors.TOS.1
            Manager 5
              SowDate = 22-Jul
              CultivarName = Hartog
              SowingDepth = 40
              RowSpacing = 250
              Population = 100
              script: same as in Validation.SE Queensland.Gatton94.Factors.TOS.1
            Manager 6
              SowDate = 15-Aug
              CultivarName = Hartog
              SowingDepth = 40
              RowSpacing = 250
              Population = 100
              script: same as in Validation.SE Queensland.Gatton94.Factors.TOS.1
        Simulation Gatton94Base
          Clock: StartDate=1994-04-29; EndDate=1994-12-30
          Summary summaryfile
          Weather: FileName=Gatton1994.met
          SoilArbitrator Soil Arbitrator
          Zone Field: Area=1; Slope=0
            Irrigation
            Fertiliser
            Soil APS6Field: SoilType=APS6Soil; LocalName=APS6Site; Site=APS6Site; NearestTown=Unknown; Region=Lawes; NaturalVegetation=Unknown; Latitude=0; Longitude=0
              Water
                Thickness  BD    AirDry  LL15  DUL   SAT
                150        1.38  0.1     0.2   0.38  0.43
                150        1.34  0.1     0.2   0.38  0.43
                300        1.35  0.1     0.22  0.4   0.43
                300        1.5   0.1     0.18  0.4   0.43
                300        1.49  0.1     0.14  0.39  0.42
                300        1.46  0.1     0.2   0.38  0.4
                300        1.46  0.1     0.2   0.38  0.4
                SoilCrop WheatSoil: LL=[0.2, 0.2, 0.22, 0.18, 0.14, 0.25, 0.28]; KL=[0.06, 0.06, 0.06, 0.06, 0.06, 0.06, 0.06]; XF=[1, 1, 1, 1, 1, 1, 1]
              SoilWater: same as Validation.SE Queensland.APS6.APS6Base.paddock.APS6Field.SoilWater
              SoilNitrogen: fom_type=[default, manure, mucuna, lablab, shemp, stable]; fract_carb=[0.2, 0.3, 0.54, 0.57, 0.45, 0]; fract_cell=[0.7, 0.3, 0.37, 0.37, 0.47, 0.1]; fract_lign=[0.1, 0.4, 0.09, 0.06, 0.08, 0.9]
              SoilOrganicMatter: same as Validation.SE Queensland.APS6.APS6Base.paddock.APS6Field.SoilOrganicMatter
              Analysis: Thickness=[150, 150, 300, 300, 300, 300, 300]; PH=[7.5, 8, 8, 8, 8, 8, 8]; PHUnits=Water; BoronUnits=HotWater
              Sample Initial Water: Thickness=[150, 150, 300, 300, 300, 300, 300]; SW=[0.326, 0.326, 0.346, 0.333, 0.315, 0.326, 0.326]; NO3Units=ppm; NH4Units=ppm; SWUnits=Volumetric; OCUnits=Total; PHUnits=Water
              Sample Initial Nitrogen: NO3Units=ppm; NH4Units=ppm; SWUnits=Volumetric; OCUnits=Total; PHUnits=Water
                Thickness  NO3   NH4
                150        1.3   1.3
                150        0.6   1
                300        0.25  1
                300        0.2   0.8
                300        0.1   0.8
                300        0.1   0.5
                300        0.1   0.5
              CERESSoilTemperature
            SurfaceOrganicMatter: same as Validation.SE Queensland.APS6.APS6Base.paddock.SurfaceOrganicMatter
            Plant Wheat: CropType=Wheat
            MicroClimate: a_interception=0; b_interception=1; c_interception=0; d_interception=0; soil_albedo=0.3; sun_angle=15; soil_heat_flux_fraction=0.4; night_interception_fraction=0.5; refheight=2; albedo=0.15; emissivity=0.96; RadIntTotal=0
            Report DailyReport
            Report HarvestReport
            Manager Sowing
              SowDate = 25-May
              CultivarName = Hartog
              SowingDepth = 40
              RowSpacing = 250
              Population = 100
              script: same as in Validation.SE Queensland.Gatton94.Factors.TOS.1
            Manager Harvesting: same as Validation.SE Queensland.APS26.APS26NRate160WaterWet.paddock.Harvesting
            Manager AutoIrrigate
              FASW = 0
              WaterDeficit = 0
              AutoIrrigationOn = True
              StartStageName = Emergence
              EndStageName = EndGrainFill
              FASWThreshold = 0.9
              FASWDepth = 1000
```csharp
using System;
using Models.Core;
using System.Collections.Generic;
using System.Text;
using Models.Soils;
using Models.PMF;
using Models;
using System.Xml.Serialization;
using APSIM.Shared.Utilities;

namespace Models
{
    [Serializable] 
    public class Script : Model
    {
        public double FASW { get; set; }
        public double WaterDeficit  { get; set; }
    
        [Link] Plant Chickpea;
        [Link] Zone zone;
        [Link] Irrigation irrigation;
        [Link] Soil soil;
        
        [Description("Auto irrigation on?")]
        public bool AutoIrrigationOn { get; set; }
        
        [Description("Irrigation window start stage")]
        public string StartStageName { get; set; }
        [Description("Irrigation window end stage")]
        public string EndStageName { get; set; }

        [Description("Threshold fraction available water (0-1)")]
        public double FASWThreshold { get; set; }

        [Description("Soil depth (mm) to which fraction available water is calculated")]
        public double FASWDepth { get; set; }

        [EventSubscribe("DoManagement")]
        private void OnDoManagement(object sender, EventArgs e)
        {
            CalculateFASW();
            if (AutoIrrigationOn && Chickpea.Phenology.Between(StartStageName, EndStageName))
            {
                if (FASW < FASWThreshold)
                {
                    double amount = 10;
                    irrigation.Apply(WaterDeficit, depth: 0);
                }
            }
        }
        
        private void CalculateFASW()
        {
            double[] LL15 = MathUtilities.Multiply(soil.LL15, soil.Thickness);
            double[] DUL = MathUtilities.Multiply(soil.DUL, soil.Thickness);
        
            int nlayr = GetLayerIndex();
            double cumdep = MathUtilities.Sum(soil.Thickness, 0, nlayr, 0.0);

            double excess_fr = MathUtilities.Divide((cumdep - FASWDepth), soil.Thickness[nlayr], 0.0);

            // note that results may be strange if swdep < ll15
            double avail_sw = (MathUtilities.Sum(soil.Water, 0, nlayr, 0.0)
                              - excess_fr * soil.Water[nlayr])
                              - (MathUtilities.Sum(LL15, 0, nlayr, 0.0)
                              - excess_fr * LL15[nlayr]);


            double pot_avail_sw = (MathUtilities.Sum(DUL, 0, nlayr, 0.0)
                                  - excess_fr * DUL[nlayr])
                                  - (MathUtilities.Sum(LL15, 0, nlayr, 0.0)
                                  - excess_fr * LL15[nlayr]);

            FASW = MathUtilities.Divide(avail_sw, pot_avail_sw, 0.0);
            WaterDeficit = MathUtilities.Constrain(pot_avail_sw - avail_sw, 0.0, 100000);
        }

        private int GetLayerIndex()
        {
            double[] cumThickness = Soil.ToCumThickness(soil.Thickness);
            for (int i = 1; i < cumThickness.Length; i++)
            {
                if (FASWDepth < cumThickness[i])
                    return i - 1;
            }
            
            return cumThickness.Length - 1;
        }

    }
}
```
            Operations ApplyFertiliser
              1994-04-29  [Fertiliser].Apply(Amount: 200, Type: Fertiliser.Types.NO3N);
              Memo
                Add sufficient N to remove limitation
            SoluteManager
      Experiment Gatton2009
        Factors
          Factor TOS: Specifications=[SowingRule].Script.TOS = 1, 2, 3
          Factor Cv
            Specifications=[SowingRule].Script.Cultivar = Bolac, Derrimut, EGAGregory, Gladius, H46, Hartog, Janz, Kelallac, Kennedy, MacKellar, Ruby, Ventura, Wedgetail, Wyalkatchem, Yitpi, Young
        Simulation Gatton2009Base
          Clock: StartDate=2009-04-01; EndDate=2009-12-30
          Summary summaryfile
          Weather: FileName=Gatton2009.met
          SoilArbitrator Soil Arbitrator
          Zone Field: Area=1; Slope=0
            Irrigation
            Fertiliser
            Soil APS6Field: same as Validation.SE Queensland.Gatton94.Gatton94Base.Field.APS6Field
            Manager SowingRule
              TOS = 1
              Cultivar = Hartog
```csharp
using System;
using Models.Core;
using Models.PMF;
namespace Models
{
           
    [Serializable] 
    [System.Xml.Serialization.XmlInclude(typeof(Model))]
    public class Script : Model
    {
    
        [Link] Plant Wheat;
        [Link] Clock Clock;
            
        [Description("Time of Sowing")]
        public int TOS { get; set; }

        [Description("Cultivar")]
        public String Cultivar { get; set; }
        
        [EventSubscribe("DoManagement")]
        private void OnDoManagement(object sender, EventArgs e)
        {
            if (((Clock.Today.DayOfYear == 120) && (TOS == 1)) ||
                ((Clock.Today.DayOfYear == 150) && (TOS == 2)) ||
                ((Clock.Today.DayOfYear == 177) && (TOS == 3)))
            {
                Wheat.Sow(population: 100, cultivar: Cultivar, depth: 30, rowSpacing: 250);
            }
        }


    }
}
```
            SurfaceOrganicMatter: same as Validation.SE Queensland.APS6.APS6Base.paddock.SurfaceOrganicMatter
            Plant Wheat: CropType=Wheat
            MicroClimate: a_interception=0; b_interception=1; c_interception=0; d_interception=0; soil_albedo=0.3; sun_angle=15; soil_heat_flux_fraction=0.4; night_interception_fraction=0.5; refheight=2; albedo=0.15; emissivity=0.96; RadIntTotal=0
            Report DailyReport
            SoluteManager
      Experiment Gatton2011
        Factors
          Factor TOS: Specifications=[SowingRule].Script.TOS = 1, 2
          Factor Cv
            Specifications=[SowingRule].Script.Cultivar = Axe, Bolac, Derrimut, Eaglehawk, Gregory, Lincoln, Mace, Scout
        Simulation Gatton2011Base
          Clock: StartDate=2011-05-05; EndDate=2011-11-12
          Summary summaryfile
          Weather: FileName=Gatton2011.met
          SoilArbitrator Soil Arbitrator
          Zone Field: Area=1; Slope=0
            Irrigation
            Fertiliser
            Soil APS6Field: same as Validation.SE Queensland.Gatton94.Gatton94Base.Field.APS6Field
            Manager SowingRule
              TOS = 1
              Cultivar = Hartog
```csharp
using System;
using Models.Core;
using Models.PMF;
namespace Models
{
           
    [Serializable] 
    [System.Xml.Serialization.XmlInclude(typeof(Model))]
    public class Script : Model
    {
    
        [Link] Plant Wheat;
        [Link] Clock Clock;
            
        [Description("Time of Sowing")]
        public int TOS { get; set; }

        [Description("Cultivar")]
        public String Cultivar { get; set; }
        
        [EventSubscribe("DoManagement")]
        private void OnDoManagement(object sender, EventArgs e)
        {
            if (((Clock.Today.DayOfYear == 136) && (TOS == 1)) ||
                ((Clock.Today.DayOfYear == 177) && (TOS == 2)))
            {
                Wheat.Sow(population: 100, cultivar: Cultivar, depth: 30, rowSpacing: 250);
            }
        }


    }
}
```
            Operations
              2011-05-13  [Fertiliser].Apply(Amount: 55, Type: Fertiliser.Types.UreaN);
              2011-05-13  [Irrigation].Apply(amount:11);
              2011-06-30  [Fertiliser].Apply(Amount: 43, Type: Fertiliser.Types.UreaN);
              2011-08-08  [Fertiliser].Apply(Amount: 90, Type: Fertiliser.Types.UreaN);
            SurfaceOrganicMatter: same as Validation.SE Queensland.APS6.APS6Base.paddock.SurfaceOrganicMatter
            Plant Wheat: CropType=Wheat
            MicroClimate: a_interception=0; b_interception=1; c_interception=0; d_interception=0; soil_albedo=0.3; sun_angle=15; soil_heat_flux_fraction=0.4; night_interception_fraction=0.5; refheight=2; albedo=0.15; emissivity=0.96; RadIntTotal=0
            Report DailyReport
            SoluteManager
      Folder AddingValueToNVT
        Memo
          The "Adding Value to the National Variety Trials" project aimed to use measurement and modelling to explain GeneXEnvironmentXManagement interactions for Australian Wheat cultivars.  A description of this national trial can be found in [Lawes201638].  Here we include some of the data from south-eastern Queensland.
        Experiment Goondiwindi2011
          Factors
            Factor Cv: Specifications=[Sowing].Script.CultivarName = Janz, Lang, EGAGregory
            Factor TOS: Specifications=[Sowing].Script.SowDate = 19-May, 9-Jun, 28-Jun
          Simulation Goondiwindi2011Base
            Clock: StartDate=2011-04-01; EndDate=2011-12-30
            Summary summaryfile
            Weather: FileName=Goondiwindi2011.met
            SoilArbitrator Soil Arbitrator
            Zone Field: same as Validation.SE Queensland.Gatton94.Gatton94Base.Field
        Experiment Nagwee2012
          Memo
            INSERT TEXT HERE
          Factors
            Factor Cv: Specifications=[Sowing].Script.CultivarName = Janz, Lang, EGAGregory
            Factor TOS: Specifications=[Sowing].Script.SowDate = 17-May, 31-May, 23-Jun
          Simulation Nangwee2012Base
            Clock: StartDate=2012-04-01; EndDate=2012-12-30
            Summary summaryfile
            Weather: FileName=Nangwee2012.met
            SoilArbitrator Soil Arbitrator
            Zone Field: same as Validation.SE Queensland.Gatton94.Gatton94Base.Field
        Experiment Bungunya2012
          Memo
            INSERT TEXT HERE
          Factors
            Factor Cv: Specifications=[Sowing].Script.CultivarName = Janz, Lang, EGAGregory
            Factor TOS: Specifications=[Sowing].Script.SowDate = 10-May, 22-May, 23-Jun
          Simulation Bungunya2012Base
            Clock: StartDate=2012-04-01; EndDate=2012-12-30
            Summary summaryfile
            Weather: FileName=Bungunya2012.met
            SoilArbitrator Soil Arbitrator
            Zone Field: same as Validation.SE Queensland.Gatton94.Gatton94Base.Field
      PredictedObserved SEQObsPred: PredictedTableName=HarvestReport; ObservedTableName=Observed; FieldNameUsedForMatch=Wheat.Phenology.CurrentStageName
    Folder Western Australia
      Memo
        The wheat belt of Western Australia has a Mediteranean climate (winter dominant rainfall patterns) with mostly sandy soils.  Data from [Asseng1998163].   and some more recent studies have been included to extend the range of conditions studied and to include more modern cultivars.
      Experiment Mer86
        Factors
          Factor NRate: Specifications=[FertiliserOperations]
            Operations 15
              1986-06-14  [Fertiliser].Apply(Amount: 15, Type: Fertiliser.Types.NO3N, Depth: 50);
            Operations 60
              1986-05-29  [Fertiliser].Apply(Amount: 30, Type: Fertiliser.Types.NO3N, Depth: 50);
          Factor Water: Specifications=[IrrigationOperations]
            Operations Dry
              1986-09-03  [Irrigation].Apply (amount:0);
              1986-09-05  [Irrigation].Apply (amount:0);
              1986-09-10  [Irrigation].Apply (amount:0);
              1986-09-11  [Irrigation].Apply (amount:0);
              1986-09-14  [Irrigation].Apply (amount:0);
              1986-09-16  [Irrigation].Apply (amount:0);
              1986-09-18  [Irrigation].Apply (amount:0);
              1986-09-21  [Irrigation].Apply (amount:0);
              1986-09-23  [Irrigation].Apply (amount:0);
              1986-09-24  [Irrigation].Apply (amount:0);
              1986-09-30  [Irrigation].Apply (amount:0);
              1986-10-02  [Irrigation].Apply (amount:0);
              1986-10-04  [Irrigation].Apply (amount:0);
              1986-10-10  [Irrigation].Apply (amount:0);
              1986-10-12  [Irrigation].Apply (amount:0);
              1986-10-14  [Irrigation].Apply (amount:0);
              1986-10-16  [Irrigation].Apply (amount:0);
              1986-10-18  [Irrigation].Apply (amount:0);
              1986-10-20  [Irrigation].Apply (amount:0);
              1986-10-22  [Irrigation].Apply (amount:0);
              1986-10-25  [Irrigation].Apply (amount:0);
              1986-10-26  [Irrigation].Apply (amount:0);
              1986-10-28  [Irrigation].Apply (amount:0);
              1986-10-30  [Irrigation].Apply (amount:0);
              1986-11-01  [Irrigation].Apply (amount:0);
              1986-11-03  [Irrigation].Apply (amount:0);
              1986-11-05  [Irrigation].Apply (amount:0);
              1986-11-07  [Irrigation].Apply (amount:0);
            Operations Wet
              1986-09-03  [Irrigation].Apply (amount:10);
              1986-09-05  [Irrigation].Apply (amount:20);
              1986-09-10  [Irrigation].Apply (amount:20);
              1986-09-11  [Irrigation].Apply (amount:10);
              1986-09-14  [Irrigation].Apply (amount:10);
              1986-09-16  [Irrigation].Apply (amount:10);
              1986-09-18  [Irrigation].Apply (amount:10);
              1986-09-21  [Irrigation].Apply (amount:10);
              1986-09-23  [Irrigation].Apply (amount:10);
              1986-09-24  [Irrigation].Apply (amount:20);
              1986-09-30  [Irrigation].Apply (amount:30);
              1986-10-02  [Irrigation].Apply (amount:20);
              1986-10-04  [Irrigation].Apply (amount:20);
              1986-10-10  [Irrigation].Apply (amount:20);
              1986-10-12  [Irrigation].Apply (amount:20);
              1986-10-14  [Irrigation].Apply (amount:20);
              1986-10-16  [Irrigation].Apply (amount:20);
              1986-10-18  [Irrigation].Apply (amount:20);
              1986-10-20  [Irrigation].Apply (amount:20);
              1986-10-22  [Irrigation].Apply (amount:20);
              1986-10-25  [Irrigation].Apply (amount:20);
              1986-10-26  [Irrigation].Apply (amount:20);
              1986-10-28  [Irrigation].Apply (amount:20);
              1986-10-30  [Irrigation].Apply (amount:20);
              1986-11-01  [Irrigation].Apply (amount:20);
              1986-11-03  [Irrigation].Apply (amount:20);
              1986-11-05  [Irrigation].Apply (amount:20);
              1986-11-07  [Irrigation].Apply (amount:20);
        Simulation Mer86Base
          Clock: StartDate=1986-05-01; EndDate=1986-11-30
          Summary summaryfile
          Weather: FileName=MER-86.met
          Zone paddock: Area=1; Slope=0
            Soil MER-86Field: SoilType=sand; LocalName=Merredin; Site=Merredin; NearestTown=Unknown; Region=WA; NaturalVegetation=Unknown; Latitude=0; Longitude=0
              Water
                Thickness  BD    AirDry  LL15  DUL   SAT
                100        1.7   0.03    0.03  0.16  0.26
                100        1.75  0.03    0.03  0.21  0.26
                100        1.8   0.03    0.03  0.22  0.25
                100        1.85  0.04    0.05  0.23  0.24
                100        1.85  0.04    0.1   0.22  0.23
                100        1.85  0.04    0.12  0.22  0.22
                100        1.85  0.04    0.17  0.22  0.22
                200        1.85  0.04    0.17  0.22  0.23
                200        1.85  0.04    0.17  0.22  0.23
                200        1.85  0.04    0.17  0.22  0.23
                SoilCrop WheatSoil
                  LL=[0.03, 0.03, 0.03, 0.05, 0.1, 0.12, 0.17, 0.17, 0.17, 0.17]
                  KL=[0.06, 0.06, 0.06, 0.06, 0.06, 0.06, 0.06, 0.06, 0.06, 0.06]
                  XF=[0.2, 0.6, 0.6, 0.6, 0.6, 0.6, 0.6, 0.6, 0.6, 0.6]
              SoilWater: SummerDate=1-Nov; SummerU=6; SummerCona=2; WinterDate=1-Apr; WinterU=6; WinterCona=2; DiffusConst=88; DiffusSlope=35; Salb=0.13; CN2Bare=60; CNRed=20; CNCov=0.8; slope=0; discharge_width=0; catchment_area=0; max_pond=0; residueinterception=0
                Thickness  SWCON  KLAT
                100        1      0
                100        1      0
                100        1      0
                100        1      0
                100        0.3    0
                100        1      0
                100        1      0
                200        1      0
                200        1      0
                200        1      0
              SoilNitrogen: fom_type=[default, manure, mucuna, lablab, shemp, stable]; fract_carb=[0.2, 0.3, 0.54, 0.57, 0.45, 0]; fract_cell=[0.7, 0.3, 0.37, 0.37, 0.47, 0.1]; fract_lign=[0.1, 0.4, 0.09, 0.06, 0.08, 0.9]
              SoilOrganicMatter: RootCN=40; RootWt=1000; SoilCN=13; EnrACoeff=1; EnrBCoeff=1; OCUnits=Total
                Thickness  OC    FBiom  FInert
                100        0.5   0.04   0.1
                100        0.1   0.03   0.1
                100        0.1   0.02   0.2
                100        0.05  0.01   0.8
                100        0.05  0.01   0.9
                100        0.05  0.01   0.9
                100        0.05  0.01   0.9
                200        0.05  0.01   0.9
                200        0.05  0.01   0.9
                200        0.05  0.01   0.9
              Analysis: Thickness=[100, 100, 100, 100, 100, 100, 100, 200, 200, 200]; PH=[4.7, 4.7, 4.7, 6, 6, 6, 6, 6, 6, 6]; PHUnits=Water; BoronUnits=HotWater
              Sample Initial Water: Thickness=[100, 100, 100, 100, 100, 100, 100, 200, 200, 200]; SW=[0.03, 0.03, 0.07, 0.1, 0.22, 0.22, 0.22, 0.22, 0.21, 0.19]; NO3Units=ppm; NH4Units=ppm; SWUnits=Volumetric; OCUnits=Total; PHUnits=Water
              Sample Initial Nitrogen: NO3Units=ppm; NH4Units=ppm; SWUnits=Volumetric; OCUnits=Total; PHUnits=Water
                Thickness  NO3  NH4
                100        10   5
                100        5    3
                100        0.3  1
                100        0    0
                100        0    0
                100        0    0
                100        0    0
                200        0    0
                200        0    0
                200        0    0
              CERESSoilTemperature
            Irrigation
            SurfaceOrganicMatter: PoolName=wheat_stubble; type=wheat; mass=0; standing_fraction=0; cpr=0; cnr=80; CriticalResidueWeight=2000; OptimumDecompTemp=20; MaxCumulativeEOS=20; CNRatioDecompCoeff=0.277; CNRatioDecompThreshold=25; TotalLeachRain=25; MinRainToLeach=10; CriticalMinimumOrganicC=0.004; DefaultCPRatio=0; DefaultStandingFraction=0; StandingExtinctCoeff=0.5; FractionFaecesAdded=0.5
              Pools:
                {PoolName=wheat_stubble, ResidueType=wheat, Mass=0, CNRatio=80, CPRatio=0, StandingFraction=0}
              ResidueTypes: LoadFromResource=ResidueTypes
            Operations SowingOperations
              1986-05-29  [Wheat].Sow(population:149, cultivar:"Gutha", depth:30, rowSpacing:250);
            Plant Wheat: CropType=Wheat
            MicroClimate: a_interception=0; b_interception=1; c_interception=0; d_interception=0; soil_albedo=0.3; sun_angle=15; soil_heat_flux_fraction=0.4; night_interception_fraction=0.5; refheight=2; albedo=0.15; emissivity=0.96; RadIntTotal=0
            Fertiliser
            Operations FertiliserOperations
              1986-06-14  [Fertiliser].Apply(Amount: 15, Type: Fertiliser.Types.NO3N, Depth: 50);
            Operations IrrigationOperations: same as Validation.Western Australia.Mer86.Factors.Water.Wet
            MicroClimate: a_interception=0; b_interception=1; c_interception=0; d_interception=0; soil_albedo=0.3; sun_angle=15; soil_heat_flux_fraction=0.4; night_interception_fraction=0.5; refheight=2; albedo=0.15; emissivity=0.96; RadIntTotal=0
            Report DailyReport
            Report HarvestReport
            Manager Harvesting: same as Validation.SE Queensland.APS6.APS6Base.paddock.Harvesting
            SoluteManager
          SoilArbitrator Soil Arbitrator
      Experiment Mer73
        Factors
          Factor NRate: Specifications=[FertiliserOperations]
            Operations 0
              1986-06-14  [Fertiliser].Apply(Amount: 0, Type: Fertiliser.Types.NO3N, Depth: 50);
            Operations 15
              1973-06-21  [Fertiliser].Apply(Amount: 15, Type: Fertiliser.Types.NO3N, Depth: 50);
          Factor Water: Specifications=[IrrigationOperations]
            Operations Dry: same as Validation.Western Australia.Mer86.Factors.Water.Dry
            Operations 40
              1973-09-21  [Irrigation].Apply (amount:40);
            Operations 150
              1973-08-28  [Irrigation].Apply (amount:20);
              1973-09-21  [Irrigation].Apply (amount:30);
              1973-10-12  [Irrigation].Apply (amount:50);
              1973-10-28  [Irrigation].Apply (amount:50);
        Simulation Mer73Base
          Clock: StartDate=1973-05-01; EndDate=1973-11-30
          Summary summaryfile
          Weather: FileName=MER-73.met
          Zone paddock: Area=1; Slope=0
            Soil MER-73Field: SoilType=sand; LocalName=Merredin; Site=Merredin; NearestTown=Unknown; Region=WA; NaturalVegetation=Unknown; Latitude=0; Longitude=0
              Water
                Thickness  BD    AirDry  LL15  DUL   SAT
                100        1.7   0.03    0.03  0.15  0.28
                100        1.85  0.03    0.04  0.2   0.27
                100        1.75  0.03    0.04  0.2   0.27
                100        1.7   0.04    0.05  0.2   0.25
                100        1.7   0.04    0.05  0.21  0.25
                100        1.85  0.04    0.08  0.21  0.25
                100        1.95  0.04    0.11  0.21  0.25
                200        2     0.04    0.14  0.21  0.23
                200        2     0.04    0.16  0.23  0.23
                200        2     0.04    0.14  0.23  0.23
                SoilCrop WheatSoil
                  LL=[0.03, 0.03, 0.03, 0.05, 0.1, 0.12, 0.17, 0.17, 0.17, 0.17]
                  KL=[0.06, 0.06, 0.06, 0.06, 0.06, 0.06, 0.06, 0.06, 0.06, 0.06]
                  XF=[0.2, 0.2, 0.4, 0.4, 0.4, 0.4, 0.4, 0.4, 0.2, 0]
              SoilWater: SummerDate=1-Nov; SummerU=6; SummerCona=2; WinterDate=1-Apr; WinterU=6; WinterCona=2; DiffusConst=88; DiffusSlope=35; Salb=0.13; CN2Bare=60; CNRed=20; CNCov=0.8; slope=0; discharge_width=0; catchment_area=0; max_pond=0; residueinterception=0
                Thickness  SWCON  KLAT
                100        1      0
                100        1      0
                100        1      0
                100        1      0
                100        0.1    0
                100        1      0
                100        1      0
                200        1      0
                200        1      0
                200        1      0
              SoilNitrogen: fom_type=[default, manure, mucuna, lablab, shemp, stable]; fract_carb=[0.2, 0.3, 0.54, 0.57, 0.45, 0]; fract_cell=[0.7, 0.3, 0.37, 0.37, 0.47, 0.1]; fract_lign=[0.1, 0.4, 0.09, 0.06, 0.08, 0.9]
              SoilOrganicMatter: RootCN=20; RootWt=1500; SoilCN=13; EnrACoeff=1; EnrBCoeff=1; OCUnits=Total
                Thickness  OC    FBiom  FInert
                100        1.2   0.04   0.1
                100        0.8   0.03   0.1
                100        0.3   0.02   0.2
                100        0.05  0.01   0.8
                100        0.05  0.01   0.9
                100        0.05  0.01   0.9
                100        0.05  0.01   0.9
                200        0.05  0.01   0.9
                200        0.05  0.01   0.9
                200        0.05  0.01   0.9
              Analysis: Thickness=[100, 100, 100, 100, 100, 100, 100, 200, 200, 200]; PH=[4.7, 4.7, 4.7, 6, 6, 6, 6, 6, 6, 6]; PHUnits=Water; BoronUnits=HotWater
              Sample Initial Water: Thickness=[100, 100, 100, 100, 100, 100, 100, 200, 200, 200]; SW=[0.03, 0.03, 0.07, 0.1, 0.22, 0.22, 0.22, 0.22, 0.21, 0.19]; NO3Units=ppm; NH4Units=ppm; SWUnits=Volumetric; OCUnits=Total; PHUnits=Water
              Sample Initial Nitrogen: NO3Units=ppm; NH4Units=ppm; SWUnits=Volumetric; OCUnits=Total; PHUnits=Water
                Thickness  NO3  NH4
                100        2    1
                100        1    0
                100        0    0
                100        0    0
                100        0    0
                100        0    0
                100        0    0
                200        0    0
                200        0    0
                200        0    0
              CERESSoilTemperature
            Irrigation
            SurfaceOrganicMatter: PondActive=no; ReportAdditions=no; ReportRemovals=no; PoolName=wheat_stubble; type=wheat; mass=2500; standing_fraction=0; cpr=0; cnr=30; CriticalResidueWeight=2000; OptimumDecompTemp=20; MaxCumulativeEOS=20; CNRatioDecompCoeff=0.277; CNRatioDecompThreshold=25; TotalLeachRain=25; MinRainToLeach=10; CriticalMinimumOrganicC=0.004; DefaultCPRatio=0; DefaultStandingFraction=0; StandingExtinctCoeff=0.5; FractionFaecesAdded=0.5
              Pools:
                {PoolName=wheat_stubble, ResidueType=wheat, Mass=2500, CNRatio=30, CPRatio=0, StandingFraction=0}
              ResidueTypes: LoadFromResource=ResidueTypes
              TillageTypes TillageTypesList
            Operations SowingOperations
              1973-06-21  [Wheat].Sow(population:100, cultivar:"Gamenya", depth:30, rowSpacing:250);
            Plant Wheat: CropType=Wheat
            MicroClimate: a_interception=0; b_interception=1; c_interception=0; d_interception=0; soil_albedo=0.3; sun_angle=15; soil_heat_flux_fraction=0.4; night_interception_fraction=0.5; refheight=2; albedo=0.15; emissivity=0.96; RadIntTotal=0
            Fertiliser
            Operations FertiliserOperations
              1986-06-14  [Fertiliser].Apply(Amount: 15, Type: Fertiliser.Types.NO3N, Depth: 50);
            Operations IrrigationOperations: same as Validation.Western Australia.Mer86.Factors.Water.Wet
            Manager ExtraVariables: same as Validation.SE Queensland.APS14.APS14StubbleBareNRate0.paddock.ExtraVariables
            Report HarvestReport
            Manager Harvesting: same as Validation.SE Queensland.APS26.APS26NRate160WaterWet.paddock.Harvesting
            Report DailyReport
            SoluteManager
          SoilArbitrator Soil Arbitrator
      Experiment Cunderdin97
        Factors
          Factor Sow: Specifications=[SowingSchedule]
            Operations SpearEarly
              1997-06-06  [Wheat].Sow(population:150, cultivar:"Spear", depth:30, rowSpacing:250);
            Operations SpearMid
              1997-07-08  [Wheat].Sow(population:108, cultivar:"Spear", depth:30, rowSpacing:250);
            Operations WilgoyneEarly
              1997-06-06  [Wheat].Sow(population:150, cultivar:"Wilgoyne", depth:30, rowSpacing:250);
            Operations WilgoyneMid
              1997-07-08  [Wheat].Sow(population:108, cultivar:"Wilgoyne", depth:30, rowSpacing:250);
            Operations WilgoyneLate
              1997-07-30  [Wheat].Sow(population:100, cultivar:"Wilgoyne", depth:30, rowSpacing:250);
          Factor SowN: Specifications=[SowingFertiliser].Script.Amount=0,50
          Factor TopN: Specifications=[SowingFertiliser].Script.Amount=0,30
          Factor Irr: Specifications=[IrrigationSchedule]
            Operations Wet
              1997-09-23  [Irrigation].Apply(amount:15);
              1997-10-01  [Irrigation].Apply(amount:15);
              1997-10-06  [Irrigation].Apply(amount:15);
              1997-10-14  [Irrigation].Apply(amount:20);
              1997-10-21  [Irrigation].Apply(amount:17.5);
              1997-10-26  [Irrigation].Apply(amount:17.5);
            Operations Dry
        Simulation Cunderdin97Base
          Clock: StartDate=1997-04-16; EndDate=1997-12-30
          Summary summaryfile
          Weather: FileName=Cunderdin.met
          SoilArbitrator Soil Arbitrator
          Zone paddock: Area=1; Slope=0
            Irrigation
            Soil: SoilType=heavy; LocalName=Beverley; Site=Cunderdin; NearestTown=Cunderdin; Region=WA; NaturalVegetation=Unknown; Latitude=0; Longitude=0
              Water
                Thickness  BD   AirDry  LL15   DUL    SAT
                50         1.3  0.034   0.07   0.156  0.48
                50         1.3  0.034   0.07   0.156  0.48
                100        1.4  0.121   0.121  0.22   0.44
                100        1.4  0.123   0.123  0.224  0.44
                100        1.5  0.132   0.132  0.243  0.4
                100        1.5  0.132   0.132  0.243  0.4
                100        1.5  0.135   0.135  0.243  0.4
                100        1.5  0.145   0.145  0.243  0.4
                200        1.5  0.145   0.145  0.243  0.4
                200        1.5  0.145   0.145  0.243  0.4
                200        1.5  0.145   0.145  0.243  0.4
                200        1.5  0.145   0.145  0.243  0.4
                200        1.5  0.145   0.145  0.243  0.4
                200        1.5  0.145   0.145  0.243  0.4
                200        1.5  0.145   0.145  0.243  0.4
                200        1.5  0.145   0.145  0.243  0.4
                200        1.5  0.145   0.145  0.243  0.4
                SoilCrop wheatSoil
                  LL=[0.07, 0.07, 0.121, 0.123, 0.132, 0.132, 0.135, 0.145, 0.145, 0.145, 0.145, 0.145, 0.145, 0.145, 0.145, 0.145, 0.145]
                  KL=[0.06, 0.06, 0.05, 0.05, 0.04, 0.04, 0.04, 0.04, 0.03, 0.03, 0.03, 0.03, 0.03, 0.03, 0.03, 0.03, 0.03]
                  XF=[0.7, 0.6, 0.5, 0.5, 0.5, 0.5, 0.5, 0.5, 0.3, 0.3, 0.3, 0.3, 0.3, 0.3, 0.3, 0.3, 0.3]
              SoilWater: SummerDate=1-Nov; SummerU=7.5; SummerCona=3; WinterDate=1-Apr; WinterU=7.5; WinterCona=3; DiffusConst=88; DiffusSlope=35; Salb=0.13; CN2Bare=25; CNRed=20; CNCov=0.8; slope=0; discharge_width=0; catchment_area=0; max_pond=0; residueinterception=0
                Thickness  SWCON  KLAT
                50         0.6    0
                50         0.6    0
                100        0.6    0
                100        0.6    0
                100        0.6    0
                100        0.6    0
                100        0.6    0
                100        0.6    0
                200        0.6    0
                200        0.6    0
                200        0.6    0
                200        0.6    0
                200        0.6    0
                200        0.6    0
                200        0.6    0
                200        0.6    0
                200        0.6    0
              SoilOrganicMatter: RootCN=40; RootWt=500; SoilCN=13; EnrACoeff=1; EnrBCoeff=1; OCUnits=Total
                Thickness  OC    FBiom  FInert
                50         0.73  0.03   0.3
                50         0.73  0.03   0.3
                100        0.46  0.02   0.3
                100        0.39  0.01   0.4
                100        0.3   0.01   0.8
                100        0.22  0.01   0.9
                100        0.19  0.01   0.9
                100        0.19  0.01   0.9
                200        0.1   0.01   0.9
                200        0.1   0.01   0.9
                200        0.1   0.01   0.9
                200        0.1   0.01   0.9
                200        0.1   0.01   0.9
                200        0.1   0.01   0.9
                200        0.1   0.01   0.9
                200        0.1   0.01   0.9
                200        0.1   0.01   0.9
              Analysis: PH=[4.7, 4.7, 4.7, 4.7, 6, 6, 6, 6, 6, 6, 6, 6, 6, 6, 6, 6, 6]; PHUnits=Water; BoronUnits=HotWater
                Thickness=[50, 50, 100, 100, 100, 100, 100, 100, 200, 200, 200, 200, 200, 200, 200, 200, 200]
              Sample: NO3Units=ppm; NH4Units=ppm; SWUnits=Volumetric; OCUnits=Total; PHUnits=Water
                Thickness  NO3  NH4  SW
                50         23   2    0.034
                50         23   2    0.156
                100        12   1    0.22
                100        9    2    0.224
                100        9    1    0.244
                100        9    1    0.245
                100        9    1    0.246
                100        6    1    0.243
                200        6    1    0.24
                200        6    1    0.145
                200        6    1    0.145
                200        6    1    0.145
                200        2    1    0.145
                200        2    1    0.145
                200        2    1    0.145
                200        2    1    0.145
                200        2    1    0.145
              SoilNitrogen: fom_type=[default, manure, mucuna, lablab, shemp, stable]; fract_carb=[0.2, 0.3, 0.54, 0.57, 0.45, 0]; fract_cell=[0.7, 0.3, 0.37, 0.37, 0.47, 0.1]; fract_lign=[0.1, 0.4, 0.09, 0.06, 0.08, 0.9]
              CERESSoilTemperature
            SurfaceOrganicMatter: PondActive=no; ReportAdditions=no; ReportRemovals=no; PoolName=wheat_stubble; type=wheat; mass=500; standing_fraction=0; cpr=0; cnr=120; CriticalResidueWeight=2000; OptimumDecompTemp=20; MaxCumulativeEOS=20; CNRatioDecompCoeff=0.277; CNRatioDecompThreshold=25; TotalLeachRain=25; MinRainToLeach=10; CriticalMinimumOrganicC=0.004; DefaultCPRatio=0; DefaultStandingFraction=0; StandingExtinctCoeff=0.5; FractionFaecesAdded=0.5
              Pools:
                {PoolName=wheat_stubble, ResidueType=wheat, Mass=500, CNRatio=120, CPRatio=0, StandingFraction=0}
              ResidueTypes: LoadFromResource=ResidueTypes
              TillageTypes TillageTypesList
            Fertiliser
            Plant Wheat: CropType=Wheat
            Operations IrrigationSchedule: same as Validation.SE Queensland.APS14.APS14StubbleBareNRate0.paddock.IrrigationSchedule
            MicroClimate: a_interception=0; b_interception=1; c_interception=0; d_interception=0; soil_albedo=0.3; sun_angle=15; soil_heat_flux_fraction=0.4; night_interception_fraction=0.5; refheight=2; albedo=0.15; emissivity=0.96; RadIntTotal=0
            Operations SowingSchedule
              1993-06-29  [Wheat].Sow(population:114, cultivar:"GattonHartog", depth:30, rowSpacing:250);
            PredictedObserved: FieldNameUsedForMatch=Wheat.Zadok.Stage
            Manager ExtraVariables: same as Validation.SE Queensland.APS14.APS14StubbleBareNRate0.paddock.ExtraVariables
            Manager SowingFertiliser
              Amount = 160
```csharp
using System;
using Models.Core;
using Models.PMF;
using APSIM.Shared.Utilities;

namespace Models
{
    [Serializable]
    public class Script : Model
    {
        [Link] Clock Clock;
        [Link] Fertiliser Fertiliser;
        [Link] Summary Summary;
        
        [Description("Amount of fertiliser to be applied")]
        public double Amount { get; set; }

        [EventSubscribe("Sowing")]
        private void OnSowing(object sender, EventArgs e)
        {
            Fertiliser.Apply(Amount: Amount, Type: Fertiliser.Types.NO3N);
        }
        
    }
}
```
            Manager TopdressFertiliser
              FertDayOfYear = 239
              Amount = 0
              script: same as in Validation.SE Queensland.APS26.APS26NRate160WaterWet.paddock.ApplyFertiliser
            Report
              VariableNames:
                [Clock].Today
                [Wheat].Zadok.Stage
                [Wheat].Phenology.CurrentStageName
                [Wheat].AboveGround.Wt
                [Wheat].AboveGround.N
                [Wheat].Grain.Wt
                [Wheat].Grain.Protein
                [Wheat].Grain.Size
                [Wheat].Grain.Number
                [Wheat].Grain.Live.Wt
                [Wheat].Grain.Live.N
                [Wheat].Leaf.LAI
                [Wheat].Leaf.Live.Wt
                [Wheat].Leaf.Live.N
                [Wheat].Spike.Wt
                [Wheat].Spike.N
                [Wheat].Stem.Live.Wt
                [Wheat].Stem.Live.N
                [Wheat].Root.Depth
                [Wheat].Root.WaterUptake
                [Wheat].Leaf.Fw
                [Wheat].Leaf.Fn
                [Wheat].Total.Wt
              EventNames:
                [Clock].DoReport
            Report DailyReport
            Report HarvestReport
            Manager Harvesting: same as Validation.SE Queensland.APS26.APS26NRate160WaterWet.paddock.Harvesting
            SoluteManager
      Experiment Wongan83
        Factors
          Factor Soil
            Factor Ripped: Specifications=[Water]
              Water
                Thickness  BD    AirDry  LL15  DUL   SAT
                50         1.31  0.04    0.07  0.11  0.35
                50         1.31  0.05    0.07  0.11  0.35
                100        1.45  0.05    0.08  0.14  0.35
                200        1.48  0.05    0.09  0.14  0.35
                200        1.53  0.05    0.09  0.15  0.35
                200        1.5   0.05    0.09  0.15  0.35
                400        1.5   0.05    0.1   0.16  0.35
                400        1.5   0.05    0.11  0.17  0.35
                600        1.5   0.05    0.13  0.17  0.35
                600        1.5   0.05    0.13  0.17  0.35
                SoilCrop WheatSoil
                  LL=[0.08, 0.08, 0.09, 0.1, 0.11, 0.12, 0.12, 0.12, 0.14, 0.14]
                  KL=[0.06, 0.06, 0.06, 0.06, 0.06, 0.06, 0.06, 0.06, 0.06, 0.06]
                  XF=[1, 1, 1, 1, 1, 1, 1, 1, 1, 1]
            Factor UnRipped: Specifications=[Water]
              Water
                Thickness  BD    AirDry  LL15  DUL   SAT
                50         1.31  0.04    0.07  0.13  0.35
                50         1.31  0.05    0.07  0.13  0.35
                100        1.45  0.05    0.08  0.14  0.35
                200        1.48  0.05    0.09  0.14  0.35
                200        1.53  0.05    0.09  0.15  0.35
                200        1.5   0.05    0.09  0.15  0.35
                400        1.5   0.05    0.1   0.16  0.35
                400        1.5   0.05    0.11  0.17  0.35
                600        1.5   0.05    0.13  0.17  0.35
                600        1.5   0.05    0.13  0.17  0.35
                SoilCrop WheatSoil
                  LL=[0.08, 0.08, 0.09, 0.1, 0.11, 0.12, 0.12, 0.12, 0.14, 0.14]
                  KL=[0.06, 0.06, 0.06, 0.06, 0.06, 0.06, 0.06, 0.06, 0.06, 0.06]
                  XF=[0.2, 0.2, 0.2, 0.7, 1, 1, 1, 1, 1, 1]
          Factor N: Specifications=[SowingFertiliser].Script.Amount=0,10,25,50,100
        Simulation WonganBase
          Clock: StartDate=1983-06-13; EndDate=1983-12-01
          Summary summaryfile
          Weather: FileName=Wongan83.met
          Zone paddock: Area=1; Slope=0
            Irrigation
            Soil WonganSoil: SoilType=sand; LocalName=WonganSite; Site=WonganSite; NearestTown=Unknown; Region=WA; NaturalVegetation=Unknown; Latitude=0; Longitude=0
              Water: same as Validation.Western Australia.Wongan83.Factors.Soil.UnRipped.Water
              SoilWater: SummerDate=1-Nov; SummerU=6; SummerCona=2; WinterDate=1-Apr; WinterU=2; WinterCona=2; DiffusConst=88; DiffusSlope=35; Salb=0.13; CN2Bare=60; CNRed=20; CNCov=0.8; max_pond=0; Thickness=[50, 50, 100, 200, 200, 200, 400, 400, 600, 600]; residueinterception=0
                SWCON=[0.35, 0.35, 0.35, 0.35, 0.35, 0.35, 0.35, 0.35, 0.35, 0.35]
              SoilOrganicMatter: RootCN=40; RootWt=1500; SoilCN=13; EnrACoeff=1; EnrBCoeff=1; OCUnits=Total
                Thickness  OC    FBiom  FInert
                50         1.23  0.04   0.1
                50         0.43  0.04   0.1
                100        0.37  0.03   0.1
                200        0.26  0.02   0.2
                200        0.21  0.01   0.8
                200        0.2   0.01   0.9
                400        0.18  0.01   0.9
                400        0.18  0.01   0.9
                600        0.17  0.01   0.9
                600        0.17  0.01   0.9
              Analysis: Thickness=[50, 50, 100, 200, 200, 200, 400, 400, 600, 600]; PH=[4.7, 5.1, 5.1, 6, 6, 6, 6, 6, 6, 6]; PHUnits=Water; BoronUnits=HotWater
              Sample: NO3Units=ppm; NH4Units=ppm; SWUnits=Volumetric; OCUnits=Total; PHUnits=Water
                Thickness  NO3  NH4  SW
                50         7    2    0.07
                50         7    2    0.07
                100        5    1    0.13
                200        3    1    0.14
                200        2    0    0.14
                200        2    0    0.11
                400        2    0    0.1
                400        1    0    0.11
                600        1    0    0.12
                600        1    0    0.13
              SoilNitrogen: fom_type=[default, manure, mucuna, lablab, shemp, stable]; fract_carb=[0.2, 0.3, 0.54, 0.57, 0.45, 0]; fract_cell=[0.7, 0.3, 0.37, 0.37, 0.47, 0.1]; fract_lign=[0.1, 0.4, 0.09, 0.06, 0.08, 0.9]
              CERESSoilTemperature
            SurfaceOrganicMatter: PondActive=no; ReportAdditions=no; ReportRemovals=no; PoolName=wheat_stubble; type=wheat; mass=1000; standing_fraction=0; cpr=0; cnr=20; CriticalResidueWeight=2000; OptimumDecompTemp=20; MaxCumulativeEOS=20; CNRatioDecompCoeff=0.277; CNRatioDecompThreshold=25; TotalLeachRain=25; MinRainToLeach=10; CriticalMinimumOrganicC=0.004; DefaultCPRatio=0; DefaultStandingFraction=0; StandingExtinctCoeff=0.5; FractionFaecesAdded=0.5
              Pools:
                {PoolName=wheat_stubble, ResidueType=wheat, Mass=1000, CNRatio=20, CPRatio=0, StandingFraction=0}
              ResidueTypes: LoadFromResource=ResidueTypes
              TillageTypes TillageTypesList
            Fertiliser
            Plant Wheat: CropType=Wheat
            MicroClimate: a_interception=0; b_interception=1; c_interception=0; d_interception=0; soil_albedo=0.3; sun_angle=15; soil_heat_flux_fraction=0.4; night_interception_fraction=0.5; refheight=2; albedo=0.15; emissivity=0.96; RadIntTotal=0
            Operations SowingSchedule
              1983-06-14  [Wheat].Sow(population:159, cultivar:"gamenya", depth:80, rowSpacing:250);
              1983-12-01  [Wheat].Harvest();
              1983-12-01  [Wheat].EndCrop();
            Manager SowingFertiliser
              Amount = 0
              script: same as in Validation.Western Australia.Cunderdin97.Cunderdin97Base.paddock.SowingFertiliser
            Manager ExtraVariables: same as Validation.SE Queensland.APS14.APS14StubbleBareNRate0.paddock.ExtraVariables
            Report HarvestReport
            Report DailyReport
            SoluteManager
          SoilArbitrator Soil Arbitrator
      PredictedObserved WAtObsPred: PredictedTableName=HarvestReport; ObservedTableName=Observed; FieldNameUsedForMatch=Wheat.Phenology.CurrentStageName
    Folder Turkey
      Memo
        The dataset of [Tari2016] includes 4 irrigation deficit treatments applied at each of 3 plant growth stages.  The experiment was conducted at Konya in the Central Anatolia region of Turkey. Yields ranged from 2.88 t/ha to 6.82 t/ha.  These treatments were reproduced over two growing seasons, resulting in 44 individual wheat crops including differing levels of water stress at different stages of development.  Soil data have been estimated from that provided within the original publication.
      Experiment Konya09
        Factors
          Factor Water: Specifications=[IrrigationSchedule]
            Operations AAA
              2010-04-09  [Irrigation].Apply(amount:150);
              2010-05-06  [Irrigation].Apply(amount:154);
              2010-05-26  [Irrigation].Apply(amount:152);
            Operations BAA
              2010-04-09  [Irrigation].Apply(amount:97);
              2010-05-06  [Irrigation].Apply(amount:154);
              2010-05-26  [Irrigation].Apply(amount:152);
            Operations CAA
              2010-04-09  [Irrigation].Apply(amount:52);
              2010-05-06  [Irrigation].Apply(amount:154);
              2010-05-26  [Irrigation].Apply(amount:152);
            Operations DAA
              2010-04-09  [Irrigation].Apply(amount:0);
              2010-05-06  [Irrigation].Apply(amount:154);
              2010-05-26  [Irrigation].Apply(amount:152);
            Operations ABA
              2010-04-09  [Irrigation].Apply(amount:150);
              2010-05-06  [Irrigation].Apply(amount:100);
              2010-05-26  [Irrigation].Apply(amount:152);
            Operations ACA
              2010-04-09  [Irrigation].Apply(amount:150);
              2010-05-06  [Irrigation].Apply(amount:54);
              2010-05-26  [Irrigation].Apply(amount:152);
            Operations ADA
              2010-04-09  [Irrigation].Apply(amount:150);
              2010-05-06  [Irrigation].Apply(amount:0);
              2010-05-26  [Irrigation].Apply(amount:152);
            Operations AAB
              2010-04-09  [Irrigation].Apply(amount:150);
              2010-05-06  [Irrigation].Apply(amount:154);
              2010-05-26  [Irrigation].Apply(amount:98);
            Operations AAC
              2010-04-09  [Irrigation].Apply(amount:150);
              2010-05-06  [Irrigation].Apply(amount:154);
              2010-05-26  [Irrigation].Apply(amount:53);
            Operations AAD
              2010-04-09  [Irrigation].Apply(amount:150);
              2010-05-06  [Irrigation].Apply(amount:154);
              2010-05-26  [Irrigation].Apply(amount:0);
            Operations ABB
              2010-04-09  [Irrigation].Apply(amount:150);
              2010-05-06  [Irrigation].Apply(amount:100);
              2010-05-26  [Irrigation].Apply(amount:99);
            Operations ACC
              2010-04-09  [Irrigation].Apply(amount:150);
              2010-05-06  [Irrigation].Apply(amount:54);
              2010-05-26  [Irrigation].Apply(amount:53);
            Operations ADD
              2010-04-09  [Irrigation].Apply(amount:150);
              2010-05-06  [Irrigation].Apply(amount:0);
              2010-05-26  [Irrigation].Apply(amount:0);
            Operations BAB
              2010-04-09  [Irrigation].Apply(amount:97);
              2010-05-06  [Irrigation].Apply(amount:154);
              2010-05-26  [Irrigation].Apply(amount:99);
            Operations CAC
              2010-04-09  [Irrigation].Apply(amount:52);
              2010-05-06  [Irrigation].Apply(amount:154);
              2010-05-26  [Irrigation].Apply(amount:53);
            Operations DAD
              2010-04-09  [Irrigation].Apply(amount:0);
              2010-05-06  [Irrigation].Apply(amount:154);
              2010-05-26  [Irrigation].Apply(amount:0);
            Operations BBA
              2010-04-09  [Irrigation].Apply(amount:97);
              2010-05-06  [Irrigation].Apply(amount:100);
              2010-05-26  [Irrigation].Apply(amount:152);
            Operations CCA
              2010-04-09  [Irrigation].Apply(amount:52);
              2010-05-06  [Irrigation].Apply(amount:54);
              2010-05-26  [Irrigation].Apply(amount:152);
            Operations DDA
              2010-04-09  [Irrigation].Apply(amount:0);
              2010-05-06  [Irrigation].Apply(amount:0);
              2010-05-26  [Irrigation].Apply(amount:152);
            Operations BBB
              2010-04-09  [Irrigation].Apply(amount:97);
              2010-05-06  [Irrigation].Apply(amount:100);
              2010-05-26  [Irrigation].Apply(amount:99);
            Operations CCC
              2010-04-09  [Irrigation].Apply(amount:52);
              2010-05-06  [Irrigation].Apply(amount:54);
              2010-05-26  [Irrigation].Apply(amount:53);
            Operations DDD
              2010-04-09  [Irrigation].Apply(amount:0);
              2010-05-06  [Irrigation].Apply(amount:0);
              2010-05-26  [Irrigation].Apply(amount:0);
        Simulation Konya09
          Clock: StartDate=2009-11-12; EndDate=2010-07-30
          Summary summaryfile
          Weather: FileName=Konya.met
          SoilArbitrator Soil Arbitrator
          Zone paddock: Area=1; Slope=0
            Irrigation
            Fertiliser
            SurfaceOrganicMatter: PoolName=wheat; type=wheat; mass=1000; standing_fraction=0; cpr=0; cnr=80; CriticalResidueWeight=2000; OptimumDecompTemp=20; MaxCumulativeEOS=20; CNRatioDecompCoeff=0.277; CNRatioDecompThreshold=25; TotalLeachRain=25; MinRainToLeach=10; CriticalMinimumOrganicC=0.004; DefaultCPRatio=0; DefaultStandingFraction=0; StandingExtinctCoeff=0.5; FractionFaecesAdded=0.5
              Pools:
                {PoolName=wheat, ResidueType=wheat, Mass=1000, CNRatio=80, CPRatio=0, StandingFraction=0}
              ResidueTypes: LoadFromResource=ResidueTypes
            Plant Wheat: CropType=Wheat
            Operations CropSchedule
              2009-11-12  [Wheat].Sow(population:360, cultivar:"Konya", depth:20, rowSpacing:135);
              2009-11-12  [Fertiliser].Apply(Amount: 80, Type: Fertiliser.Types.UreaN);
              2010-02-01  [Fertiliser].Apply(Amount: 80, Type: Fertiliser.Types.UreaN);
              2010-07-14  [Wheat].Harvest();
              2010-07-14  [Wheat].EndCrop();
            Operations IrrigationSchedule
            MicroClimate: a_interception=0; b_interception=1; c_interception=0; d_interception=0; soil_albedo=0.3; sun_angle=15; soil_heat_flux_fraction=0.4; night_interception_fraction=0.5; refheight=2; albedo=0.15; emissivity=0.96; RadIntTotal=0
            Manager Calculations: same as Validation.SE Queensland.APS26.APS26NRate160WaterWet.paddock.Calculations
            Soil: Site=Konya; NearestTown=Konya; Region=Central Anatolia; Country=Turkey; Latitude=0; Longitude=0
              Water
                Thickness  BD    AirDry  LL15  DUL    SAT
                150        1.56  0.05    0.12  0.253  0.411
                150        1.56  0.12    0.12  0.253  0.411
                300        1.56  0.12    0.12  0.253  0.41
                300        1.56  0.12    0.12  0.253  0.41
                300        1.56  0.12    0.12  0.25   0.4
                400        1.56  0.12    0.12  0.25   0.4
                400        1.56  0.12    0.12  0.25   0.4
                SoilCrop WheatSoil: LL=[0.12, 0.12, 0.12, 0.12, 0.25, 0.25, 0.25]; KL=[0.06, 0.06, 0.04, 0.02, 0.02, 0.01, 0.01]; XF=[1, 1, 1, 1, 1, 1, 1]
              SoilWater: SummerDate=1-Apr; SummerU=6; SummerCona=3.5; WinterDate=1-Nov; WinterU=2; WinterCona=2; DiffusConst=44; DiffusSlope=16; Salb=0.13; CN2Bare=75; CNRed=20; CNCov=0.8; max_pond=0; Thickness=[150, 150, 300, 300, 300, 300, 300, 300]; SWCON=[0.5, 0.4, 0.3, 0.3, 0.2, 0.1, 0.1, 0.1]; residueinterception=0
              SoilNitrogen: fom_type=[default, manure, mucuna, lablab, shemp, stable]; fract_carb=[0.2, 0.3, 0.54, 0.57, 0.45, 0]; fract_cell=[0.7, 0.3, 0.37, 0.37, 0.47, 0.1]; fract_lign=[0.1, 0.4, 0.09, 0.06, 0.08, 0.9]
              SoilOrganicMatter: RootCN=45; RootWt=1500; SoilCN=12.5; EnrACoeff=7.4; EnrBCoeff=0.2; OCUnits=Total
                Thickness  OC   FBiom  FInert
                150        1    0.03   0.4
                150        0.5  0.02   0.6
                300        0.5  0.02   0.7
                300        0.5  0.02   0.8
                300        0.5  0.01   0.9
                300        0.5  0.01   0.9
                300        0.5  0.01   1
                300        0.5  0.01   1
              Analysis: Thickness=[150, 150, 300, 300, 300, 300, 300, 300]; PH=[7.9, 7.9, 7.9, 8, 8, 8, 8, 8]; PHUnits=Water; BoronUnits=HotWater
              InitialWater: PercentMethod=EvenlyDistributed; FractionFull=1
              Sample: NO3Units=ppm; NH4Units=ppm; SWUnits=Volumetric; OCUnits=Total; PHUnits=Water
                Thickness  NO3  NH4
                300        10   0
                600        10   0
                1200       2    0
              CERESSoilTemperature
            Report DailyReport
            Report HarvestReport
            SoluteManager
      Experiment Konya11
        Factors
          Factor Water: Specifications=[IrrigationSchedule]
            Operations AAA
              2012-04-16  [Irrigation].Apply(amount:100);
              2012-05-21  [Irrigation].Apply(amount:148);
              2012-06-08  [Irrigation].Apply(amount:161);
            Operations BAA
              2012-04-16  [Irrigation].Apply(amount:65);
              2012-05-21  [Irrigation].Apply(amount:148);
              2012-06-08  [Irrigation].Apply(amount:161);
            Operations CAA
              2012-04-16  [Irrigation].Apply(amount:35);
              2012-05-21  [Irrigation].Apply(amount:148);
              2012-06-08  [Irrigation].Apply(amount:161);
            Operations DAA
              2012-04-16  [Irrigation].Apply(amount:0);
              2012-05-21  [Irrigation].Apply(amount:148);
              2012-06-08  [Irrigation].Apply(amount:161);
            Operations ABA
              2012-04-16  [Irrigation].Apply(amount:100);
              2012-05-21  [Irrigation].Apply(amount:96);
              2012-06-08  [Irrigation].Apply(amount:161);
            Operations ACA
              2012-04-16  [Irrigation].Apply(amount:100);
              2012-05-21  [Irrigation].Apply(amount:52);
              2012-06-08  [Irrigation].Apply(amount:161);
            Operations ADA
              2012-04-16  [Irrigation].Apply(amount:100);
              2012-05-21  [Irrigation].Apply(amount:0);
              2012-06-08  [Irrigation].Apply(amount:161);
            Operations AAB
              2012-04-16  [Irrigation].Apply(amount:100);
              2012-05-21  [Irrigation].Apply(amount:148);
              2012-06-08  [Irrigation].Apply(amount:105);
            Operations AAC
              2012-04-16  [Irrigation].Apply(amount:100);
              2012-05-21  [Irrigation].Apply(amount:148);
              2012-06-08  [Irrigation].Apply(amount:56);
            Operations AAD
              2012-04-16  [Irrigation].Apply(amount:100);
              2012-05-21  [Irrigation].Apply(amount:148);
              2012-06-08  [Irrigation].Apply(amount:0);
            Operations ABB
              2012-04-16  [Irrigation].Apply(amount:100);
              2012-05-21  [Irrigation].Apply(amount:96);
              2012-06-08  [Irrigation].Apply(amount:105);
            Operations ACC
              2012-04-16  [Irrigation].Apply(amount:100);
              2012-05-21  [Irrigation].Apply(amount:52);
              2012-06-08  [Irrigation].Apply(amount:56);
            Operations ADD
              2012-04-16  [Irrigation].Apply(amount:100);
              2012-05-21  [Irrigation].Apply(amount:0);
              2012-06-08  [Irrigation].Apply(amount:0);
            Operations BAB
              2012-04-16  [Irrigation].Apply(amount:65);
              2012-05-21  [Irrigation].Apply(amount:148);
              2012-06-08  [Irrigation].Apply(amount:105);
            Operations CAC
              2012-04-16  [Irrigation].Apply(amount:35);
              2012-05-21  [Irrigation].Apply(amount:148);
              2012-06-08  [Irrigation].Apply(amount:56);
            Operations DAD
              2012-04-16  [Irrigation].Apply(amount:0);
              2012-05-21  [Irrigation].Apply(amount:148);
              2012-06-08  [Irrigation].Apply(amount:0);
            Operations BBA
              2012-04-16  [Irrigation].Apply(amount:65);
              2012-05-21  [Irrigation].Apply(amount:96);
              2012-06-08  [Irrigation].Apply(amount:161);
            Operations CCA
              2012-04-16  [Irrigation].Apply(amount:35);
              2012-05-21  [Irrigation].Apply(amount:52);
              2012-06-08  [Irrigation].Apply(amount:161);
            Operations DDA
              2012-04-16  [Irrigation].Apply(amount:0);
              2012-05-21  [Irrigation].Apply(amount:0);
              2012-06-08  [Irrigation].Apply(amount:161);
            Operations BBB
              2012-04-16  [Irrigation].Apply(amount:65);
              2012-05-21  [Irrigation].Apply(amount:96);
              2012-06-08  [Irrigation].Apply(amount:105);
            Operations CCC
              2012-04-16  [Irrigation].Apply(amount:35);
              2012-05-21  [Irrigation].Apply(amount:52);
              2012-06-08  [Irrigation].Apply(amount:56);
            Operations DDD
              2012-04-16  [Irrigation].Apply(amount:0);
              2012-05-21  [Irrigation].Apply(amount:0);
              2012-06-08  [Irrigation].Apply(amount:0);
        Simulation Konya11
          Clock: StartDate=2011-11-16; EndDate=2012-07-30
          Summary summaryfile
          Weather: FileName=Konya.met
          SoilArbitrator Soil Arbitrator
          Zone paddock: Area=1; Slope=0
            Irrigation
            Fertiliser
            SurfaceOrganicMatter: PoolName=canola; type=canola; mass=1000; standing_fraction=0; cpr=0; cnr=80; CriticalResidueWeight=2000; OptimumDecompTemp=20; MaxCumulativeEOS=20; CNRatioDecompCoeff=0.277; CNRatioDecompThreshold=25; TotalLeachRain=25; MinRainToLeach=10; CriticalMinimumOrganicC=0.004; DefaultCPRatio=0; DefaultStandingFraction=0; StandingExtinctCoeff=0.5; FractionFaecesAdded=0.5
              Pools:
                {PoolName=canola, ResidueType=canola, Mass=1000, CNRatio=80, CPRatio=0, StandingFraction=0}
              ResidueTypes: LoadFromResource=ResidueTypes
            Plant Wheat: CropType=Wheat
            Operations CropSchedule
              2011-11-16  [Wheat].Sow(population:360, cultivar:"Konya", depth:50, rowSpacing:135);
              2011-11-16  [Fertiliser].Apply(Amount: 80, Type: Fertiliser.Types.UreaN);
              2012-02-01  [Fertiliser].Apply(Amount: 80, Type: Fertiliser.Types.UreaN);
              2012-07-16  [Wheat].Harvest();
              2012-07-16  [Wheat].EndCrop();
            Operations IrrigationSchedule
            MicroClimate: a_interception=0; b_interception=1; c_interception=0; d_interception=0; soil_albedo=0.3; sun_angle=15; soil_heat_flux_fraction=0.4; night_interception_fraction=0.5; refheight=2; albedo=0.15; emissivity=0.96; RadIntTotal=0
            Manager Calculations: same as Validation.SE Queensland.APS26.APS26NRate160WaterWet.paddock.Calculations
            Soil: Site=Konya; NearestTown=Konya; Region=Central Anatolia; Country=Turkey; Latitude=0; Longitude=0
              Water: same as Validation.Turkey.Konya09.Konya09.paddock.Soil.Water
              SoilWater: SummerDate=1-Apr; SummerU=6; SummerCona=3.5; WinterDate=1-Nov; WinterU=2; WinterCona=2; DiffusConst=44; DiffusSlope=16; Salb=0.13; CN2Bare=84; CNRed=20; CNCov=0.8; max_pond=0; Thickness=[150, 150, 300, 300, 300, 300, 300, 300]; SWCON=[0.5, 0.4, 0.3, 0.3, 0.2, 0.1, 0.1, 0.1]; residueinterception=0
              SoilNitrogen: fom_type=[default, manure, mucuna, lablab, shemp, stable]; fract_carb=[0.2, 0.3, 0.54, 0.57, 0.45, 0]; fract_cell=[0.7, 0.3, 0.37, 0.37, 0.47, 0.1]; fract_lign=[0.1, 0.4, 0.09, 0.06, 0.08, 0.9]
              SoilOrganicMatter: same as Validation.Turkey.Konya09.Konya09.paddock.Soil.SoilOrganicMatter
              Analysis: Thickness=[150, 150, 300, 300, 300, 300, 300, 300]; PH=[7.9, 7.9, 7.9, 8, 8, 8, 8, 8]; PHUnits=Water; BoronUnits=HotWater
              InitialWater: PercentMethod=EvenlyDistributed; FractionFull=1
              Sample: NO3Units=ppm; NH4Units=ppm; SWUnits=Volumetric; OCUnits=Total; PHUnits=Water
                Thickness  NO3  NH4
                300        10   0
                600        10   0
                1200       2    0
              CERESSoilTemperature
            Report DailyReport
            Report HarvestReport
            SoluteManager
    Folder New Zealand
      Experiment Lincoln9192
        Memo
          This is a water response trial run in the rain out shelter at Plant and Food Research in Lincoln, New Zealand.  It is described in full by [Jamieson_WaterResponse_1995] but briefly.  A winter crop of 'Batten' wheat was sown at 300 plants/m^2^ on the 8th of June 1991 and range of irrigation amount and timing treatments were applied.  Six of these treatments have been included in this validation:

          01. Full irrigation where measured ET was replaced weekly
          03. Short Early Drought where irrigation was withheld from sowing until late October then full irrigation was applied
          05. Long Early Drought where irrigation was withheld from sowing until mid December then full irrigation was applied
          06. Long Late Drought where full irrigation was applied from sowing until mid September then withheld for the rest of the season
          07. Moderate Late Drought where full irrigation was applied from sowing until mid October then withheld for the rest of the season
          08. Short Late Drought where full irrigation was applied from sowing until Early November then withheld for the rest of the season
          11. Nil where no water was applied and the crop grew on soil stored water only.

          Irrigation was applied at weekly intervals through and assemply of low rate drip emitters on each plot.  Soil water content was measured weekly with a neutron probe and biomass was measured at 10 - 14 day intervals.  Samples throughtout the crop were from two 0.1m^2^ quatrants and the final harvest sample was from a 1 m^2^ quadrant.  Each treatment was replicated twice and there was considerable soil variation from plot to plot so each treatment was initianilised with unique soil parameters which best described the soil they were growing on.
        Factors
          Factor Irrig
            Factor 01
              Specifications:
                [IrrigationEvents]
                [Water]
                [Initial water]
              Operations IrrigationEvents
                1991-06-10  [Irrigation].Apply(7);
                1991-08-16  [Irrigation].Apply(7);
                1991-08-29  [Irrigation].Apply(20);
                1991-09-07  [Irrigation].Apply(12);
                1991-09-12  [Irrigation].Apply(22);
                1991-09-19  [Irrigation].Apply(4);
                1991-09-26  [Irrigation].Apply(7);
                1991-10-03  [Irrigation].Apply(27);
                1991-10-10  [Irrigation].Apply(18);
                1991-10-17  [Irrigation].Apply(30);
                1991-10-24  [Irrigation].Apply(42);
                1991-10-31  [Irrigation].Apply(33);
                1991-11-07  [Irrigation].Apply(24);
                1991-11-14  [Irrigation].Apply(28);
                1991-11-21  [Irrigation].Apply(37);
                1991-11-27  [Irrigation].Apply(51);
                1991-12-05  [Irrigation].Apply(36);
                1991-12-12  [Irrigation].Apply(38);
                1991-12-19  [Irrigation].Apply(35);
                1991-12-26  [Irrigation].Apply(47);
                1992-01-03  [Irrigation].Apply(40);
                1992-01-09  [Irrigation].Apply(41);
              Water
                Thickness  BD   AirDry  LL15  DUL   SAT
                200        1.3  0.08    0.08  0.29  0.44
                200        1.3  0.07    0.07  0.3   0.4
                200        1.3  0.07    0.07  0.28  0.4
                200        1.3  0.09    0.09  0.26  0.38
                200        1.3  0.11    0.11  0.26  0.38
                200        1.3  0.16    0.16  0.28  0.38
                200        1.3  0.15    0.15  0.27  0.38
                200        1.3  0.12    0.12  0.22  0.38
                SoilCrop WheatSoil: LL=[0.08, 0.07, 0.07, 0.09, 0.11, 0.16, 0.15, 0.12]; KL=[0.05, 0.03, 0.02, 0.03, 0.03, 0.03, 0.01, 0.01]; XF=[1, 1, 1, 1, 1, 1, 1, 1]
              Sample Initial water: Thickness=[200, 200, 200, 200, 200, 200, 200, 200]; SW=[0.27, 0.3, 0.28, 0.25, 0.24, 0.27, 0.27, 0.21]; NO3Units=ppm; NH4Units=ppm; SWUnits=Volumetric; OCUnits=Total; PHUnits=Water
            Factor 03
              Specifications:
                [IrrigationEvents]
                [Water]
                [Initial water]
              Operations IrrigationEvents
                1991-06-10  [Irrigation].Apply(7);
                1991-08-16  [Irrigation].Apply(7);
                1991-08-29  [Irrigation].Apply(20);
                1991-09-26  [Irrigation].Apply(7);
                1991-10-24  [Irrigation].Apply(42);
                1991-10-31  [Irrigation].Apply(33);
                1991-11-07  [Irrigation].Apply(24);
                1991-11-14  [Irrigation].Apply(28);
                1991-11-21  [Irrigation].Apply(37);
                1991-11-27  [Irrigation].Apply(51);
                1991-12-05  [Irrigation].Apply(36);
                1991-12-12  [Irrigation].Apply(38);
                1991-12-19  [Irrigation].Apply(35);
                1991-12-26  [Irrigation].Apply(47);
                1992-01-03  [Irrigation].Apply(40);
                1992-01-09  [Irrigation].Apply(41);
              Water
                Thickness  BD    AirDry  LL15  DUL      SAT
                200        0.08  0.05    0.08  0.279    0.44
                200        0.12  0.05    0.12  0.2677   0.44
                200        0.12  0.05    0.12  0.26     0.44
                200        0.12  0.05    0.12  0.27045  0.44
                200        0.15  0.05    0.15  0.311    0.44
                200        0.16  0.05    0.16  0.25355  0.44
                200        0.15  0.05    0.15  0.27635  0.44
                200        0.08  0.05    0.08  0.1422   0.44
                SoilCrop WheatSoil: LL=[0.08, 0.12, 0.12, 0.12, 0.15, 0.16, 0.15, 0.08]; KL=[0.05, 0.03, 0.02, 0.03, 0.03, 0.03, 0.01, 0.01]; XF=[1, 1, 1, 1, 1, 1, 1, 1]
              Sample Initial water: Thickness=[200, 200, 200, 200, 200, 200, 200, 200]; NO3Units=ppm; NH4Units=ppm; SWUnits=Volumetric; OCUnits=Total; PHUnits=Water
                SW=[0.279, 0.2677, 0.2491, 0.27045, 0.311, 0.25355, 0.27635, 0.1422]
            Factor 05
              Specifications:
                [IrrigationEvents]
                [Water]
                [Initial water]
              Operations IrrigationEvents
                1991-06-10  [Irrigation].Apply(7);
                1991-08-16  [Irrigation].Apply(7);
                1991-08-29  [Irrigation].Apply(20);
                1991-09-26  [Irrigation].Apply(7);
                1991-12-19  [Irrigation].Apply(35);
                1991-12-26  [Irrigation].Apply(47);
                1992-01-03  [Irrigation].Apply(40);
              Water
                Thickness  BD   AirDry  LL15  DUL      SAT
                200        1.3  0.06    0.06  0.31     0.44
                200        1.3  0.09    0.09  0.3      0.44
                200        1.3  0.07    0.07  0.28     0.44
                200        1.3  0.12    0.12  0.31145  0.44
                200        1.3  0.16    0.16  0.3079   0.44
                200        1.3  0.16    0.16  0.3007   0.44
                200        1.3  0.15    0.15  0.28705  0.44
                200        1.3  0.16    0.16  0.3117   0.44
                SoilCrop WheatSoil: LL=[0.06, 0.09, 0.07, 0.12, 0.16, 0.16, 0.15, 0.16]; KL=[0.05, 0.03, 0.02, 0.03, 0.03, 0.03, 0.01, 0.01]; XF=[1, 1, 1, 1, 1, 1, 1, 1]
              Sample Initial water: Thickness=[200, 200, 200, 200, 200, 200, 200, 200]; NO3Units=ppm; NH4Units=ppm; SWUnits=Volumetric; OCUnits=Total; PHUnits=Water
                SW=[0.2655, 0.27, 0.209, 0.31145, 0.3079, 0.3007, 0.28705, 0.3117]
            Factor 06
              Specifications:
                [IrrigationEvents]
                [Water]
                [Initial water]
              Operations IrrigationEvents
                1991-06-10  [Irrigation].Apply(7);
                1991-08-16  [Irrigation].Apply(7);
                1991-08-29  [Irrigation].Apply(20);
                1991-09-07  [Irrigation].Apply(12);
                1991-09-12  [Irrigation].Apply(22);
                1991-09-19  [Irrigation].Apply(14);
                1991-09-26  [Irrigation].Apply(7);
              Water
                Thickness  BD   AirDry  LL15  DUL    SAT
                200        1.3  0.08    0.08  0.281  0.44
                200        1.3  0.08    0.08  0.28   0.44
                200        1.3  0.09    0.09  0.27   0.44
                200        1.3  0.12    0.12  0.296  0.44
                200        1.3  0.11    0.11  0.231  0.44
                200        1.3  0.16    0.16  0.245  0.44
                200        1.3  0.1     0.1   0.204  0.44
                200        1.3  0.08    0.08  0.156  0.44
                SoilCrop WheatSoil: LL=[0.08, 0.08, 0.09, 0.12, 0.11, 0.16, 0.1, 0.08]; KL=[0.05, 0.03, 0.02, 0.03, 0.03, 0.03, 0.01, 0.01]; XF=[1, 1, 1, 1, 1, 1, 1, 1]
              Sample Initial water: Thickness=[200, 200, 200, 200, 200, 200, 200, 200]; NO3Units=ppm; NH4Units=ppm; SWUnits=Volumetric; OCUnits=Total; PHUnits=Water
                SW=[0.2805, 0.27965, 0.27, 0.296, 0.23105, 0.2453, 0.2042, 0.15605]
            Factor 07
              Specifications:
                [IrrigationEvents]
                [Water]
                [Initial water]
              Operations IrrigationEvents
                1991-06-10  [Irrigation].Apply(7);
                1991-08-16  [Irrigation].Apply(7);
                1991-08-29  [Irrigation].Apply(20);
                1991-09-07  [Irrigation].Apply(12);
                1991-09-12  [Irrigation].Apply(22);
                1991-09-19  [Irrigation].Apply(14);
                1991-09-26  [Irrigation].Apply(7);
                1991-10-03  [Irrigation].Apply(27);
                1991-10-10  [Irrigation].Apply(18);
                1991-10-17  [Irrigation].Apply(30);
              Water
                Thickness  BD   AirDry  LL15  DUL      SAT
                200        1.3  0.08    0.08  0.31     0.44
                200        1.3  0.07    0.07  0.27     0.44
                200        1.3  0.06    0.06  0.25355  0.44
                200        1.3  0.09    0.09  0.2364   0.44
                200        1.3  0.15    0.15  0.2635   0.44
                200        1.3  0.16    0.16  0.27705  0.44
                200        1.3  0.15    0.15  0.3392   0.44
                200        1.3  0.08    0.08  0.2      0.44
                SoilCrop WheatSoil: LL=[0.08, 0.07, 0.06, 0.09, 0.15, 0.16, 0.15, 0.08]; KL=[0.05, 0.03, 0.02, 0.03, 0.03, 0.03, 0.01, 0.01]; XF=[1, 1, 1, 1, 1, 1, 1, 1]
              Sample Initial water: Thickness=[200, 200, 200, 200, 200, 200, 200, 200]; NO3Units=ppm; NH4Units=ppm; SWUnits=Volumetric; OCUnits=Total; PHUnits=Water
                SW=[0.278, 0.26825, 0.25355, 0.2364, 0.2635, 0.27705, 0.3392, 0.2]
            Factor 08
              Specifications:
                [IrrigationEvents]
                [Water]
                [Initial water]
              Operations IrrigationEvents
                1991-06-10  [Irrigation].Apply(7);
                1991-08-16  [Irrigation].Apply(7);
                1991-08-29  [Irrigation].Apply(20);
                1991-09-07  [Irrigation].Apply(12);
                1991-09-12  [Irrigation].Apply(22);
                1991-09-19  [Irrigation].Apply(14);
                1991-09-26  [Irrigation].Apply(7);
                1991-10-03  [Irrigation].Apply(27);
                1991-10-10  [Irrigation].Apply(18);
                1991-10-17  [Irrigation].Apply(30);
                1991-10-24  [Irrigation].Apply(42);
                1991-10-31  [Irrigation].Apply(33);
                1991-11-07  [Irrigation].Apply(24);
              Water
                Thickness  BD   AirDry  LL15  DUL      SAT
                200        1.3  0.08    0.08  0.31     0.44
                200        1.3  0.12    0.12  0.2785   0.44
                200        1.3  0.09    0.09  0.2754   0.44
                200        1.3  0.09    0.09  0.2698   0.44
                200        1.3  0.13    0.13  0.252    0.44
                200        1.3  0.16    0.16  0.26715  0.44
                200        1.3  0.15    0.15  0.2623   0.44
                200        1.3  0.1     0.1   0.1995   0.44
                SoilCrop WheatSoil: LL=[0.08, 0.12, 0.09, 0.09, 0.13, 0.16, 0.15, 0.1]; KL=[0.05, 0.03, 0.02, 0.03, 0.03, 0.03, 0.01, 0.01]; XF=[1, 1, 1, 1, 1, 1, 1, 1]
              Sample Initial water: Thickness=[200, 200, 200, 200, 200, 200, 200, 200]; NO3Units=ppm; NH4Units=ppm; SWUnits=Volumetric; OCUnits=Total; PHUnits=Water
                SW=[0.281, 0.2785, 0.2754, 0.2698, 0.252, 0.26715, 0.2623, 0.1995]
            Factor 11
              Specifications:
                [IrrigationEvents]
                [Water]
                [Initial water]
              Operations IrrigationEvents
                1991-06-10  [Irrigation].Apply(7);
                1991-08-16  [Irrigation].Apply(7);
                1991-09-26  [Irrigation].Apply(7);
              Water
                Thickness  BD   AirDry  LL15  DUL      SAT
                200        1.3  0.07    0.07  0.31     0.44
                200        1.3  0.13    0.11  0.2666   0.44
                200        1.3  0.15    0.12  0.2634   0.44
                200        1.3  0.09    0.09  0.2309   0.34
                200        1.3  0.1     0.15  0.23805  0.24
                200        1.3  0.12    0.17  0.2339   0.34
                200        1.3  0.12    0.12  0.22815  0.3
                200        1.3  0.09    0.09  0.1847   0.28
                SoilCrop WheatSoil: LL=[0.07, 0.11, 0.12, 0.09, 0.15, 0.17, 0.12, 0.09]; KL=[0.05, 0.03, 0.02, 0.03, 0.03, 0.03, 0.01, 0.005]; XF=[1, 1, 1, 1, 1, 1, 1, 1]
              Sample Initial water: Thickness=[200, 200, 200, 200, 200, 200, 200, 200]; NO3Units=ppm; NH4Units=ppm; SWUnits=Volumetric; OCUnits=Total; PHUnits=Water
                SW=[0.2375, 0.2666, 0.2634, 0.2309, 0.23805, 0.2339, 0.22815, 0.1847]
        Simulation LincolnBase
          Clock: StartDate=1991-06-08; EndDate=1992-02-28
          Summary summaryfile
          Weather: FileName=lincoln.met
          Zone paddock: Area=1; Slope=0
            Folder Manager folder
              Operations
                1991-06-08  [Wheat].Sow(population:250, cultivar:"BattenSpring", depth:40, rowSpacing:150);
              Operations IrrigationEvents
                1991-08-30  [Irrigation].Apply(0);
                1991-09-08  [Irrigation].Apply(0);
                1991-09-13  [Irrigation].Apply(0);
                1991-09-20  [Irrigation].Apply(0);
                1991-10-04  [Irrigation].Apply(0);
                1991-10-11  [Irrigation].Apply(18);
                1991-10-18  [Irrigation].Apply(30);
                1991-10-25  [Irrigation].Apply(42);
                1991-11-01  [Irrigation].Apply(33);
                1991-11-08  [Irrigation].Apply(24);
                1991-11-15  [Irrigation].Apply(28);
                1991-11-22  [Irrigation].Apply(37);
                1991-11-28  [Irrigation].Apply(51);
                1991-12-06  [Irrigation].Apply(36);
                1991-12-13  [Irrigation].Apply(38);
                1991-12-20  [Irrigation].Apply(35);
                1991-12-27  [Irrigation].Apply(47);
                1992-01-04  [Irrigation].Apply(40);
                1992-01-10  [Irrigation].Apply(41);
              Operations FertiliserEvents
                1991-06-10  [Fertiliser].Apply(30, Fertiliser.Types.NO3N, 0);
                1991-08-16  [Fertiliser].Apply(100, Fertiliser.Types.NO3N,0);
                1991-09-26  [Fertiliser].Apply(50, Fertiliser.Types.NO3N,0);
              Operations HarvestOperations
                1992-01-21  [Wheat].Harvest();
                1992-01-21  [Wheat].EndCrop();
            Irrigation
            Soil: SoilType=LincolnSoil; LocalName=Lincoln; Site=Lincoln; NearestTown=Unknown; Region=NZ; NaturalVegetation=Unknown; Latitude=0; Longitude=0
              Water
                Thickness  BD   AirDry  LL15  DUL   SAT
                100        1.3  0.05    0.08  0.31  0.44
                200        1.3  0.05    0.07  0.3   0.44
                200        1.3  0.05    0.07  0.28  0.44
                200        1.3  0.05    0.09  0.31  0.44
                200        1.3  0.05    0.11  0.3   0.44
                200        1.3  0.05    0.16  0.28  0.44
                200        1.3  0.05    0.15  0.3   0.44
                200        1.3  0.05    0.12  0.34  0.44
                SoilCrop WheatSoil: LL=[0.08, 0.07, 0.07, 0.09, 0.11, 0.16, 0.15, 0.12]; KL=[0.06, 0.06, 0.06, 0.04, 0.03, 0.02, 0.02, 0.02]; XF=[1, 1, 1, 1, 1, 1, 1, 1]
              SoilWater: SummerDate=1-Nov; SummerU=7; SummerCona=3; WinterDate=1-Apr; WinterU=3; WinterCona=2; DiffusConst=0; DiffusSlope=0; Salb=0.2; CN2Bare=75; CNRed=20; CNCov=0.8; slope=0; discharge_width=0; catchment_area=0; max_pond=0; residueinterception=0
                Thickness  SWCON  KLAT
                100        0.6    0
                200        0.6    0
                200        0.6    0
                200        0.6    0
                200        0.6    0
                200        0.6    0
                200        0.6    0
                200        0.6    0
              SoilNitrogen: fom_type=[default, manure, mucuna, lablab, shemp, stable]; fract_carb=[0.2, 0.3, 0.54, 0.57, 0.45, 0]; fract_cell=[0.7, 0.3, 0.37, 0.37, 0.47, 0.1]; fract_lign=[0.1, 0.4, 0.09, 0.06, 0.08, 0.9]
              SoilOrganicMatter: RootCN=0; RootWt=0; SoilCN=0; EnrACoeff=0; EnrBCoeff=0; OCUnits=Total
                Thickness  OC    FBiom  FInert
                100        0.35  0.04   0.31
                200        0.27  0.03   0.31
                200        0.24  0.02   0.31
                200        0.16  0.01   0.31
                200        0.16  0.01   0.31
                200        0.3   0.01   0.25
                200        0.1   0.01   0.2
                200        0.1   0.01   0.2
              Analysis: Thickness=[100, 200, 200, 200, 200, 200, 200, 200]; PH=[8.5, 8.5, 8.6, 8.6, 8.6, 8.6, 8.6, 8.6]; PHUnits=Water; BoronUnits=HotWater
              Sample Initial nitrogen: NO3Units=ppm; NH4Units=ppm; SWUnits=Volumetric; OCUnits=Total; PHUnits=Water
                Thickness  NO3   NH4
                100        24.9  1.3
                200        16    1
                200        9.8   1
                200        9.8   0.8
                200        2.1   0.8
                200        2.1   0.5
                200        2.1   0.5
                200        2.1   0.5
              Sample Initial water: Thickness=[100, 200, 200, 200, 200, 200, 200, 200]; SW=[0.27, 0.3, 0.28, 0.25, 0.24, 0.27, 0.27, 0.21]; NO3Units=ppm; NH4Units=ppm; SWUnits=Volumetric; OCUnits=Total; PHUnits=Water
              CERESSoilTemperature
            SurfaceOrganicMatter Surface Organic Matter: PoolName=wheat_stubble; type=wheat; mass=1000; standing_fraction=0; cnr=80; CriticalResidueWeight=2000; OptimumDecompTemp=20; MaxCumulativeEOS=20; CNRatioDecompCoeff=0.277; CNRatioDecompThreshold=25; TotalLeachRain=25; MinRainToLeach=10; CriticalMinimumOrganicC=0.004; DefaultCPRatio=0; DefaultStandingFraction=0; StandingExtinctCoeff=0.5; FractionFaecesAdded=0.5
              Pools:
                {PoolName=wheat_stubble, ResidueType=wheat, Mass=1000, CNRatio=80, StandingFraction=0}
              ResidueTypes: LoadFromResource=ResidueTypes
            Fertiliser
            MicroClimate: a_interception=0; b_interception=1; c_interception=0; d_interception=0; soil_albedo=0.3; sun_angle=15; soil_heat_flux_fraction=0.4; night_interception_fraction=0.5; refheight=2; albedo=0.293662; emissivity=0.96; RadIntTotal=0
            Plant Wheat: CropType=Wheat
            Manager ResetSW
              reset_date = 1991-09-02
```csharp
using System;
using Models.Core;
using Models.PMF;
using Models.PMF.OilPalm;
using Models.Soils;
using Models.SurfaceOM;
using APSIM.Shared.Utilities;

namespace Models
{
    [Serializable]
    [System.Xml.Serialization.XmlInclude(typeof(Model))]
    public class Script : Model
    {
        [Link] Clock Clock;
        [Link] Soil Soil;
        [Link] SurfaceOrganicMatter SurfaceOM;
        [Description("Reset date")]
        public DateTime reset_date { get; set; }

        
        [EventSubscribe("DoManagement")]
        private void OnDoManagement(object sender, EventArgs e)
        {
            if (Clock.Today == reset_date)
                Soil.SoilWater.Reset();
        }
    }
}
```
            Manager ClimateControl
              StartDate = 1991-06-08
              EndDate = 1992-12-31
```csharp
using System;
using Models.Core;
using APSIM.Shared.Utilities;



using System.Collections.Generic;
using System.Text;
using Models.PMF;
using Models;
using System.Xml.Serialization;

namespace Models
{
    [Serializable] 
    [System.Xml.Serialization.XmlInclude(typeof(Model))]
    public class Script : Model
    {
        [Link] Weather Met;
        [Link] Clock Clock;
    
        [Description("Start Date")]
        public DateTime StartDate { get; set; }
        
        [Description("End Date")]
        public DateTime EndDate { get; set; }
 
    
        [EventSubscribe("PreparingNewWeatherData")]
        private void OnPreparingNewWeatherData(object sender, EventArgs e)
        {
            if ((Clock.Today.Date >= StartDate) && (Clock.Today.Date <= EndDate))
                Met.Rain = 0;        
        }
    }
}
```
            Report DailyReport
            Report HarvestReport
            SoluteManager
          SoilArbitrator Soil Arbitrator
      Experiment Lincoln1992
        Memo
          This trial has never been formally written up.  It was conducted at Plant and Foods A Block, Lincoln, New Zealand with 'Batten' Wheat grown on a Templeton silt loam (160mm AWC/m).  It was a 2 x 2 x 4 factorial with the following treatments:

          1. Sowing Date (5 May 1992 and 5 Aug 1992)
          2. Irrigation (Nil and 120 mm)
          3. Nitrogen (0, Low, Medium and High)

          The N applied to the Low, Medium and High N treatments was 100, 150 and 250 kg/ha, respectively, for the May sowing and 50, 100 and 150, respectively, for the August sowing.

          Could not find informaiton confirming sowing rate so assumed typical values of 300 plants per m/2  for the spring sowing 100 plants per m/2 for May sowing.
          Emergence was recorded as the 28th of May for the first planting.  The model was predicting this early so delayed sowing date to get emergence date correct..
        Factors
          Factor Sow
            Factor 5May
              Specifications:
                [Operations]
                [Fertilise].Script.SDSwitch = 1.0
              Operations
                1992-05-15  [Wheat].Sow(population:100, cultivar:"BattenWinter", depth:40, rowSpacing:150);
            Factor 5Aug
              Specifications:
                [Operations]
                [Fertilise].Script.SDSwitch = 0.0
              Operations
                1992-08-05  [Wheat].Sow(population:300, cultivar:"BattenWinter", depth:20, rowSpacing:150);
          Factor Irr: Specifications=[IrrigationEvents]
            Operations Nil
            Operations Some
              1992-11-25  [Irrigation].Apply(60);
              1992-12-31  [Irrigation].Apply(60);
          Factor Nit
            Factor 0
              Specifications:
                [Fertilise].Script.Amount1 = 0.0
                [Fertilise].Script.Amount2 = 0.0
                [Fertilise].Script.Amount3 = 0.0
                [Fertilise].Script.Amount4 = 0.0
            Factor 1
              Specifications:
                [Fertilise].Script.Amount1 = 50
                [Fertilise].Script.Amount2 = 50
                [Fertilise].Script.Amount3 = 0.0
                [Fertilise].Script.Amount4 = 0.0
            Factor 2
              Specifications:
                [Fertilise].Script.Amount1 = 50.0
                [Fertilise].Script.Amount2 = 100.0
                [Fertilise].Script.Amount3 = 0.0
                [Fertilise].Script.Amount4 = 0.0
            Factor 3
              Specifications:
                [Fertilise].Script.Amount1 = 50.0
                [Fertilise].Script.Amount2 = 100.0
                [Fertilise].Script.Amount3 = 50.0
                [Fertilise].Script.Amount4 = 50.0
        Simulation SDtrialBase
          Clock: StartDate=1992-05-01; EndDate=1993-05-01
          Summary summaryfile
          Weather: FileName=lincoln.met
          Zone paddock: Area=1; Slope=0
            Folder Manager folder
              Operations
              Operations IrrigationEvents
              Manager Fertilise
                FertDate1 = 05-Aug
                FertDate2 = 01-Oct
                FertDate3 = 20-Oct
                FertDate4 = 25-Nov
                Amount1 = 0
                Amount2 = 0
                Amount3 = 0
                Amount4 = 0
                SDSwitch = 0
```csharp
using System;
using Models.Core;
using Models.PMF;
using APSIM.Shared.Utilities;
namespace Models
{
    [Serializable]
    public class Script : Model
    {
        [Link] Clock Clock;
        [Link] Fertiliser Fertiliser;
        
        [Description("Date to fertilise")]
        public string FertDate1 { get; set; }
        [Description("Date to fertilise")]
        public string FertDate2 { get; set; }
        [Description("Date to fertilise")]
        public string FertDate3 { get; set; }
        [Description("Date to fertilise")]
        public string FertDate4 { get; set; }
        
        [Description("Amount of fertiliser to be applied (kg/ha)")]
        public double Amount1 { get; set; }
        [Description("Amount of fertiliser to be applied (kg/ha)")]
        public double Amount2 { get; set; }
        [Description("Amount of fertiliser to be applied (kg/ha)")]
        public double Amount3 { get; set; }
        [Description("Amount of fertiliser to be applied (kg/ha)")]
        public double Amount4 { get; set; }
        
        [Description("Amount of fertiliser to be applied (kg/ha)")]
        public double SDSwitch { get; set; }
        
        [EventSubscribe("DoManagement")]
        private void OnDoManagement(object sender, EventArgs e)
        {
            if (DateUtilities.WithinDates(FertDate1, Clock.Today, FertDate1))
                Fertiliser.Apply(Amount: Amount1 * SDSwitch, Type: Fertiliser.Types.NO3N);
            if (DateUtilities.WithinDates(FertDate2, Clock.Today, FertDate2))
                Fertiliser.Apply(Amount: Amount2, Type: Fertiliser.Types.NO3N);
            if (DateUtilities.WithinDates(FertDate3, Clock.Today, FertDate3))
                Fertiliser.Apply(Amount: Amount3, Type: Fertiliser.Types.NO3N);
            if (DateUtilities.WithinDates(FertDate4, Clock.Today, FertDate4))
                Fertiliser.Apply(Amount: Amount4 * SDSwitch, Type: Fertiliser.Types.NO3N);
        }
    }
}
```
              Operations HarvestOperations
                1993-03-03  [Wheat].Harvest();
                1993-03-03  [Wheat].EndCrop();
            Irrigation
            Soil: SoilType=LincolnSoil; LocalName=Lincoln; Site=Lincoln; NearestTown=Unknown; Region=NZ; NaturalVegetation=Unknown; Latitude=0; Longitude=0
              Water
                Thickness  BD   AirDry  LL15  DUL   SAT
                100        1.3  0.08    0.12  0.31  0.44
                200        1.3  0.12    0.12  0.3   0.44
                200        1.3  0.1     0.1   0.28  0.44
                200        1.3  0.09    0.09  0.31  0.44
                200        1.3  0.11    0.11  0.3   0.44
                200        1.3  0.16    0.16  0.28  0.44
                100        1.3  0.15    0.15  0.3   0.44
                200        1.3  0.12    0.12  0.34  0.44
                SoilCrop WheatSoil: LL=[0.12, 0.12, 0.1, 0.09, 0.11, 0.16, 0.15, 0.12]; KL=[0.06, 0.06, 0.06, 0.04, 0.03, 0.02, 0.02, 0.02]; XF=[1, 1, 1, 1, 1, 1, 1, 1]
              SoilWater: SummerDate=1-Nov; SummerU=7; SummerCona=3; WinterDate=1-Apr; WinterU=7; WinterCona=3; DiffusConst=40; DiffusSlope=16; Salb=0.2; CN2Bare=75; CNRed=20; CNCov=0.8; slope=0; discharge_width=0; catchment_area=0; max_pond=0; residueinterception=0
                Thickness  SWCON  KLAT
                100        0.6    0
                200        0.6    0
                200        0.6    0
                200        0.6    0
                200        0.6    0
                200        0.6    0
                200        0.6    0
                200        0.6    0
              SoilNitrogen: fom_type=[default, manure, mucuna, lablab, shemp, stable]; fract_carb=[0.2, 0.3, 0.54, 0.57, 0.45, 0]; fract_cell=[0.7, 0.3, 0.37, 0.37, 0.47, 0.1]; fract_lign=[0.1, 0.4, 0.09, 0.06, 0.08, 0.9]
              SoilOrganicMatter: RootCN=30; RootWt=500; SoilCN=11.5; EnrACoeff=0; EnrBCoeff=0; OCUnits=Total
                Thickness  OC    FBiom  FInert
                100        2.4   0.025  0.3
                200        2.1   0.025  0.4
                200        1.6   0.015  0.75
                200        1.03  0.01   0.9
                200        0.47  0.01   0.96
                200        0.47  0.01   0.96
                200        0.47  0.01   0.96
                200        0.47  0.01   0.96
              Analysis: Thickness=[100, 200, 200, 200, 200, 200, 200, 200]; PH=[6.6, 6.2, 5.7, 5.5, 5.5, 5.5, 5.5, 5.5]; PHUnits=Water; BoronUnits=HotWater
              Sample Initial Nitrogen: NO3Units=kgha; NH4Units=ppm; SWUnits=Volumetric; OCUnits=Total; PHUnits=Water
                Thickness  NO3  NH4
                100        25   0.39
                200        11   0.6
                200        11   0.6
                200        10   0.5
                200        9    0.5
                200        4    0.5
                200        3    0.5
                200        2    0.5
              InitialWater: PercentMethod=EvenlyDistributed; FractionFull=1
              CERESSoilTemperature
            SurfaceOrganicMatter Surface Organic Matter: PoolName=wheat_stubble; type=wheat; mass=0; standing_fraction=0; cnr=80; CriticalResidueWeight=2000; OptimumDecompTemp=20; MaxCumulativeEOS=20; CNRatioDecompCoeff=0.277; CNRatioDecompThreshold=25; TotalLeachRain=25; MinRainToLeach=10; CriticalMinimumOrganicC=0.004; DefaultCPRatio=0; DefaultStandingFraction=0; StandingExtinctCoeff=0.5; FractionFaecesAdded=0.5
              Pools:
                {PoolName=wheat_stubble, ResidueType=wheat, Mass=0, CNRatio=80, StandingFraction=0}
              ResidueTypes: LoadFromResource=ResidueTypes
            Fertiliser
            MicroClimate: a_interception=0; b_interception=1; c_interception=0; d_interception=0; soil_albedo=0.3; sun_angle=15; soil_heat_flux_fraction=0.4; night_interception_fraction=0.5; refheight=2; albedo=0.293662; emissivity=0.96; RadIntTotal=0
            Plant Wheat: CropType=Wheat
            Report DailyReport
            Report HarvestReport
            Report SupReport: EventNames=[Clock].DoReport
              VariableNames:
                [Clock].Today
                [Leaf].CohortSize
                [Wheat].Arbitrator.DM.Allocated
                [Wheat].Arbitrator.DM.TotalPlantDemand
                [Wheat].Arbitrator.DM.NutrientLimitation
                [Wheat].Arbitrator.DM.SinkLimitation
                [Wheat].Arbitrator.DM.TotalFixationSupply
                [Wheat].Arbitrator.FN
                [Wheat].Arbitrator.N.TotalPlantDemand
                [Wheat].Leaf.CohortMaxSize
                [Wheat].Leaf.CohortParameters.GrowthDuration.Value()
                [Wheat].Leaf.CohortParameters.LagDuration.Value()
                [Wheat].Leaf.CohortParameters.MaxArea.Value()
                [Wheat].Leaf.CohortParameters.SenescenceDuration.Value()
                [Wheat].Leaf.CohortParameters.SpecificLeafAreaMax.Value()
                [Wheat].Leaf.CohortParameters.SpecificLeafAreaMin.Value()
                [Wheat].Leaf.Photosynthesis.FT.Value()
                [Wheat].Leaf.Photosynthesis.FVPD.Value()
                [Wheat].Leaf.Photosynthesis.RueAct
                [Wheat].Stem.DMDemandFunction.HightLimitedDMAccumulation.Value()
                [Wheat].Stem.DMDemandFunction.PotentialDMAccumulation.Value()
                [Wheat].Leaf.NextExpandingLeafProportion
                [Wheat].Structure.MeanTillerGrowthRate.Value()
            SoluteManager
          SoilArbitrator Soil Arbitrator
      Experiment Lincoln2010
        Factors
          Factor Sow
            Factor 27Aug
              Specifications:
                [Operations]
                [Fertilise].Script.SDSwitch = 1.0
              Operations
                2010-09-04  [Wheat].Sow(population:200, cultivar:"Conquest", depth:40, rowSpacing:150);
            Factor 27Sep
              Specifications:
                [Operations]
                [Fertilise].Script.SDSwitch = 0.0
              Operations
                2010-09-27  [Wheat].Sow(population:200, cultivar:"Conquest", depth:40, rowSpacing:150);
          Factor Irr: Specifications=[IrrigationEvents]
            Operations Full
              2010-11-02  [Irrigation].Apply(31);
              2010-11-15  [Irrigation].Apply(39);
              2010-11-23  [Irrigation].Apply(8);
              2010-11-24  [Irrigation].Apply(19);
              2010-12-01  [Irrigation].Apply(39);
              2010-12-08  [Irrigation].Apply(25);
              2010-12-15  [Irrigation].Apply(37);
              2010-12-22  [Irrigation].Apply(32);
              2010-12-29  [Irrigation].Apply(18);
              2011-01-12  [Irrigation].Apply(27);
            Operations Half
              2010-11-02  [Irrigation].Apply(16);
              2010-11-15  [Irrigation].Apply(20);
              2010-11-23  [Irrigation].Apply(8);
              2010-11-24  [Irrigation].Apply(10);
              2010-12-01  [Irrigation].Apply(19);
              2010-12-08  [Irrigation].Apply(12);
              2010-12-15  [Irrigation].Apply(18);
              2010-12-22  [Irrigation].Apply(16);
              2010-12-29  [Irrigation].Apply(9);
              2011-01-12  [Irrigation].Apply(13);
            Operations Half2
              2010-11-02  [Irrigation].Apply(0);
              2010-11-15  [Irrigation].Apply(36);
              2010-11-23  [Irrigation].Apply(8);
              2010-11-24  [Irrigation].Apply(0);
              2010-12-01  [Irrigation].Apply(29);
              2010-12-08  [Irrigation].Apply(0);
              2010-12-15  [Irrigation].Apply(30);
              2010-12-22  [Irrigation].Apply(0);
              2010-12-29  [Irrigation].Apply(25);
              2011-01-12  [Irrigation].Apply(0);
            Operations Nil
              2010-11-23  [Irrigation].Apply(8);
        Memo
          - Could not find informaiton confirming sowing rate.  Protocole said aim for 300 plants per m/2 which is usual for a spring sowing but very high for an Autumn sowing.  Assumed 100 plants per m/2 for May sowing and 300 for August.
          - Emergence was recorded as the 28th of May for the first planting.  The model was predicting this early so delayed sowing date to get emergence date correct..
        Simulation Baxters
          Clock: StartDate=2010-08-27; EndDate=2011-03-30
          Summary summaryfile
          Weather: FileName=lincoln.met
          Zone paddock: Area=1; Slope=0
            Folder Manager folder
              Operations
              Operations IrrigationEvents
              Manager Fertilise: same as Validation.New Zealand.Lincoln1992.SDtrialBase.paddock.Manager folder.Fertilise
            Irrigation
            SurfaceOrganicMatter Surface Organic Matter: same as Validation.New Zealand.Lincoln1992.SDtrialBase.paddock.Surface Organic Matter
            Fertiliser
            MicroClimate: a_interception=0; b_interception=1; c_interception=0; d_interception=0; soil_albedo=0.3; sun_angle=15; soil_heat_flux_fraction=0.4; night_interception_fraction=0.5; refheight=2; albedo=0.293662; emissivity=0.96; RadIntTotal=0
            Plant Wheat: CropType=Wheat
            Report DailyReport
            Report HarvestReport
            Report SupReport: EventNames=[Clock].DoReport
              VariableNames:
                [Clock].Today
                [Leaf].CohortSize
                [Wheat].Arbitrator.DM.Allocated
                [Wheat].Arbitrator.DM.TotalPlantDemand
                [Wheat].Arbitrator.DM.NutrientLimitation
                [Wheat].Arbitrator.DM.SinkLimitation
                [Wheat].Arbitrator.DM.TotalFixationSupply
                [Wheat].Arbitrator.FN
                [Wheat].Arbitrator.N.TotalPlantDemand
                [Wheat].Leaf.CohortMaxSize
                [Wheat].Leaf.CohortParameters.GrowthDuration.Value()
                [Wheat].Leaf.CohortParameters.LagDuration.Value()
                [Wheat].Leaf.CohortParameters.MaxArea.Value()
                [Wheat].Leaf.CohortParameters.SenescenceDuration.Value()
                [Wheat].Leaf.CohortParameters.SpecificLeafAreaMax.Value()
                [Wheat].Leaf.CohortParameters.SpecificLeafAreaMin.Value()
                [Wheat].Leaf.Photosynthesis.FT.Value()
                [Wheat].Leaf.Photosynthesis.FVPD.Value()
                [Wheat].Leaf.Photosynthesis.RueAct
                [Wheat].Stem.DMDemandFunction.HightLimitedDMAccumulation.Value()
                [Wheat].Stem.DMDemandFunction.PotentialDMAccumulation.Value()
                [Wheat].Leaf.NextExpandingLeafProportion
                [Wheat].Structure.MeanTillerGrowthRate.Value()
                sum([Soil].SoilWater.SWmm[1:8]) as ProfileWater
            Soil: Latitude=0; Longitude=0
              Analysis: Thickness=[100, 200, 300, 300, 300, 300]; PH=[6.6, 6.2, 5.7, 5.5, 5.5, 5.5]; PHUnits=Water; BoronUnits=HotWater
              Water
                Thickness  BD   AirDry  LL15  DUL   SAT
                200        1.2  0.05    0.1   0.32  0.46
                200        1.2  0.1     0.1   0.32  0.46
                200        1.2  0.07    0.07  0.13  0.4
                200        1.2  0.07    0.07  0.1   0.3
                200        1.2  0.08    0.08  0.11  0.3
                200        1.2  0.07    0.07  0.1   0.3
                200        1.2  0.07    0.07  0.1   0.3
                200        1.2  0.07    0.07  0.1   0.3
                SoilCrop WheatSoil: LL=[0.1, 0.1, 0.07, 0.07, 0.08, 0.07, 0.07, 0.07]; KL=[0.06, 0.06, 0.06, 0.06, 0.04, 0.025, 0.01, 0.005]; XF=[1, 1, 1, 1, 1, 1, 1, 1]
              SoilWater: SummerDate=1-Nov; SummerU=6; SummerCona=2; WinterDate=1-Apr; WinterU=9; WinterCona=4.4; DiffusConst=0; DiffusSlope=0; Salb=0.18; CN2Bare=68; CNRed=20; CNCov=0.8; slope=0; discharge_width=0; catchment_area=0; max_pond=0; residueinterception=0
                Thickness  SWCON  KLAT
                200        0.7    0
                200        0.7    0
                200        0.95   0
                200        0.95   0
                200        0.95   0
                200        0.95   0
                200        0.95   0
                200        0.95   0
              SoilNitrogen: fom_type=[default, manure, mucuna, lablab, shemp, stable]; fract_carb=[0.2, 0.3, 0.54, 0.57, 0.45, 0]; fract_cell=[0.7, 0.3, 0.37, 0.37, 0.47, 0.1]; fract_lign=[0.1, 0.4, 0.09, 0.06, 0.08, 0.9]
              SoilOrganicMatter: RootCN=30; RootWt=3000; SoilCN=11.5; EnrACoeff=7.4; EnrBCoeff=0.2; OCUnits=Total
                Thickness  OC    FBiom  FInert
                100        1.82  0.025  0.3
                200        1.47  0.025  0.4
                300        1.2   0.015  0.75
                300        1.03  0.01   0.9
                300        0.47  0.01   0.96
                300        0.47  0.01   0.96
              Sample Initial nitrogen: NO3Units=kgha; NH4Units=ppm; SWUnits=Volumetric; OCUnits=Total; PHUnits=Water
                Thickness  NO3  NH4
                100        217  0
                200        30   0
                300        5    0
                300        5    0
                300        0    0
                300        0    0
              Sample Initial water: Thickness=[200, 200, 200, 200, 200, 200, 200, 200]; SW=[0.29, 0.28, 0.16, 0.15, 0.1, 0.1, 0.11, 0.12]; NO3Units=kgha; NH4Units=ppm; SWUnits=Volumetric; OCUnits=Total; PHUnits=Water
              CERESSoilTemperature
            SoluteManager
            Operations HarvestOperations
              2011-02-11  [Wheat].Harvest();
              2011-02-11  [Wheat].EndCrop();
          SoilArbitrator Soil Arbitrator
      Experiment Lincoln2014
        Memo
          This is a water response trial run in the rain out shelter at Plant and Food Research in Lincoln, New Zealand.  It is described in full by [Chakwizira_wheat_2014] but briefly.  An Autumn crop of 'Wakanui' wheat was sown at 165 plants/m^2^ on the 28th of March 2013 and 6 irrigation timing treatments were applied:

          1. Full irrigation where measured ET was replaced weekly
          .
          2. Nill irrigation.
          3. Very Early Drought where irrigation was withheld from sowing until the beginning of stem extension.
          4. Early Drought where irrigation was withheld between Flag leaf and the beginning of grain fill.
          5. Middle Drought where irrigation was withheld between Flag leaf and 1 week into grain fill.
          6. Late Drought where irrigation was withheld from heading until harvest.

          Irrigation was applied at weekly intervals through and assemply of low rate drip emitters on each plot.  Soil water content was measured weekly with a neutron probe and biomass was measured on 5 occasions throughout the crop.  Samples throughtout the crop were from a 0.43m^2^ quatrant and the final harvest sample was from a 1 m^2^ quadrant.  Each treatment was replicated four times and there was considerable soil variation from plot to plot so each treatment was initianilised with unique soil parameters which best described the soil they were growing on.
        Factors
          Factor Irrig
            Factor Full
              Specifications:
                [IrrigationEvents]
                [Water]
                [Sample]
              Operations IrrigationEvents
                2013-05-14  [Irrigation].Apply(25);
                2013-05-29  [Irrigation].Apply(9.2);
                2013-06-11  [Irrigation].Apply(12);
                2013-09-16  [Irrigation].Apply(34.6);
                2013-09-25  [Irrigation].Apply(46.3);
                2013-10-01  [Irrigation].Apply(19.3);
                2013-10-08  [Irrigation].Apply(24.9);
                2013-10-15  [Irrigation].Apply(21);
                2013-10-22  [Irrigation].Apply(39);
                2013-10-29  [Irrigation].Apply(44,1);
                2013-11-05  [Irrigation].Apply(40,1);
                2013-11-12  [Irrigation].Apply(35,1);
                2013-11-19  [Irrigation].Apply(33,1);
                2013-11-26  [Irrigation].Apply(32,1);
                2013-12-03  [Irrigation].Apply(35,1);
                2013-12-10  [Irrigation].Apply(49,1);
                2013-12-17  [Irrigation].Apply(47,1);
                2013-12-24  [Irrigation].Apply(0);
                2013-12-31  [Irrigation].Apply(0);
                2013-09-10  [Irrigation].Apply(5);
              Water
                Thickness  BD     AirDry  LL15  DUL   SAT
                200        1      0.05    0.1   0.32  0.42
                200        1.324  0.12    0.15  0.3   0.41
                200        1.35   0.1     0.1   0.28  0.37
                200        1.301  0.08    0.08  0.31  0.37
                200        1.301  0.06    0.07  0.27  0.33
                200        1.301  0.06    0.08  0.25  0.32
                200        1.301  0.1     0.1   0.21  0.3
                200        1.301  0.1     0.1   0.23  0.31
                200        1.3    0.1     0.1   0.23  0.31
                200        1.3    0.1     0.1   0.23  0.31
                SoilCrop WheatSoil
                  LL=[0.1, 0.12, 0.1, 0.08, 0.06, 0.08, 0.1, 0.1, 0.1, 0.1]
                  KL=[0.06, 0.03, 0.03, 0.03, 0.03, 0.03, 0.03, 0.02, 0.02, 0.02]
                  XF=[1, 1, 1, 1, 1, 1, 1, 1, 1, 1]
              Sample: NO3Units=kgha; NH4Units=kgha; SWUnits=Volumetric; OCUnits=Total; PHUnits=Water
                Thickness  NO3  NH4  SW
                200        530  3    0.32
                200        15   2    0.27825
                200        15   1    0.276
                200        10   1    0.25025
                200        5    1    0.25075
                200        5    1    0.23975
                200        5    1    0.18925
                200        5    1    0.19625
            Factor Nil
              Specifications:
                [IrrigationEvents]
                [Water]
                [Sample]
              Water
                Thickness  BD     AirDry  LL15  DUL   SAT
                200        1      0.06    0.1   0.32  0.36
                200        1.324  0.12    0.11  0.29  0.36
                200        1.35   0.1     0.08  0.28  0.4
                200        1.301  0.05    0.05  0.25  0.33
                200        1.301  0.07    0.07  0.3   0.33
                200        1.301  0.1     0.1   0.3   0.32
                200        1.301  0.1     0.1   0.23  0.3
                200        1.301  0.11    0.08  0.22  0.31
                200        1.3    0.11    0.08  0.22  0.31
                200        1.3    0.11    0.08  0.22  0.31
                SoilCrop WheatSoil
                  LL=[0.1, 0.11, 0.09, 0.05, 0.07, 0.1, 0.1, 0.11, 0.11, 0.11]
                  KL=[0.06, 0.03, 0.03, 0.03, 0.03, 0.03, 0.03, 0.02, 0.02, 0.02]
                  XF=[1, 1, 1, 1, 1, 1, 1, 1, 1, 1]
              Operations IrrigationEvents
                2013-09-16  [Irrigation].Apply(4.6);
                2013-09-25  [Irrigation].Apply(3.5);
                2013-09-10  [Irrigation].Apply(5);
                2013-09-10  [Irrigation].Apply(5);
              Sample: NO3Units=kgha; NH4Units=kgha; SWUnits=Volumetric; OCUnits=Total; PHUnits=Water
                Thickness  NO3  NH4  SW
                200        530  3    0.32
                200        15   2    0.2825
                200        15   1    0.26375
                200        10   1    0.20625
                200        5    1    0.2425
                200        5    1    0.2425
                200        5    1    0.18825
                200        5    1    0.18225
                200        5    1    0.182
                200        5    1    0.182
            Factor VeryEarly
              Specifications:
                [IrrigationEvents]
                [Water]
                [Sample]
              Water
                Thickness  BD     AirDry  LL15  DUL   SAT
                200        1      0.06    0.06  0.32  0.419
                200        1.324  0.12    0.12  0.29  0.405
                200        1.35   0.1     0.09  0.28  0.37
                200        1.301  0.08    0.08  0.27  0.37
                200        1.301  0.06    0.07  0.3   0.33
                200        1.301  0.06    0.08  0.25  0.32
                200        1.301  0.1     0.1   0.23  0.3
                200        1.301  0.1     0.1   0.21  0.31
                200        1.3    0.1     0.1   0.21  0.31
                200        1.3    0.1     0.1   0.21  0.31
                SoilCrop WheatSoil
                  LL=[0.06, 0.12, 0.09, 0.08, 0.07, 0.08, 0.1, 0.1, 0.1, 0.1]
                  KL=[0.06, 0.03, 0.03, 0.03, 0.03, 0.03, 0.03, 0.02, 0.02, 0.02]
                  XF=[1, 1, 1, 1, 1, 1, 1, 1, 1, 1]
              Operations IrrigationEvents
                2013-09-16  [Irrigation].Apply(4.6);
                2013-09-25  [Irrigation].Apply(3.5);
                2013-11-19  [Irrigation].Apply(33,1);
                2013-11-26  [Irrigation].Apply(32,1);
                2013-12-03  [Irrigation].Apply(35,18);
                2013-12-10  [Irrigation].Apply(49,1);
                2013-12-17  [Irrigation].Apply(47,1);
                2013-12-24  [Irrigation].Apply(49,1);
                2013-09-10  [Irrigation].Apply(5);
              Sample: NO3Units=kgha; NH4Units=kgha; SWUnits=Volumetric; OCUnits=Total; PHUnits=Water
                Thickness  NO3  NH4  SW
                200        530  3    0.32
                200        15   2    0.2865
                200        15   1    0.276
                200        10   1    0.2745
                200        5    1    0.29125
                200        5    1    0.22275
                200        5    1    0.20375
                200        5    1    0.18175
            Factor Early
              Specifications:
                [IrrigationEvents]
                [Water]
                [Sample]
              Water
                Thickness  BD     AirDry  LL15  DUL   SAT
                200        1      0.05    0.06  0.32  0.42
                200        1.324  0.12    0.1   0.3   0.405
                200        1.35   0.1     0.1   0.3   0.37
                200        1.301  0.08    0.08  0.3   0.37
                200        1.301  0.06    0.07  0.32  0.33
                200        1.301  0.06    0.08  0.3   0.32
                200        1.301  0.1     0.08  0.21  0.3
                200        1.301  0.1     0.08  0.21  0.31
                200        1.3    0.1     0.08  0.21  0.31
                200        1.3    0.1     0.08  0.21  0.31
                SoilCrop WheatSoil
                  LL=[0.06, 0.1, 0.1, 0.08, 0.07, 0.08, 0.08, 0.08, 0.08, 0.08]
                  KL=[0.06, 0.03, 0.03, 0.03, 0.03, 0.03, 0.03, 0.02, 0.02, 0.02]
                  XF=[1, 1, 1, 1, 1, 1, 1, 1, 1, 1]
              Operations IrrigationEvents
                2013-05-14  [Irrigation].Apply(25);
                2013-05-29  [Irrigation].Apply(9.2);
                2013-06-11  [Irrigation].Apply(12);
                2013-09-16  [Irrigation].Apply(34.6);
                2013-09-25  [Irrigation].Apply(46.5);
                2013-12-10  [Irrigation].Apply(49,1);
                2013-12-17  [Irrigation].Apply(47,1);
                2013-12-24  [Irrigation].Apply(49,1);
                2013-12-31  [Irrigation].Apply(20.3,1);
                2013-12-24  [Irrigation].Apply(49,1);
                2013-12-31  [Irrigation].Apply(20.3,1);
                2013-09-10  [Irrigation].Apply(5);
              Sample: NO3Units=kgha; NH4Units=kgha; SWUnits=Volumetric; OCUnits=Total; PHUnits=Water
                Thickness  NO3  NH4  SW
                200        530  3    0.32
                200        15   2    0.278
                200        15   1    0.2695
                200        10   1    0.26975
                200        5    1    0.25725
                200        5    1    0.24425
                200        5    1    0.15075
                200        5    1    0.1605
            Factor Middle
              Specifications:
                [IrrigationEvents]
                [Water]
                [Sample]
              Water
                Thickness  BD     AirDry  LL15  DUL   SAT
                200        1      0.06    0.06  0.32  0.419
                200        1.324  0.12    0.12  0.3   0.405
                200        1.35   0.09    0.09  0.29  0.37
                200        1.301  0.05    0.05  0.3   0.37
                200        1.301  0.05    0.05  0.25  0.33
                200        1.301  0.05    0.05  0.24  0.32
                200        1.301  0.12    0.12  0.26  0.3
                200        1.301  0.1     0.1   0.26  0.31
                200        1.3    0.1     0.1   0.26  0.31
                200        1.3    0.1     0.1   0.26  0.31
                SoilCrop WheatSoil
                  LL=[0.06, 0.12, 0.09, 0.05, 0.05, 0.05, 0.12, 0.1, 0.1, 0.1]
                  KL=[0.06, 0.03, 0.03, 0.03, 0.03, 0.03, 0.03, 0.02, 0.02, 0.02]
                  XF=[1, 1, 1, 1, 1, 1, 1, 1, 1, 1]
              Operations IrrigationEvents
                2013-05-14  [Irrigation].Apply(25);
                2013-05-29  [Irrigation].Apply(9.2);
                2013-06-11  [Irrigation].Apply(12);
                2013-09-16  [Irrigation].Apply(34.6);
                2013-09-25  [Irrigation].Apply(46.3);
                2013-10-01  [Irrigation].Apply(19.3);
                2013-12-17  [Irrigation].Apply(47,1);
                2013-12-24  [Irrigation].Apply(49,1);
                2013-12-31  [Irrigation].Apply(20.3,1);
                2013-09-10  [Irrigation].Apply(5);
              Sample: NO3Units=kgha; NH4Units=kgha; SWUnits=Volumetric; OCUnits=Total; PHUnits=Water
                Thickness  NO3  NH4  SW
                200        530  3    0.32
                200        15   2    0.27875
                200        15   1    0.271
                200        10   1    0.2795
                200        5    1    0.2275
                200        5    1    0.1905
                200        5    1    0.23175
                200        5    1    0.2385
            Factor Late
              Specifications:
                [IrrigationEvents]
                [Water]
                [Sample]
              Water
                Thickness  BD     AirDry  LL15  DUL   SAT
                200        1      0.05    0.05  0.32  0.419
                200        1.324  0.12    0.12  0.3   0.405
                200        1.35   0.1     0.1   0.29  0.37
                200        1.301  0.08    0.05  0.32  0.37
                200        1.301  0.06    0.06  0.3   0.33
                200        1.301  0.06    0.06  0.3   0.32
                200        1.301  0.1     0.1   0.27  0.3
                200        1.301  0.1     0.1   0.26  0.31
                200        1.3    0.1     0.1   0.26  0.31
                200        1.3    0.1     0.1   0.26  0.31
                SoilCrop WheatSoil
                  LL=[0.1, 0.12, 0.1, 0.08, 0.06, 0.08, 0.1, 0.1, 0.1, 0.1]
                  KL=[0.06, 0.03, 0.03, 0.03, 0.03, 0.03, 0.03, 0.02, 0.02, 0.02]
                  XF=[1, 1, 1, 1, 1, 1, 1, 1, 1, 1]
              Operations IrrigationEvents
                2013-05-14  [Irrigation].Apply(25);
                2013-05-29  [Irrigation].Apply(9.2);
                2013-06-11  [Irrigation].Apply(12);
                2013-09-16  [Irrigation].Apply(34.6);
                2013-09-25  [Irrigation].Apply(46.3);
                2013-10-01  [Irrigation].Apply(19.3);
                2013-10-08  [Irrigation].Apply(24.9);
                2013-10-15  [Irrigation].Apply(21);
                2013-10-22  [Irrigation].Apply(39);
                2013-10-29  [Irrigation].Apply(0);
              Sample: NO3Units=kgha; NH4Units=kgha; SWUnits=Volumetric; OCUnits=Total; PHUnits=Water
                Thickness  NO3  NH4  SW
                200        530  3    0.32
                200        15   2    0.2785
                200        15   1    0.274
                200        10   1    0.27075
                200        5    1    0.2715
                200        5    1    0.23125
                200        5    1    0.199
                200        5    1    0.228
        Simulation Rainshelter2013
          Clock: StartDate=2013-03-22; EndDate=2014-04-01
          Summary summaryfile
          Weather: FileName=lincoln.met
          SoilArbitrator Soil Arbitrator
          Zone paddock: Area=1; Slope=0
            Soil TempletonSiltLoam: SoilType=NZ_sedementary; Region=Plains; State=Canterbury; Country=New Zealand; Latitude=0; Longitude=0
              DataSource=Generic profile descriptions provided by Trevor Webb and data for functional horizions based on SWAMP project results
              Comments=Bulk density values were measured on the fine earth fraction so values entered into apsim soil are adjusted down to account for stone content (assuming stones are inert from all soil process so their mass and volume is removed from model paramaters).  SAT, DUL, LL15 and Air dry have been adjusted down to account for stone content.  OC has not been adjusted so the model will get the correct carbon and N amounts using the adjusted BD.
              Analysis: Thickness=[180, 150, 400, 270, 500]; PH=[6, 6, 6, 6, 6]; PHUnits=Water; BoronUnits=HotWater
              Water
                Thickness  BD     AirDry  LL15  DUL   SAT
                200        1      0.05    0.1   0.32  0.42
                200        1.324  0.12    0.15  0.35  0.41
                200        1.35   0.1     0.1   0.3   0.37
                200        1.301  0.08    0.08  0.3   0.37
                200        1.301  0.06    0.07  0.28  0.33
                200        1.301  0.06    0.08  0.25  0.32
                200        1.301  0.1     0.1   0.23  0.3
                200        1.301  0.1     0.1   0.24  0.31
                SoilCrop WheatSoil: LL=[0.1, 0.12, 0.1, 0.08, 0.06, 0.08, 0.1, 0.1]; KL=[0.06, 0.06, 0.1, 0.1, 0.05, 0.03, 0.02, 0.01]; XF=[1, 1, 1, 1, 1, 1, 1, 1]
              SoilWater: SummerDate=1-oct; SummerU=6; SummerCona=3; WinterDate=1-Apr; WinterU=2; WinterCona=1; DiffusConst=0; DiffusSlope=0; Salb=0.13; CN2Bare=0; CNRed=0; CNCov=0.8; max_pond=0; Thickness=[200, 200, 200, 200, 200, 200, 200, 200]; SWCON=[1, 1, 1, 1, 1, 1, 1, 1]; residueinterception=0
              SoilNitrogen: fom_type=[default, manure, mucuna, lablab, shemp, stable]; fract_carb=[0.2, 0.3, 0.54, 0.57, 0.45, 0]; fract_cell=[0.7, 0.3, 0.37, 0.37, 0.47, 0.1]; fract_lign=[0.1, 0.4, 0.09, 0.06, 0.08, 0.9]
              SoilOrganicMatter: RootCN=40; RootWt=1000; SoilCN=11; EnrACoeff=7.4; EnrBCoeff=0.2; OCUnits=Total
                Thickness  OC        FBiom      FInert
                180        2.6251    0.0333099  0.437121
                150        1.24694   0.0186614  0.656885
                400        0.316004  0.0116634  0.849635
                270        0.207954  0.0102229  0.94496
                500        0.200366  0.0100221  0.982659
              Sample: NO3Units=kgha; NH4Units=kgha; SWUnits=Volumetric; OCUnits=Total; PHUnits=Water
                Thickness  NO3  NH4  SW
                200        530  3    0.35
                200        15   2    0.35
                200        15   1    0.25
                200        10   1    0.25
                200        5    1    0.25
                200        5    1    0.2
                200        5    1    0.18
                200        5    1    0.2
              CERESSoilTemperature
            Plant Wheat: CropType=Wheat
            Folder Manager folder
              Operations SowingAndHarvest
                2013-03-25  [Wheat].Sow(population:165, cultivar:"Wakanui", depth:30, rowSpacing:130);
                2014-01-26  [Wheat].Harvest();
                2014-01-26  [Wheat].EndCrop();
              Operations IrrigationEvents
                2013-05-14  [Irrigation].Apply(25);
                2013-05-29  [Irrigation].Apply(9.2);
                2013-06-11  [Irrigation].Apply(12);
                2013-09-16  [Irrigation].Apply(34.6);
                2013-09-25  [Irrigation].Apply(43);
                2013-10-01  [Irrigation].Apply(19.3);
                2013-10-08  [Irrigation].Apply(24.9);
                2013-10-15  [Irrigation].Apply(21);
                2013-10-22  [Irrigation].Apply(39);
                2013-10-29  [Irrigation].Apply(44);
                2013-11-05  [Irrigation].Apply(40);
                2013-11-12  [Irrigation].Apply(35);
                2013-11-19  [Irrigation].Apply(33);
                2013-11-26  [Irrigation].Apply(32);
                2013-12-03  [Irrigation].Apply(35);
                2013-12-10  [Irrigation].Apply(49);
                2013-12-17  [Irrigation].Apply(47);
                2013-12-24  [Irrigation].Apply(0);
                2013-12-31  [Irrigation].Apply(0);
              Operations FertiliserEvents
                2013-09-26  [Fertiliser].Apply(100, Fertiliser.Types.UreaN, 10);
                2013-11-13  [Fertiliser].Apply(100, Fertiliser.Types.UreaN, 10);
              Operations Flood
                2013-06-18  [Irrigation].Apply(120);
                2013-04-12  [Irrigation].Apply(5);
            Irrigation
            Manager ClimateControl
              StartDate = 2013-04-15
              EndDate = 2014-05-01
              script: same as in Validation.New Zealand.Lincoln9192.LincolnBase.paddock.ClimateControl
            SurfaceOrganicMatter Surface Organic Matter: PoolName=wheat_stubble; type=wheat; mass=500; standing_fraction=0; cnr=80; CriticalResidueWeight=2000; OptimumDecompTemp=20; MaxCumulativeEOS=20; CNRatioDecompCoeff=0.277; CNRatioDecompThreshold=25; TotalLeachRain=25; MinRainToLeach=10; CriticalMinimumOrganicC=0.004; DefaultCPRatio=0; DefaultStandingFraction=0; StandingExtinctCoeff=0.5; FractionFaecesAdded=0.5
              Pools:
                {PoolName=wheat_stubble, ResidueType=wheat, Mass=500, CNRatio=80, StandingFraction=0}
              ResidueTypes: LoadFromResource=ResidueTypes
            Fertiliser
            MicroClimate: a_interception=0; b_interception=1; c_interception=0; d_interception=0; soil_albedo=0.3; sun_angle=15; soil_heat_flux_fraction=0.4; night_interception_fraction=0.5; refheight=2; albedo=0.293662; emissivity=0.96; RadIntTotal=0
            Report DailyReport
            Report SupReport: same as Validation.New Zealand.Lincoln2010.Baxters.paddock.SupReport
            Report HarvestReport
            Manager MaxLeafSize
              script: same as in Validation.SE Queensland.APS2.APS2Base.Field.MaxLeafSize
            Report MaxLeafSizeReport
            SoluteManager
      Experiment Leeston2014
        Memo
          The design, management and yield results of this trial have been described in full by [Craigie_Wheat_2015].  In brief, this trial was conducted to assess the impact of earlier sowing on potential yields of 'Wakanui' wheat grown at Wakanui (the cultivar was named after the area) in Mid Canterbury, New Zealand.  it was a 4 x 4 factorial with 4 replicates of the following treatments:

          1. Sowing date (20 February, 10 March, 28 March, 23 April)
          2. Sowing density (50,100,150 and 200 plants/m^2^

          In addition to yield, measurements of leaf appearance and senescence and canopy cover (measured with NDVI)  were measured at 10 - 14 day intervals and biomass measurements were taken at growth stages 32 and 65.

          Considerable canopy decay was observed during the winter for the early sown treatments and we have not introduced mechanisms into the model to capture this yet so there is a genral over prediction of canopy size and biomass in these first sowing dates.
        Factors
          Factor Sow: Specifications=[Sowing].Script.SowDate = 20-Feb,10-Mar,26-Mar,23-Apr
          Factor Popn: Specifications=[Sowing].Script.Population = 50,200
        Simulation Wakanui2015Base
          Clock: StartDate=2014-02-01; EndDate=2015-02-15
          Summary summaryfile
          Weather: FileName=lincoln.met
          Zone paddock: Area=1; Slope=0
            Folder Manager folder
              Operations IrrigationEvents
                2014-10-13  [Irrigation].Apply(50.0);
                2014-10-27  [Irrigation].Apply(50.0);
                2014-11-05  [Irrigation].Apply(50.0);
                2014-11-18  [Irrigation].Apply(50.0);
              Operations FertiliserEvents
                2014-09-13  [Fertiliser].Apply(100, Fertiliser.Types.UreaN, 10);
                2014-10-13  [Fertiliser].Apply(150, Fertiliser.Types.UreaN, 10);
              Manager Sowing
                SowDate = 24-Jul
                CultivarName = Wakanui
                SowingDepth = 50
                RowSpacing = 150
                Population = 150
```csharp
using System;
using Models.Core;
using Models.PMF;
using Models.Soils;
using Models.Utilities;
using APSIM.Shared.Utilities;

namespace Models
{
    [Serializable]
    public class Script : Model
    {
        [Link] Clock Clock;
        [Link] Summary Summary;
        [Link] Soil Soil;
        [Link] Plant Wheat;
        Accumulator accumulatedRain;
        
        [Description("Sowing date (d-mmm)")]
        public string SowDate { get; set; }
        [Description("Cultivar to be sown")]
        public string CultivarName { get; set; }
        [Description("Sowing depth (mm)")]
        public double SowingDepth { get; set; }
        [Description("Row spacing (mm)")]
        public double RowSpacing { get; set; }
        [Description("Plant population (/m2)")]
        public double Population { get; set; }
        


        [EventSubscribe("DoManagement")]
        private void OnDoManagement(object sender, EventArgs e)
        {
            if (DateUtilities.WithinDates(SowDate, Clock.Today, SowDate))
            {
                Wheat.Sow(population: Population, cultivar: CultivarName, depth: SowingDepth, rowSpacing: RowSpacing);    
            }
        
        }
        
    }
}
```
              Operations HarvestEvents
                2015-02-04  [Wheat].Harvest();
                2015-02-04  [Wheat].EndCrop();
            Irrigation
            Soil: SoilType=LincolnSoil; LocalName=Lincoln; Site=Lincoln; NearestTown=Unknown; Region=NZ; NaturalVegetation=Unknown; Latitude=0; Longitude=0
              Water
                Thickness  BD   AirDry  LL15  DUL   SAT
                100        1.3  0.05    0.08  0.31  0.44
                200        1.3  0.05    0.07  0.3   0.44
                200        1.3  0.05    0.07  0.28  0.44
                200        1.3  0.05    0.09  0.31  0.44
                200        1.3  0.05    0.11  0.3   0.44
                200        1.3  0.05    0.16  0.28  0.44
                200        1.3  0.05    0.15  0.3   0.44
                200        1.3  0.05    0.12  0.34  0.44
                SoilCrop WheatSoil: LL=[0.08, 0.07, 0.07, 0.09, 0.11, 0.16, 0.15, 0.12]; KL=[0.06, 0.06, 0.06, 0.06, 0.03, 0.02, 0.02, 0.02]; XF=[1, 1, 1, 1, 1, 1, 1, 1]
              SoilWater: same as Validation.New Zealand.Lincoln1992.SDtrialBase.paddock.Soil.SoilWater
              SoilNitrogen: fom_type=[default, manure, mucuna, lablab, shemp, stable]; fract_carb=[0.2, 0.3, 0.54, 0.57, 0.45, 0]; fract_cell=[0.7, 0.3, 0.37, 0.37, 0.47, 0.1]; fract_lign=[0.1, 0.4, 0.09, 0.06, 0.08, 0.9]
              SoilOrganicMatter: RootCN=15; RootWt=3000; SoilCN=11; EnrACoeff=0; EnrBCoeff=0; OCUnits=Total
                Thickness  OC   FBiom  FInert
                100        4    0.04   0.31
                200        3    0.03   0.4
                200        2    0.02   0.5
                200        1    0.01   0.6
                200        1    0.01   0.7
                200        1    0.01   0.9
                200        0.9  0.01   0.99
                200        0.9  0.01   0.99
              Analysis: Thickness=[100, 200, 200, 200, 200, 200, 200, 200]; PH=[6, 6, 6, 6, 6, 6, 6, 6]; PHUnits=Water; BoronUnits=HotWater
              Sample Initial nitrogen: NO3Units=kgha; NH4Units=ppm; SWUnits=Volumetric; OCUnits=Total; PHUnits=Water
                Thickness  NO3  NH4
                100        40   1.3
                200        30   1
                200        20   1
                200        10   0.8
                200        10   0.8
                200        10   0.5
                200        10   0.5
                200        10   0.5
              Sample Initial water: Thickness=[100, 200, 200, 200, 200, 200, 200, 200]; SW=[0.24, 0.27, 0.26, 0.23, 0.24, 0.23, 0.23, 0.18]; NO3Units=ppm; NH4Units=ppm; SWUnits=Volumetric; OCUnits=Total; PHUnits=Water
              CERESSoilTemperature
            SurfaceOrganicMatter Surface Organic Matter: same as Validation.New Zealand.Lincoln9192.LincolnBase.paddock.Surface Organic Matter
            Fertiliser
            MicroClimate: a_interception=0; b_interception=1; c_interception=0; d_interception=0; soil_albedo=0.3; sun_angle=15; soil_heat_flux_fraction=0.4; night_interception_fraction=0.5; refheight=2; albedo=0.293662; emissivity=0.96; RadIntTotal=0
            Plant Wheat: CropType=Wheat
            Report DailyReport
            Report HarvestReport
            Report SupReport: EventNames=[Clock].DoReport
              VariableNames:
                [Clock].Today
                [Leaf].CohortSize
                [Wheat].Arbitrator.DM.Allocated
                [Wheat].Arbitrator.DM.TotalPlantDemand
                [Wheat].Arbitrator.DM.NutrientLimitation
                [Wheat].Arbitrator.DM.SinkLimitation
                [Wheat].Arbitrator.DM.TotalFixationSupply
                [Wheat].Arbitrator.FN
                [Wheat].Arbitrator.N.TotalPlantDemand
                [Wheat].Leaf.CohortMaxSize
                [Wheat].Leaf.CohortParameters.GrowthDuration.Value()
                [Wheat].Leaf.CohortParameters.LagDuration.Value()
                [Wheat].Leaf.CohortParameters.MaxArea.Value()
                [Wheat].Leaf.CohortParameters.SenescenceDuration.Value()
                [Wheat].Leaf.CohortParameters.SpecificLeafAreaMax.Value()
                [Wheat].Leaf.CohortParameters.SpecificLeafAreaMin.Value()
                [Wheat].Leaf.Photosynthesis.FT.Value()
                [Wheat].Leaf.Photosynthesis.FVPD.Value()
                [Wheat].Leaf.Photosynthesis.RueAct
                [Wheat].Stem.DMDemandFunction.HightLimitedDMAccumulation.Value()
                [Wheat].Stem.DMDemandFunction.PotentialDMAccumulation.Value()
            Manager MaxLeafSize
              script: same as in Validation.SE Queensland.APS2.APS2Base.Field.MaxLeafSize
            Report MaxLeafSizeReport
            SoluteManager
          SoilArbitrator Soil Arbitrator
        Memo Leaf Size Predictions
          This graph shows different leaf size profiles measured for winter wheat sown on a range of different dates.  Leaves that emerge during cooler conditions achieve a smallter maximum size than the equivelent leaf appearanign in warm conditions.
      Experiment Lincoln2015
        Memo
          ### Lincoln2012 (Rain-Shelter Trail)

          Testing of APSIM Maize under New Zealand conditions was undertaken using the data of [Teixeira_etal_2014].  This dataset includes the impact of three N (0 to 250 kg/ha N) and two water regimes (dryland and fully irrigated) using a rain-shelter structure.  Observations include biomass growth and nitrogen content of individual organs, soil water contents, leaf area index, phenology and yield components. Total biomass ranged from 8000 kg/ha for dryland nil N crops to up to 28000kg/ha for fully irrigated and N fertilised crops.  Dryland crops recovered 25 percent less N from applied fertilizer than irrigated crops.
        Factors
          Factor Nit
            Factor 0
              Specifications:
                [StateFactors].Script.Nit = 0
                [Water]
                [Fert]
              Operations 0
                2015-10-09  [Irrigation].Apply(5);
                2015-11-01  [Irrigation].Apply(5);
                2015-11-01  [Fertiliser].Apply(35, Fertiliser.Types.UreaN, 20);
                2015-11-19  [Irrigation].Apply(30);
                Memo
                  Uniques fertigation event
            Factor 50
              Specifications:
                [StateFactors].Script.Nit = 50
                [Fert]
              Operations 50
                2015-10-09  [Fertiliser].Apply(0, Fertiliser.Types.UreaN, 20);
                2015-10-09  [Irrigation].Apply(5);
                2015-11-01  [Fertiliser].Apply(35, Fertiliser.Types.UreaN, 20);
                2015-11-01  [Irrigation].Apply(5);
                2015-11-19  [Fertiliser].Apply(25, Fertiliser.Types.UreaN, 20);
                2015-11-19  [Irrigation].Apply(30);
            Factor 250
              Specifications:
                [StateFactors].Script.Nit = 250
                [Fert]
              Operations 250
                2015-10-09  [Fertiliser].Apply(50, Fertiliser.Types.UreaN, 20);
                2015-10-09  [Irrigation].Apply(5);
                2015-11-01  [Fertiliser].Apply(100, Fertiliser.Types.UreaN, 20);
                2015-11-01  [Irrigation].Apply(5);
                2015-11-19  [Fertiliser].Apply(100, Fertiliser.Types.UreaN, 20);
                2015-11-19  [Irrigation].Apply(30);
          Factor Irr
            Factor Full
              Specifications:
                [Irrig]
                [Water]
                [StateFactors].Script.Irr = Full
              Operations Full
                2015-09-30  [Irrigation].Apply(10);
                2015-10-01  [Irrigation].Apply(5);
                2015-10-09  [Irrigation].Apply(10);
                2015-10-16  [Irrigation].Apply(15);
                2015-10-22  [Irrigation].Apply(15);
                2015-10-30  [Irrigation].Apply(30);
                2015-11-06  [Irrigation].Apply(12.2);
                2015-11-12  [Irrigation].Apply(13);
                2015-11-12  [Irrigation].Apply(13);
                2015-11-26  [Irrigation].Apply(39);
                2015-12-03  [Irrigation].Apply(40);
                2015-12-24  [Irrigation].Apply(35);
                2015-12-31  [Irrigation].Apply(30);
                2016-01-07  [Irrigation].Apply(30);
            Factor Nil
              Specifications:
                [Irrig]
                [Water]
                [StateFactors].Script.Irr = Nil
              Operations Nil
                2015-09-30  [Irrigation].Apply(10);
                2015-10-01  [Irrigation].Apply(5);
                2015-10-09  [Irrigation].Apply(10);
                2015-12-24  [Irrigation].Apply(25);
                2016-02-03  [Irrigation].Apply(30);
                2016-02-04  [Irrigation].Apply(40);
              Memo
                Have added an extra irrigation, on 3 Nov,

                Data indcates water applied but no notes of it RFZ
        Simulation Lincoln2015
          Weather: FileName=lincoln.met
          Clock: StartDate=2015-09-07; EndDate=2016-02-15
          Summary summaryfile
          SoilArbitrator Soil Arbitrator
          Zone RainShelter: Area=1; Slope=0
            Soil TempletonSiltLoam: SoilType=NZ_sedementary; Region=Plains; State=Canterbury; Country=New Zealand; Latitude=0; Longitude=0
              DataSource=Generic profile descriptions provided by Trevor Webb and data for functional horizions based on SWAMP project results
              Comments=Bulk density values were measured on the fine earth fraction so values entered into apsim soil are adjusted down to account for stone content (assuming stones are inert from all soil process so their mass and volume is removed from model paramaters).  SAT, DUL, LL15 and Air dry have been adjusted down to account for stone content.  OC has not been adjusted so the model will get the correct carbon and N amounts using the adjusted BD.
              Analysis: Thickness=[180, 150, 400, 270, 500, -3300]; PH=[6, 6, 6, 6, 6, 6]; PHUnits=Water; BoronUnits=HotWater
              SoilWater: SummerDate=1-oct; SummerU=6; SummerCona=3; WinterDate=1-Apr; WinterU=2; WinterCona=3; DiffusConst=0; DiffusSlope=0; Salb=0.13; CN2Bare=77; CNRed=0; CNCov=0.8; max_pond=0; Thickness=[200, 200, 200, 200, 200, 200, 200, 200, 200]; SWCON=[0.5, 0.5, 0.5, 0.5, 0.5, 0.5, 0.5, 0.5, 0.5]; residueinterception=0
              SoilNitrogen: fom_type=[default, manure, mucuna, lablab, shemp, stable]; fract_carb=[0.2, 0.3, 0.54, 0.57, 0.45, 0]; fract_cell=[0.7, 0.3, 0.37, 0.37, 0.47, 0.1]; fract_lign=[0.1, 0.4, 0.09, 0.06, 0.08, 0.9]
              SoilOrganicMatter: RootCN=20; RootWt=2000; SoilCN=11; EnrACoeff=7.4; EnrBCoeff=0.2; OCUnits=Total
                Thickness  OC        FBiom      FInert
                180        3         0.03       0.5
                150        0.9       0.02       0.7
                400        0.316004  0.0116634  0.85
                270        0.207954  0.0102229  0.94496
                500        0.200366  0.0100221  0.982659
                500        0.2       0.01       0.93
              Sample: NO3Units=ppm; NH4Units=ppm; SWUnits=Volumetric; OCUnits=Total; PHUnits=Water
                Thickness  NO3   NH4   SW
                150        10    0.12  0.18
                150        0.28  0.12  0.18
                300        2.6   0     0.26
                300        2.87  0.19  0.26
                300        2.43  3.29  0.23
                300        1.94  0.42  0.28
                300        1     0.75  0.29
                Memo
                  Using the retest sample values.
              Water
                Thickness  BD   AirDry  LL15   DUL   SAT
                150        1    0.05    0.006  0.28  0.42
                150        1.1  0.1     0.1    0.28  0.42
                300        1.4  0.17    0.17   0.28  0.42
                300        1.3  0.17    0.17   0.28  0.42
                300        1.4  0.16    0.16   0.28  0.42
                300        1.4  0.16    0.16   0.28  0.42
                300        1.4  0.16    0.16   0.28  0.42
                SoilCrop WheatSoil: LL=[0.12, 0.1, 0.17, 0.17, 0.23, 0.23, 0.23]; KL=[0.06, 0.06, 0.04, 0.04, 0.03, 0.005, 0]; XF=[1, 0.4, 1, 1, 1, 1, 1]
              CERESSoilTemperature
            Plant Wheat: CropType=Wheat
            SoluteManager
            MicroClimate: a_interception=0; b_interception=1; c_interception=0; d_interception=0; soil_albedo=0.23; sun_angle=15; soil_heat_flux_fraction=0.4; night_interception_fraction=0.5; refheight=2; albedo=0.15; emissivity=0.96; RadIntTotal=0
            Irrigation
            Fertiliser
            SurfaceOrganicMatter: PoolName=wheat; type=wheat; mass=0; standing_fraction=0; cnr=80; CriticalResidueWeight=2000; OptimumDecompTemp=20; MaxCumulativeEOS=20; CNRatioDecompCoeff=0.277; CNRatioDecompThreshold=25; TotalLeachRain=25; MinRainToLeach=10; CriticalMinimumOrganicC=0.004; DefaultCPRatio=0; DefaultStandingFraction=0; StandingExtinctCoeff=0.5; FractionFaecesAdded=0.5
              Pools:
                {PoolName=wheat, ResidueType=wheat, Mass=0, CNRatio=80, StandingFraction=0}
              ResidueTypes ResidueTypesList: LoadFromResource=ResidueTypes
            Operations Irrig
            Operations Fert
            Operations Sow
              2015-09-10  [Wheat].Sow(population:200, cultivar:"Discovery", depth:80, rowSpacing:130);
            Manager ClimateControl
              StartDate = 2015-10-01
              EndDate = 2016-02-28
              script: same as in Validation.New Zealand.Lincoln9192.LincolnBase.paddock.ClimateControl
            Manager StateFactors
              Irr =
              Nit = 0
```csharp
using System;
using Models.Core;
using System.Collections.Generic;
using System.Text;
using Models.Soils;
using Models.PMF;
using Models;
using System.Xml.Serialization;
using APSIM.Shared.Utilities;

namespace Models
{
    [Serializable] 
    public class Script : Model
    {
        [Link] Clock Clock;
        [Link] Irrigation Irrigation;
        [Link] Soil ThisSoil;
        [Link] Zone MyZone;
        public string Irr { get; set; }
        public double Nit { get; set; }
        
          
        private void SetSoilLayers()
        {
        
            int i = 0;
            if ((Irr == "Nil") && (Nit == 0))
            {
                if (ThisSoil.Thickness.Length != 7)
                {
                    throw new Exception("Soil layer exception");
                }
                ThisSoil.DUL[0] = 0.31;
                ThisSoil.DUL[1] = 0.34;
                ThisSoil.DUL[2] = 0.32;
                ThisSoil.DUL[3] = 0.23;
                ThisSoil.DUL[4] = 0.29;
                ThisSoil.DUL[5] = 0.29;
                ThisSoil.DUL[6] = 0.29;
                
                double[] nSW = { 0.18, 0.18, 0.26, 0.23, 0.29, 0.29, 0.27 };
                ThisSoil.SoilWater.Reset();
                ThisSoil.SoilWater.SetWater_frac(nSW); 
            }   
            if ((Irr == "Nil") && (Nit == 50))
            {
                if (ThisSoil.Thickness.Length != 7)
                {
                    throw new Exception("Soil layer exception");
                }
                ThisSoil.DUL[0] = 0.30;
                ThisSoil.DUL[1] = 0.31;
                ThisSoil.DUL[2] = 0.29;
                ThisSoil.DUL[3] = 0.30;
                ThisSoil.DUL[4] = 0.31;
                ThisSoil.DUL[5] = 0.34;
                ThisSoil.DUL[6] = 0.30;
                
                double[] nSW = { 0.18, 0.18, 0.30, 0.25, 0.29, 0.34, 0.30 };
                ThisSoil.SoilWater.Reset();
                ThisSoil.SoilWater.SetWater_frac(nSW); 
            }   
            if ((Irr == "Nil") && (Nit == 250))
            {
                if (ThisSoil.Thickness.Length != 7)
                {
                    throw new Exception("Soil layer exception");
                }
                ThisSoil.DUL[0] = 0.28;
                ThisSoil.DUL[1] = 0.24;
                ThisSoil.DUL[2] = 0.30;
                ThisSoil.DUL[3] = 0.27;
                ThisSoil.DUL[4] = 0.28;
                ThisSoil.DUL[5] = 0.36;
                ThisSoil.DUL[6] = 0.27;
                
                double[] nSW = { 0.18, 0.18, 0.3, 0.27, 0.28, 0.35, 0.27 };
                ThisSoil.SoilWater.Reset();
                ThisSoil.SoilWater.SetWater_frac(nSW); 
            }   
            if ((Irr == "Full") && (Nit == 0))
            {
                if (ThisSoil.Thickness.Length != 7)
                {
                    throw new Exception("Soil layer exception");
                }
                ThisSoil.DUL[0] = 0.31;
                ThisSoil.DUL[1] = 0.34;
                ThisSoil.DUL[2] = 0.32;
                ThisSoil.DUL[3] = 0.23;
                ThisSoil.DUL[4] = 0.30;
                ThisSoil.DUL[5] = 0.33;
                ThisSoil.DUL[6] = 0.25;
                
                double[] nSW = { 0.18, 0.18, 0.26, 0.20, 0.30, 0.33, 0.25 };
                ThisSoil.SoilWater.Reset();
                ThisSoil.SoilWater.SetWater_frac(nSW); 
            }   
            if ((Irr == "Full") && (Nit == 50))
            {
                if (ThisSoil.Thickness.Length != 7)
                {
                    throw new Exception("Soil layer exception");
                }
                ThisSoil.DUL[0] = 0.31;
                ThisSoil.DUL[1] = 0.28;
                ThisSoil.DUL[2] = 0.30;
                ThisSoil.DUL[3] = 0.29;
                ThisSoil.DUL[4] = 0.31;
                ThisSoil.DUL[5] = 0.33;
                ThisSoil.DUL[6] = 0.30;

                double[] nSW = { 0.18, 0.18, 0.28, 0.27, 0.28, 0.33, 0.30 };
                
                ThisSoil.SoilWater.Reset();
                
                ThisSoil.SoilWater.SetWater_frac(nSW); 

            }
            if ((Irr == "Full") && (Nit == 250))
            {
                if (ThisSoil.Thickness.Length != 7)
                {
                    throw new Exception("Soil layer exception");
                }
                ThisSoil.DUL[0] = 0.26;
                ThisSoil.DUL[1] = 0.24;
                ThisSoil.DUL[2] = 0.26;
                ThisSoil.DUL[3] = 0.23;
                ThisSoil.DUL[4] = 0.27;
                ThisSoil.DUL[5] = 0.35;
                ThisSoil.DUL[6] = 0.22;
                
                double[] nSW = { 0.18, 0.18, 0.24, 0.23, 0.27, 0.35, 0.22 };
                ThisSoil.SoilWater.Reset();
                ThisSoil.SoilWater.SetWater_frac(nSW); 
            }
        }

        [EventSubscribe("Commencing")]
        private void OnSimulationCommencing(object sender, EventArgs e)
        {
            SetSoilLayers();
        }
        
        [EventSubscribe("DoManagement")]
        private void OnDoManagement(object sender, EventArgs e)
        {
            //Specify irrigations that were only applied to some of the N treatments
            if (Irr == "Full")
            {
                if (Nit == 250)
                {
                    if ((DateUtilities.CompareDates("10-Dec", Clock.Today) == 0))
                        Irrigation.Apply(40);
                    if ((DateUtilities.CompareDates("17-Dec", Clock.Today) == 0))
                        Irrigation.Apply(39.7);
                    if ((DateUtilities.CompareDates("14-Jan", Clock.Today) == 0))
                        Irrigation.Apply(30);
                    if ((DateUtilities.CompareDates("21-Jan", Clock.Today) == 0))
                        Irrigation.Apply(20.1);
                }
                if (Nit == 50)
                {
                    if ((DateUtilities.CompareDates("10-Dec", Clock.Today) == 0))
                        Irrigation.Apply(40);
                    if ((DateUtilities.CompareDates("14-Jan", Clock.Today) == 0))
                        Irrigation.Apply(30);
                }
            }
            
        }
    }
}
```
            Manager WheatExtraVariables
```csharp
using System;
using Models.Core;
using System.Collections.Generic;
using System.Text;
using Models.Soils;
using Models.PMF;
using Models;
using System.Xml.Serialization;
using APSIM.Shared.Utilities;

namespace Models
{
    [Serializable] 
    public class Script : Model
    {
        [Link] Clock Clock;
        [Link] Soils.Soil Soil;
        [Link] Models.SurfaceOM.SurfaceOrganicMatter SOM;
        [Link] Weather Met;
        [Link] Fertiliser Fert;
        [Link] Irrigation Irrig;
        [Link] Plant Wheat;
        [Link] Zone zone;
                    
        [XmlIgnore] public bool InitialDay { get; set; }
        
        [XmlIgnore] public double AccumPlantN { get; set; }
        [XmlIgnore] public double AccumMineralisation { get; set; }
        [XmlIgnore] public double AccumDenit { get; set; }
        [XmlIgnore] public double AccumFert { get; set; }
        [XmlIgnore] public double AccumLeach { get; set; }
        [XmlIgnore] public double AccumDetach { get; set; }
        [XmlIgnore] public double DeltaSoilOMN { get; set; }
        [XmlIgnore] public double DeltaSurfaceOMN { get; set; }
        [XmlIgnore] public double DeltaSoilMineralN { get; set; }
        [XmlIgnore] public double SoilNitrogenContent { get; set; }
        
        [XmlIgnore] public double AccumEO { get; set; }
        [XmlIgnore] public double AccumEP { get; set; }
        [XmlIgnore] public double AccumES { get; set; }
        [XmlIgnore] public double AccumDrainage { get; set; }
        [XmlIgnore] public double AccumRunoff { get; set; }
        [XmlIgnore] public double AccumOutflowLat { get; set; }
        [XmlIgnore] public double AccumIrrigation { get; set; }
        [XmlIgnore] public double AccumRainfall { get; set; }
        [XmlIgnore] public double SoilWaterDeficit { get; set; }
    
        [XmlIgnore] public double  InitialSoilOMN { get; set; }
        [XmlIgnore] public double  InitialSurfaceOMN { get; set; }
        [XmlIgnore] public double  InitialMineralN { get; set; }
        
        [XmlIgnore] public double SWC { get; set; }
        [XmlIgnore] public double DUL { get; set; }
        [XmlIgnore] public double OutFlowLat { get; set; }

        [XmlIgnore] public double FomN { get; set; }
        [XmlIgnore] public double BiomN { get; set; }
        [XmlIgnore] public double HumN { get; set; }
        [XmlIgnore] public double OrganicN { get; set; }
        [XmlIgnore] public double NO3N { get; set; }
        [XmlIgnore] public double NH4N { get; set; }
        [XmlIgnore] public double UreaN { get; set; }
        [XmlIgnore] public double MineralN { get; set; }
        [XmlIgnore] public double DltNMinRes { get; set; }
        [XmlIgnore] public double DltNMinTot { get; set; }
        
        [XmlIgnore] public double LeafExpandedPosition { get; set; }
        [XmlIgnore] public double LeafAppearedPosition { get; set; }
        [XmlIgnore] public double ExpandedLeafNoYesterday { get; set; }
        [XmlIgnore] public double AppearedLeafNoYesterday { get; set; }
        [XmlIgnore] public double MostRecentlyExpandedLeafSize { get; set; }
        [XmlIgnore] public double MostRecentlyAppearedLeafMaxSize { get; set; }
        
        [EventSubscribe("Commencing")]
        private void OnSimulationCommencing(object sender, EventArgs e)
        {
            InitialDay = true;
            LeafExpandedPosition = 0;
            LeafAppearedPosition = 0;
            ExpandedLeafNoYesterday = 0;
            AppearedLeafNoYesterday = 0;
            MostRecentlyExpandedLeafSize = 0;
            MostRecentlyAppearedLeafMaxSize = 0;
        }
        
        [EventSubscribe("DoManagement")]
        private void OnDoManagement(object sender, EventArgs e)
        {
            //!!!!!! Nitrogen balance components !!!!!!
            //!!!!!!^^^^^^^^^^^^^^^^^^^^^^^^^^^^^!!!!!!
            FomN = MathUtilities.Sum(Soil.SoilNitrogen.FOMN);
            HumN = MathUtilities.Sum(Soil.SoilNitrogen.HumicN);
            BiomN = MathUtilities.Sum(Soil.SoilNitrogen.MicrobialN);
            OrganicN = FomN + HumN + BiomN;
            NO3N = MathUtilities.Sum(Soil.NO3N);
            NH4N = MathUtilities.Sum(Soil.NH4N);
            UreaN = MathUtilities.Sum(Soil.SoilNitrogen.urea);
            MineralN = NO3N + NH4N + UreaN; 
            DltNMinRes = MathUtilities.Sum(Soil.SoilNitrogen.dlt_n_min_res);
            DltNMinTot = MathUtilities.Sum(Soil.SoilNitrogen.MineralisedN);
            int layers = Soil.Thickness.Length;
            if (InitialDay == true)
            {
                InitialSurfaceOMN = SOM.N;
                InitialSoilOMN = OrganicN;
                InitialMineralN = MineralN;
                InitialDay = false;
            }
            AccumFert += Fert.NitrogenApplied;
            DeltaSurfaceOMN = SOM.N - InitialSurfaceOMN;
            AccumLeach = AccumLeach - Soil.SoilWater.LeachNH4 - Soil.SoilWater.LeachNO3 - Soil.SoilWater.LeachUrea; //Fails
            AccumMineralisation += MathUtilities.Sum(Soil.SoilNitrogen.MineralisedN);
            AccumDenit -= MathUtilities.Sum(Soil.SoilNitrogen.Denitrification);
            AccumPlantN -= (double)zone.Get("Wheat.Root.NUptake");
            DeltaSoilOMN = OrganicN - InitialSoilOMN;
            DeltaSoilMineralN = MineralN - InitialMineralN;
            SoilNitrogenContent = MineralN;
            
            //!!!!!! Water balance components !!!!!!
            //!!!!!!^^^^^^^^^^^^^^^^^^^^^^^^^^!!!!!!

            AccumIrrigation += Irrig.IrrigationApplied;
            AccumRainfall += Met.Rain;
            //AccumEP -= (double)zone.Get("[Wheat].Leaf.Transpiration");
            AccumEP -= (double)zone.Get("Wheat.Root.WaterUptake");
            SoilWaterDeficit = (SWC - DUL);
            double OutFlowLat = MathUtilities.Sum(Soil.SoilWater.outflow_lat);
            AccumOutflowLat -= OutFlowLat;
            
            //Leaf number variable
            ExpandedLeafNoYesterday = (double)zone.Get("Wheat.Leaf.ExpandedCohortNo");
            AppearedLeafNoYesterday = (double)zone.Get("Wheat.Leaf.AppearedCohortNo");
        }
        
        [EventSubscribe("DoManagementCalculations")]
        private void OnDoManagementCalculations(object sender, EventArgs e)
        {
            FomN = MathUtilities.Sum(Soil.SoilNitrogen.FOMN);
            HumN = MathUtilities.Sum(Soil.SoilNitrogen.HumicN);
            BiomN = MathUtilities.Sum(Soil.SoilNitrogen.MicrobialN);
            
            
            AccumEO -= Soil.SoilWater.Eo;
            AccumES -= Soil.SoilWater.Es; 
            AccumDrainage -= Soil.SoilWater.Drainage;
            AccumRunoff -= Soil.SoilWater.Runoff;
            SWC = MathUtilities.Sum(Soil.SoilWater.SWmm);
            DUL = MathUtilities.Sum(Soil.DULmm);
            
            if ((double)zone.Get("Wheat.Leaf.ExpandedCohortNo") > ExpandedLeafNoYesterday)
            {
                LeafExpandedPosition = (double)zone.Get("Wheat.Leaf.ExpandedCohortNo");
                MostRecentlyExpandedLeafSize = (double)zone.Get("Wheat.Leaf.CohortSize[" + (int)LeafExpandedPosition + "]");
            }
            //else
            //    LeafExpandedPosition = 0;
            
            if ((double)zone.Get("Wheat.Leaf.AppearedCohortNo") > AppearedLeafNoYesterday)
            {
                LeafAppearedPosition = (double)zone.Get("Wheat.Leaf.AppearedCohortNo");
                MostRecentlyAppearedLeafMaxSize = (double)zone.Get("Wheat.Leaf.CohortParameters.MaxArea.Value()");
            }
            //else
            //LeafAppearedPosition = 0;
            
        }
    }
}
```
            Report SupReport: EventNames=[Clock].DoReport
              VariableNames:
                [Clock].Today
                [Soil].SoilWater.SW
                [Soil].LL15
                [Soil].DUL
                [Soil].SAT
                [Soil].SoilWater.Eo
                [Soil].SoilWater.Es
                [Soil].SoilWater.Drainage
                [Soil].SoilWater.Runoff
                [Soil].SoilWater.pond
                sum([Soil].SoilWater.SWmm) as ProfileWater
                [Soil].NO3N
                [Soil].SoilWater.SW
                [Soil].SoilWater.SWmm
                sum([Soil].NO3N) as ProfileNitrate
                sum ([Soil].SoilNitrogen.MineralisedN ) as MineralisedN
                [WheatExtraVariables].Script.AccumMineralisation
                [WheatExtraVariables].Script.AccumFert
                [MicroClimate].net_radn
                [MicroClimate].peta
                [MicroClimate].petr
                [Wheat].Grain.Live.Wt
                [Wheat].Grain.Live.Wt*10 as Grain_DM
                [Wheat].Stem.Live.Wt
                [Wheat].Stem.Live.Wt*10 as Stem_DM
                [Wheat].Ear.Wt
                [Wheat].Leaf.Live.Wt
                [Wheat].Leaf.Live.Wt*10 as Leaf_DM
                [Wheat].Root.Live.Wt
                [Wheat].Husk.Live.Wt
                [Wheat].Spike.Live.Wt
                [Wheat].Spike.Live.Wt*10 as Spike_DM
                [Wheat].Tastle.Live.Wt
                [Wheat].EarLive.N
                [Wheat].Grain.Live.N
                [Wheat].Stem.Live.N
                [Wheat].Leaf.Live.N
                [Wheat].Root.Live.N
                [Wheat].EarLive.N
                [Wheat].Grain.Live.N*10 as Grain_Nup
                [Wheat].Stem.Live.N*10 as Stem_Nup
                [Wheat].Leaf.Live.N*10 as Leaf_Nup
                [Wheat].Root.Live.N*10 as Root_N_kg
                [Wheat].Grain.Size
                [Wheat].Root.WaterSupply
                [Wheat].Root.WaterUptake
                [Wheat].Leaf.Transpiration
                [Wheat].Leaf.WaterDemand
                [Wheat].Root.Depth
                [Wheat].Leaf.CoverTotal
                [Wheat].Leaf.CoverDead
                [Wheat].Leaf.LAI
                [Wheat].Leaf.Height
                [Wheat].Leaf.CohortParameters.MaxArea.Value()
                [Wheat].Leaf.Fw
                [Wheat].Leaf.Photosynthesis.FVPD.Value()
                [Wheat].Leaf.Photosynthesis.FT.Value()
                [Wheat].Leaf.Fn
                [Wheat].Phenology.CurrentPhaseName
                [Wheat].Phenology.CurrentStageName
                [Wheat].Phenology.Stage
                [Wheat].AboveGroundLive.N
                [Wheat].AboveGroundLive.Wt
                [Wheat].Total.N
                [Wheat].Total.Wt
                [Wheat].Total.N*10 as TotalN_Kg
                [Wheat].Arbitrator.N.TotalPlantDemand
                [Wheat].Phenology.Stage
                [Wheat].Leaf.ExpandedCohortNo
                [Wheat].Leaf.AppearedCohortNo
                [Wheat].Leaf.DeadCohortNo
                [Wheat].Leaf.InitialisedCohortNo
                [Wheat].Structure.MainStemFinalNodeNo
                [Wheat].Structure.LeafTipsAppeared
                [Wheat].Structure.MainStemPrimordiaNo
                [Wheat].Leaf.CohortArea[1:30]
                [Wheat].Leaf.CohortSLA[1:30]
                [Wheat].Leaf.CohortParameters.SpecificLeafAreaMax.Value()
                [Wheat].Leaf.CohortParameters.SpecificLeafAreaMin.Value()
                [Wheat].Arbitrator.N.TotalPlantDemand
                [Wheat].Arbitrator.N.TotalPlantSupply
                [Wheat].Arbitrator.DM.TotalFixationSupply
                [Wheat].Arbitrator.DM.TotalPlantDemand
                [Wheat].Arbitrator.DM.Allocated
                [Wheat].Arbitrator.DM.SinkLimitation
                [Wheat].Arbitrator.DM.NutrientLimitation
                [Wheat].Leaf.CohortParameters.GrowthDuration.Value()
                [Wheat].Leaf.CohortParameters..Value()
                [Wheat].Leaf.CohortParameters.SenescenceDuration.Value()
                [Wheat].Structure.Phyllochron.Value()
                [Wheat].Structure.Height
                [Wheat].Stem.DMDemandFunction.PotentialDMAccumulation.Value()
                [Wheat].Stem.DMDemandFunction.HightLimitedDMAccumulation.Value()
                [Wheat].Structure.MainStemPrimordiaNo
                [Wheat].Grain.NumberFunction.Value()
                [Wheat].Leaf.DeadCohortNo
                [Phenology].ThermalTime.Value()
                [Wheat].Leaf.SenescingCohortNo
                [Wheat].Stem.MaximumNConc.Value()
                [Wheat].Stem.MinimumNConc.Value()
                [Wheat].Stem.Live.NConc
                [Wheat].Leaf.Live.NConc
                [Wheat].Grain.Live.NConc
                [Wheat].Husk.Live.NConc
                [Wheat].Spike.Live.NConc
                [Wheat].Leaf.Dead.NConc
                [Wheat].Leaf.Photosynthesis.RueAct
                [Wheat].Stem.Live.StructuralWt
                [Wheat].WaterSupplyDemandRatio
                [Wheat].Leaf.Fw
                [Wheat].Leaf.Fn
                [Root].WaterTensionFactor
                [Wheat].Arbitrator.FN
                [StateFactors].Script.Nit
                [StateFactors].Script.Irr
                [Wheat].Root.LengthDensity
            Report DailyReport
            Report HarvestReport
            Manager HarvestOnly
```csharp
using System;
using Models.Core;
using System.Collections.Generic;
using System.Text;
using Models.Soils;
using Models.PMF;
using Models;
using System.Xml.Serialization;
using APSIM.Shared.Utilities;

namespace Models
{
    [Serializable] 
    public class Script : Model
    {
        [Link] Plant Wheat;

        [XmlIgnore] private RemovalFractions Remove { get; set; }
        [XmlIgnore] private bool Harvested {get; set;}
                
        [EventSubscribe("Commencing")]
        private void OnSimulationCommencing(object sender, EventArgs e)
        {
        Remove = new RemovalFractions();
        Harvested = false;
        }

        [EventSubscribe("DoManagement")]
        private void OnDoManagement(object sender, EventArgs e)
        {
            if ((Wheat.Phenology.CurrentPhaseName == "Ripening") & (Harvested == false))
            {
                Remove.SetFractionToRemove("Leaf", 0.0,"Live");
                Remove.SetFractionToResidue("Leaf", 0.0,"Live");
                Remove.SetFractionToRemove("Leaf", 0.0,"Dead");
                Remove.SetFractionToResidue("Leaf", 0.0,"Dead");
                Remove.SetFractionToRemove("Grain", 0.0);
                Remove.SetFractionToResidue("Grain", 0.0);
                Remove.SetFractionToRemove("Stem", 0.0);
                Remove.SetFractionToResidue("Stem", 0.0);
                Remove.SetFractionToRemove("Spike", 0.0);
                Remove.SetFractionToResidue("Spike", 0.0);
                Remove.SetFractionToRemove("Root", 0.0);
                Remove.SetFractionToResidue("Root", 0.0);
                Wheat.Harvest(Remove);
                Harvested = true;
            }
        }
    }
}
```
      Folder CPTPhenology
        Memo
          A range of soon to be released cultivars have their phenology assesed each year at Plant and Food Research in Lincoln, New Zealand.  Each cultivar is planted on 4 sowing dates representing Autumn, Winter, Early Spring and Late Spring sowings. (approx April, June, Aug, Nov).  Each cultivar is observed for 3 years but a number of standards are included each year or for more than 3 years bacause of the value of the data they provided.
        Experiment CPTCultOtane
          Factors
            Factor Sow
              Specifications=[Clock].StartDate = 2000-03-03,2000-05-15,2001-04-09,2001-06-15,2001-08-09,2002-05-15,2002-09-09,2003-05-21,2003-09-02,2004-05-28,2004-09-06,2005-04-04,2005-05-27,2005-09-05,2005-12-05,2006-05-10,2006-12-14,2007-04-24,2007-06-28,2007-09-13,2007-11-29,2008-04-11,2008-06-06,2008-09-11,2008-12-05,2009-03-20,2009-06-05,2009-08-24,2009-12-07,2010-03-30,2010-07-06,2010-10-04,2010-11-30,2011-03-30,2011-05-11,2011-09-09,2011-12-09,2012-04-05,2012-06-28,2012-09-25
          Simulation LincolnCPTOtane
            Clock: StartDate=1991-06-08; EndDate=2013-07-01
            Summary summaryfile
            Weather: FileName=lincoln.met
            Zone paddock: Area=1; Slope=0
              Irrigation
              Soil: SoilType=LincolnSoil; LocalName=Lincoln; Site=Lincoln; NearestTown=Unknown; Region=NZ; NaturalVegetation=Unknown; Latitude=0; Longitude=0
                Water
                  Thickness  BD   AirDry  LL15  DUL   SAT
                  100        1.3  0.05    0.08  0.31  0.44
                  200        1.3  0.05    0.07  0.3   0.44
                  200        1.3  0.05    0.07  0.28  0.44
                  200        1.3  0.05    0.09  0.31  0.44
                  200        1.3  0.05    0.11  0.3   0.44
                  200        1.3  0.05    0.16  0.28  0.44
                  200        1.3  0.05    0.15  0.3   0.44
                  200        1.3  0.05    0.12  0.34  0.44
                  SoilCrop WheatSoil: LL=[0.08, 0.07, 0.07, 0.09, 0.11, 0.16, 0.15, 0.12]; KL=[0.06, 0.06, 0.06, 0.04, 0.03, 0.02, 0.02, 0.02]; XF=[1, 1, 1, 1, 0.6, 0.4, 0.4, 0.4]
                SoilWater: same as Validation.New Zealand.Lincoln1992.SDtrialBase.paddock.Soil.SoilWater
                SoilNitrogen: fom_type=[default, manure, mucuna, lablab, shemp, stable]; fract_carb=[0.2, 0.3, 0.54, 0.57, 0.45, 0]; fract_cell=[0.7, 0.3, 0.37, 0.37, 0.47, 0.1]; fract_lign=[0.1, 0.4, 0.09, 0.06, 0.08, 0.9]
                SoilOrganicMatter: same as Validation.New Zealand.Lincoln9192.LincolnBase.paddock.Soil.SoilOrganicMatter
                Analysis: Thickness=[100, 200, 200, 200, 200, 200, 200, 200]; PH=[8.5, 8.5, 8.6, 8.6, 8.6, 8.6, 8.6, 8.6]; PHUnits=Water; BoronUnits=HotWater
                Sample Initial nitrogen: NO3Units=ppm; NH4Units=ppm; SWUnits=Volumetric; OCUnits=Total; PHUnits=Water
                  Thickness  NO3   NH4
                  100        24.9  1.3
                  200        16    1
                  200        9.8   1
                  200        9.8   0.8
                  200        2.1   0.8
                  200        2.1   0.5
                  200        2.1   0.5
                  200        2.1   0.5
                Sample Initial water: Thickness=[100, 200, 200, 200, 200, 200, 200, 200]; SW=[0.27, 0.3, 0.28, 0.25, 0.24, 0.27, 0.27, 0.21]; NO3Units=ppm; NH4Units=ppm; SWUnits=Volumetric; OCUnits=Total; PHUnits=Water
                CERESSoilTemperature
              SurfaceOrganicMatter Surface Organic Matter: same as Validation.New Zealand.Lincoln9192.LincolnBase.paddock.Surface Organic Matter
              Fertiliser
              MicroClimate: a_interception=0; b_interception=1; c_interception=0; d_interception=0; soil_albedo=0.3; sun_angle=15; soil_heat_flux_fraction=0.4; night_interception_fraction=0.5; refheight=2; albedo=0.293662; emissivity=0.96; RadIntTotal=0
              Plant Wheat: CropType=Wheat
              Report HarvestReport
              Manager SowAndHarvest
                Cultivar = Otane
```csharp
using System;
using Models.Core;
using Models.PMF;
using APSIM.Shared.Utilities;
using System.Xml.Serialization;
        
namespace Models
{
    [Serializable] 
    [System.Xml.Serialization.XmlInclude(typeof(Model))]
    public class Script : Model
    {
        [Link] Plant Wheat;
        [Link] Clock Clock;
        [Link] Simulation sim;
        [Link] Summary Summary;
        
        [Description("Cultivar")]
        public string Cultivar { get; set; }
        
        [XmlIgnore] public bool Sown { get; set; }
        [XmlIgnore] public bool Harvested { get; set; }
        [XmlIgnore] public bool EndSet { get; set; }
        
        [EventSubscribe("Commencing")]
        private void OnSimulationCommencing(object sender, EventArgs e)
        {
            Sown = false;
            Harvested = false;
            EndSet = false;
        }
        
        [EventSubscribe("DoManagement")]
        private void OnDoManagement(object sender, EventArgs e)
        {
            if (Sown == false)
            {
                Wheat.Sow(population: 200, cultivar: Cultivar, depth: 15, rowSpacing: 150, budNumber: 1);
                Sown = true;
            }
            
            if (Wheat.Phenology.CurrentPhaseName == "ReadyForHarvesting")
            {
                Wheat.Harvest();
                Wheat.EndCrop();
                Harvested = true;
                Summary.WriteMessage(this, "Flowering reached so setting end date to stop simulation");
            }
            
            if ((Harvested == true) && (EndSet == false))
            {
                sim.Set("Clock.EndDate", Clock.Today.AddDays(1));
                EndSet = true;
            }
        }
    }
}
```
              Report DailyReport
              SoluteManager
            SoilArbitrator Soil Arbitrator
        Experiment CPTCultAmarok
          Factors
            Factor Sow
              Specifications=[Clock].StartDate = 2001-04-09,2001-06-15,2002-03-07,2002-05-15,2003-03-14,2003-05-21,2004-03-23,2004-05-28,2005-04-04,2005-05-27,2005-12-05,2006-03-13,2006-05-10,2007-04-24,2007-06-28,2008-04-11,2008-06-06,2009-03-20,2009-06-05,2009-08-24,2010-03-30,2010-07-06,2011-03-30,2011-05-11,2012-04-05,2012-06-28
          Simulation LincolnCPTAmarok
            Clock: StartDate=1991-06-08; EndDate=2013-07-01
            Summary summaryfile
            Weather: FileName=lincoln.met
            Zone paddock: Area=1; Slope=0
              Irrigation
              Soil: same as Validation.New Zealand.CPTPhenology.CPTCultOtane.LincolnCPTOtane.paddock.Soil
              SurfaceOrganicMatter Surface Organic Matter: same as Validation.New Zealand.Lincoln9192.LincolnBase.paddock.Surface Organic Matter
              Fertiliser
              MicroClimate: a_interception=0; b_interception=1; c_interception=0; d_interception=0; soil_albedo=0.3; sun_angle=15; soil_heat_flux_fraction=0.4; night_interception_fraction=0.5; refheight=2; albedo=0.293662; emissivity=0.96; RadIntTotal=0
              Plant Wheat: CropType=Wheat
              Report HarvestReport
              Manager SowAndHarvest
                Cultivar = Amarok
                script: same as in Validation.New Zealand.CPTPhenology.CPTCultOtane.LincolnCPTOtane.paddock.SowAndHarvest
              SoluteManager
            SoilArbitrator Soil Arbitrator
        Experiment CPTCultClaire
          Factors
            Factor Sow
              Specifications=[Clock].StartDate = 2000-03-03,2000-05-15,2001-04-09,2001-06-15,2001-08-09,2002-03-07,2002-05-15,2002-09-09,2003-03-14,2003-05-21,2003-09-02,2004-03-23,2004-05-28,2004-09-06,2005-04-04,2005-05-27,2005-09-05,2005-12-05,2006-03-13,2006-05-10,2006-12-14,2007-04-24,2007-06-28,2007-09-13,2007-11-29,2008-04-11,2008-06-06,2008-09-11,2008-12-05,2009-03-20,2009-06-05,2009-08-24,2009-12-07,2010-03-30,2010-07-06,2010-10-04,2010-11-30,2011-03-30,2011-05-11,2011-09-09,2011-12-09,2012-04-05,2012-06-28
          Simulation LincolnCPTClaire
            Clock: StartDate=1991-06-08; EndDate=2013-07-01
            Summary summaryfile
            Weather: FileName=lincoln.met
            Zone paddock: Area=1; Slope=0
              Irrigation
              Soil: same as Validation.New Zealand.CPTPhenology.CPTCultOtane.LincolnCPTOtane.paddock.Soil
              SurfaceOrganicMatter Surface Organic Matter: same as Validation.New Zealand.Lincoln9192.LincolnBase.paddock.Surface Organic Matter
              Fertiliser
              MicroClimate: a_interception=0; b_interception=1; c_interception=0; d_interception=0; soil_albedo=0.3; sun_angle=15; soil_heat_flux_fraction=0.4; night_interception_fraction=0.5; refheight=2; albedo=0.293662; emissivity=0.96; RadIntTotal=0
              Plant Wheat: CropType=Wheat
              Report HarvestReport
              Manager SowAndHarvest
                Cultivar = Claire
                script: same as in Validation.New Zealand.CPTPhenology.CPTCultOtane.LincolnCPTOtane.paddock.SowAndHarvest
              Report DailyReport
              SoluteManager
            SoilArbitrator Soil Arbitrator
        Experiment CPTCultWakanui
          Factors
            Factor Sow
              Specifications=[Clock].StartDate = 2005-04-04,2005-05-27,2006-03-13,2006-05-10,2008-04-11,2008-06-06
          Simulation LincolnCPTWakanui
            Clock: StartDate=1991-06-08; EndDate=2013-07-01
            Summary summaryfile
            Weather: FileName=lincoln.met
            Zone paddock: Area=1; Slope=0
              Irrigation
              Soil: same as Validation.New Zealand.CPTPhenology.CPTCultOtane.LincolnCPTOtane.paddock.Soil
              SurfaceOrganicMatter Surface Organic Matter: same as Validation.New Zealand.Lincoln9192.LincolnBase.paddock.Surface Organic Matter
              Fertiliser
              MicroClimate: a_interception=0; b_interception=1; c_interception=0; d_interception=0; soil_albedo=0.3; sun_angle=15; soil_heat_flux_fraction=0.4; night_interception_fraction=0.5; refheight=2; albedo=0.293662; emissivity=0.96; RadIntTotal=0
              Plant Wheat: CropType=Wheat
              Report HarvestReport
              Manager SowAndHarvest
                Cultivar = Wakanui
                script: same as in Validation.New Zealand.CPTPhenology.CPTCultOtane.LincolnCPTOtane.paddock.SowAndHarvest
              SoluteManager
            SoilArbitrator Soil Arbitrator
        Experiment CPTCultBattenSpring
          Factors
            Factor Sow
              Specifications=[Clock].StartDate = 2009-03-20,2009-06-05,2009-08-24,2010-03-30,2010-07-06,2010-10-04,2010-11-30,2011-03-30,2011-05-11,2011-09-09,2012-04-05,2012-06-28,2012-09-25
          Simulation LincolnCPTBattenSpring
            Clock: StartDate=1991-06-08; EndDate=2013-07-01
            Summary summaryfile
            Weather: FileName=lincoln.met
            Zone paddock: Area=1; Slope=0
              Irrigation
              Soil: same as Validation.New Zealand.CPTPhenology.CPTCultOtane.LincolnCPTOtane.paddock.Soil
              SurfaceOrganicMatter Surface Organic Matter: same as Validation.New Zealand.Lincoln9192.LincolnBase.paddock.Surface Organic Matter
              Fertiliser
              MicroClimate: a_interception=0; b_interception=1; c_interception=0; d_interception=0; soil_albedo=0.3; sun_angle=15; soil_heat_flux_fraction=0.4; night_interception_fraction=0.5; refheight=2; albedo=0.293662; emissivity=0.96; RadIntTotal=0
              Plant Wheat: CropType=Wheat
              Report HarvestReport
              Manager SowAndHarvest
                Cultivar = BattenSpring
                script: same as in Validation.New Zealand.CPTPhenology.CPTCultOtane.LincolnCPTOtane.paddock.SowAndHarvest
              SoluteManager
            SoilArbitrator Soil Arbitrator
        Experiment CPTCultBattenWinter
          Factors
            Factor Sow
              Specifications=[Clock].StartDate = 2009-03-20,2009-06-05,2009-08-24,2010-03-30,2010-07-06,2010-11-30,2011-03-30,2011-05-11,2011-09-09,2012-04-05,2012-06-28,2012-09-25
          Simulation LincolnCPTBattenWinter
            Clock: StartDate=1991-06-08; EndDate=2013-07-01
            Summary summaryfile
            Weather: FileName=lincoln.met
            Zone paddock: Area=1; Slope=0
              Irrigation
              Soil: same as Validation.New Zealand.CPTPhenology.CPTCultOtane.LincolnCPTOtane.paddock.Soil
              SurfaceOrganicMatter Surface Organic Matter: same as Validation.New Zealand.Lincoln9192.LincolnBase.paddock.Surface Organic Matter
              Fertiliser
              MicroClimate: a_interception=0; b_interception=1; c_interception=0; d_interception=0; soil_albedo=0.3; sun_angle=15; soil_heat_flux_fraction=0.4; night_interception_fraction=0.5; refheight=2; albedo=0.293662; emissivity=0.96; RadIntTotal=0
              Plant Wheat: CropType=Wheat
              Report HarvestReport
              Manager SowAndHarvest
                Cultivar = BattenWinter
                script: same as in Validation.New Zealand.CPTPhenology.CPTCultOtane.LincolnCPTOtane.paddock.SowAndHarvest
              SoluteManager
            SoilArbitrator Soil Arbitrator
        Experiment CPTCultYitpi
          Factors
            Factor Sow
              Specifications=[Clock].StartDate = 2009-03-20,2009-06-05,2009-08-24,2010-03-30,2010-07-06,2010-10-04,2010-11-30,2011-03-30,2011-05-11,2011-09-09,2012-04-05,2012-06-28,2012-09-25
          Simulation LincolnCPTYitpi
            Clock: StartDate=1991-06-08; EndDate=2013-07-01
            Summary summaryfile
            Weather: FileName=lincoln.met
            Zone paddock: Area=1; Slope=0
              Irrigation
              Soil: same as Validation.New Zealand.CPTPhenology.CPTCultOtane.LincolnCPTOtane.paddock.Soil
              SurfaceOrganicMatter Surface Organic Matter: same as Validation.New Zealand.Lincoln9192.LincolnBase.paddock.Surface Organic Matter
              Fertiliser
              MicroClimate: a_interception=0; b_interception=1; c_interception=0; d_interception=0; soil_albedo=0.3; sun_angle=15; soil_heat_flux_fraction=0.4; night_interception_fraction=0.5; refheight=2; albedo=0.293662; emissivity=0.96; RadIntTotal=0
              Plant Wheat: CropType=Wheat
              Report HarvestReport
              Manager SowAndHarvest
                Cultivar = Yitpi
                script: same as in Validation.New Zealand.CPTPhenology.CPTCultOtane.LincolnCPTOtane.paddock.SowAndHarvest
              SoluteManager
            SoilArbitrator Soil Arbitrator
        Experiment CPTCultSunco
          Factors
            Factor Sow
              Specifications=[Clock].StartDate = 2009-03-20,2009-06-05,2009-08-24,2010-03-30,2010-07-06,2010-10-04,2010-11-30,2011-03-30,2011-05-11,2011-09-09,2012-04-05,2012-06-28,2012-09-25
          Simulation LincolnCPTSunco
            Clock: StartDate=1991-06-08; EndDate=2013-07-01
            Summary summaryfile
            Weather: FileName=lincoln.met
            Zone paddock: Area=1; Slope=0
              Irrigation
              Soil: same as Validation.New Zealand.CPTPhenology.CPTCultOtane.LincolnCPTOtane.paddock.Soil
              SurfaceOrganicMatter Surface Organic Matter: same as Validation.New Zealand.Lincoln9192.LincolnBase.paddock.Surface Organic Matter
              Fertiliser
              MicroClimate: a_interception=0; b_interception=1; c_interception=0; d_interception=0; soil_albedo=0.3; sun_angle=15; soil_heat_flux_fraction=0.4; night_interception_fraction=0.5; refheight=2; albedo=0.293662; emissivity=0.96; RadIntTotal=0
              Plant Wheat: CropType=Wheat
              Report HarvestReport
              Manager SowAndHarvest
                Cultivar = Sunco
                script: same as in Validation.New Zealand.CPTPhenology.CPTCultOtane.LincolnCPTOtane.paddock.SowAndHarvest
              SoluteManager
            SoilArbitrator Soil Arbitrator
        Experiment CPTCultMcCubbin
          Factors
            Factor Sow
              Specifications=[Clock].StartDate = 2009-03-20,2009-06-05,2009-08-24,2010-03-30,2010-07-06,2010-10-04,2010-11-30,2011-03-30,2011-05-11,2011-09-09,2012-04-05,2012-06-28,2012-09-25
          Simulation LincolnCPTMcCubbin
            Clock: StartDate=1991-06-08; EndDate=2013-07-01
            Summary summaryfile
            Weather: FileName=lincoln.met
            Zone paddock: Area=1; Slope=0
              Irrigation
              Soil: same as Validation.New Zealand.CPTPhenology.CPTCultOtane.LincolnCPTOtane.paddock.Soil
              SurfaceOrganicMatter Surface Organic Matter: same as Validation.New Zealand.Lincoln9192.LincolnBase.paddock.Surface Organic Matter
              Fertiliser
              MicroClimate: a_interception=0; b_interception=1; c_interception=0; d_interception=0; soil_albedo=0.3; sun_angle=15; soil_heat_flux_fraction=0.4; night_interception_fraction=0.5; refheight=2; albedo=0.293662; emissivity=0.96; RadIntTotal=0
              Plant Wheat: CropType=Wheat
              Report HarvestReport
              Manager SowAndHarvest
                Cultivar = McCubbin
                script: same as in Validation.New Zealand.CPTPhenology.CPTCultOtane.LincolnCPTOtane.paddock.SowAndHarvest
              SoluteManager
            SoilArbitrator Soil Arbitrator
        Experiment CPTCultMacKellar
          Factors
            Factor Sow
              Specifications=[Clock].StartDate = 2009-03-20,2009-06-05,2009-08-24,2010-03-30,2010-07-06,2010-10-04,2010-11-30,2011-03-30,2011-05-11,2011-09-09,2012-04-05,2012-06-28,2012-09-25
          Simulation LincolnCPTMacKellar
            Clock: StartDate=1991-06-08; EndDate=2013-07-01
            Summary summaryfile
            Weather: FileName=lincoln.met
            Zone paddock: Area=1; Slope=0
              Irrigation
              Soil: same as Validation.New Zealand.CPTPhenology.CPTCultOtane.LincolnCPTOtane.paddock.Soil
              SurfaceOrganicMatter Surface Organic Matter: same as Validation.New Zealand.Lincoln9192.LincolnBase.paddock.Surface Organic Matter
              Fertiliser
              MicroClimate: a_interception=0; b_interception=1; c_interception=0; d_interception=0; soil_albedo=0.3; sun_angle=15; soil_heat_flux_fraction=0.4; night_interception_fraction=0.5; refheight=2; albedo=0.293662; emissivity=0.96; RadIntTotal=0
              Plant Wheat: CropType=Wheat
              Report HarvestReport
              Manager SowAndHarvest
                Cultivar = MacKellar
                script: same as in Validation.New Zealand.CPTPhenology.CPTCultOtane.LincolnCPTOtane.paddock.SowAndHarvest
              SoluteManager
            SoilArbitrator Soil Arbitrator
        Experiment CPTCultJanz
          Factors
            Factor Sow
              Specifications=[Clock].StartDate = 2009-03-20,2009-06-05,2009-08-24,2010-03-30,2010-07-06,2010-10-04,2010-11-30,2011-03-30,2011-05-11,2011-09-09,2012-04-05,2012-06-28,2012-09-25
          Simulation LincolnCPTJanz
            Clock: StartDate=1991-06-08; EndDate=2013-07-01
            Summary summaryfile
            Weather: FileName=lincoln.met
            Zone paddock: Area=1; Slope=0
              Irrigation
              Soil: same as Validation.New Zealand.CPTPhenology.CPTCultOtane.LincolnCPTOtane.paddock.Soil
              SurfaceOrganicMatter Surface Organic Matter: same as Validation.New Zealand.Lincoln9192.LincolnBase.paddock.Surface Organic Matter
              Fertiliser
              MicroClimate: a_interception=0; b_interception=1; c_interception=0; d_interception=0; soil_albedo=0.3; sun_angle=15; soil_heat_flux_fraction=0.4; night_interception_fraction=0.5; refheight=2; albedo=0.293662; emissivity=0.96; RadIntTotal=0
              Plant Wheat: CropType=Wheat
              Report HarvestReport
              Manager SowAndHarvest
                Cultivar = Janz
                script: same as in Validation.New Zealand.CPTPhenology.CPTCultOtane.LincolnCPTOtane.paddock.SowAndHarvest
              SoluteManager
            SoilArbitrator Soil Arbitrator
        Experiment CPTCultLang
          Factors
            Factor Sow
              Specifications=[Clock].StartDate = 2009-03-20,2009-06-05,2009-08-24,2010-03-30,2010-07-06,2010-10-04,2010-11-30,2011-03-30,2011-05-11,2011-09-09,2012-04-05,2012-06-28,2012-09-25
          Simulation LincolnCPTLang
            Clock: StartDate=1991-06-08; EndDate=2013-07-01
            Summary summaryfile
            Weather: FileName=lincoln.met
            Zone paddock: Area=1; Slope=0
              Irrigation
              Soil: same as Validation.New Zealand.CPTPhenology.CPTCultOtane.LincolnCPTOtane.paddock.Soil
              SurfaceOrganicMatter Surface Organic Matter: same as Validation.New Zealand.Lincoln9192.LincolnBase.paddock.Surface Organic Matter
              Fertiliser
              MicroClimate: a_interception=0; b_interception=1; c_interception=0; d_interception=0; soil_albedo=0.3; sun_angle=15; soil_heat_flux_fraction=0.4; night_interception_fraction=0.5; refheight=2; albedo=0.293662; emissivity=0.96; RadIntTotal=0
              Plant Wheat: CropType=Wheat
              Report HarvestReport
              Manager SowAndHarvest
                Cultivar = Lang
                script: same as in Validation.New Zealand.CPTPhenology.CPTCultOtane.LincolnCPTOtane.paddock.SowAndHarvest
              SoluteManager
            SoilArbitrator Soil Arbitrator
        Experiment CPTCultH45
          Factors
            Factor Sow
              Specifications=[Clock].StartDate = 2009-03-20,2009-06-05,2009-08-24,2010-03-30,2010-07-06,2010-10-04,2010-11-30,2011-03-30,2011-05-11,2011-09-09,2012-04-05,2012-06-28,2012-09-25
          Simulation LincolnCPTH45
            Clock: StartDate=1991-06-08; EndDate=2013-07-01
            Summary summaryfile
            Weather: FileName=lincoln.met
            Zone paddock: Area=1; Slope=0
              Irrigation
              Soil: same as Validation.New Zealand.CPTPhenology.CPTCultOtane.LincolnCPTOtane.paddock.Soil
              SurfaceOrganicMatter Surface Organic Matter: same as Validation.New Zealand.Lincoln9192.LincolnBase.paddock.Surface Organic Matter
              Fertiliser
              MicroClimate: a_interception=0; b_interception=1; c_interception=0; d_interception=0; soil_albedo=0.3; sun_angle=15; soil_heat_flux_fraction=0.4; night_interception_fraction=0.5; refheight=2; albedo=0.293662; emissivity=0.96; RadIntTotal=0
              Plant Wheat: CropType=Wheat
              Report HarvestReport
              Manager SowAndHarvest
                Cultivar = H45
                script: same as in Validation.New Zealand.CPTPhenology.CPTCultOtane.LincolnCPTOtane.paddock.SowAndHarvest
              SoluteManager
            SoilArbitrator Soil Arbitrator
      PredictedObserved NZObsPred: PredictedTableName=HarvestReport; ObservedTableName=Observed; FieldNameUsedForMatch=Wheat.Phenology.CurrentStageName
    Folder Southern Australia
      Folder van Herwaarden et al  1998
        Experiment Wagga1991
          Factors
            Factor N: Specifications=[NSchedule]
              Operations 0
                1991-05-26  [Fertiliser].Apply(Amount: 0, Type: Fertiliser.Types.Urea);
              Operations 40
                1991-05-26  [Fertiliser].Apply(Amount: 40, Type: Fertiliser.Types.Urea);
              Operations 80
                1991-05-26  [Fertiliser].Apply(Amount: 80, Type: Fertiliser.Types.Urea);
              Operations 120
                1991-05-26  [Fertiliser].Apply(Amount: 120, Type: Fertiliser.Types.Urea);
              Operations 160
                1991-05-26  [Fertiliser].Apply(Amount: 160, Type: Fertiliser.Types.Urea);
              Operations 200
                1991-05-26  [Fertiliser].Apply(Amount: 200, Type: Fertiliser.Types.Urea);
          Simulation Wagga91Base
            Clock: StartDate=1991-05-24; EndDate=1991-12-12
            Summary summaryfile
            Weather: FileName=Wagga1991.met
            SoilArbitrator Soil Arbitrator
            Zone paddock: Area=1; Slope=0
              Irrigation
              Fertiliser
              SurfaceOrganicMatter: same as Validation.Turkey.Konya11.Konya11.paddock.SurfaceOrganicMatter
              Plant Wheat: CropType=Wheat
              Operations CropSchedule
                1991-05-26  [Wheat].Sow(population:138, cultivar:"Matong", depth:30, rowSpacing:200);
              Operations NSchedule
              MicroClimate: a_interception=0; b_interception=1; c_interception=0; d_interception=0; soil_albedo=0.3; sun_angle=15; soil_heat_flux_fraction=0.4; night_interception_fraction=0.5; refheight=2; albedo=0.15; emissivity=0.96; RadIntTotal=0
              Manager Calculations: same as Validation.SE Queensland.APS26.APS26NRate160WaterWet.paddock.Calculations
              Soil: ASCOrder=Kandasol; ASCSubOrder=Red; SoilType=?; Site=Generic; NearestTown=Wagga Wagga; Region=Riverina; State=New South Wales; Country=Australia; ApsoilNumber=498-GENERIC; Latitude=-35.115549; Longitude=147.369477; LocationAccuracy=Regional Soil Type; DataSource=Generic soil; Comments=Generic soil developed for CSU.
                Water
                  Thickness  BD    AirDry  LL15  DUL   SAT
                  100        1.48  0.055   0.11  0.29  0.35
                  150        1.5   0.104   0.13  0.27  0.34
                  150        1.45  0.15    0.15  0.25  0.32
                  150        1.37  0.15    0.15  0.28  0.36
                  150        1.43  0.15    0.15  0.29  0.35
                  300        1.55  0.15    0.15  0.31  0.34
                  300        1.67  0.15    0.15  0.31  0.34
                  300        1.62  0.15    0.15  0.32  0.35
                  SoilCrop WheatSoil: LL=[0.11, 0.13, 0.15, 0.17, 0.19, 0.22, 0.23, 0.25]; KL=[0.06, 0.06, 0.06, 0.06, 0.06, 0.06, 0.06, 0.06]; XF=[1, 1, 1, 0.9, 0.9, 0.9, 0.9, 0.8]
                SoilWater: SummerDate=1-Nov; SummerU=6; SummerCona=3.5; WinterDate=1-Apr; WinterU=2; WinterCona=2; DiffusConst=44; DiffusSlope=16; Salb=0.13; CN2Bare=75; CNRed=20; CNCov=0.8; max_pond=0; Thickness=[100, 150, 150, 150, 150, 300, 300, 300]; SWCON=[0.5, 0.4, 0.3, 0.3, 0.2, 0.1, 0.1, 0.1]; residueinterception=0
                SoilNitrogen: fom_type=[default, manure, mucuna, lablab, shemp, stable]; fract_carb=[0.2, 0.3, 0.54, 0.57, 0.45, 0]; fract_cell=[0.7, 0.3, 0.37, 0.37, 0.47, 0.1]; fract_lign=[0.1, 0.4, 0.09, 0.06, 0.08, 0.9]
                SoilOrganicMatter: RootCN=45; RootWt=1500; SoilCN=12.5; EnrACoeff=7.4; EnrBCoeff=0.2; OCUnits=Total
                  Thickness  OC   FBiom  FInert
                  100        1    0.03   0.4
                  150        0.5  0.02   0.6
                  150        0.5  0.02   0.7
                  150        0.5  0.02   0.8
                  150        0.5  0.01   0.9
                  300        0.5  0.01   0.9
                  300        0.5  0.01   1
                  300        0.5  0.01   1
                Analysis: Thickness=[100, 150, 150, 150, 150, 300, 300, 300]; PH=[6, 6, 6, 6, 6, 6, 6, 6]; PHUnits=Water; BoronUnits=HotWater
                InitialWater: PercentMethod=FilledFromTop; FractionFull=0.59
                Sample Initial nitrogen: Thickness=[1500]; NO3=[165]; NH4=[0]; SW=[0]; NO3Units=kgha; NH4Units=kgha; SWUnits=Volumetric; OCUnits=Total; PHUnits=Water
                CERESSoilTemperature
              Report DailyReport
              Report HarvestReport
              Manager Harvesting: same as Validation.SE Queensland.APS26.APS26NRate160WaterWet.paddock.Harvesting
              SoluteManager
        Experiment Ginninderra1991
          Factors
            Factor N: Specifications=[NSchedule]
              Operations 0
                1991-06-21  [Fertiliser].Apply(Amount: 0, Type: Fertiliser.Types.UreaN);
              Operations 40
                1991-06-21  [Fertiliser].Apply(Amount: 40, Type: Fertiliser.Types.UreaN);
              Operations 80
                1991-06-21  [Fertiliser].Apply(Amount: 80, Type: Fertiliser.Types.UreaN);
              Operations 120
                1991-06-21  [Fertiliser].Apply(Amount: 120, Type: Fertiliser.Types.UreaN);
              Operations 160
                1991-06-21  [Fertiliser].Apply(Amount: 160, Type: Fertiliser.Types.UreaN);
              Operations 200
                1991-06-21  [Fertiliser].Apply(Amount: 200, Type: Fertiliser.Types.UreaN);
              Operations 240
                1991-06-21  [Fertiliser].Apply(Amount: 240, Type: Fertiliser.Types.UreaN);
          Simulation Ginninderra91Base
            Clock: StartDate=1991-06-20; EndDate=1991-12-31
            Summary summaryfile
            Weather: FileName=Ginninderra.met
            SoilArbitrator Soil Arbitrator
            Zone paddock: Area=1; Slope=0
              Irrigation
              Fertiliser
              SurfaceOrganicMatter: same as Validation.Turkey.Konya11.Konya11.paddock.SurfaceOrganicMatter
              Plant Wheat: CropType=Wheat
              Operations CropSchedule
                1991-06-21  [Wheat].Sow(population:180, cultivar:"Janz", depth:30, rowSpacing:200);
                1991-11-10  [Irrigation].Apply(amount:27);
                1991-11-20  [Irrigation].Apply(amount:28);
                1991-12-21  [Wheat].Harvest();
                1991-12-21  [Wheat].EndCrop();
              Operations NSchedule
              MicroClimate: a_interception=0; b_interception=1; c_interception=0; d_interception=0; soil_albedo=0.3; sun_angle=15; soil_heat_flux_fraction=0.4; night_interception_fraction=0.5; refheight=2; albedo=0.15; emissivity=0.96; RadIntTotal=0
              Soil: SoilType=unknown; LocalName=Ginninderra; Site=Ginninderra; NearestTown=Ginninderra; Region=ACT; NaturalVegetation=Unknown; Latitude=0; Longitude=0
                InitialWater: PercentMethod=FilledFromTop; FractionFull=1
                Water
                  Thickness  BD    AirDry  LL15   DUL    SAT
                  100        1.45  0.04    0.073  0.3    0.414
                  100        1.5   0.04    0.075  0.32   0.394
                  100        1.55  0.06    0.074  0.32   0.375
                  100        1.5   0.1     0.12   0.33   0.394
                  100        1.52  0.1     0.16   0.35   0.386
                  100        1.55  0.1     0.25   0.37   0.375
                  100        1.57  0.1     0.25   0.36   0.367
                  100        1.6   0.1     0.24   0.35   0.355
                  100        1.62  0.1     0.259  0.34   0.347
                  100        1.65  0.1     0.281  0.33   0.335
                  100        1.62  0.1     0.295  0.34   0.347
                  100        1.6   0.1     0.272  0.35   0.355
                  100        1.58  0.1     0.269  0.36   0.363
                  100        1.55  0.1     0.264  0.37   0.375
                  100        1.55  0.1     0.256  0.37   0.375
                  100        1.55  0.1     0.256  0.355  0.375
                  100        1.55  0.1     0.256  0.35   0.375
                  100        1.55  0.1     0.256  0.33   0.375
                  100        1.55  0.1     0.256  0.33   0.375
                  100        1.55  0.1     0.256  0.33   0.375
                  SoilCrop wheatSoil
                    LL=[0.073, 0.075, 0.074, 0.12, 0.16, 0.25, 0.25, 0.24, 0.259, 0.281, 0.295, 0.272, 0.269, 0.264, 0.256, 0.256, 0.256, 0.256, 0.256, 0.256]
                    KL=[0.08, 0.08, 0.08, 0.08, 0.08, 0.08, 0.08, 0.08, 0.08, 0.07, 0.07, 0.06, 0.06, 0.05, 0.05, 0.04, 0.04, 0.03, 0.02, 0.01]
                    XF=[1, 1, 1, 1, 1, 1, 1, 1, 1, 1, 1, 1, 1, 1, 1, 0, 0, 0, 0, 0]
                SoilWater: SummerDate=1-Nov; SummerU=2; SummerCona=2; WinterDate=1-Apr; WinterU=2; WinterCona=2; DiffusConst=88; DiffusSlope=35.4; Salb=0.13; CN2Bare=72; CNRed=20; CNCov=0.8; slope=0; discharge_width=0; catchment_area=0; max_pond=0; residueinterception=0
                  Thickness  SWCON  KLAT
                  100        0.4    0
                  100        0.4    0
                  100        0.4    0
                  100        0.4    0
                  100        0.4    0
                  100        0.4    0
                  100        0.4    0
                  100        0.4    0
                  100        0.4    0
                  100        0.4    0
                  100        0.4    0
                  100        0.4    0
                  100        0.4    0
                  100        0.4    0
                  100        0.4    0
                  100        0.4    0
                  100        0.4    0
                  100        0.4    0
                  100        0.4    0
                  100        0.4    0
                SoilOrganicMatter: RootCN=40; RootWt=2000; SoilCN=14.5; EnrACoeff=1; EnrBCoeff=1; OCUnits=Total
                  Thickness  OC    FBiom  FInert
                  100        0.83  0.04   0.36
                  100        0.35  0.03   0.35
                  100        0.33  0.03   0.45
                  100        0.22  0.02   0.45
                  100        0.22  0.02   0.59
                  100        0.22  0.02   0.6
                  100        0.19  0.02   0.84
                  100        0.17  0.02   0.8
                  100        0.15  0.01   0.8
                  100        0.12  0.01   0.99
                  100        0.11  0.01   0.99
                  100        0.1   0.01   0.99
                  100        0.1   0.01   0.99
                  100        0.1   0.01   0.99
                  100        0.1   0.01   0.99
                  100        0.1   0.01   0.99
                  100        0.1   0.01   0.99
                  100        0.1   0.01   0.99
                  100        0.1   0.01   0.99
                  100        0.1   0.01   0.99
                Analysis: PHUnits=Water; BoronUnits=HotWater
                  Thickness=[100, 100, 100, 100, 100, 100, 100, 100, 100, 100, 100, 100, 100, 100, 100, 100, 100, 100, 100, 100]
                  PH=[5.8, 5.9, 6.6, 6.8, 7, 7.1, 7.2, 7.3, 7.4, 7.4, 7.6, 7.8, 8, 8.2, 8.3, 8.4, 8.4, 8.5, 8.5, 8.5]
                Sample: NO3Units=kgha; NH4Units=kgha; SWUnits=Volumetric; OCUnits=Total; PHUnits=Water
                  Thickness  NO3  NH4
                  1000       200  1
                  500        50   0.1
                  500        10   0.1
                SoilNitrogen: fom_type=[default, manure, mucuna, lablab, shemp, stable]; fract_carb=[0.2, 0.3, 0.54, 0.57, 0.45, 0]; fract_cell=[0.7, 0.3, 0.37, 0.37, 0.47, 0.1]; fract_lign=[0.1, 0.4, 0.09, 0.06, 0.08, 0.9]
                CERESSoilTemperature
              Manager Calculations: same as Validation.SE Queensland.APS26.APS26NRate160WaterWet.paddock.Calculations
              Report DailyReport
              Report HarvestReport
              SoluteManager
      Folder Wagga1314
        Memo
          The dataset of [Zeleke2016] includes plantings of two wheat varieties (Gregory, Livingston) under two water regimes (dry and irrigated) for 2013 and 2014 at the Wagga Wagga Agricultural Research Institute. Yields ranged from 1.63 t/ha to 6.01 t/ha.
        Experiment Wagga2013
          Factors
            Factor Cv: Specifications=[CropSchedule]
              Operations Gregory
                2013-06-24  [Wheat].Sow(population:120, cultivar:"EGAGregory", depth:30, rowSpacing:200);
                2013-06-24  [Fertiliser].Apply(Amount: 100, Type: Fertiliser.Types.UreaN);
              Operations Livingston
                2013-06-24  [Wheat].Sow(population:120, cultivar:"Livingston", depth:30, rowSpacing:200);
                2013-06-24  [Fertiliser].Apply(Amount: 100, Type: Fertiliser.Types.UreaN);
            Factor Water: Specifications=[IrrigationSchedule]
              Operations Wet
                2013-09-10  [Irrigation].Apply(amount:26);
                2013-09-11  [Irrigation].Apply(amount:26);
                2013-09-26  [Irrigation].Apply(amount:26);
                2013-10-01  [Irrigation].Apply(amount:26);
                2013-10-04  [Irrigation].Apply(amount:26);
                2013-10-09  [Irrigation].Apply(amount:26);
                2013-10-10  [Irrigation].Apply(amount:26);
                2013-10-14  [Irrigation].Apply(amount:26);
                2013-10-15  [Irrigation].Apply(amount:26);
                2013-10-16  [Irrigation].Apply(amount:26);
              Operations Dry
          Simulation Ketema2013
            Clock: StartDate=2013-06-24; EndDate=2013-12-30
            Summary summaryfile
            Weather: FileName=Wagga1314.met
            SoilArbitrator Soil Arbitrator
            Zone paddock: Area=1; Slope=0
              Irrigation
              Fertiliser
              SurfaceOrganicMatter: same as Validation.Turkey.Konya11.Konya11.paddock.SurfaceOrganicMatter
              Plant Wheat: CropType=Wheat
              Operations CropSchedule
              Operations IrrigationSchedule
              MicroClimate: a_interception=0; b_interception=1; c_interception=0; d_interception=0; soil_albedo=0.3; sun_angle=15; soil_heat_flux_fraction=0.4; night_interception_fraction=0.5; refheight=2; albedo=0.15; emissivity=0.96; RadIntTotal=0
              Manager Calculations: same as Validation.SE Queensland.APS26.APS26NRate160WaterWet.paddock.Calculations
              Soil: ASCOrder=Kandasol; ASCSubOrder=Red; SoilType=?; Site=Generic; NearestTown=Wagga Wagga; Region=Riverina; State=New South Wales; Country=Australia; ApsoilNumber=498-GENERIC; Latitude=-35.115549; Longitude=147.369477; LocationAccuracy=Regional Soil Type; DataSource=Generic soil; Comments=Generic soil developed for CSU.
                Water
                  Thickness  BD    AirDry  LL15  DUL   SAT
                  100        1.48  0.055   0.11  0.29  0.35
                  150        1.5   0.104   0.13  0.27  0.34
                  150        1.45  0.15    0.15  0.25  0.32
                  150        1.37  0.15    0.15  0.28  0.36
                  150        1.43  0.15    0.15  0.29  0.35
                  300        1.55  0.15    0.15  0.31  0.34
                  300        1.67  0.15    0.15  0.31  0.34
                  300        1.62  0.15    0.15  0.32  0.35
                  SoilCrop WheatSoil: LL=[0.11, 0.13, 0.15, 0.17, 0.19, 0.22, 0.26, 0.28]; KL=[0.06, 0.06, 0.04, 0.04, 0.04, 0.04, 0.02, 0.02]; XF=[1, 1, 1, 0.9, 0.9, 0.9, 0.9, 0.8]
                SoilWater: SummerDate=1-Nov; SummerU=6; SummerCona=3.5; WinterDate=1-Apr; WinterU=2; WinterCona=2; DiffusConst=44; DiffusSlope=16; Salb=0.13; CN2Bare=84; CNRed=20; CNCov=0.8; max_pond=0; Thickness=[100, 150, 150, 150, 150, 300, 300, 300]; SWCON=[0.5, 0.4, 0.3, 0.3, 0.2, 0.1, 0.1, 0.1]; residueinterception=0
                SoilNitrogen: fom_type=[default, manure, mucuna, lablab, shemp, stable]; fract_carb=[0.2, 0.3, 0.54, 0.57, 0.45, 0]; fract_cell=[0.7, 0.3, 0.37, 0.37, 0.47, 0.1]; fract_lign=[0.1, 0.4, 0.09, 0.06, 0.08, 0.9]
                SoilOrganicMatter: same as Validation.Southern Australia.van Herwaarden et al  1998.Wagga1991.Wagga91Base.paddock.Soil.SoilOrganicMatter
                Analysis: Thickness=[100, 150, 150, 150, 150, 300, 300, 300]; PH=[6, 6, 6, 6, 6, 6, 6, 6]; PHUnits=Water; BoronUnits=HotWater
                InitialWater: PercentMethod=EvenlyDistributed; FractionFull=0.9
                Sample Initial nitrogen: Thickness=[1200]; NO3=[0.542]; NH4=[0]; SW=[0]; NO3Units=ppm; NH4Units=ppm; SWUnits=Volumetric; OCUnits=Total; PHUnits=Water
                CERESSoilTemperature
              Report DailyReport
              Report HarvestReport
              Manager Harvesting: same as Validation.SE Queensland.APS26.APS26NRate160WaterWet.paddock.Harvesting
              SoluteManager
        Experiment Wagga2014
          Factors
            Factor Cv: Specifications=[CropSchedule]
              Operations Gregory
                2014-04-30  [Wheat].Sow(population:120, cultivar:"EGAGregory", depth:30, rowSpacing:200);
                2014-04-30  [Fertiliser].Apply(Amount: 100, Type: Fertiliser.Types.UreaN);
                2014-07-01  [Fertiliser].Apply(Amount: 50, Type: Fertiliser.Types.UreaN);
              Operations Livingston
                2014-04-30  [Wheat].Sow(population:120, cultivar:"Livingston", depth:30, rowSpacing:200);
                2014-04-30  [Fertiliser].Apply(Amount: 100, Type: Fertiliser.Types.UreaN);
                2014-07-01  [Fertiliser].Apply(Amount: 50, Type: Fertiliser.Types.UreaN);
            Factor Water: Specifications=[IrrigationSchedule]
              Operations Wet
                2014-05-16  [Irrigation].Apply(amount:26);
                2014-08-11  [Irrigation].Apply(amount:26);
                2014-08-12  [Irrigation].Apply(amount:26);
                2014-08-18  [Irrigation].Apply(amount:26);
                2014-08-25  [Irrigation].Apply(amount:26);
                2014-09-01  [Irrigation].Apply(amount:21);
                2014-09-05  [Irrigation].Apply(amount:26);
                2014-09-22  [Irrigation].Apply(amount:26);
                2014-10-10  [Irrigation].Apply(amount:26);
              Operations Dry
          Simulation Ketema2014
            Clock: StartDate=2014-04-30; EndDate=2014-12-30
            Summary summaryfile
            Weather: FileName=Wagga1314.met
            SoilArbitrator Soil Arbitrator
            Zone paddock: Area=1; Slope=0
              Irrigation
              Fertiliser
              SurfaceOrganicMatter: same as Validation.Turkey.Konya09.Konya09.paddock.SurfaceOrganicMatter
              Plant Wheat: CropType=Wheat
              Operations CropSchedule
              Operations IrrigationSchedule
              MicroClimate: a_interception=0; b_interception=1; c_interception=0; d_interception=0; soil_albedo=0.3; sun_angle=15; soil_heat_flux_fraction=0.4; night_interception_fraction=0.5; refheight=2; albedo=0.15; emissivity=0.96; RadIntTotal=0
              Manager Calculations: same as Validation.SE Queensland.APS26.APS26NRate160WaterWet.paddock.Calculations
              Soil: same as Validation.Southern Australia.Wagga1314.Wagga2013.Ketema2013.paddock.Soil
              Report HarvestReport
              Report DailyReport
              Manager Harvesting: same as Validation.SE Queensland.APS26.APS26NRate160WaterWet.paddock.Harvesting
              SoluteManager
      Folder YarrabahCreek
        Memo
          This trial was conducted on a Vertosol soil on the Liverpool Plains, central-eastern Australia in 2001.  Hybrid Mercury was sown on 19th of June and biomass, leaf area, phenology, soil water (Neutron Moisture Meter) and water use (Bowen Ratio method) were monitored.  More information can be found in [Young2008].
        Simulation YarrabahCreek
          Clock: StartDate=2001-06-19; EndDate=2001-12-04
          Summary summaryfile
          Weather: FileName=Ycreek.met
          SoilArbitrator Soil Arbitrator
          Zone Field: Area=1; Slope=0
            Irrigation
            Fertiliser
            Operations CropManagement
              2001-06-19  [Wheat].Sow(population:70, cultivar:"Mercury", depth:30, rowSpacing:250);
              2001-06-19  [Fertiliser].Apply(Amount: 120, Type: Fertiliser.Types.UreaN);
              2001-12-04  [Wheat].Harvest();
            Soil: SoilType=APS6Soil; LocalName=APS6Site; Site=APS6Site; NearestTown=Unknown; Region=Lawes; NaturalVegetation=Unknown; Latitude=0; Longitude=0
              Water
                Thickness  BD   AirDry  LL15  DUL   SAT
                100        1    0.1     0.27  0.47  0.51
                200        1.1  0.1     0.27  0.49  0.51
                200        1.1  0.1     0.3   0.55  0.57
                200        1.1  0.1     0.32  0.55  0.55
                200        1.1  0.1     0.34  0.53  0.54
                200        1.2  0.1     0.38  0.53  0.54
                200        1.2  0.1     0.42  0.53  0.54
                200        1.2  0.1     0.42  0.5   0.51
                200        1.2  0.1     0.42  0.48  0.51
                200        1.2  0.1     0.42  0.48  0.51
                SoilCrop WheatSoil: LL=[0.27, 0.27, 0.3, 0.32, 0.34, 0.38, 0.42, 0.42, 0.42, 0.42]; KL=[0.12, 0.12, 0.08, 0.06, 0.06, 0.06, 0.06, 0.06, 0, 0]; XF=[1, 1, 1, 1, 1, 1, 1, 1, 0, 0]
              SoilWater: SummerDate=1-Nov; SummerU=9; SummerCona=5; WinterDate=1-Apr; WinterU=9; WinterCona=5; DiffusConst=40; DiffusSlope=16; Salb=0.13; CN2Bare=78; CNRed=20; CNCov=0.8; slope=0; discharge_width=0; catchment_area=0; max_pond=0; residueinterception=0
                Thickness  SWCON  KLAT
                150        0.2    0
                150        0.2    0
                300        0.2    0
                300        0.2    0
                300        0.2    0
                300        0.2    0
                300        0.2    0
              SoilNitrogen: fom_type=[default, manure, mucuna, lablab, shemp, stable]; fract_carb=[0.2, 0.3, 0.54, 0.57, 0.45, 0]; fract_cell=[0.7, 0.3, 0.37, 0.37, 0.47, 0.1]; fract_lign=[0.1, 0.4, 0.09, 0.06, 0.08, 0.9]
              SoilOrganicMatter: RootCN=60; RootWt=10; SoilCN=14.5; EnrACoeff=1; EnrBCoeff=1; OCUnits=Total
                Thickness  OC    FBiom  FInert
                100        1.83  0.03   0.45
                200        1.35  0.03   0.45
                200        1.19  0.02   0.6
                200        1.11  0.015  0.7
                200        0.97  0.01   0.85
                200        0.8   0.01   0.9
                200        0.64  0.01   0.99
                200        0.5   0.01   0.99
                200        0.38  0.01   0.99
                200        0.27  0.01   0.99
              Analysis: Thickness=[150, 150, 300, 300, 300, 300, 300]; PH=[7.5, 8, 8, 8, 8, 8, 8]; PHUnits=Water; BoronUnits=HotWater
              Sample Initial Water: Thickness=[100, 200, 200, 200, 200, 200, 200, 200, 200, 200]; NO3Units=ppm; NH4Units=ppm; SWUnits=Volumetric; OCUnits=Total; PHUnits=Water
                SW=[0.42, 0.46, 0.54, 0.55, 0.53, 0.51, 0.54, 0.5, 0.466, 0.43]
              Sample Initial Nitrogen: NO3Units=kgha; NH4Units=ppm; SWUnits=Volumetric; OCUnits=Total; PHUnits=Water
                Thickness  NO3  NH4
                100        21   0.1
                100        18   0.1
                200        15   0.1
                200        10   0.1
                1300       39   0.1
              CERESSoilTemperature
            SurfaceOrganicMatter: PoolName=wheat_stubble; type=wheat; mass=2000; standing_fraction=0; cnr=100; CriticalResidueWeight=2000; OptimumDecompTemp=20; MaxCumulativeEOS=20; CNRatioDecompCoeff=0.277; CNRatioDecompThreshold=25; TotalLeachRain=25; MinRainToLeach=10; CriticalMinimumOrganicC=0.004; DefaultCPRatio=0; DefaultStandingFraction=0; StandingExtinctCoeff=0.5; FractionFaecesAdded=0.5
              Pools:
                {PoolName=wheat_stubble, ResidueType=wheat, Mass=2000, CNRatio=100, StandingFraction=0}
              ResidueTypes: LoadFromResource=ResidueTypes
            Plant Wheat: CropType=Wheat
            MicroClimate: a_interception=0; b_interception=0; c_interception=0.3; d_interception=0; soil_albedo=0.13; sun_angle=15; soil_heat_flux_fraction=0.4; night_interception_fraction=0.5; refheight=2; albedo=0.15; emissivity=0.96; RadIntTotal=0
            Report SupReport
              VariableNames:
                [Clock].Today
                ([Wheat].Leaf.Transpiration + [Soil].SoilWater.Es + [MicroClimate].interception) as ET
                sum([Soil].SoilWater.SWmm[2:10]) as TotalSoilWater
                [Wheat].Arbitrator.FN
              EventNames:
                [Clock].DoReport
            Report DailyReport
            Report HarvestReport
            SoluteManager
      Experiment Mouse
        Factors
          Factor Removal
            Specifications=[MouseActivity].Script.ProportionNibbled = 0.00, 0.05,0.10,0.25,0.50
          Factor Date
            Specifications=[MouseActivity].Script.NibblingDate = 2002-09-10, 2002-10-11, 2002-10-31, 2002-12-13
        Simulation MouseBase
          Clock: StartDate=2002-07-10; EndDate=2002-12-31
          Summary summaryfile
          Weather: FileName=hall2002.met
          SoilArbitrator Soil Arbitrator
          Zone paddock: Area=1; Slope=0
            Irrigation
            Soil: SoilType=unknown; LocalName=Ginninderra; Site=Ginninderra; NearestTown=Ginninderra; Region=ACT; NaturalVegetation=Unknown; Latitude=0; Longitude=0
              InitialWater: PercentMethod=FilledFromTop; FractionFull=1
              Water
                Thickness  BD    AirDry  LL15   DUL    SAT
                100        1.45  0.04    0.073  0.21   0.414
                100        1.5   0.04    0.075  0.234  0.394
                100        1.55  0.06    0.074  0.22   0.375
                100        1.5   0.1     0.12   0.29   0.394
                100        1.52  0.1     0.16   0.293  0.386
                100        1.55  0.1     0.25   0.37   0.375
                100        1.57  0.1     0.25   0.36   0.367
                100        1.6   0.1     0.24   0.35   0.355
                100        1.62  0.1     0.259  0.34   0.347
                100        1.65  0.1     0.281  0.33   0.335
                100        1.62  0.1     0.295  0.34   0.347
                100        1.6   0.1     0.272  0.35   0.355
                100        1.58  0.1     0.269  0.36   0.363
                100        1.55  0.1     0.264  0.37   0.375
                100        1.55  0.1     0.256  0.37   0.375
                100        1.55  0.1     0.256  0.355  0.375
                100        1.55  0.1     0.256  0.35   0.375
                100        1.55  0.1     0.256  0.33   0.375
                100        1.55  0.1     0.256  0.33   0.375
                100        1.55  0.1     0.256  0.33   0.375
                SoilCrop wheatSoil
                  LL=[0.073, 0.075, 0.074, 0.12, 0.16, 0.25, 0.25, 0.24, 0.259, 0.281, 0.295, 0.272, 0.269, 0.264, 0.256, 0.256, 0.256, 0.256, 0.256, 0.256]
                  KL=[0.08, 0.08, 0.08, 0.08, 0.08, 0.08, 0.08, 0.08, 0.08, 0.07, 0.07, 0.06, 0.06, 0.05, 0.05, 0.04, 0.04, 0.03, 0.02, 0.01]
                  XF=[1, 1, 1, 1, 1, 1, 1, 1, 1, 1, 1, 1, 1, 1, 1, 1, 1, 1, 0, 0]
              SoilWater: same as Validation.Southern Australia.van Herwaarden et al  1998.Ginninderra1991.Ginninderra91Base.paddock.Soil.SoilWater
              SoilOrganicMatter: same as Validation.Southern Australia.van Herwaarden et al  1998.Ginninderra1991.Ginninderra91Base.paddock.Soil.SoilOrganicMatter
              Analysis: PHUnits=Water; BoronUnits=HotWater
                Thickness=[100, 100, 100, 100, 100, 100, 100, 100, 100, 100, 100, 100, 100, 100, 100, 100, 100, 100, 100, 100]
                PH=[5.8, 5.9, 6.6, 6.8, 7, 7.1, 7.2, 7.3, 7.4, 7.4, 7.6, 7.8, 8, 8.2, 8.3, 8.4, 8.4, 8.5, 8.5, 8.5]
              Sample: NO3Units=ppm; NH4Units=ppm; SWUnits=Volumetric; OCUnits=Total; PHUnits=Water
                Thickness  NO3  NH4
                100        10   1
                100        15   1
                100        10   1
                100        8    1
                100        5    1
                100        2    1
                100        1    1
                100        1    1
                100        1    1
                100        1    1
                100        1    1
                100        1    1
                100        1    1
                100        1    1
                100        0    0
                100        0    0
                100        0    0
                100        0    0
                100        0    0
                100        0    0
              SoilNitrogen: fom_type=[default, manure, mucuna, lablab, shemp, stable]; fract_carb=[0.2, 0.3, 0.54, 0.57, 0.45, 0]; fract_cell=[0.7, 0.3, 0.37, 0.37, 0.47, 0.1]; fract_lign=[0.1, 0.4, 0.09, 0.06, 0.08, 0.9]
              CERESSoilTemperature
            SurfaceOrganicMatter: PondActive=no; ReportAdditions=no; ReportRemovals=no; PoolName=canola_stubble; type=canola; mass=1000; standing_fraction=0; cpr=0; cnr=20; CriticalResidueWeight=2000; OptimumDecompTemp=20; MaxCumulativeEOS=20; CNRatioDecompCoeff=0.277; CNRatioDecompThreshold=25; TotalLeachRain=25; MinRainToLeach=10; CriticalMinimumOrganicC=0.004; DefaultCPRatio=0; DefaultStandingFraction=0; StandingExtinctCoeff=0.5; FractionFaecesAdded=0.5
              Pools:
                {PoolName=canola_stubble, ResidueType=canola, Mass=1000, CNRatio=20, CPRatio=0, StandingFraction=0}
              ResidueTypes: LoadFromResource=ResidueTypes
              TillageTypes TillageTypesList
            Fertiliser
            Plant Wheat: CropType=Wheat
            Operations IrrigationSchedule
              2002-11-08  [Irrigation].Apply(amount:35);
              2002-11-22  [Irrigation].Apply(amount:35);
            MicroClimate: a_interception=0; b_interception=1; c_interception=0; d_interception=0; soil_albedo=0.3; sun_angle=15; soil_heat_flux_fraction=0.4; night_interception_fraction=0.5; refheight=2; albedo=0.15; emissivity=0.96; RadIntTotal=0
            Operations SowingSchedule
              2002-08-15  [Wheat].Sow(population:100, cultivar:"H45", depth:30, rowSpacing:250);
            Manager SowingFertiliser
              Amount = 100
              script: same as in Validation.Western Australia.Cunderdin97.Cunderdin97Base.paddock.SowingFertiliser
            Manager MouseActivity
              NibblingDate = 2002-10-31
              ProportionNibbled = 0.5
```csharp
using System;
using System.Collections.Generic;
using Models.Core;
using Models.PMF;
using Models.PMF.Interfaces;
using System.Xml.Serialization;

namespace Models
{
    [Serializable] 
    [System.Xml.Serialization.XmlInclude(typeof(Model))]
    public class Script : Model
    {
        [Link] Plant Wheat;
        [Link] Clock Clock;

        [Description("Date that mouse damage event occurs")]
        public DateTime NibblingDate { get; set; }
        [Description("Proportion of the crop removed by mice")]
        public double ProportionNibbled { get; set; }
        
        [XmlIgnore] private RemovalFractions Remove { get; set; }
        
        [EventSubscribe("Commencing")]
        private void OnSimulationCommencing(object sender, EventArgs e)
        {
            Remove = new RemovalFractions();
        }
        
        [EventSubscribe("DoManagement")]
        private void OnDoManagement(object sender, EventArgs e)
        {
            //Set up  array of remove fractions to send with Cut method.  Each member in the array corresponds to an organ in the same order they are set up in.

            if (Clock.Today.Date == NibblingDate)
            {
                //Harvest with manager specified removal fractions
                Remove.SetFractionToRemove("Grain", 0);
                Remove.SetFractionToRemove("Leaf", 0, "live");
                Remove.SetFractionToRemove("Leaf", 0, "dead");
                Remove.SetFractionToRemove("Stem", 0);
                Remove.SetFractionToRemove("Spike", 0);
                Remove.SetFractionToRemove("Root", 0);
                Remove.SetFractionToResidue("Grain", ProportionNibbled);
                Remove.SetFractionToResidue("Leaf", ProportionNibbled, "live");
                Remove.SetFractionToResidue("Leaf", ProportionNibbled, "dead");
                Remove.SetFractionToResidue("Stem", ProportionNibbled);
                Remove.SetFractionToResidue("Spike", ProportionNibbled);
                Remove.SetFractionToResidue("Root", 0);
                Remove.SetThinningProportion = ProportionNibbled;
                Wheat.RemoveBiomass("Thin", Remove);
            }
        }
    }
}
```
            Report DailyReport
            Report HarvestReport
            Manager Harvesting: same as Validation.SE Queensland.APS26.APS26NRate160WaterWet.paddock.Harvesting
            SoluteManager
      Experiment Walpeup2011
        Memo
          INSERT TEXT HERE
        Factors
          Factor Cv: Specifications=[Sowing].Script.CultivarName = Janz, Yitpi, EGAGregory, Axe
          Factor TOS: Specifications=[Sowing].Script.SowDate = 29-Apr, 31-May, 1-Jul
        Simulation Walpeup2011Base
          Clock: StartDate=2011-04-01; EndDate=2011-12-30
          Summary summaryfile
          Weather: FileName=Walpeup2011.met
          SoilArbitrator Soil Arbitrator
          Zone Field: Area=1; Slope=0
            Irrigation
            Fertiliser
            Soil APS6Field: same as Validation.SE Queensland.Gatton94.Gatton94Base.Field.APS6Field
            SurfaceOrganicMatter: same as Validation.SE Queensland.APS6.APS6Base.paddock.SurfaceOrganicMatter
            Plant Wheat: CropType=Wheat
            MicroClimate: a_interception=0; b_interception=1; c_interception=0; d_interception=0; soil_albedo=0.3; sun_angle=15; soil_heat_flux_fraction=0.4; night_interception_fraction=0.5; refheight=2; albedo=0.15; emissivity=0.96; RadIntTotal=0
            Report
              VariableNames:
                [Clock].Today
                [Wheat].Zadok.Stage
                [Wheat].Phenology.CurrentStageName
                [Wheat].AboveGround.Wt
                [Wheat].AboveGround.N
                [Wheat].Grain.Wt
                [Wheat].Grain.Protein
                [Wheat].Grain.Size
                [Wheat].Grain.Number
                [Wheat].Grain.Live.Wt
                [Wheat].Grain.Live.N
                [Wheat].Leaf.LAI
                [Wheat].Leaf.Live.Wt
                [Wheat].Leaf.Live.N
                [Wheat].Spike.Wt
                [Wheat].Spike.N
                [Wheat].Stem.Live.Wt
                [Wheat].Stem.Live.N
                [Wheat].Root.Depth
                [Wheat].Root.WaterUptake
                [Wheat].Leaf.Fw
                [Wheat].Leaf.Fn
                [Wheat].Total.Wt
                [Wheat].Phenology.Zadok.Stage as ZadokStage
                [Wheat].Leaf.AppearedCohortNo
                [Wheat].Leaf.ExpandedCohortNo
                [Wheat].Leaf.SenescingCohortNo
                [Wheat].Leaf.DeadCohortNo
              EventNames:
                [Clock].DoReport
            Report DailyReport
            Report HarvestReport
            Manager Sowing: same as Validation.SE Queensland.Gatton94.Gatton94Base.Field.Sowing
            Manager Harvesting: same as Validation.SE Queensland.APS26.APS26NRate160WaterWet.paddock.Harvesting
            Manager AutoIrrigate: same as Validation.SE Queensland.Gatton94.Gatton94Base.Field.AutoIrrigate
            Operations ApplyFertiliser
              1994-04-29  [Fertiliser].Apply(Amount: 200, Type: Fertiliser.Types.NO3N);
              Memo
                Add sufficient N to remove limitation
            SoluteManager
      Experiment Walpeup2012
        Memo
          INSERT TEXT HERE
        Factors
          Factor Cv: Specifications=[Sowing].Script.CultivarName = Janz, Yitpi, EGAGregory, Axe
          Factor TOS: Specifications=[Sowing].Script.SowDate = 22-Jun, 18-Jul
        Simulation Walpeup2012Base
          Clock: StartDate=2012-04-01; EndDate=2012-12-30
          Summary summaryfile
          Weather: FileName=Walpeup2012.met
          SoilArbitrator Soil Arbitrator
          Zone Field: same as Validation.Southern Australia.Walpeup2011.Walpeup2011Base.Field
      Experiment Minnipa2012
        Memo
          INSERT TEXT HERE
        Factors
          Factor Cv: Specifications=[Sowing].Script.CultivarName = Janz, Axe, EGAGregory
          Factor TOS: Specifications=[Sowing].Script.SowDate = 25-May, 8-Jun, 25-Jun
        Simulation Minnipa2012Base
          Clock: StartDate=2012-04-01; EndDate=2012-12-30
          Summary summaryfile
          Weather: FileName=Minnipa2012.met
          SoilArbitrator Soil Arbitrator
          Zone Field: same as Validation.SE Queensland.Gatton94.Gatton94Base.Field
      Experiment Temora2012
        Memo
          INSERT TEXT HERE
        Factors
          Factor Cv: Specifications=[Sowing].Script.CultivarName = Janz, Axe, EGAGregory
          Factor TOS: Specifications=[Sowing].Script.SowDate = 5-May, 23-May, 25-Jun
        Simulation Temora2012Base
          Clock: StartDate=2012-04-01; EndDate=2012-12-30
          Summary summaryfile
          Weather: FileName=Temora2012.met
          SoilArbitrator Soil Arbitrator
          Zone Field: same as Validation.SE Queensland.Gatton94.Gatton94Base.Field
      Experiment Birchip2011
        Factors
          Factor TOS: Specifications=[SowingRule].Script.TOS = 1, 2
          Factor Cv
            Specifications=[SowingRule].Script.Cultivar = Axe, Bolac, Derrimut, Eaglehawk, Gregory, Lincoln, Mace, Scout
        Simulation Birchip2011Base
          Clock: StartDate=2011-05-05; EndDate=2011-12-29
          Summary summaryfile
          Weather: FileName=Birchip2011.met
          SoilArbitrator Soil Arbitrator
          Zone Field: Area=1; Slope=0
            Irrigation
            Fertiliser
            Manager SowingRule
              TOS = 1
              Cultivar = Hartog
```csharp
using System;
using Models.Core;
using Models.PMF;
namespace Models
{
           
    [Serializable] 
    [System.Xml.Serialization.XmlInclude(typeof(Model))]
    public class Script : Model
    {
    
        [Link] Plant Wheat;
        [Link] Clock Clock;
            
        [Description("Time of Sowing")]
        public int TOS { get; set; }

        [Description("Cultivar")]
        public String Cultivar { get; set; }
        
        [EventSubscribe("DoManagement")]
        private void OnDoManagement(object sender, EventArgs e)
        {
            if (((Clock.Today.DayOfYear == 133) && (TOS == 1)) ||
                ((Clock.Today.DayOfYear == 179) && (TOS == 2)))
            {
                Wheat.Sow(population: 100, cultivar: Cultivar, depth: 30, rowSpacing: 250);
            }
        }


    }
}
```
            Operations: same as Validation.SE Queensland.Gatton2011.Gatton2011Base.Field.Operations
            SurfaceOrganicMatter: same as Validation.SE Queensland.APS6.APS6Base.paddock.SurfaceOrganicMatter
            Plant Wheat: CropType=Wheat
            MicroClimate: a_interception=0; b_interception=1; c_interception=0; d_interception=0; soil_albedo=0.3; sun_angle=15; soil_heat_flux_fraction=0.4; night_interception_fraction=0.5; refheight=2; albedo=0.15; emissivity=0.96; RadIntTotal=0
            Report DailyReport
            SoluteManager
            Soil: SoilType=Clay Loam; Site=Jil Jil; NearestTown=Jil Jil; Region=Mallee; State=Victoria; Country=Australia; ApsoilNumber=728; Latitude=-35.8822; Longitude=142.99226; LocationAccuracy=+/- 1000m; Comments=Medium SSC; GPS at paddock scale only; BCG systems trial
              DataSource=Based on Soil Characterisation undertaken by Birchip Cropping Group during 2005
              Water
                Thickness  BD     AirDry  LL15  DUL   SAT
                100        1.33   0.085   0.17  0.36  0.43
                150        1.36   0.168   0.21  0.37  0.44
                150        1.39   0.2     0.2   0.4   0.45
                150        1.415  0.2     0.2   0.41  0.45
                150        1.437  0.2     0.2   0.41  0.45
                300        1.428  0.2     0.2   0.44  0.46
                300        1.41   0.2     0.2   0.46  0.467
                SoilCrop wheatSoil: LL=[0.17, 0.21, 0.25, 0.26, 0.28, 0.34, 0.46]; KL=[0.06, 0.06, 0.04, 0.04, 0.04, 0.04, 0.02]; XF=[1, 1, 0.28, 0.22, 0.17, 0.16, 0]
                SoilCrop barleySoil: LL=[0.17, 0.21, 0.25, 0.26, 0.26, 0.44, 0.46]; KL=[0.07, 0.07, 0.07, 0.07, 0.05, 0.05, 0.03]; XF=[1, 0.5, 0.3, 0.2, 0.2, 0, 0]
              SoilWater: SummerDate=1-Nov; SummerU=6; SummerCona=3.5; WinterDate=1-Apr; WinterU=2; WinterCona=2; DiffusConst=40; DiffusSlope=16; Salb=0.13; CN2Bare=73; CNRed=20; CNCov=0.8; max_pond=0; Thickness=[100, 150, 150, 150, 150, 300, 300]; SWCON=[0.4, 0.4, 0.3, 0.3, 0.3, 0.3, 0.3]; residueinterception=0
              SoilNitrogen: fom_type=[default, manure, mucuna, lablab, shemp, stable]; fract_carb=[0.2, 0.3, 0.54, 0.57, 0.45, 0]; fract_cell=[0.7, 0.3, 0.37, 0.37, 0.47, 0.1]; fract_lign=[0.1, 0.4, 0.09, 0.06, 0.08, 0.9]
              SoilOrganicMatter: RootCN=40; RootWt=1000; SoilCN=12; EnrACoeff=7.4; EnrBCoeff=0.2; OCUnits=Total
                Thickness  OC    FBiom  FInert
                100        1.3   0.05   0.3
                150        1     0.02   0.5
                150        0.3   0.02   0.5
                150        0.2   0.02   0.8
                150        0.05  0.01   0.6
                300        0.01  0.01   0.7
                300        0.01  0.01   0.8
              Analysis: Thickness=[100, 150, 150, 150, 150, 300, 300]; PH=[8.6, 9.4, 9.6, 9.7, 9.7, 9.7, 9.3]; PHUnits=Water; BoronUnits=HotWater
              InitialWater: PercentMethod=FilledFromTop; FractionFull=1
              Sample Initial nitrogen: Thickness=[1500]; NO3=[1]; NH4=[0]; SW=[0]; NO3Units=ppm; NH4Units=ppm; SWUnits=Volumetric; OCUnits=Total; PHUnits=Water
              CERESSoilTemperature
      Experiment Tarlee2011
        Factors
          Factor TOS: Specifications=[SowingRule].Script.TOS = 1, 2
          Factor Cv
            Specifications=[SowingRule].Script.Cultivar = Axe, Bolac, Derrimut, Eaglehawk, Gregory, Lincoln, Mace, Scout
        Simulation Tarlee2011Base
          Clock: StartDate=2011-05-05; EndDate=2011-12-28
          Summary summaryfile
          Weather: FileName=Tarlee2011.met
          SoilArbitrator Soil Arbitrator
          Zone Field: Area=1; Slope=0
            Irrigation
            Fertiliser
            Manager SowingRule
              TOS = 1
              Cultivar = Hartog
```csharp
using System;
using Models.Core;
using Models.PMF;
namespace Models
{
           
    [Serializable] 
    [System.Xml.Serialization.XmlInclude(typeof(Model))]
    public class Script : Model
    {
    
        [Link] Plant Wheat;
        [Link] Clock Clock;
            
        [Description("Time of Sowing")]
        public int TOS { get; set; }

        [Description("Cultivar")]
        public String Cultivar { get; set; }
        
        [EventSubscribe("DoManagement")]
        private void OnDoManagement(object sender, EventArgs e)
        {
            if (((Clock.Today.DayOfYear == 140) && (TOS == 1)) ||
                ((Clock.Today.DayOfYear == 196) && (TOS == 2)))
            {
                Wheat.Sow(population: 100, cultivar: Cultivar, depth: 30, rowSpacing: 250);
            }
        }


    }
}
```
            Operations: same as Validation.SE Queensland.Gatton2011.Gatton2011Base.Field.Operations
            SurfaceOrganicMatter: same as Validation.SE Queensland.APS6.APS6Base.paddock.SurfaceOrganicMatter
            Plant Wheat: CropType=Wheat
            MicroClimate: a_interception=0; b_interception=1; c_interception=0; d_interception=0; soil_albedo=0.3; sun_angle=15; soil_heat_flux_fraction=0.4; night_interception_fraction=0.5; refheight=2; albedo=0.15; emissivity=0.96; RadIntTotal=0
            Report DailyReport
            SoluteManager
            Soil: SoilType=Sandy Loam; Site=Tarlee; NearestTown=Tarlee; Region=Mid North; State=South Australia; Country=Australia; ApsoilNumber=610; Latitude=-34.276; Longitude=138.759; LocationAccuracy=+/- 20m
              DataSource=Characterisation 2008 by University of Adelaide, CSIRO Sustainable Ecosystems and Allan Mayfield Consulting, Clare, SA
              Comments=LB Code:TAR; Strongly duplex low-moderate clay soil. Surface CEC low, moderate below. Texture change at about 7cm. Little chemical impediment to root growth, but high ESP below about 60cm may result in slaking or dispersion and high bulk density. DM Descr
              Water
                Thickness  BD    AirDry  LL15   DUL    SAT
                100        1.54  0.055   0.11   0.223  0.389
                200        1.41  0.167   0.209  0.388  0.438
                300        1.53  0.22    0.22   0.342  0.393
                300        1.57  0.22    0.22   0.293  0.378
                350        1.6   0.22    0.22   0.264  0.366
                SoilCrop wheatSoil: LL=[0.11, 0.209, 0.24, 0.225, 0.222]; KL=[0.06, 0.06, 0.06, 0.04, 0.04]; XF=[1, 1, 1, 1, 1]
              SoilWater: SummerDate=1-Nov; SummerU=6; SummerCona=3.5; WinterDate=1-Apr; WinterU=2; WinterCona=2; DiffusConst=88; DiffusSlope=35; Salb=0.13; CN2Bare=73; CNRed=20; CNCov=0.8; max_pond=0; Thickness=[100, 200, 300, 300, 350]; SWCON=[0.5, 0.5, 0.5, 0.5, 0.5]; residueinterception=0
              SoilNitrogen: fom_type=[default, manure, mucuna, lablab, shemp, stable]; fract_carb=[0.2, 0.3, 0.54, 0.57, 0.45, 0]; fract_cell=[0.7, 0.3, 0.37, 0.37, 0.47, 0.1]; fract_lign=[0.1, 0.4, 0.09, 0.06, 0.08, 0.9]
              SoilOrganicMatter: RootCN=40; RootWt=1000; SoilCN=12; EnrACoeff=7.4; EnrBCoeff=0.2; OCUnits=Total
                Thickness  OC    FBiom  FInert
                100        1.16  0.04   0.4
                200        0.75  0.02   0.5
                300        0.36  0.02   0.7
                300        0.12  0.02   1
                350        0.12  0.01   1
              Analysis: Thickness=[100, 200, 300, 300, 350]; PH=[7, 7.9, 8.9, 9.2, 9.2]; PHUnits=Water; BoronUnits=HotWater
              InitialWater: PercentMethod=FilledFromTop; FractionFull=1
              Sample Initial nitrogen: Thickness=[100]; NO3=[0]; NH4=[0]; SW=[0]; NO3Units=ppm; NH4Units=ppm; SWUnits=Volumetric; OCUnits=Total; PHUnits=Water
              CERESSoilTemperature
      PredictedObserved SAObsPred: PredictedTableName=HarvestReport; ObservedTableName=Observed; FieldNameUsedForMatch=Wheat.Phenology.CurrentStageName
    Folder Europe
      Folder Belgium
        Memo
          This trial was conducted at Lonzee near Gembuloux in Belgium and is described in detail by [Dufranne_Belgium_2011] and [Moureaux_BelgumWheat_2008].  The trial  was run to measure carbon flux from wheat crops using eddy covariance but sufficient crop information was collected to make it suitable as a model validataion dataset also.  Crops of wheat (cultivars 'Dekan', 'Rosario', 'Ararat' for the three respective sowing dates) were sown on 14/10/2004, 13/10/2004 and 13/11/2004.  Standard management practices for winter wheat in this area were followed.  Dates for the timing of key phenological events were used to determine the developmental coefficients for each of the cultivars.
        Simulation Lonzee04
          Clock: StartDate=2004-10-14; EndDate=2005-08-31
          Summary summaryfile
          Weather: FileName=BrusselsSouth.met
          SoilArbitrator Soil Arbitrator
          Zone Field: Area=1; Slope=0
            Irrigation
            Fertiliser
            Operations CropManagement
              2004-10-14  [Wheat].Sow(population:100, cultivar:"Dekan", depth:30, rowSpacing:250);
              2005-03-22  [Fertiliser].Apply(Amount: 45, Type: Fertiliser.Types.NO3N);
              2005-04-12  [Fertiliser].Apply(Amount: 35, Type: Fertiliser.Types.NO3N);
              2005-05-12  [Fertiliser].Apply(Amount: 40.5, Type: Fertiliser.Types.NO3N);
              2005-05-30  [Fertiliser].Apply(Amount: 80, Type: Fertiliser.Types.NO3N);
              2005-08-04  [Wheat].Harvest();
              2005-08-04  [Wheat].EndCrop();
            SurfaceOrganicMatter: PoolName=wheat_stubble; type=wheat; mass=3000; standing_fraction=0; cnr=30; CriticalResidueWeight=2000; OptimumDecompTemp=20; MaxCumulativeEOS=20; CNRatioDecompCoeff=0.277; CNRatioDecompThreshold=25; TotalLeachRain=25; MinRainToLeach=10; CriticalMinimumOrganicC=0.004; DefaultCPRatio=0; DefaultStandingFraction=0; StandingExtinctCoeff=0.5; FractionFaecesAdded=0.5
              Pools:
                {PoolName=wheat_stubble, ResidueType=wheat, Mass=3000, CNRatio=30, StandingFraction=0}
              ResidueTypes: LoadFromResource=ResidueTypes
            Plant Wheat: CropType=Wheat
            MicroClimate: a_interception=0; b_interception=0; c_interception=0.3; d_interception=0; soil_albedo=0.13; sun_angle=15; soil_heat_flux_fraction=0.4; night_interception_fraction=0.5; refheight=2; albedo=0.15; emissivity=0.96; RadIntTotal=0
            Soil: SoilType=APS26Soil; LocalName=APS26Site; Site=APS26Site; NearestTown=Unknown; Region=Lawes; NaturalVegetation=Unknown; Latitude=0; Longitude=0
              Water
                Thickness  BD   AirDry  LL15  DUL   SAT
                100        1.4  0.04    0.15  0.38  0.45
                100        1.4  0.04    0.15  0.38  0.45
                100        1.4  0.06    0.15  0.38  0.45
                100        1.4  0.06    0.15  0.38  0.45
                100        1.4  0.06    0.15  0.38  0.45
                100        1.4  0.06    0.15  0.38  0.45
                100        1.4  0.06    0.15  0.38  0.45
                100        1.4  0.1     0.15  0.38  0.45
                100        1.4  0.1     0.15  0.38  0.45
                100        1.4  0.1     0.15  0.38  0.45
                100        1.4  0.1     0.15  0.38  0.45
                100        1.4  0.1     0.15  0.38  0.45
                100        1.4  0.1     0.15  0.38  0.45
                100        1.4  0.1     0.15  0.38  0.45
                100        1.4  0.1     0.15  0.38  0.45
                SoilCrop WheatSoil
                  LL=[0.15, 0.15, 0.15, 0.15, 0.15, 0.15, 0.15, 0.15, 0.15, 0.15, 0.15, 0.15, 0.15, 0.15, 0.15]
                  KL=[0.1, 0.08, 0.06, 0.06, 0.06, 0.06, 0.06, 0.06, 0.06, 0.06, 0.06, 0.06, 0.06, 0.06, 0.06]
                  XF=[1, 1, 1, 1, 1, 1, 1, 1, 1, 1, 1, 1, 1, 1, 1]
              SoilWater: SummerDate=1-Nov; SummerU=4; SummerCona=2; WinterDate=1-Apr; WinterU=2; WinterCona=2; DiffusConst=40; DiffusSlope=16; Salb=0.13; CN2Bare=72; CNRed=20; CNCov=0.8; slope=0; discharge_width=0; catchment_area=0; max_pond=0; residueinterception=0
                Thickness  SWCON  KLAT
                150        0.4    0
                150        0.4    0
                150        0.4    0
                150        0.4    0
                300        0.4    0
                300        0.4    0
                300        0.4    0
                300        0.4    0
                300        0.4    0
                300        0.4    0
              SoilNitrogen: fom_type=[default, manure, mucuna, lablab, shemp, stable]; fract_carb=[0.2, 0.3, 0.54, 0.57, 0.45, 0]; fract_cell=[0.7, 0.3, 0.37, 0.37, 0.47, 0.1]; fract_lign=[0.1, 0.4, 0.09, 0.06, 0.08, 0.9]
              SoilOrganicMatter: RootCN=40; RootWt=2000; SoilCN=14.5; EnrACoeff=1; EnrBCoeff=1; OCUnits=Total
                Thickness  OC   FBiom  FInert
                100        2    0.06   0.16
                100        1.5  0.04   0.2
                100        1    0.03   0.3
                100        0.5  0.02   0.7
                100        0.3  0.02   0.9
                100        0.2  0.02   0.99
                100        0.2  0.02   0.99
                100        0.1  0.02   0.99
                100        0.1  0.01   0.99
                100        0.1  0.01   0.99
                100        0.1  0.01   0.99
                100        0.1  0.01   0.99
                100        0.1  0.01   0.99
                100        0.1  0.01   0.99
                100        0.1  0.01   0.99
              Analysis: PHUnits=Water; BoronUnits=HotWater
                Thickness=[100, 100, 100, 100, 100, 100, 100, 100, 100, 100, 100, 100, 100, 100, 100]
                PH=[5.8, 5.9, 6.6, 6.8, 7, 7.1, 7.2, 7.3, 7.4, 7.4, 7.6, 7.8, 8, 8.2, 8.3]
              Sample Initial Water: Thickness=[100, 1400]; SW=[0.27, 0.38]; NO3Units=ppm; NH4Units=ppm; SWUnits=Volumetric; OCUnits=Total; PHUnits=Water
              Sample Initial Nitrogen: NO3Units=ppm; NH4Units=ppm; SWUnits=Volumetric; OCUnits=Total; PHUnits=Water
                Thickness  NO3  NH4
                100        30   1
                100        20   1
                100        20   1
                100        20   1
                100        10   1
                100        10   1
                100        5    1
                100        5    1
                100        1    1
                100        1    1
                100        1    1
                100        1    1
                100        1    1
                100        1    1
                100        0    0
              CERESSoilTemperature
            Report HarvestReport
            Report DailyReport
            SoluteManager
        Simulation Lonzee06
          Clock: StartDate=2006-10-13; EndDate=2007-08-31
          Summary summaryfile
          Weather: FileName=BrusselsSouth.met
          SoilArbitrator Soil Arbitrator
          Zone Field: Area=1; Slope=0
            Irrigation
            Fertiliser
            Operations CropManagement
              2006-10-13  [Wheat].Sow(population:100, cultivar:"Rosario", depth:30, rowSpacing:250);
              2007-03-17  [Fertiliser].Apply(Amount: 40, Type: Fertiliser.Types.NO3N);
              2007-04-12  [Fertiliser].Apply(Amount: 60, Type: Fertiliser.Types.NO3N);
              2007-05-08  [Fertiliser].Apply(Amount: 94.5, Type: Fertiliser.Types.NO3N);
              2007-08-06  [Wheat].Harvest();
              2007-08-06  [Wheat].EndCrop();
            SurfaceOrganicMatter: same as Validation.Europe.Belgium.Lonzee04.Field.SurfaceOrganicMatter
            Plant Wheat: CropType=Wheat
            MicroClimate: a_interception=0; b_interception=0; c_interception=0.3; d_interception=0; soil_albedo=0.13; sun_angle=15; soil_heat_flux_fraction=0.4; night_interception_fraction=0.5; refheight=2; albedo=0.15; emissivity=0.96; RadIntTotal=0
            Soil: same as Validation.Europe.Belgium.Lonzee04.Field.Soil
            Report HarvestReport
            Report DailyReport
            SoluteManager
        Simulation Lonzee08
          Clock: StartDate=2008-11-13; EndDate=2009-08-31
          Summary summaryfile
          Weather: FileName=BrusselsSouth.met
          SoilArbitrator Soil Arbitrator
          Zone Field: Area=1; Slope=0
            Irrigation
            Fertiliser
            Operations CropManagement
              2008-11-13  [Wheat].Sow(population:100, cultivar:"Ararat", depth:30, rowSpacing:250);
              2009-03-18  [Fertiliser].Apply(Amount: 80, Type: Fertiliser.Types.NO3N);
              2009-04-24  [Fertiliser].Apply(Amount: 40, Type: Fertiliser.Types.NO3N);
              2009-05-28  [Fertiliser].Apply(Amount: 90, Type: Fertiliser.Types.NO3N);
              2009-08-08  [Wheat].Harvest();
              2009-08-08  [Wheat].EndCrop();
            SurfaceOrganicMatter: same as Validation.Europe.Belgium.Lonzee04.Field.SurfaceOrganicMatter
            Plant Wheat: CropType=Wheat
            MicroClimate: a_interception=0; b_interception=0; c_interception=0.3; d_interception=0; soil_albedo=0.13; sun_angle=15; soil_heat_flux_fraction=0.4; night_interception_fraction=0.5; refheight=2; albedo=0.15; emissivity=0.96; RadIntTotal=0
            Soil: same as Validation.Europe.Belgium.Lonzee04.Field.Soil
            Report DailyReport
            Report HarvestReport
            SoluteManager
    Folder NorthAmerica
      Folder Arizona
        Memo
          These FACE trials were conducted to investigate the effects of atmospheric CO2 concentrations and water stress on wheat growth and development [Hanksar_1996_FACE].  It was conducted at Maricopa, Arazona using Free Air Carbon Enrichment to create elevated CO2 treatments:

          1. Normal CO2  (370 ppm) (that is no longer normal)
          2. High CO2 (550 ppm)

          Irrigation treatmetnts were also applied with:

          1. High Irrigation (~600 mm)
          2. Low irrigation (~265 mm)

          Crop development, Biomass production and soil moisture were monitored throughout the crops duration.
        Experiment ArizonaFACE92
          Memo
            This trial was conducted to investigate the effects of atmospheric CO2 concentrations and water stress on wheat growth and development [Hanksar_1996_FACE].  It was conducted at Maricopa, Arazona using Free Air Carbon Enrichment to create elevated CO2 treatments:

            1. Normal CO2  (370 ppm) (that is no longer normal)
            2. High CO2 (550 ppm)

            Irrigation treatmetnts were also applied with:

            1. High Irrigation (~600 mm)
            2. Low irrigation (~265 mm)

            Crop development, Biomass production and soil moisture were monitored throughout the crops duration.
          Factors
            Factor CO2: Specifications=[SetCO2]
              Manager Normal
                CO2 = 350
```csharp
using System;
using Models.Core;
using APSIM.Shared.Utilities;



using System.Collections.Generic;
using System.Text;
using Models.PMF;
using Models;
using System.Xml.Serialization;

namespace Models
{
    [Serializable] 
    [System.Xml.Serialization.XmlInclude(typeof(Model))]
    public class Script : Model
    {
        [Link] Weather Met;
        [Link] Clock Clock;
    
        [Description("CO2 conc")]
        public double CO2 { get; set; }
    
        
        [EventSubscribe("PreparingNewWeatherData")]
        private void OnPreparingNewWeatherData(object sender, EventArgs e)
        {
            Met.CO2 = CO2;        
        }
    }
}
```
              Manager High
                CO2 = 550
                script: same as in Validation.NorthAmerica.Arizona.ArizonaFACE92.Factors.CO2.Normal
            Factor Irr: Specifications=[IrrigationSchedule]
              Operations Wet
                1992-12-18  [Irrigation].Apply(amount:300);
                1993-01-30  [Irrigation].Apply(amount:30);
                1993-01-31  [Irrigation].Apply(amount:7);
                1993-03-01  [Irrigation].Apply(amount:12);
                1993-03-09  [Irrigation].Apply(amount:60);
                1993-03-18  [Irrigation].Apply(amount:34);
                1993-03-25  [Irrigation].Apply(amount:50);
                1993-04-05  [Irrigation].Apply(amount:54);
                1993-04-06  [Irrigation].Apply(amount:4);
                1993-04-12  [Irrigation].Apply(amount:47);
                1993-04-17  [Irrigation].Apply(amount:38);
                1993-04-18  [Irrigation].Apply(amount:6);
                1993-04-21  [Irrigation].Apply(amount:36);
                1993-04-26  [Irrigation].Apply(amount:48);
                1993-04-27  [Irrigation].Apply(amount:6);
                1993-04-30  [Irrigation].Apply(amount:42);
                1993-05-05  [Irrigation].Apply(amount:41);
                1993-05-10  [Irrigation].Apply(amount:41);
                1993-05-11  [Irrigation].Apply(amount:4);
                1993-05-14  [Irrigation].Apply(amount:41);
              Operations Dry
                1992-12-18  [Irrigation].Apply(amount:300);
                1993-01-30  [Irrigation].Apply(amount:30);
                1993-01-31  [Irrigation].Apply(amount:7);
                1993-03-18  [Irrigation].Apply(amount:17);
                1993-03-25  [Irrigation].Apply(amount:15);
                1993-04-05  [Irrigation].Apply(amount:27);
                1993-04-06  [Irrigation].Apply(amount:4);
                1993-04-12  [Irrigation].Apply(amount:18);
                1993-04-17  [Irrigation].Apply(amount:16);
                1993-04-18  [Irrigation].Apply(amount:6);
                1993-04-21  [Irrigation].Apply(amount:18);
                1993-04-26  [Irrigation].Apply(amount:24);
                1993-04-27  [Irrigation].Apply(amount:6);
                1993-04-30  [Irrigation].Apply(amount:21);
                1993-05-05  [Irrigation].Apply(amount:20);
                1993-05-10  [Irrigation].Apply(amount:20);
                1993-05-11  [Irrigation].Apply(amount:4);
                1993-05-14  [Irrigation].Apply(amount:20);
          Simulation FACE92
            Clock: StartDate=1992-12-14; EndDate=1993-05-30
            Summary summaryfile
            Weather: FileName=Maricopa9293.met
            SoilArbitrator Soil Arbitrator
            Zone Field: Area=1; Slope=0
              Irrigation
              Fertiliser
              Soil: Latitude=0; Longitude=0
                Water
                  Thickness  BD    AirDry  LL15  DUL   SAT
                  50         1.31  0.03    0.15  0.3   0.42
                  100        1.27  0.03    0.15  0.3   0.42
                  150        1.27  0.15    0.15  0.3   0.42
                  200        1.3   0.15    0.15  0.3   0.42
                  100        1.47  0.15    0.15  0.3   0.39
                  100        1.47  0.15    0.15  0.3   0.39
                  200        1.57  0.15    0.15  0.3   0.36
                  200        1.57  0.16    0.16  0.28  0.35
                  100        1.57  0.16    0.16  0.28  0.35
                  100        1.57  0.16    0.16  0.28  0.35
                  200        1.57  0.14    0.14  0.25  0.34
                  200        1.57  0.14    0.14  0.25  0.34
                  200        1.57  0.13    0.13  0.24  0.33
                  200        1.57  0.13    0.13  0.24  0.33
                  SoilCrop WheatSoil
                    LL=[0.15, 0.15, 0.15, 0.15, 0.15, 0.15, 0.15, 0.16, 0.16, 0.16, 0.14, 0.14, 0.13, 0.13]
                    KL=[0.06, 0.06, 0.06, 0.06, 0.06, 0.06, 0.06, 0.06, 0.06, 0.06, 0.06, 0.06, 0.06, 0.06]
                    XF=[1, 1, 1, 1, 1, 1, 1, 1, 1, 1, 1, 1, 1, 1]
                SoilWater: SummerDate=1-Nov; SummerU=6; SummerCona=2; WinterDate=1-Apr; WinterU=6; WinterCona=2; DiffusConst=88; DiffusSlope=35.4; Salb=0.13; CN2Bare=60; CNRed=20; CNCov=0.8; slope=0; discharge_width=0; catchment_area=0; max_pond=0; residueinterception=0
                  Thickness  SWCON  KLAT
                  50         0.34   0
                  100        0.34   0
                  150        0.34   0
                  200        0.34   0
                  100        0.34   0
                  100        0.34   0
                  200        0.3    0
                  200        0.25   0
                  100        0.25   0
                  100        0.25   0
                  200        0.2    0
                  200        0.2    0
                  200        0.18   0
                  200        0.18   0
                SoilNitrogen: fom_type=[default, manure, mucuna, lablab, shemp, stable]; fract_carb=[0.2, 0.3, 0.54, 0.57, 0.45, 0]; fract_cell=[0.7, 0.3, 0.37, 0.37, 0.47, 0.1]; fract_lign=[0.1, 0.4, 0.09, 0.06, 0.08, 0.9]
                SoilOrganicMatter: RootCN=20; RootWt=1500; SoilCN=15; EnrACoeff=1; EnrBCoeff=1; OCUnits=Total
                  Thickness  OC    FBiom  FInert
                  50         0.41  0.04   0.31
                  100        0.35  0.04   0.31
                  150        0.27  0.03   0.31
                  200        0.24  0.02   0.31
                  100        0.16  0.01   0.31
                  100        0.16  0.01   0.31
                  200        0.3   0.01   0.25
                  200        0.1   0.01   0.2
                  100        0.1   0.01   0.2
                  100        0.1   0.01   0.2
                  200        0.1   0.01   0.2
                  200        0.1   0.01   0.2
                  200        0.1   0.01   0.17
                  200        0.1   0.01   0.17
                Analysis: PHUnits=Water; BoronUnits=HotWater
                  Thickness=[50, 100, 150, 200, 100, 100, 200, 200, 100, 100, 200, 200, 200, 200]
                  PH=[8.5, 8.5, 8.5, 8.6, 8.6, 8.6, 8.6, 8.6, 8.6, 8.6, 8.6, 8.6, 8.6, 8.6]
                Sample Initial Water: NO3Units=ppm; NH4Units=ppm; SWUnits=Volumetric; OCUnits=Total; PHUnits=Water
                  Thickness=[50, 100, 150, 200, 100, 100, 200, 200, 100, 100, 200, 200, 200, 200]
                  SW=[0.223, 0.223, 0.223, 0.228, 0.202, 0.202, 0.198, 0.192, 0.185, 0.185, 0.189, 0.19, 0.198, 0.196]
                Sample Initial Nitrogen: NO3Units=ppm; NH4Units=ppm; SWUnits=Volumetric; OCUnits=Total; PHUnits=Water
                  Thickness  NO3   NH4
                  50         24.9  0.8
                  100        24.9  0.8
                  150        16    0.6
                  200        9.8   0.4
                  100        9.8   0.4
                  100        2.1   0.2
                  200        2.1   0.2
                  200        2.1   0.2
                  100        2.1   0.2
                  100        0.2   0.2
                  200        0.2   0.2
                  200        0.2   0.2
                  200        0.2   0.2
                  200        0.2   0.2
                CERESSoilTemperature
              Operations Sowing
                1992-12-15  [Wheat].Sow(population: 140, cultivar: "Yecora", depth: 30, rowSpacing: 250);
                1992-12-16  [Fertiliser].Apply(Amount: 40, Type: Fertiliser.Types.NO3N);
                1992-12-17  [Fertiliser].Apply(Amount: 20, Type: Fertiliser.Types.NO3N);
                1993-01-30  [Fertiliser].Apply(Amount: 13, Type: Fertiliser.Types.NO3N);
                1993-01-31  [Fertiliser].Apply(Amount: 10, Type: Fertiliser.Types.NO3N);
                1993-02-01  [Fertiliser].Apply(Amount: 92, Type: Fertiliser.Types.NO3N);
                1993-03-18  [Fertiliser].Apply(Amount: 66, Type: Fertiliser.Types.NO3N);
                1993-03-19  [Fertiliser].Apply(Amount: 10, Type: Fertiliser.Types.NO3N);
                1993-04-05  [Fertiliser].Apply(Amount: 81, Type: Fertiliser.Types.NO3N);
                1993-05-20  [Wheat].Harvest();
                1993-05-20  [Wheat].EndCrop();
              SurfaceOrganicMatter: same as Validation.SE Queensland.APS6.APS6Base.paddock.SurfaceOrganicMatter
              Plant Wheat: CropType=Wheat
              MicroClimate: a_interception=0; b_interception=1; c_interception=0; d_interception=0; soil_albedo=0.3; sun_angle=15; soil_heat_flux_fraction=0.4; night_interception_fraction=0.5; refheight=2; albedo=0.15; emissivity=0.96; RadIntTotal=0
              Operations IrrigationSchedule
              Report HarvestReport
              Report DailyReport
              Manager SetCO2
                CO2 = 0
```csharp
using System;
using Models.Core;
using APSIM.Shared.Utilities;



using System.Collections.Generic;
using System.Text;
using Models.PMF;
using Models;
using System.Xml.Serialization;

namespace Models
{
    [Serializable] 
    [System.Xml.Serialization.XmlInclude(typeof(Model))]
    public class Script : Model
    {
        [Link] Weather Met;
        [Link] Clock Clock;
        [Link] Zone zone;
    
        [Description("CO2 conc")]
        public double CO2 { get; set; }
    
        
        [EventSubscribe("PreparingNewWeatherData")]
        private void OnPreparingNewWeatherData(object sender, EventArgs e)
        {
            zone.Set("Weather.CO2", CO2);
        }
    }
}
```
              Report SupReport
                VariableNames:
                  [Clock].Today
                  ([Wheat].Leaf.Transpiration + [Soil].SoilWater.Es + [MicroClimate].interception) as ET
                  sum([Soil].SoilWater.SWmm[1:7]) as TopSoilWater
                EventNames:
                  [Clock].DoReport
              SoluteManager
        Experiment ArizonaFACE93
          Factors
            Factor CO2: same as Validation.NorthAmerica.Arizona.ArizonaFACE92.Factors.CO2
            Factor Irr: Specifications=[IrrigationSchedule]
              Operations Wet
                1993-12-13  [Irrigation].Apply(amount:13);
                1993-12-17  [Irrigation].Apply(amount:17);
                1994-01-21  [Irrigation].Apply(amount:30);
                1994-02-03  [Irrigation].Apply(amount:30);
                1994-02-23  [Irrigation].Apply(amount:35);
                1994-03-04  [Irrigation].Apply(amount:30);
                1994-03-16  [Irrigation].Apply(amount:36);
                1994-03-21  [Irrigation].Apply(amount:25);
                1994-03-28  [Irrigation].Apply(amount:30);
                1994-04-04  [Irrigation].Apply(amount:30);
                1994-04-08  [Irrigation].Apply(amount:50);
                1994-04-14  [Irrigation].Apply(amount:50);
                1994-04-19  [Irrigation].Apply(amount:50);
                1994-04-25  [Irrigation].Apply(amount:50);
                1994-04-30  [Irrigation].Apply(amount:7);
                1994-05-04  [Irrigation].Apply(amount:60);
                1994-05-10  [Irrigation].Apply(amount:48);
                1994-05-16  [Irrigation].Apply(amount:38);
              Operations Dry
                1993-12-13  [Irrigation].Apply(amount:13);
                1993-12-17  [Irrigation].Apply(amount:17);
                1994-02-03  [Irrigation].Apply(amount:30);
                1994-03-16  [Irrigation].Apply(amount:30);
                1994-03-28  [Irrigation].Apply(amount:30);
                1994-04-08  [Irrigation].Apply(amount:50);
                1994-04-19  [Irrigation].Apply(amount:50);
                1994-04-30  [Irrigation].Apply(amount:7);
                1994-05-04  [Irrigation].Apply(amount:60);
          Simulation FACE93
            Clock: StartDate=1993-12-07; EndDate=1994-05-31
            Summary summaryfile
            Weather: FileName=Maricopa9394.met
            SoilArbitrator Soil Arbitrator
            Zone Field: Area=1; Slope=0
              Irrigation
              Fertiliser
              Soil: Latitude=0; Longitude=0
                Water: same as Validation.NorthAmerica.Arizona.ArizonaFACE92.FACE92.Field.Soil.Water
                SoilWater: SummerDate=1-Nov; SummerU=12; SummerCona=4; WinterDate=1-Apr; WinterU=6; WinterCona=2; DiffusConst=88; DiffusSlope=35.4; Salb=0.13; CN2Bare=60; CNRed=20; CNCov=0.8; slope=0; discharge_width=0; catchment_area=0; max_pond=0; residueinterception=0
                  Thickness  SWCON  KLAT
                  50         0.34   0
                  100        0.34   0
                  150        0.34   0
                  200        0.34   0
                  100        0.34   0
                  100        0.34   0
                  200        0.3    0
                  200        0.25   0
                  100        0.25   0
                  100        0.25   0
                  200        0.2    0
                  200        0.2    0
                  200        0.18   0
                  200        0.18   0
                SoilNitrogen: fom_type=[default, manure, mucuna, lablab, shemp, stable]; fract_carb=[0.2, 0.3, 0.54, 0.57, 0.45, 0]; fract_cell=[0.7, 0.3, 0.37, 0.37, 0.47, 0.1]; fract_lign=[0.1, 0.4, 0.09, 0.06, 0.08, 0.9]
                SoilOrganicMatter: same as Validation.NorthAmerica.Arizona.ArizonaFACE92.FACE92.Field.Soil.SoilOrganicMatter
                Analysis: PHUnits=Water; BoronUnits=HotWater
                  Thickness=[50, 100, 150, 200, 100, 100, 200, 200, 100, 100, 200, 200, 200, 200]
                  PH=[8.5, 8.5, 8.5, 8.6, 8.6, 8.6, 8.6, 8.6, 8.6, 8.6, 8.6, 8.6, 8.6, 8.6]
                Sample Initial Water: NO3Units=ppm; NH4Units=ppm; SWUnits=Volumetric; OCUnits=Total; PHUnits=Water
                  Thickness=[50, 100, 150, 200, 100, 100, 200, 200, 100, 100, 200, 200, 200, 200]
                  SW=[0.302, 0.302, 0.302, 0.286, 0.217, 0.217, 0.186, 0.2, 0.199, 0.199, 0.197, 0.204, 0.208, 0.209]
                Sample Initial Nitrogen: NO3Units=ppm; NH4Units=ppm; SWUnits=Volumetric; OCUnits=Total; PHUnits=Water
                  Thickness  NO3   NH4
                  50         4.2   0.7
                  100        4.2   0.7
                  150        12    0.6
                  200        10.6  0.3
                  100        10.6  0.3
                  100        3.4   0.2
                  200        3.4   0.2
                  200        3.4   0.2
                  100        3.4   0.2
                  100        3.4   0.2
                  200        3.4   0.2
                  200        3.4   0.2
                  200        3.4   0.2
                  200        3.4   0.2
                CERESSoilTemperature
              Operations Sowing
                1993-12-21  [Wheat].Sow(population: 186, cultivar: "Yecora", depth: 30, rowSpacing: 250);
                1993-12-07  [Fertiliser].Apply(Amount: 54, Type: Fertiliser.Types.NO3N);
                1993-12-08  [Fertiliser].Apply(Amount: 10, Type: Fertiliser.Types.NO3N);
                1994-02-04  [Fertiliser].Apply(Amount: 92, Type: Fertiliser.Types.NO3N);
                1994-02-05  [Fertiliser].Apply(Amount: 10, Type: Fertiliser.Types.NO3N);
                1994-03-16  [Fertiliser].Apply(Amount: 69, Type: Fertiliser.Types.NO3N);
                1994-03-17  [Fertiliser].Apply(Amount: 10, Type: Fertiliser.Types.NO3N);
                1994-04-08  [Fertiliser].Apply(Amount: 46, Type: Fertiliser.Types.NO3N);
                1994-05-31  [Wheat].Harvest();
                1994-05-31  [Wheat].EndCrop();
              SurfaceOrganicMatter: same as Validation.SE Queensland.APS6.APS6Base.paddock.SurfaceOrganicMatter
              Plant Wheat: CropType=Wheat
              MicroClimate: a_interception=0; b_interception=1; c_interception=0; d_interception=0; soil_albedo=0.3; sun_angle=15; soil_heat_flux_fraction=0.4; night_interception_fraction=0.5; refheight=2; albedo=0.15; emissivity=0.96; RadIntTotal=0
              Operations IrrigationSchedule
              Operations Dummy
              Report DailyReport
              Report HarvestReport
              Manager ClimateControl
                StartDate = 2013-04-01
                EndDate = 2014-05-01
                script: same as in Validation.New Zealand.Lincoln9192.LincolnBase.paddock.ClimateControl
              Manager SetCO2: same as Validation.NorthAmerica.Arizona.ArizonaFACE92.FACE92.Field.SetCO2
              Report SupReport
                VariableNames:
                  [Clock].Today
                  ([Wheat].Leaf.Transpiration + [Soil].SoilWater.Es + [MicroClimate].interception) as ET
                  sum([Soil].SoilWater.SWmm[1:7]) as TopSoilWater
                EventNames:
                  [Clock].DoReport
              SoluteManager
    Folder China
      Folder ChinaFlux
        Simulation Yucheng02
          Clock: StartDate=2002-10-01; EndDate=2003-06-15
          Summary summaryfile
          Weather: FileName=Yucheng.met
          SoilArbitrator Soil Arbitrator
          Zone Field: Area=1; Slope=0
            Irrigation
            Fertiliser
            Operations CropManagement
              2002-10-15  [Wheat].Sow(population:100, cultivar:"Keyu13", depth:30, rowSpacing:250);
              2002-10-15  [Fertiliser].Apply(Amount: 182.5, Type: Fertiliser.Types.NO3N);
            SurfaceOrganicMatter: same as Validation.Southern Australia.YarrabahCreek.YarrabahCreek.Field.SurfaceOrganicMatter
            Plant Wheat: CropType=Wheat
            MicroClimate: a_interception=0; b_interception=0; c_interception=0.3; d_interception=0; soil_albedo=0.13; sun_angle=15; soil_heat_flux_fraction=0.4; night_interception_fraction=0.5; refheight=2; albedo=0.15; emissivity=0.96; RadIntTotal=0
            Soil: SoilType=APS26Soil; LocalName=APS26Site; Site=APS26Site; NearestTown=Unknown; Region=Lawes; NaturalVegetation=Unknown; Latitude=0; Longitude=0
              Water
                Thickness  BD    AirDry  LL15  DUL   SAT
                100        1.37  0.04    0.06  0.28  0.4
                100        1.5   0.04    0.08  0.32  0.4
                100        1.46  0.06    0.1   0.32  0.448
                100        1.42  0.06    0.15  0.3   0.45
                100        1.42  0.06    0.2   0.3   0.45
                100        1.41  0.06    0.25  0.32  0.46
                100        1.4   0.06    0.28  0.35  0.45
                100        1.41  0.1     0.28  0.35  0.45
                100        1.4   0.1     0.3   0.37  0.45
                100        1.46  0.1     0.28  0.41  0.449
                100        1.4   0.1     0.26  0.41  0.47
                100        1.49  0.1     0.32  0.4   0.43
                100        1.5   0.1     0.35  0.4   0.43
                100        1.46  0.1     0.37  0.4   0.44
                100        1.45  0.1     0.37  0.4   0.45
                SoilCrop WheatSoil
                  LL=[0.06, 0.08, 0.1, 0.15, 0.2, 0.25, 0.28, 0.28, 0.3, 0.28, 0.26, 0.32, 0.35, 0.37, 0.37]
                  KL=[0.06, 0.06, 0.06, 0.06, 0.06, 0.06, 0.06, 0.06, 0.06, 0.06, 0.06, 0.06, 0.06, 0.06, 0.06]
                  XF=[1, 1, 1, 1, 1, 0.8, 0.6, 0.4, 0.4, 0.4, 0.4, 0.4, 0.4, 0.4, 0.4]
              SoilWater: SummerDate=1-Nov; SummerU=4; SummerCona=2; WinterDate=1-Apr; WinterU=1; WinterCona=1; DiffusConst=40; DiffusSlope=16; Salb=0.13; CN2Bare=72; CNRed=20; CNCov=0.8; slope=0; discharge_width=0; catchment_area=0; max_pond=0; residueinterception=0
                Thickness  SWCON  KLAT
                150        0.4    0
                150        0.4    0
                150        0.4    0
                150        0.4    0
                300        0.4    0
                300        0.4    0
                300        0.4    0
                300        0.4    0
                300        0.4    0
                300        0.4    0
              SoilNitrogen: fom_type=[default, manure, mucuna, lablab, shemp, stable]; fract_carb=[0.2, 0.3, 0.54, 0.57, 0.45, 0]; fract_cell=[0.7, 0.3, 0.37, 0.37, 0.47, 0.1]; fract_lign=[0.1, 0.4, 0.09, 0.06, 0.08, 0.9]
              SoilOrganicMatter: RootCN=40; RootWt=2000; SoilCN=14.5; EnrACoeff=1; EnrBCoeff=1; OCUnits=Total
                Thickness  OC    FBiom  FInert
                100        0.83  0.04   0.36
                100        0.35  0.03   0.35
                100        0.33  0.03   0.45
                100        0.22  0.02   0.45
                100        0.22  0.02   0.59
                100        0.22  0.02   0.6
                100        0.19  0.02   0.84
                100        0.17  0.02   0.8
                100        0.15  0.01   0.8
                100        0.12  0.01   0.99
                100        0.11  0.01   0.99
                100        0.1   0.01   0.99
                100        0.1   0.01   0.99
                100        0.1   0.01   0.99
                100        0.1   0.01   0.99
              Analysis: PHUnits=Water; BoronUnits=HotWater
                Thickness=[100, 100, 100, 100, 100, 100, 100, 100, 100, 100, 100, 100, 100, 100, 100]
                PH=[5.8, 5.9, 6.6, 6.8, 7, 7.1, 7.2, 7.3, 7.4, 7.4, 7.6, 7.8, 8, 8.2, 8.3]
              Sample Initial Water: NO3Units=ppm; NH4Units=ppm; SWUnits=Volumetric; OCUnits=Total; PHUnits=Water
                Thickness=[100, 100, 100, 100, 100, 100, 100, 100, 100, 100, 100, 100, 100, 100, 100]
                SW=[0.27, 0.28, 0.23, 0.24, 0.26, 0.3, 0.3, 0.32, 0.35, 0.32, 0.32, 0.37, 0.39, 0.39, 0.39]
              Sample Initial Nitrogen: NO3Units=ppm; NH4Units=ppm; SWUnits=Volumetric; OCUnits=Total; PHUnits=Water
                Thickness  NO3  NH4
                100        10   1
                100        15   1
                100        10   1
                100        8    1
                100        5    1
                100        2    1
                100        1    1
                100        1    1
                100        1    1
                100        1    1
                100        1    1
                100        1    1
                100        1    1
                100        1    1
                100        0    0
              CERESSoilTemperature
            Report DailyReport
            Report HarvestReport
            Manager Harvesting: same as Validation.SE Queensland.APS26.APS26NRate160WaterWet.paddock.Harvesting
            SoluteManager
        Simulation Yucheng03
          Clock: StartDate=2003-10-20; EndDate=2004-06-15
          Summary summaryfile
          Weather: FileName=Yucheng.met
          SoilArbitrator Soil Arbitrator
          Zone Field: Area=1; Slope=0
            Irrigation
            Fertiliser
            Operations CropManagement
              2003-10-23  [Wheat].Sow(population:100, cultivar:"Keyu13", depth:30, rowSpacing:250);
              2003-10-23  [Fertiliser].Apply(Amount: 215.3, Type: Fertiliser.Types.NO3N);
            SurfaceOrganicMatter: same as Validation.Southern Australia.YarrabahCreek.YarrabahCreek.Field.SurfaceOrganicMatter
            Plant Wheat: CropType=Wheat
            MicroClimate: a_interception=0; b_interception=0; c_interception=0.3; d_interception=0; soil_albedo=0.13; sun_angle=15; soil_heat_flux_fraction=0.4; night_interception_fraction=0.5; refheight=2; albedo=0.15; emissivity=0.96; RadIntTotal=0
            Soil: SoilType=APS26Soil; LocalName=APS26Site; Site=APS26Site; NearestTown=Unknown; Region=Lawes; NaturalVegetation=Unknown; Latitude=0; Longitude=0
              Water: same as Validation.China.ChinaFlux.Yucheng02.Field.Soil.Water
              SoilWater: same as Validation.China.ChinaFlux.Yucheng02.Field.Soil.SoilWater
              SoilNitrogen: fom_type=[default, manure, mucuna, lablab, shemp, stable]; fract_carb=[0.2, 0.3, 0.54, 0.57, 0.45, 0]; fract_cell=[0.7, 0.3, 0.37, 0.37, 0.47, 0.1]; fract_lign=[0.1, 0.4, 0.09, 0.06, 0.08, 0.9]
              SoilOrganicMatter: same as Validation.China.ChinaFlux.Yucheng02.Field.Soil.SoilOrganicMatter
              Analysis: PHUnits=Water; BoronUnits=HotWater
                Thickness=[100, 100, 100, 100, 100, 100, 100, 100, 100, 100, 100, 100, 100, 100, 100]
                PH=[5.8, 5.9, 6.6, 6.8, 7, 7.1, 7.2, 7.3, 7.4, 7.4, 7.6, 7.8, 8, 8.2, 8.3]
              Sample Initial Water: NO3Units=ppm; NH4Units=ppm; SWUnits=Volumetric; OCUnits=Total; PHUnits=Water
                Thickness=[100, 100, 100, 100, 100, 100, 100, 100, 100, 100, 100, 100, 100, 100, 100]
                SW=[0.2, 0.28, 0.3, 0.3, 0.31, 0.33, 0.35, 0.37, 0.4, 0.42, 0.42, 0.42, 0.41, 0.41, 0.41]
              Sample Initial Nitrogen: same as Validation.China.ChinaFlux.Yucheng02.Field.Soil.Initial Nitrogen
              CERESSoilTemperature
            Report DailyReport
            Report HarvestReport
            Manager Harvesting: same as Validation.SE Queensland.APS26.APS26NRate160WaterWet.paddock.Harvesting
            SoluteManager
        Simulation Yucheng04
          Clock: StartDate=2004-10-13; EndDate=2005-06-15
          Summary summaryfile
          Weather: FileName=Yucheng.met
          SoilArbitrator Soil Arbitrator
          Zone Field: Area=1; Slope=0
            Irrigation
            Fertiliser
            Operations CropManagement
              2004-10-14  [Wheat].Sow(population:100, cultivar:"Keyu13", depth:30, rowSpacing:250);
              2004-10-14  [Fertiliser].Apply(Amount: 195.5, Type: Fertiliser.Types.NO3N);
            SurfaceOrganicMatter: same as Validation.Southern Australia.YarrabahCreek.YarrabahCreek.Field.SurfaceOrganicMatter
            Plant Wheat: CropType=Wheat
            MicroClimate: a_interception=0; b_interception=0; c_interception=0.3; d_interception=0; soil_albedo=0.13; sun_angle=15; soil_heat_flux_fraction=0.4; night_interception_fraction=0.5; refheight=2; albedo=0.15; emissivity=0.96; RadIntTotal=0
            Soil: SoilType=APS26Soil; LocalName=APS26Site; Site=APS26Site; NearestTown=Unknown; Region=Lawes; NaturalVegetation=Unknown; Latitude=0; Longitude=0
              Water: same as Validation.China.ChinaFlux.Yucheng02.Field.Soil.Water
              SoilWater: same as Validation.China.ChinaFlux.Yucheng02.Field.Soil.SoilWater
              SoilNitrogen: fom_type=[default, manure, mucuna, lablab, shemp, stable]; fract_carb=[0.2, 0.3, 0.54, 0.57, 0.45, 0]; fract_cell=[0.7, 0.3, 0.37, 0.37, 0.47, 0.1]; fract_lign=[0.1, 0.4, 0.09, 0.06, 0.08, 0.9]
              SoilOrganicMatter: same as Validation.China.ChinaFlux.Yucheng02.Field.Soil.SoilOrganicMatter
              Analysis: PHUnits=Water; BoronUnits=HotWater
                Thickness=[100, 100, 100, 100, 100, 100, 100, 100, 100, 100, 100, 100, 100, 100, 100]
                PH=[5.8, 5.9, 6.6, 6.8, 7, 7.1, 7.2, 7.3, 7.4, 7.4, 7.6, 7.8, 8, 8.2, 8.3]
              Sample Initial Water: NO3Units=ppm; NH4Units=ppm; SWUnits=Volumetric; OCUnits=Total; PHUnits=Water
                Thickness=[100, 100, 100, 100, 100, 100, 100, 100, 100, 100, 100, 100, 100, 100, 100]
                SW=[0.17, 0.26, 0.27, 0.27, 0.28, 0.31, 0.34, 0.35, 0.37, 0.4, 0.4, 0.39, 0.39, 0.39, 0.39]
              Sample Initial Nitrogen: same as Validation.China.ChinaFlux.Yucheng02.Field.Soil.Initial Nitrogen
              CERESSoilTemperature
            Report DailyReport
            Report HarvestReport
            Manager Harvesting: same as Validation.SE Queensland.APS26.APS26NRate160WaterWet.paddock.Harvesting
            SoluteManager
    Folder Iran
      Simulation Gorgan05
        Clock: StartDate=2005-12-16; EndDate=2006-06-15
        Summary summaryfile
        Weather: FileName=Gorgan.met
        SoilArbitrator Soil Arbitrator
        Zone Field: Area=1; Slope=0
          Irrigation
          Fertiliser
          Operations CropManagement
            2005-12-16  [Wheat].Sow(population:100, cultivar:"Gorgan", depth:30, rowSpacing:250);
            2005-12-16  [Fertiliser].Apply(Amount: 200, Type: Fertiliser.Types.NO3N);
          SurfaceOrganicMatter: same as Validation.Southern Australia.YarrabahCreek.YarrabahCreek.Field.SurfaceOrganicMatter
          Plant Wheat: CropType=Wheat
          MicroClimate: a_interception=0; b_interception=0; c_interception=0.3; d_interception=0; soil_albedo=0.13; sun_angle=15; soil_heat_flux_fraction=0.4; night_interception_fraction=0.5; refheight=2; albedo=0.15; emissivity=0.96; RadIntTotal=0
          Soil: SoilType=APS26Soil; LocalName=APS26Site; Site=APS26Site; NearestTown=Unknown; Region=Lawes; NaturalVegetation=Unknown; Latitude=0; Longitude=0
            Water: same as Validation.China.ChinaFlux.Yucheng02.Field.Soil.Water
            SoilWater: same as Validation.Europe.Belgium.Lonzee04.Field.Soil.SoilWater
            SoilNitrogen: fom_type=[default, manure, mucuna, lablab, shemp, stable]; fract_carb=[0.2, 0.3, 0.54, 0.57, 0.45, 0]; fract_cell=[0.7, 0.3, 0.37, 0.37, 0.47, 0.1]; fract_lign=[0.1, 0.4, 0.09, 0.06, 0.08, 0.9]
            SoilOrganicMatter: same as Validation.China.ChinaFlux.Yucheng02.Field.Soil.SoilOrganicMatter
            Analysis: PHUnits=Water; BoronUnits=HotWater
              Thickness=[100, 100, 100, 100, 100, 100, 100, 100, 100, 100, 100, 100, 100, 100, 100]
              PH=[5.8, 5.9, 6.6, 6.8, 7, 7.1, 7.2, 7.3, 7.4, 7.4, 7.6, 7.8, 8, 8.2, 8.3]
            Sample Initial Water: same as Validation.China.ChinaFlux.Yucheng02.Field.Soil.Initial Water
            Sample Initial Nitrogen: same as Validation.China.ChinaFlux.Yucheng02.Field.Soil.Initial Nitrogen
            CERESSoilTemperature
          Report DailyReport
          Report HarvestReport
          Manager Harvesting: same as Validation.SE Queensland.APS26.APS26NRate160WaterWet.paddock.Harvesting
          SoluteManager
    Folder Africa
      Memo
        This trial was run in the Jamma district of the Amhara region of the Ethiopia country of the Africa contenentand is described in full by [Getu_AfricaWheat_2012].  'HAR 1685' Wheat was sown in 20 cm row spacing.  Different N fertiliser treatments were applied:

        1. 0NUSG  = 0kg N/ha
        2. 23NUSG = 23 kg N/ha as Urea Super Granules (a slow release urea product)
        3. 46NUSG = 46 kg N/ha as Urea Super Granules
        4. 69NUSG = 69  kg N/ha as Urea Super Granules
        5. 46NUC = 46 kg N/ha as Uncoated Urea
      Experiment Jamma
        Memo
          ;From

          Soil Characterization and Evaluation of Slow Release Urea Fertilizer Rates on Yield Traits and Grain Yields of Wheat and Teff on Vertisols of Jamma District of South Wollo Zone, Amhara Region b0

          By

          Abebe Getu (BSc), Hawassa University, Ethiopia
        Factors
          Factor NRate: Specifications=[NRate]
            Operations 0NUSG
              2011-08-01  [Fertiliser].Apply(0, Fertiliser.Types.UreaN, 10);
              2011-09-01  [Fertiliser].Apply(0, Fertiliser.Types.UreaN, 10);
            Operations 23NUSG
              2011-08-01  [Fertiliser].Apply(11.5, Fertiliser.Types.UreaN, 10);
              2011-09-01  [Fertiliser].Apply(11.5, Fertiliser.Types.UreaN, 10);
            Operations 46NUSG
              2011-08-01  [Fertiliser].Apply(23, Fertiliser.Types.UreaN, 10);
              2011-09-01  [Fertiliser].Apply(23, Fertiliser.Types.UreaN, 10);
            Operations 69NUSG
              2011-08-01  [Fertiliser].Apply(34.5, Fertiliser.Types.UreaN, 10);
              2011-09-01  [Fertiliser].Apply(34.5, Fertiliser.Types.UreaN, 10);
            Operations 46NUC
              2011-08-01  [Fertiliser].Apply(23, Fertiliser.Types.UreaN, 10);
              2011-09-01  [Fertiliser].Apply(23, Fertiliser.Types.UreaN, 10);
        Simulation Jamma
          Weather: FileName=Jamma.met
          Clock: StartDate=2011-07-25; EndDate=2011-12-15
          Summary summaryfile
          SoilArbitrator Soil Arbitrator
          Zone Field: Area=1; Slope=0
            MicroClimate: a_interception=0; b_interception=1; c_interception=0; d_interception=0; soil_albedo=0.23; sun_angle=15; soil_heat_flux_fraction=0.4; night_interception_fraction=0.5; refheight=2; albedo=0.15; emissivity=0.96; RadIntTotal=0
            Irrigation
            Fertiliser
            SurfaceOrganicMatter: PoolName=maize; type=maize; mass=500; standing_fraction=0; cnr=65; CriticalResidueWeight=2000; OptimumDecompTemp=20; MaxCumulativeEOS=20; CNRatioDecompCoeff=0.277; CNRatioDecompThreshold=25; TotalLeachRain=25; MinRainToLeach=10; CriticalMinimumOrganicC=0.004; DefaultCPRatio=0; DefaultStandingFraction=0; StandingExtinctCoeff=0.5; FractionFaecesAdded=0.5
              Pools:
                {PoolName=maize, ResidueType=maize, Mass=500, CNRatio=65, StandingFraction=0}
              ResidueTypes ResidueTypesList: LoadFromResource=ResidueTypes
            Operations Sowing
              2011-07-25  [Wheat].Sow(population:23, cultivar:"HAR1685", depth:50, rowSpacing:250);
            Operations NRate
              1985-11-08  [Fertiliser].Apply(50, Fertiliser.Types.NH4NO3N, 10);
              1985-11-29  [Fertiliser].Apply(30, Fertiliser.Types.NH4NO3N, 10);
            Soil: Latitude=0; Longitude=0
              Water
                Thickness  BD    AirDry  LL15  DUL   SAT
                150        1.03  0.1     0.35  0.55  0.6
                150        1.03  0.1     0.35  0.55  0.6
                300        1.03  0.26    0.35  0.55  0.6
                300        1.03  0.32    0.35  0.55  0.6
                300        1.03  0.32    0.35  0.55  0.6
                300        1.03  0.32    0.35  0.55  0.6
                SoilCrop WheatSoil: LL=[0.35, 0.35, 0.35, 0.4, 0.45, 0.5]; KL=[0.04, 0.03, 0.03, 0.02, 0.02, 0.02]; XF=[1, 1, 1, 1, 1, 1]
              SoilWater: SummerDate=1-Nov; SummerU=5; SummerCona=5; WinterDate=1-Apr; WinterU=5; WinterCona=5; DiffusConst=40; DiffusSlope=16; Salb=0.13; CN2Bare=78; CNRed=20; CNCov=0.8; max_pond=0; Thickness=[100, 100, 100, 200, 200, 200, 200, 200, 200]; SWCON=[0.5, 0.5, 0.5, 0.5, 0.5, 0.5, 0.5, 0.5, 0.5]; residueinterception=0
              SoilNitrogen: fom_type=[default, manure, mucuna, lablab, shemp, stable]; fract_carb=[0.2, 0.3, 0.54, 0.57, 0.45, 0]; fract_cell=[0.7, 0.3, 0.37, 0.37, 0.47, 0.1]; fract_lign=[0.1, 0.4, 0.09, 0.06, 0.08, 0.9]
              SoilOrganicMatter: RootCN=40; RootWt=500; SoilCN=14; EnrACoeff=7.4; EnrBCoeff=0.2; OCUnits=Total
                Thickness  OC    FBiom  FInert
                300        1.54  0.02   0.54
                600        0.98  0.01   0.84
                400        0.84  0.01   0.99
                200        0.42  0.01   0.99
              Analysis: Thickness=[150, 150, 300, 900]; PH=[6.7, 6.7, 6.7, 6.7]; PHUnits=Water; BoronUnits=HotWater
              Sample InitialN: NO3Units=ppm; NH4Units=ppm; SWUnits=Volumetric; OCUnits=Total; PHUnits=Water
                Thickness  NO3  NH4
                150        20   0.6
                150        10   0.1
                300        5    0.1
                900        0.5  0.1
              Sample InitialSW: Thickness=[150, 150, 300, 300, 600]; SW=[0.55, 0.55, 0.35, 0.35, 0.35]; NO3Units=ppm; NH4Units=ppm; SWUnits=Volumetric; OCUnits=Total; PHUnits=Water
              CERESSoilTemperature
            Plant Wheat: CropType=Wheat
            Report DailyReport
            Report HarvestReport
            Manager Harvesting: same as Validation.SE Queensland.APS26.APS26NRate160WaterWet.paddock.Harvesting
            SoluteManager
  Folder Sensibility
  Folder Systems
    Experiment Pendleton
      Factors
        Factor Treatment: Specifications=[Operations]
          Operations 6_fBN0
            1931-08-15  [SurfaceOrganicMatter].Incorporate(fraction: 0.67, depth: 0)
            1931-10-15  [Wheat].Sow(cultivar:Rex, depth:30, population:100, rowSpacing:300);
            1933-08-15  [SurfaceOrganicMatter].Incorporate(fraction: 0.67, depth: 0)
            1933-10-15  [Wheat].Sow(cultivar:Rex, depth:30, population:100, rowSpacing:300);
            1935-08-15  [SurfaceOrganicMatter].Incorporate(fraction: 0.67, depth: 0)
            1935-10-15  [Wheat].Sow(cultivar:Rex, depth:30, population:100, rowSpacing:300);
            1937-08-15  [SurfaceOrganicMatter].Incorporate(fraction: 0.67, depth: 0)
            1937-10-15  [Wheat].Sow(cultivar:Rex, depth:30, population:100, rowSpacing:300);
            1939-08-15  [SurfaceOrganicMatter].Incorporate(fraction: 0.67, depth: 0)
            1939-10-15  [Wheat].Sow(cultivar:Rex, depth:30, population:100, rowSpacing:300);
            1941-08-15  [SurfaceOrganicMatter].Incorporate(fraction: 0.67, depth: 0)
            1941-10-15  [Wheat].Sow(cultivar:Rex, depth:30, population:100, rowSpacing:300);
            1943-08-15  [SurfaceOrganicMatter].Incorporate(fraction: 0.67, depth: 0)
            1943-10-15  [Wheat].Sow(cultivar:Rex, depth:30, population:100, rowSpacing:300);
            1945-08-15  [SurfaceOrganicMatter].Incorporate(fraction: 0.67, depth: 0)
            1945-10-15  [Wheat].Sow(cultivar:Rex, depth:30, population:100, rowSpacing:300);
            1947-08-15  [SurfaceOrganicMatter].Incorporate(fraction: 0.67, depth: 0)
            1947-10-15  [Wheat].Sow(cultivar:Rex, depth:30, population:100, rowSpacing:300);
            1949-08-15  [SurfaceOrganicMatter].Incorporate(fraction: 0.67, depth: 0)
            1949-10-15  [Wheat].Sow(cultivar:Rex, depth:30, population:100, rowSpacing:300);
            1951-08-15  [SurfaceOrganicMatter].Incorporate(fraction: 0.67, depth: 0)
            1951-10-15  [Wheat].Sow(cultivar:Rex, depth:30, population:100, rowSpacing:300);
            1953-08-15  [SurfaceOrganicMatter].Incorporate(fraction: 0.67, depth: 0)
            1953-10-15  [Wheat].Sow(cultivar:Rex, depth:30, population:100, rowSpacing:300);
            1955-08-15  [SurfaceOrganicMatter].Incorporate(fraction: 0.67, depth: 0)
            1955-10-15  [Wheat].Sow(cultivar:Rex, depth:30, population:100, rowSpacing:300);
            1957-08-15  [SurfaceOrganicMatter].Incorporate(fraction: 0.67, depth: 0)
            1957-10-15  [Wheat].Sow(cultivar:Rex, depth:30, population:100, rowSpacing:300);
            1959-08-15  [SurfaceOrganicMatter].Incorporate(fraction: 0.67, depth: 0)
            1959-10-15  [Wheat].Sow(cultivar:Rex, depth:30, population:100, rowSpacing:300);
            1961-08-15  [SurfaceOrganicMatter].Incorporate(fraction: 0.67, depth: 0)
            1961-10-15  [Wheat].Sow(cultivar:Rex, depth:30, population:100, rowSpacing:300);
            1963-08-15  [SurfaceOrganicMatter].Incorporate(fraction: 0.67, depth: 0)
            1963-10-15  [Wheat].Sow(cultivar:Rex, depth:30, population:100, rowSpacing:300);
            1965-08-15  [SurfaceOrganicMatter].Incorporate(fraction: 0.67, depth: 0)
            1965-10-15  [Wheat].Sow(cultivar:Nugaines, depth:30, population:150, rowSpacing:300);
            1967-08-15  [SurfaceOrganicMatter].Incorporate(fraction: 0.67, depth: 0)
            1967-10-15  [Wheat].Sow(cultivar:Nugaines, depth:30, population:150, rowSpacing:300);
            1969-08-15  [SurfaceOrganicMatter].Incorporate(fraction: 0.67, depth: 0)
            1969-10-15  [Wheat].Sow(cultivar:Nugaines, depth:30, population:150, rowSpacing:300);
            1971-08-15  [SurfaceOrganicMatter].Incorporate(fraction: 0.67, depth: 0)
            1971-10-15  [Wheat].Sow(cultivar:Nugaines, depth:30, population:150, rowSpacing:300);
            1973-08-15  [SurfaceOrganicMatter].Incorporate(fraction: 0.67, depth: 0)
            1973-10-15  [Wheat].Sow(cultivar:Nugaines, depth:30, population:150, rowSpacing:300);
            1975-08-15  [SurfaceOrganicMatter].Incorporate(fraction: 0.67, depth: 0)
            1975-10-15  [Wheat].Sow(cultivar:Hyslop, depth:30, population:150, rowSpacing:300);
            1977-08-15  [SurfaceOrganicMatter].Incorporate(fraction: 0.67, depth: 0)
            1977-10-15  [Wheat].Sow(cultivar:Hyslop, depth:30, population:150, rowSpacing:300);
            1979-08-15  [SurfaceOrganicMatter].Incorporate(fraction: 0.67, depth: 0)
            1979-10-15  [Wheat].Sow(cultivar:Stephens, depth:30, population:150, rowSpacing:300);
            1981-08-15  [SurfaceOrganicMatter].Incorporate(fraction: 0.67, depth: 0)
            1981-10-15  [Wheat].Sow(cultivar:Stephens, depth:30, population:150, rowSpacing:300);
            1983-08-15  [SurfaceOrganicMatter].Incorporate(fraction: 0.67, depth: 0)
            1983-10-15  [Wheat].Sow(cultivar:Stephens, depth:30, population:150, rowSpacing:300);
            1985-08-15  [SurfaceOrganicMatter].Incorporate(fraction: 0.67, depth: 0)
            1985-10-15  [Wheat].Sow(cultivar:Stephens, depth:30, population:150, rowSpacing:300);
            1987-08-15  [SurfaceOrganicMatter].Incorporate(fraction: 0.67, depth: 0)
            1987-10-15  [Wheat].Sow(cultivar:Stephens, depth:30, population:150, rowSpacing:300);
            1989-08-15  [SurfaceOrganicMatter].Incorporate(fraction: 0.67, depth: 0)
            1989-10-15  [Wheat].Sow(cultivar:Stephens, depth:30, population:150, rowSpacing:300);
            1991-08-15  [SurfaceOrganicMatter].Incorporate(fraction: 0.67, depth: 0)
            1991-10-15  [Wheat].Sow(cultivar:Stephens, depth:30, population:150, rowSpacing:300);
            1993-08-15  [SurfaceOrganicMatter].Incorporate(fraction: 0.67, depth: 0)
            1993-10-15  [Wheat].Sow(cultivar:Stephens, depth:30, population:150, rowSpacing:300);
            1995-08-15  [SurfaceOrganicMatter].Incorporate(fraction: 0.67, depth: 0)
            1995-10-15  [Wheat].Sow(cultivar:Stephens, depth:30, population:150, rowSpacing:300);
            1997-08-15  [SurfaceOrganicMatter].Incorporate(fraction: 0.67, depth: 0)
            1997-10-15  [Wheat].Sow(cultivar:Stephens, depth:30, population:150, rowSpacing:300);
            1999-08-15  [SurfaceOrganicMatter].Incorporate(fraction: 0.67, depth: 0)
            1999-10-15  [Wheat].Sow(cultivar:Stephens, depth:30, population:150, rowSpacing:300);
          Operations 7_sBN0
            1931-04-15  [SurfaceOrganicMatter].Incorporate(fraction: 0.55, depth: 0)
            1931-10-15  [Wheat].Sow(cultivar:Rex, depth:30, population:100, rowSpacing:300);
            1933-04-15  [SurfaceOrganicMatter].Incorporate(fraction: 0.55, depth: 0)
            1933-10-15  [Wheat].Sow(cultivar:Rex, depth:30, population:100, rowSpacing:300);
            1935-04-15  [SurfaceOrganicMatter].Incorporate(fraction: 0.55, depth: 0)
            1935-10-15  [Wheat].Sow(cultivar:Rex, depth:30, population:100, rowSpacing:300);
            1937-04-15  [SurfaceOrganicMatter].Incorporate(fraction: 0.55, depth: 0)
            1937-10-15  [Wheat].Sow(cultivar:Rex, depth:30, population:100, rowSpacing:300);
            1939-04-15  [SurfaceOrganicMatter].Incorporate(fraction: 0.55, depth: 0)
            1939-10-15  [Wheat].Sow(cultivar:Rex, depth:30, population:100, rowSpacing:300);
            1941-04-15  [SurfaceOrganicMatter].Incorporate(fraction: 0.55, depth: 0)
            1941-10-15  [Wheat].Sow(cultivar:Rex, depth:30, population:100, rowSpacing:300);
            1943-04-15  [SurfaceOrganicMatter].Incorporate(fraction: 0.55, depth: 0)
            1943-10-15  [Wheat].Sow(cultivar:Rex, depth:30, population:100, rowSpacing:300);
            1945-04-15  [SurfaceOrganicMatter].Incorporate(fraction: 0.55, depth: 0)
            1945-10-15  [Wheat].Sow(cultivar:Rex, depth:30, population:100, rowSpacing:300);
            1947-04-15  [SurfaceOrganicMatter].Incorporate(fraction: 0.55, depth: 0)
            1947-10-15  [Wheat].Sow(cultivar:Rex, depth:30, population:100, rowSpacing:300);
            1949-04-15  [SurfaceOrganicMatter].Incorporate(fraction: 0.55, depth: 0)
            1949-10-15  [Wheat].Sow(cultivar:Rex, depth:30, population:100, rowSpacing:300);
            1951-04-15  [SurfaceOrganicMatter].Incorporate(fraction: 0.55, depth: 0)
            1951-10-15  [Wheat].Sow(cultivar:Rex, depth:30, population:100, rowSpacing:300);
            1953-04-15  [SurfaceOrganicMatter].Incorporate(fraction: 0.55, depth: 0)
            1953-10-15  [Wheat].Sow(cultivar:Rex, depth:30, population:100, rowSpacing:300);
            1955-04-15  [SurfaceOrganicMatter].Incorporate(fraction: 0.55, depth: 0)
            1955-10-15  [Wheat].Sow(cultivar:Rex, depth:30, population:100, rowSpacing:300);
            1957-04-15  [SurfaceOrganicMatter].Incorporate(fraction: 0.55, depth: 0)
            1957-10-15  [Wheat].Sow(cultivar:Rex, depth:30, population:100, rowSpacing:300);
            1959-04-15  [SurfaceOrganicMatter].Incorporate(fraction: 0.55, depth: 0)
            1959-10-15  [Wheat].Sow(cultivar:Rex, depth:30, population:100, rowSpacing:300);
            1961-04-15  [SurfaceOrganicMatter].Incorporate(fraction: 0.55, depth: 0)
            1961-10-15  [Wheat].Sow(cultivar:Rex, depth:30, population:100, rowSpacing:300);
            1963-04-15  [SurfaceOrganicMatter].Incorporate(fraction: 0.55, depth: 0)
            1963-10-15  [Wheat].Sow(cultivar:Rex, depth:30, population:100, rowSpacing:300);
            1965-04-15  [SurfaceOrganicMatter].Incorporate(fraction: 0.55, depth: 0)
            1965-10-15  [Wheat].Sow(cultivar:Nugaines, depth:30, population:150, rowSpacing:300);
            1967-04-15  [SurfaceOrganicMatter].Incorporate(fraction: 0.55, depth: 0)
            1967-10-15  [Wheat].Sow(cultivar:Nugaines, depth:30, population:150, rowSpacing:300);
            1969-04-15  [SurfaceOrganicMatter].Incorporate(fraction: 0.55, depth: 0)
            1969-10-15  [Wheat].Sow(cultivar:Nugaines, depth:30, population:150, rowSpacing:300);
            1971-04-15  [SurfaceOrganicMatter].Incorporate(fraction: 0.55, depth: 0)
            1971-10-15  [Wheat].Sow(cultivar:Nugaines, depth:30, population:150, rowSpacing:300);
            1973-04-15  [SurfaceOrganicMatter].Incorporate(fraction: 0.55, depth: 0)
            1973-10-15  [Wheat].Sow(cultivar:Nugaines, depth:30, population:150, rowSpacing:300);
            1975-04-15  [SurfaceOrganicMatter].Incorporate(fraction: 0.55, depth: 0)
            1975-10-15  [Wheat].Sow(cultivar:Hyslop, depth:30, population:150, rowSpacing:300);
            1977-04-15  [SurfaceOrganicMatter].Incorporate(fraction: 0.55, depth: 0)
            1977-10-15  [Wheat].Sow(cultivar:Hyslop, depth:30, population:150, rowSpacing:300);
            1979-04-15  [SurfaceOrganicMatter].Incorporate(fraction: 0.55, depth: 0)
            1979-10-15  [Wheat].Sow(cultivar:Stephens, depth:30, population:150, rowSpacing:300);
            1981-04-15  [SurfaceOrganicMatter].Incorporate(fraction: 0.55, depth: 0)
            1981-10-15  [Wheat].Sow(cultivar:Stephens, depth:30, population:150, rowSpacing:300);
            1983-04-15  [SurfaceOrganicMatter].Incorporate(fraction: 0.55, depth: 0)
            1983-10-15  [Wheat].Sow(cultivar:Stephens, depth:30, population:150, rowSpacing:300);
            1985-04-15  [SurfaceOrganicMatter].Incorporate(fraction: 0.55, depth: 0)
            1985-10-15  [Wheat].Sow(cultivar:Stephens, depth:30, population:150, rowSpacing:300);
            1987-04-15  [SurfaceOrganicMatter].Incorporate(fraction: 0.55, depth: 0)
            1987-10-15  [Wheat].Sow(cultivar:Stephens, depth:30, population:150, rowSpacing:300);
            1989-04-15  [SurfaceOrganicMatter].Incorporate(fraction: 0.55, depth: 0)
            1989-10-15  [Wheat].Sow(cultivar:Stephens, depth:30, population:150, rowSpacing:300);
            1991-04-15  [SurfaceOrganicMatter].Incorporate(fraction: 0.55, depth: 0)
            1991-10-15  [Wheat].Sow(cultivar:Stephens, depth:30, population:150, rowSpacing:300);
            1993-04-15  [SurfaceOrganicMatter].Incorporate(fraction: 0.55, depth: 0)
            1993-10-15  [Wheat].Sow(cultivar:Stephens, depth:30, population:150, rowSpacing:300);
            1995-04-15  [SurfaceOrganicMatter].Incorporate(fraction: 0.55, depth: 0)
            1995-10-15  [Wheat].Sow(cultivar:Stephens, depth:30, population:150, rowSpacing:300);
            1997-04-15  [SurfaceOrganicMatter].Incorporate(fraction: 0.55, depth: 0)
            1997-10-15  [Wheat].Sow(cultivar:Stephens, depth:30, population:150, rowSpacing:300);
            1999-04-15  [SurfaceOrganicMatter].Incorporate(fraction: 0.55, depth: 0)
            1999-10-15  [Wheat].Sow(cultivar:Stephens, depth:30, population:150, rowSpacing:300);
          Operations 0_nBN0
            1931-10-15  [Wheat].Sow(cultivar:Rex, depth:30, population:100, rowSpacing:300);
            1933-10-15  [Wheat].Sow(cultivar:Rex, depth:30, population:100, rowSpacing:300);
            1935-10-15  [Wheat].Sow(cultivar:Rex, depth:30, population:100, rowSpacing:300);
            1937-10-15  [Wheat].Sow(cultivar:Rex, depth:30, population:100, rowSpacing:300);
            1939-10-15  [Wheat].Sow(cultivar:Rex, depth:30, population:100, rowSpacing:300);
            1941-10-15  [Wheat].Sow(cultivar:Rex, depth:30, population:100, rowSpacing:300);
            1943-10-15  [Wheat].Sow(cultivar:Rex, depth:30, population:100, rowSpacing:300);
            1945-10-15  [Wheat].Sow(cultivar:Rex, depth:30, population:100, rowSpacing:300);
            1947-10-15  [Wheat].Sow(cultivar:Rex, depth:30, population:100, rowSpacing:300);
            1949-10-15  [Wheat].Sow(cultivar:Rex, depth:30, population:100, rowSpacing:300);
            1951-10-15  [Wheat].Sow(cultivar:Rex, depth:30, population:100, rowSpacing:300);
            1953-10-15  [Wheat].Sow(cultivar:Rex, depth:30, population:100, rowSpacing:300);
            1955-10-15  [Wheat].Sow(cultivar:Rex, depth:30, population:100, rowSpacing:300);
            1957-10-15  [Wheat].Sow(cultivar:Rex, depth:30, population:100, rowSpacing:300);
            1959-10-15  [Wheat].Sow(cultivar:Rex, depth:30, population:100, rowSpacing:300);
            1961-10-15  [Wheat].Sow(cultivar:Rex, depth:30, population:100, rowSpacing:300);
            1963-10-15  [Wheat].Sow(cultivar:Rex, depth:30, population:100, rowSpacing:300);
            1965-10-15  [Wheat].Sow(cultivar:Rex, depth:30, population:150, rowSpacing:300);
            1967-10-15  [Wheat].Sow(cultivar:Nugaines, depth:30, population:150, rowSpacing:300);
            1969-10-15  [Wheat].Sow(cultivar:Nugaines, depth:30, population:150, rowSpacing:300);
            1971-10-15  [Wheat].Sow(cultivar:Nugaines, depth:30, population:150, rowSpacing:300);
            1973-10-15  [Wheat].Sow(cultivar:Nugaines, depth:30, population:150, rowSpacing:300);
            1975-10-15  [Wheat].Sow(cultivar:Hyslop, depth:30, population:150, rowSpacing:300);
            1977-10-15  [Wheat].Sow(cultivar:Hyslop, depth:30, population:150, rowSpacing:300);
            1979-10-15  [Wheat].Sow(cultivar:Stephens, depth:30, population:150, rowSpacing:300);
            1981-10-15  [Wheat].Sow(cultivar:Stephens, depth:30, population:150, rowSpacing:300);
            1983-10-15  [Wheat].Sow(cultivar:Stephens, depth:30, population:150, rowSpacing:300);
            1985-10-15  [Wheat].Sow(cultivar:Stephens, depth:30, population:150, rowSpacing:300);
            1987-10-15  [Wheat].Sow(cultivar:Stephens, depth:30, population:150, rowSpacing:300);
            1989-10-15  [Wheat].Sow(cultivar:Stephens, depth:30, population:150, rowSpacing:300);
            1991-10-15  [Wheat].Sow(cultivar:Stephens, depth:30, population:150, rowSpacing:300);
            1993-10-15  [Wheat].Sow(cultivar:Stephens, depth:30, population:150, rowSpacing:300);
            1995-10-15  [Wheat].Sow(cultivar:Stephens, depth:30, population:150, rowSpacing:300);
            1997-10-15  [Wheat].Sow(cultivar:Stephens, depth:30, population:150, rowSpacing:300);
            1999-10-15  [Wheat].Sow(cultivar:Stephens, depth:30, population:150, rowSpacing:300);
          Operations 2_sBN45
            1931-08-15  [SurfaceOrganicMatter].Incorporate(fraction: 0.6, depth: 200)
            1931-10-15  [Wheat].Sow(cultivar:Rex, depth:30, population:100, rowSpacing:300);
            1933-08-15  [SurfaceOrganicMatter].Incorporate(fraction: 0.6, depth: 200)
            1933-10-15  [Wheat].Sow(cultivar:Rex, depth:30, population:100, rowSpacing:300);
            1935-08-15  [SurfaceOrganicMatter].Incorporate(fraction: 0.6, depth: 200)
            1935-10-15  [Wheat].Sow(cultivar:Rex, depth:30, population:100, rowSpacing:300);
            1937-08-15  [SurfaceOrganicMatter].Incorporate(fraction: 0.6, depth: 200)
            1937-10-15  [Wheat].Sow(cultivar:Rex, depth:30, population:100, rowSpacing:300);
            1939-08-15  [SurfaceOrganicMatter].Incorporate(fraction: 0.6, depth: 200)
            1939-10-15  [Wheat].Sow(cultivar:Rex, depth:30, population:100, rowSpacing:300);
            1941-08-15  [SurfaceOrganicMatter].Incorporate(fraction: 0.6, depth: 200)
            1941-10-15  [Wheat].Sow(cultivar:Rex, depth:30, population:100, rowSpacing:300);
            1943-08-15  [SurfaceOrganicMatter].Incorporate(fraction: 0.6, depth: 200)
            1943-10-15  [Wheat].Sow(cultivar:Rex, depth:30, population:100, rowSpacing:300);
            1945-08-15  [SurfaceOrganicMatter].Incorporate(fraction: 0.6, depth: 200)
            1945-10-15  [Wheat].Sow(cultivar:Rex, depth:30, population:100, rowSpacing:300);
            1947-08-15  [SurfaceOrganicMatter].Incorporate(fraction: 0.6, depth: 200)
            1947-10-15  [Wheat].Sow(cultivar:Rex, depth:30, population:100, rowSpacing:300);
            1949-08-15  [SurfaceOrganicMatter].Incorporate(fraction: 0.6, depth: 200)
            1949-10-15  [Wheat].Sow(cultivar:Rex, depth:30, population:100, rowSpacing:300);
            1951-08-15  [SurfaceOrganicMatter].Incorporate(fraction: 0.6, depth: 200)
            1951-10-15  [Wheat].Sow(cultivar:Rex, depth:30, population:100, rowSpacing:300);
            1953-08-15  [SurfaceOrganicMatter].Incorporate(fraction: 0.6, depth: 200)
            1953-10-15  [Wheat].Sow(cultivar:Rex, depth:30, population:100, rowSpacing:300);
            1955-08-15  [SurfaceOrganicMatter].Incorporate(fraction: 0.6, depth: 200)
            1955-10-15  [Wheat].Sow(cultivar:Rex, depth:30, population:100, rowSpacing:300);
            1957-08-15  [SurfaceOrganicMatter].Incorporate(fraction: 0.6, depth: 200)
            1957-10-15  [Wheat].Sow(cultivar:Rex, depth:30, population:100, rowSpacing:300);
            1959-08-15  [SurfaceOrganicMatter].Incorporate(fraction: 0.6, depth: 200)
            1959-10-15  [Wheat].Sow(cultivar:Rex, depth:30, population:100, rowSpacing:300);
            1961-08-15  [SurfaceOrganicMatter].Incorporate(fraction: 0.6, depth: 200)
            1961-10-15  [Wheat].Sow(cultivar:Rex, depth:30, population:100, rowSpacing:300);
            1963-08-15  [SurfaceOrganicMatter].Incorporate(fraction: 0.6, depth: 200)
            1963-10-15  [Wheat].Sow(cultivar:Rex, depth:30, population:100, rowSpacing:300);
            1965-08-15  [SurfaceOrganicMatter].Incorporate(fraction: 0.6, depth: 200)
            1965-10-15  [Wheat].Sow(cultivar:Rex, depth:30, population:150, rowSpacing:300);
            1967-10-15  [Fertiliser].Apply(Amount: 45, Type: Fertiliser.Types.NO3N);
            1967-10-15  [Wheat].Sow(cultivar:Nugaines, depth:30, population:150, rowSpacing:300);
            1969-10-15  [Fertiliser].Apply(Amount: 45, Type: Fertiliser.Types.NO3N);
            1969-10-15  [Wheat].Sow(cultivar:Nugaines, depth:30, population:150, rowSpacing:300);
            1971-10-15  [Fertiliser].Apply(Amount: 45, Type: Fertiliser.Types.NO3N);
            1971-10-15  [Wheat].Sow(cultivar:Nugaines, depth:30, population:150, rowSpacing:300);
            1973-10-15  [Fertiliser].Apply(Amount: 45, Type: Fertiliser.Types.NO3N);
            1973-10-15  [Wheat].Sow(cultivar:Nugaines, depth:30, population:150, rowSpacing:300);
            1975-10-15  [Fertiliser].Apply(Amount: 45, Type: Fertiliser.Types.NO3N);
            1975-10-15  [Wheat].Sow(cultivar:Hyslop, depth:30, population:150, rowSpacing:300);
            1977-10-15  [Fertiliser].Apply(Amount: 45, Type: Fertiliser.Types.NO3N);
            1977-10-15  [Wheat].Sow(cultivar:Hyslop, depth:30, population:150, rowSpacing:300);
            1979-10-15  [Fertiliser].Apply(Amount: 45, Type: Fertiliser.Types.NO3N);
            1979-10-15  [Wheat].Sow(cultivar:Stephens, depth:30, population:150, rowSpacing:300);
            1981-04-15  [SurfaceOrganicMatter].Incorporate(fraction: 0.55, depth: 0)
            1981-10-15  [Fertiliser].Apply(Amount: 45, Type: Fertiliser.Types.NO3N);
            1981-10-15  [Wheat].Sow(cultivar:Stephens, depth:30, population:150, rowSpacing:300);
            1983-04-15  [SurfaceOrganicMatter].Incorporate(fraction: 0.55, depth: 0)
            1983-10-15  [Fertiliser].Apply(Amount: 45, Type: Fertiliser.Types.NO3N);
            1983-10-15  [Wheat].Sow(cultivar:Stephens, depth:30, population:150, rowSpacing:300);
            1985-04-15  [SurfaceOrganicMatter].Incorporate(fraction: 0.55, depth: 0)
            1985-10-15  [Fertiliser].Apply(Amount: 45, Type: Fertiliser.Types.NO3N);
            1985-10-15  [Wheat].Sow(cultivar:Stephens, depth:30, population:150, rowSpacing:300);
            1987-04-15  [SurfaceOrganicMatter].Incorporate(fraction: 0.55, depth: 0)
            1987-10-15  [Fertiliser].Apply(Amount: 45, Type: Fertiliser.Types.NO3N);
            1987-10-15  [Wheat].Sow(cultivar:Stephens, depth:30, population:150, rowSpacing:300);
            1989-04-15  [SurfaceOrganicMatter].Incorporate(fraction: 0.55, depth: 0)
            1989-10-15  [Fertiliser].Apply(Amount: 45, Type: Fertiliser.Types.NO3N);
            1989-10-15  [Wheat].Sow(cultivar:Stephens, depth:30, population:150, rowSpacing:300);
            1991-04-15  [SurfaceOrganicMatter].Incorporate(fraction: 0.55, depth: 0)
            1991-10-15  [Fertiliser].Apply(Amount: 45, Type: Fertiliser.Types.NO3N);
            1991-10-15  [Wheat].Sow(cultivar:Stephens, depth:30, population:150, rowSpacing:300);
            1993-04-15  [SurfaceOrganicMatter].Incorporate(fraction: 0.55, depth: 0)
            1993-10-15  [Fertiliser].Apply(Amount: 45, Type: Fertiliser.Types.NO3N);
            1993-10-15  [Wheat].Sow(cultivar:Stephens, depth:30, population:150, rowSpacing:300);
            1995-04-15  [SurfaceOrganicMatter].Incorporate(fraction: 0.55, depth: 0)
            1995-10-15  [Fertiliser].Apply(Amount: 45, Type: Fertiliser.Types.NO3N);
            1995-10-15  [Wheat].Sow(cultivar:Stephens, depth:30, population:150, rowSpacing:300);
            1997-04-15  [SurfaceOrganicMatter].Incorporate(fraction: 0.55, depth: 0)
            1997-10-15  [Fertiliser].Apply(Amount: 45, Type: Fertiliser.Types.NO3N);
            1997-10-15  [Wheat].Sow(cultivar:Stephens, depth:30, population:150, rowSpacing:300);
            1999-04-15  [SurfaceOrganicMatter].Incorporate(fraction: 0.55, depth: 0)
            1999-10-15  [Fertiliser].Apply(Amount: 45, Type: Fertiliser.Types.NO3N);
            1999-10-15  [Wheat].Sow(cultivar:Stephens, depth:30, population:150, rowSpacing:300);
          Operations 3_sBN90
            1931-04-01  [SurfaceOrganicMatter].Incorporate(fraction: 0.6, depth: 200)
            1931-10-15  [Wheat].Sow(cultivar:Rex, depth:30, population:100, rowSpacing:300);
            1933-04-01  [SurfaceOrganicMatter].Incorporate(fraction: 0.6, depth: 200)
            1933-10-15  [Wheat].Sow(cultivar:Rex, depth:30, population:100, rowSpacing:300);
            1935-04-01  [SurfaceOrganicMatter].Incorporate(fraction: 0.6, depth: 200)
            1935-10-15  [Wheat].Sow(cultivar:Rex, depth:30, population:100, rowSpacing:300);
            1937-04-01  [SurfaceOrganicMatter].Incorporate(fraction: 0.6, depth: 200)
            1937-10-15  [Wheat].Sow(cultivar:Rex, depth:30, population:100, rowSpacing:300);
            1939-04-01  [SurfaceOrganicMatter].Incorporate(fraction: 0.6, depth: 200)
            1939-10-15  [Wheat].Sow(cultivar:Rex, depth:30, population:100, rowSpacing:300);
            1941-04-01  [SurfaceOrganicMatter].Incorporate(fraction: 0.6, depth: 200)
            1941-10-15  [Wheat].Sow(cultivar:Rex, depth:30, population:100, rowSpacing:300);
            1943-04-01  [SurfaceOrganicMatter].Incorporate(fraction: 0.6, depth: 200)
            1943-10-15  [Wheat].Sow(cultivar:Rex, depth:30, population:100, rowSpacing:300);
            1945-04-01  [SurfaceOrganicMatter].Incorporate(fraction: 0.6, depth: 200)
            1945-10-15  [Wheat].Sow(cultivar:Rex, depth:30, population:100, rowSpacing:300);
            1947-04-01  [SurfaceOrganicMatter].Incorporate(fraction: 0.6, depth: 200)
            1947-10-15  [Wheat].Sow(cultivar:Rex, depth:30, population:100, rowSpacing:300);
            1949-04-01  [SurfaceOrganicMatter].Incorporate(fraction: 0.6, depth: 200)
            1949-10-15  [Wheat].Sow(cultivar:Rex, depth:30, population:100, rowSpacing:300);
            1951-04-01  [SurfaceOrganicMatter].Incorporate(fraction: 0.6, depth: 200)
            1951-10-15  [Wheat].Sow(cultivar:Rex, depth:30, population:100, rowSpacing:300);
            1953-04-01  [SurfaceOrganicMatter].Incorporate(fraction: 0.6, depth: 200)
            1953-10-15  [Wheat].Sow(cultivar:Rex, depth:30, population:100, rowSpacing:300);
            1955-04-01  [SurfaceOrganicMatter].Incorporate(fraction: 0.6, depth: 200)
            1955-10-15  [Wheat].Sow(cultivar:Rex, depth:30, population:100, rowSpacing:300);
            1957-04-01  [SurfaceOrganicMatter].Incorporate(fraction: 0.6, depth: 200)
            1957-10-15  [Wheat].Sow(cultivar:Rex, depth:30, population:100, rowSpacing:300);
            1959-04-01  [SurfaceOrganicMatter].Incorporate(fraction: 0.6, depth: 200)
            1959-10-15  [Wheat].Sow(cultivar:Rex, depth:30, population:100, rowSpacing:300);
            1961-04-01  [SurfaceOrganicMatter].Incorporate(fraction: 0.6, depth: 200)
            1961-10-15  [Wheat].Sow(cultivar:Rex, depth:30, population:100, rowSpacing:300);
            1963-04-01  [SurfaceOrganicMatter].Incorporate(fraction: 0.6, depth: 200)
            1963-10-15  [Wheat].Sow(cultivar:Rex, depth:30, population:100, rowSpacing:300);
            1965-04-01  [SurfaceOrganicMatter].Incorporate(fraction: 0.6, depth: 200)
            1965-10-15  [Wheat].Sow(cultivar:Rex, depth:30, population:150, rowSpacing:300);
            1967-10-15  [Fertiliser].Apply(Amount: 90, Type: Fertiliser.Types.NO3N);
            1967-10-15  [Wheat].Sow(cultivar:Nugaines, depth:30, population:150, rowSpacing:300);
            1969-10-15  [Fertiliser].Apply(Amount: 90, Type: Fertiliser.Types.NO3N);
            1969-10-15  [Wheat].Sow(cultivar:Nugaines, depth:30, population:150, rowSpacing:300);
            1971-10-15  [Fertiliser].Apply(Amount: 90, Type: Fertiliser.Types.NO3N);
            1971-10-15  [Wheat].Sow(cultivar:Nugaines, depth:30, population:150, rowSpacing:300);
            1973-10-15  [Fertiliser].Apply(Amount: 90, Type: Fertiliser.Types.NO3N);
            1973-10-15  [Wheat].Sow(cultivar:Nugaines, depth:30, population:150, rowSpacing:300);
            1975-10-15  [Fertiliser].Apply(Amount: 90, Type: Fertiliser.Types.NO3N);
            1975-10-15  [Wheat].Sow(cultivar:Hyslop, depth:30, population:150, rowSpacing:300);
            1977-10-15  [Fertiliser].Apply(Amount: 90, Type: Fertiliser.Types.NO3N);
            1977-10-15  [Wheat].Sow(cultivar:Hyslop, depth:30, population:150, rowSpacing:300);
            1979-10-15  [Fertiliser].Apply(Amount: 90, Type: Fertiliser.Types.NO3N);
            1979-10-15  [Wheat].Sow(cultivar:Stephens, depth:30, population:150, rowSpacing:300);
            1981-04-15  [SurfaceOrganicMatter].Incorporate(fraction: 0.55, depth: 0)
            1981-10-15  [Fertiliser].Apply(Amount: 90, Type: Fertiliser.Types.NO3N);
            1981-10-15  [Wheat].Sow(cultivar:Stephens, depth:30, population:150, rowSpacing:300);
            1983-04-15  [SurfaceOrganicMatter].Incorporate(fraction: 0.55, depth: 0)
            1983-10-15  [Fertiliser].Apply(Amount: 90, Type: Fertiliser.Types.NO3N);
            1983-10-15  [Wheat].Sow(cultivar:Stephens, depth:30, population:150, rowSpacing:300);
            1985-04-15  [SurfaceOrganicMatter].Incorporate(fraction: 0.55, depth: 0)
            1985-10-15  [Fertiliser].Apply(Amount: 90, Type: Fertiliser.Types.NO3N);
            1985-10-15  [Wheat].Sow(cultivar:Stephens, depth:30, population:150, rowSpacing:300);
            1987-04-15  [SurfaceOrganicMatter].Incorporate(fraction: 0.55, depth: 0)
            1987-10-15  [Fertiliser].Apply(Amount: 90, Type: Fertiliser.Types.NO3N);
            1987-10-15  [Wheat].Sow(cultivar:Stephens, depth:30, population:150, rowSpacing:300);
            1989-04-15  [SurfaceOrganicMatter].Incorporate(fraction: 0.55, depth: 0)
            1989-10-15  [Fertiliser].Apply(Amount: 90, Type: Fertiliser.Types.NO3N);
            1989-10-15  [Wheat].Sow(cultivar:Stephens, depth:30, population:150, rowSpacing:300);
            1991-04-15  [SurfaceOrganicMatter].Incorporate(fraction: 0.55, depth: 0)
            1991-10-15  [Fertiliser].Apply(Amount: 90, Type: Fertiliser.Types.NO3N);
            1991-10-15  [Wheat].Sow(cultivar:Stephens, depth:30, population:150, rowSpacing:300);
            1993-04-15  [SurfaceOrganicMatter].Incorporate(fraction: 0.55, depth: 0)
            1993-10-15  [Fertiliser].Apply(Amount: 90, Type: Fertiliser.Types.NO3N);
            1993-10-15  [Wheat].Sow(cultivar:Stephens, depth:30, population:150, rowSpacing:300);
            1995-04-15  [SurfaceOrganicMatter].Incorporate(fraction: 0.55, depth: 0)
            1995-10-15  [Fertiliser].Apply(Amount: 90, Type: Fertiliser.Types.NO3N);
            1995-10-15  [Wheat].Sow(cultivar:Stephens, depth:30, population:150, rowSpacing:300);
            1997-04-15  [SurfaceOrganicMatter].Incorporate(fraction: 0.55, depth: 0)
            1997-10-15  [Fertiliser].Apply(Amount: 90, Type: Fertiliser.Types.NO3N);
            1997-10-15  [Wheat].Sow(cultivar:Stephens, depth:30, population:150, rowSpacing:300);
            1999-04-15  [SurfaceOrganicMatter].Incorporate(fraction: 0.55, depth: 0)
            1999-10-15  [Fertiliser].Apply(Amount: 90, Type: Fertiliser.Types.NO3N);
            1999-10-15  [Wheat].Sow(cultivar:Stephens, depth:30, population:150, rowSpacing:300);
          Operations 4_nBN45
            1931-08-15  [SurfaceOrganicMatter].Incorporate(fraction: 0.6, depth: 200)
            1931-10-15  [Fertiliser].Apply(Amount: 34, Type: Fertiliser.Types.NO3N);
            1931-10-15  [Wheat].Sow(cultivar:Rex, depth:30, population:100, rowSpacing:300);
            1933-08-15  [SurfaceOrganicMatter].Incorporate(fraction: 0.6, depth: 200)
            1933-10-15  [Fertiliser].Apply(Amount: 34, Type: Fertiliser.Types.NO3N);
            1933-10-15  [Wheat].Sow(cultivar:Rex, depth:30, population:100, rowSpacing:300);
            1935-08-15  [SurfaceOrganicMatter].Incorporate(fraction: 0.6, depth: 200)
            1935-10-15  [Fertiliser].Apply(Amount: 34, Type: Fertiliser.Types.NO3N);
            1935-10-15  [Wheat].Sow(cultivar:Rex, depth:30, population:100, rowSpacing:300);
            1937-08-15  [SurfaceOrganicMatter].Incorporate(fraction: 0.6, depth: 200)
            1937-10-15  [Fertiliser].Apply(Amount: 34, Type: Fertiliser.Types.NO3N);
            1937-10-15  [Wheat].Sow(cultivar:Rex, depth:30, population:100, rowSpacing:300);
            1939-08-15  [SurfaceOrganicMatter].Incorporate(fraction: 0.6, depth: 200)
            1939-10-15  [Fertiliser].Apply(Amount: 34, Type: Fertiliser.Types.NO3N);
            1939-10-15  [Wheat].Sow(cultivar:Rex, depth:30, population:100, rowSpacing:300);
            1941-08-15  [SurfaceOrganicMatter].Incorporate(fraction: 0.6, depth: 200)
            1941-10-15  [Fertiliser].Apply(Amount: 34, Type: Fertiliser.Types.NO3N);
            1941-10-15  [Wheat].Sow(cultivar:Rex, depth:30, population:100, rowSpacing:300);
            1943-08-15  [SurfaceOrganicMatter].Incorporate(fraction: 0.6, depth: 200)
            1943-10-15  [Fertiliser].Apply(Amount: 34, Type: Fertiliser.Types.NO3N);
            1943-10-15  [Wheat].Sow(cultivar:Rex, depth:30, population:100, rowSpacing:300);
            1945-08-15  [SurfaceOrganicMatter].Incorporate(fraction: 0.6, depth: 200)
            1945-10-15  [Fertiliser].Apply(Amount: 34, Type: Fertiliser.Types.NO3N);
            1945-10-15  [Wheat].Sow(cultivar:Rex, depth:30, population:100, rowSpacing:300);
            1947-08-15  [SurfaceOrganicMatter].Incorporate(fraction: 0.6, depth: 200)
            1947-10-15  [Fertiliser].Apply(Amount: 34, Type: Fertiliser.Types.NO3N);
            1947-10-15  [Wheat].Sow(cultivar:Rex, depth:30, population:100, rowSpacing:300);
            1949-08-15  [SurfaceOrganicMatter].Incorporate(fraction: 0.6, depth: 200)
            1949-10-15  [Fertiliser].Apply(Amount: 34, Type: Fertiliser.Types.NO3N);
            1949-10-15  [Wheat].Sow(cultivar:Rex, depth:30, population:100, rowSpacing:300);
            1951-08-15  [SurfaceOrganicMatter].Incorporate(fraction: 0.6, depth: 200)
            1951-10-15  [Fertiliser].Apply(Amount: 34, Type: Fertiliser.Types.NO3N);
            1951-10-15  [Wheat].Sow(cultivar:Rex, depth:30, population:100, rowSpacing:300);
            1953-08-15  [SurfaceOrganicMatter].Incorporate(fraction: 0.6, depth: 200)
            1953-10-15  [Fertiliser].Apply(Amount: 34, Type: Fertiliser.Types.NO3N);
            1953-10-15  [Wheat].Sow(cultivar:Rex, depth:30, population:100, rowSpacing:300);
            1955-08-15  [SurfaceOrganicMatter].Incorporate(fraction: 0.6, depth: 200)
            1955-10-15  [Fertiliser].Apply(Amount: 34, Type: Fertiliser.Types.NO3N);
            1955-10-15  [Wheat].Sow(cultivar:Rex, depth:30, population:100, rowSpacing:300);
            1957-08-15  [SurfaceOrganicMatter].Incorporate(fraction: 0.6, depth: 200)
            1957-10-15  [Fertiliser].Apply(Amount: 34, Type: Fertiliser.Types.NO3N);
            1957-10-15  [Wheat].Sow(cultivar:Rex, depth:30, population:100, rowSpacing:300);
            1959-08-15  [SurfaceOrganicMatter].Incorporate(fraction: 0.6, depth: 200)
            1959-10-15  [Fertiliser].Apply(Amount: 34, Type: Fertiliser.Types.NO3N);
            1959-10-15  [Wheat].Sow(cultivar:Rex, depth:30, population:100, rowSpacing:300);
            1961-08-15  [SurfaceOrganicMatter].Incorporate(fraction: 0.6, depth: 200)
            1961-10-15  [Fertiliser].Apply(Amount: 34, Type: Fertiliser.Types.NO3N);
            1961-10-15  [Wheat].Sow(cultivar:Rex, depth:30, population:100, rowSpacing:300);
            1963-08-15  [SurfaceOrganicMatter].Incorporate(fraction: 0.6, depth: 200)
            1963-10-15  [Fertiliser].Apply(Amount: 34, Type: Fertiliser.Types.NO3N);
            1963-10-15  [Wheat].Sow(cultivar:Rex, depth:30, population:100, rowSpacing:300);
            1965-08-15  [SurfaceOrganicMatter].Incorporate(fraction: 0.6, depth: 200)
            1965-10-15  [Fertiliser].Apply(Amount: 34, Type: Fertiliser.Types.NO3N);
            1965-10-15  [Wheat].Sow(cultivar:Rex, depth:30, population:150, rowSpacing:300);
            1967-10-15  [Fertiliser].Apply(Amount: 45, Type: Fertiliser.Types.NO3N);
            1967-10-15  [Wheat].Sow(cultivar:Nugaines, depth:30, population:150, rowSpacing:300);
            1969-10-15  [Fertiliser].Apply(Amount: 45, Type: Fertiliser.Types.NO3N);
            1969-10-15  [Wheat].Sow(cultivar:Nugaines, depth:30, population:150, rowSpacing:300);
            1971-10-15  [Fertiliser].Apply(Amount: 45, Type: Fertiliser.Types.NO3N);
            1971-10-15  [Wheat].Sow(cultivar:Nugaines, depth:30, population:150, rowSpacing:300);
            1973-10-15  [Fertiliser].Apply(Amount: 45, Type: Fertiliser.Types.NO3N);
            1973-10-15  [Wheat].Sow(cultivar:Nugaines, depth:30, population:150, rowSpacing:300);
            1975-10-15  [Fertiliser].Apply(Amount: 45, Type: Fertiliser.Types.NO3N);
            1975-10-15  [Wheat].Sow(cultivar:Stephens, depth:30, population:150, rowSpacing:300);
            1977-10-15  [Fertiliser].Apply(Amount: 45, Type: Fertiliser.Types.NO3N);
            1977-10-15  [Wheat].Sow(cultivar:Stephens, depth:30, population:150, rowSpacing:300);
            1979-10-15  [Fertiliser].Apply(Amount: 45, Type: Fertiliser.Types.NO3N);
            1979-10-15  [Wheat].Sow(cultivar:Stephens, depth:30, population:150, rowSpacing:300);
            1981-10-15  [Fertiliser].Apply(Amount: 45, Type: Fertiliser.Types.NO3N);
            1981-10-15  [Wheat].Sow(cultivar:Stephens, depth:30, population:150, rowSpacing:300);
            1983-10-15  [Fertiliser].Apply(Amount: 45, Type: Fertiliser.Types.NO3N);
            1983-10-15  [Wheat].Sow(cultivar:Stephens, depth:30, population:150, rowSpacing:300);
            1985-10-15  [Fertiliser].Apply(Amount: 45, Type: Fertiliser.Types.NO3N);
            1985-10-15  [Wheat].Sow(cultivar:Stephens, depth:30, population:150, rowSpacing:300);
            1987-10-15  [Fertiliser].Apply(Amount: 45, Type: Fertiliser.Types.NO3N);
            1987-10-15  [Wheat].Sow(cultivar:Stephens, depth:30, population:150, rowSpacing:300);
            1989-10-15  [Fertiliser].Apply(Amount: 45, Type: Fertiliser.Types.NO3N);
            1989-10-15  [Wheat].Sow(cultivar:Stephens, depth:30, population:150, rowSpacing:300);
            1991-10-15  [Fertiliser].Apply(Amount: 45, Type: Fertiliser.Types.NO3N);
            1991-10-15  [Wheat].Sow(cultivar:Stephens, depth:30, population:150, rowSpacing:300);
            1993-10-15  [Fertiliser].Apply(Amount: 45, Type: Fertiliser.Types.NO3N);
            1993-10-15  [Wheat].Sow(cultivar:Stephens, depth:30, population:150, rowSpacing:300);
            1995-10-15  [Fertiliser].Apply(Amount: 45, Type: Fertiliser.Types.NO3N);
            1995-10-15  [Wheat].Sow(cultivar:Stephens, depth:30, population:150, rowSpacing:300);
            1997-10-15  [Fertiliser].Apply(Amount: 45, Type: Fertiliser.Types.NO3N);
            1997-10-15  [Wheat].Sow(cultivar:Stephens, depth:30, population:150, rowSpacing:300);
            1999-10-15  [Fertiliser].Apply(Amount: 45, Type: Fertiliser.Types.NO3N);
            1999-10-15  [Wheat].Sow(cultivar:Stephens, depth:30, population:150, rowSpacing:300);
          Operations 5_nBN90
            1931-04-01  [SurfaceOrganicMatter].Incorporate(fraction: 0.6, depth: 200)
            1931-10-15  [Fertiliser].Apply(Amount: 34, Type: Fertiliser.Types.NO3N);
            1931-10-15  [Wheat].Sow(cultivar:Rex, depth:30, population:100, rowSpacing:300);
            1933-04-01  [SurfaceOrganicMatter].Incorporate(fraction: 0.6, depth: 200)
            1933-10-15  [Fertiliser].Apply(Amount: 34, Type: Fertiliser.Types.NO3N);
            1933-10-15  [Wheat].Sow(cultivar:Rex, depth:30, population:100, rowSpacing:300);
            1935-04-01  [SurfaceOrganicMatter].Incorporate(fraction: 0.6, depth: 200)
            1935-10-15  [Fertiliser].Apply(Amount: 34, Type: Fertiliser.Types.NO3N);
            1935-10-15  [Wheat].Sow(cultivar:Rex, depth:30, population:100, rowSpacing:300);
            1937-04-01  [SurfaceOrganicMatter].Incorporate(fraction: 0.6, depth: 200)
            1937-10-15  [Fertiliser].Apply(Amount: 34, Type: Fertiliser.Types.NO3N);
            1937-10-15  [Wheat].Sow(cultivar:Rex, depth:30, population:100, rowSpacing:300);
            1939-04-01  [SurfaceOrganicMatter].Incorporate(fraction: 0.6, depth: 200)
            1939-10-15  [Fertiliser].Apply(Amount: 34, Type: Fertiliser.Types.NO3N);
            1939-10-15  [Wheat].Sow(cultivar:Rex, depth:30, population:100, rowSpacing:300);
            1941-04-01  [SurfaceOrganicMatter].Incorporate(fraction: 0.6, depth: 200)
            1941-10-15  [Fertiliser].Apply(Amount: 34, Type: Fertiliser.Types.NO3N);
            1941-10-15  [Wheat].Sow(cultivar:Rex, depth:30, population:100, rowSpacing:300);
            1943-04-01  [SurfaceOrganicMatter].Incorporate(fraction: 0.6, depth: 200)
            1943-10-15  [Fertiliser].Apply(Amount: 34, Type: Fertiliser.Types.NO3N);
            1943-10-15  [Wheat].Sow(cultivar:Rex, depth:30, population:100, rowSpacing:300);
            1945-04-01  [SurfaceOrganicMatter].Incorporate(fraction: 0.6, depth: 200)
            1945-10-15  [Fertiliser].Apply(Amount: 34, Type: Fertiliser.Types.NO3N);
            1945-10-15  [Wheat].Sow(cultivar:Rex, depth:30, population:100, rowSpacing:300);
            1947-04-01  [SurfaceOrganicMatter].Incorporate(fraction: 0.6, depth: 200)
            1947-10-15  [Fertiliser].Apply(Amount: 34, Type: Fertiliser.Types.NO3N);
            1947-10-15  [Wheat].Sow(cultivar:Rex, depth:30, population:100, rowSpacing:300);
            1949-04-01  [SurfaceOrganicMatter].Incorporate(fraction: 0.6, depth: 200)
            1949-10-15  [Fertiliser].Apply(Amount: 34, Type: Fertiliser.Types.NO3N);
            1949-10-15  [Wheat].Sow(cultivar:Rex, depth:30, population:100, rowSpacing:300);
            1951-04-01  [SurfaceOrganicMatter].Incorporate(fraction: 0.6, depth: 200)
            1951-10-15  [Fertiliser].Apply(Amount: 34, Type: Fertiliser.Types.NO3N);
            1951-10-15  [Wheat].Sow(cultivar:Rex, depth:30, population:100, rowSpacing:300);
            1953-04-01  [SurfaceOrganicMatter].Incorporate(fraction: 0.6, depth: 200)
            1953-10-15  [Fertiliser].Apply(Amount: 34, Type: Fertiliser.Types.NO3N);
            1953-10-15  [Wheat].Sow(cultivar:Rex, depth:30, population:100, rowSpacing:300);
            1955-04-01  [SurfaceOrganicMatter].Incorporate(fraction: 0.6, depth: 200)
            1955-10-15  [Fertiliser].Apply(Amount: 34, Type: Fertiliser.Types.NO3N);
            1955-10-15  [Wheat].Sow(cultivar:Rex, depth:30, population:100, rowSpacing:300);
            1957-04-01  [SurfaceOrganicMatter].Incorporate(fraction: 0.6, depth: 200)
            1957-10-15  [Fertiliser].Apply(Amount: 34, Type: Fertiliser.Types.NO3N);
            1957-10-15  [Wheat].Sow(cultivar:Rex, depth:30, population:100, rowSpacing:300);
            1959-04-01  [SurfaceOrganicMatter].Incorporate(fraction: 0.6, depth: 200)
            1959-10-15  [Fertiliser].Apply(Amount: 34, Type: Fertiliser.Types.NO3N);
            1959-10-15  [Wheat].Sow(cultivar:Rex, depth:30, population:100, rowSpacing:300);
            1961-04-01  [SurfaceOrganicMatter].Incorporate(fraction: 0.6, depth: 200)
            1961-10-15  [Fertiliser].Apply(Amount: 34, Type: Fertiliser.Types.NO3N);
            1961-10-15  [Wheat].Sow(cultivar:Rex, depth:30, population:100, rowSpacing:300);
            1963-04-01  [SurfaceOrganicMatter].Incorporate(fraction: 0.6, depth: 200)
            1963-10-15  [Fertiliser].Apply(Amount: 34, Type: Fertiliser.Types.NO3N);
            1963-10-15  [Wheat].Sow(cultivar:Rex, depth:30, population:100, rowSpacing:300);
            1965-04-01  [SurfaceOrganicMatter].Incorporate(fraction: 0.6, depth: 200)
            1965-10-15  [Fertiliser].Apply(Amount: 34, Type: Fertiliser.Types.NO3N);
            1965-10-15  [Wheat].Sow(cultivar:Rex, depth:30, population:150, rowSpacing:300);
            1967-10-15  [Fertiliser].Apply(Amount: 90, Type: Fertiliser.Types.NO3N);
            1967-10-15  [Wheat].Sow(cultivar:Nugaines, depth:30, population:150, rowSpacing:300);
            1969-10-15  [Fertiliser].Apply(Amount: 90, Type: Fertiliser.Types.NO3N);
            1969-10-15  [Wheat].Sow(cultivar:Nugaines, depth:30, population:150, rowSpacing:300);
            1971-10-15  [Fertiliser].Apply(Amount: 90, Type: Fertiliser.Types.NO3N);
            1971-10-15  [Wheat].Sow(cultivar:Nugaines, depth:30, population:150, rowSpacing:300);
            1973-10-15  [Fertiliser].Apply(Amount: 90, Type: Fertiliser.Types.NO3N);
            1973-10-15  [Wheat].Sow(cultivar:Nugaines, depth:30, population:150, rowSpacing:300);
            1975-10-15  [Fertiliser].Apply(Amount: 90, Type: Fertiliser.Types.NO3N);
            1975-10-15  [Wheat].Sow(cultivar:Hyslop, depth:30, population:150, rowSpacing:300);
            1977-10-15  [Fertiliser].Apply(Amount: 90, Type: Fertiliser.Types.NO3N);
            1977-10-15  [Wheat].Sow(cultivar:Hyslop, depth:30, population:150, rowSpacing:300);
            1979-10-15  [Fertiliser].Apply(Amount: 90, Type: Fertiliser.Types.NO3N);
            1979-10-15  [Wheat].Sow(cultivar:Stephens, depth:30, population:150, rowSpacing:300);
            1981-10-15  [Fertiliser].Apply(Amount: 90, Type: Fertiliser.Types.NO3N);
            1981-10-15  [Wheat].Sow(cultivar:Stephens, depth:30, population:150, rowSpacing:300);
            1983-10-15  [Fertiliser].Apply(Amount: 90, Type: Fertiliser.Types.NO3N);
            1983-10-15  [Wheat].Sow(cultivar:Stephens, depth:30, population:150, rowSpacing:300);
            1985-10-15  [Fertiliser].Apply(Amount: 90, Type: Fertiliser.Types.NO3N);
            1985-10-15  [Wheat].Sow(cultivar:Stephens, depth:30, population:150, rowSpacing:300);
            1987-10-15  [Fertiliser].Apply(Amount: 90, Type: Fertiliser.Types.NO3N);
            1987-10-15  [Wheat].Sow(cultivar:Stephens, depth:30, population:150, rowSpacing:300);
            1989-10-15  [Fertiliser].Apply(Amount: 90, Type: Fertiliser.Types.NO3N);
            1989-10-15  [Wheat].Sow(cultivar:Stephens, depth:30, population:150, rowSpacing:300);
            1991-10-15  [Fertiliser].Apply(Amount: 90, Type: Fertiliser.Types.NO3N);
            1991-10-15  [Wheat].Sow(cultivar:Stephens, depth:30, population:150, rowSpacing:300);
            1993-10-15  [Fertiliser].Apply(Amount: 90, Type: Fertiliser.Types.NO3N);
            1993-10-15  [Wheat].Sow(cultivar:Stephens, depth:30, population:150, rowSpacing:300);
            1995-10-15  [Fertiliser].Apply(Amount: 90, Type: Fertiliser.Types.NO3N);
            1995-10-15  [Wheat].Sow(cultivar:Stephens, depth:30, population:150, rowSpacing:300);
            1997-10-15  [Fertiliser].Apply(Amount: 90, Type: Fertiliser.Types.NO3N);
            1997-10-15  [Wheat].Sow(cultivar:Stephens, depth:30, population:150, rowSpacing:300);
            1999-10-15  [Fertiliser].Apply(Amount: 90, Type: Fertiliser.Types.NO3N);
            1999-10-15  [Wheat].Sow(cultivar:Stephens, depth:30, population:150, rowSpacing:300);
          Operations 9_nBPv
            1931-04-15  [SurfaceOrganicMatter].Add(mass: 2000, N: 46, P:0.0, type: "wheat", name: "");
            1931-10-15  [Wheat].Sow(cultivar:Rex, depth:30, population:100, rowSpacing:300);
            1933-04-15  [SurfaceOrganicMatter].Add(mass: 2000, N: 46, P:0.0, type: "wheat", name: "");
            1933-10-15  [Wheat].Sow(cultivar:Rex, depth:30, population:100, rowSpacing:300);
            1935-04-15  [SurfaceOrganicMatter].Add(mass: 2000, N: 46, P:0.0, type: "wheat", name: "");
            1935-10-15  [Wheat].Sow(cultivar:Rex, depth:30, population:100, rowSpacing:300);
            1937-04-15  [SurfaceOrganicMatter].Add(mass: 2000, N: 46, P:0.0, type: "wheat", name: "");
            1937-10-15  [Wheat].Sow(cultivar:Rex, depth:30, population:100, rowSpacing:300);
            1939-04-15  [SurfaceOrganicMatter].Add(mass: 2000, N: 46, P:0.0, type: "wheat", name: "");
            1939-10-15  [Wheat].Sow(cultivar:Rex, depth:30, population:100, rowSpacing:300);
            1941-04-15  [SurfaceOrganicMatter].Add(mass: 2000, N: 46, P:0.0, type: "wheat", name: "");
            1941-10-15  [Wheat].Sow(cultivar:Rex, depth:30, population:100, rowSpacing:300);
            1943-04-15  [SurfaceOrganicMatter].Add(mass: 2000, N: 46, P:0.0, type: "wheat", name: "");
            1943-10-15  [Wheat].Sow(cultivar:Rex, depth:30, population:100, rowSpacing:300);
            1945-04-15  [SurfaceOrganicMatter].Add(mass: 2000, N: 46, P:0.0, type: "wheat", name: "");
            1945-10-15  [Wheat].Sow(cultivar:Rex, depth:30, population:100, rowSpacing:300);
            1947-04-15  [SurfaceOrganicMatter].Add(mass: 2000, N: 46, P:0.0, type: "wheat", name: "");
            1947-10-15  [Wheat].Sow(cultivar:Rex, depth:30, population:100, rowSpacing:300);
            1949-04-15  [SurfaceOrganicMatter].Add(mass: 2000, N: 46, P:0.0, type: "wheat", name: "");
            1949-10-15  [Wheat].Sow(cultivar:Rex, depth:30, population:100, rowSpacing:300);
            1951-04-15  [SurfaceOrganicMatter].Add(mass: 2000, N: 46, P:0.0, type: "wheat", name: "");
            1951-10-15  [Wheat].Sow(cultivar:Rex, depth:30, population:100, rowSpacing:300);
            1953-04-15  [SurfaceOrganicMatter].Add(mass: 2000, N: 34, P:0.0, type: "wheat", name: "");
            1953-10-15  [Wheat].Sow(cultivar:Rex, depth:30, population:100, rowSpacing:300);
            1955-04-15  [SurfaceOrganicMatter].Add(mass: 2000, N: 34, P:0.0, type: "wheat", name: "");
            1955-10-15  [Wheat].Sow(cultivar:Rex, depth:30, population:100, rowSpacing:300);
            1957-04-15  [SurfaceOrganicMatter].Add(mass: 2000, N: 34, P:0.0, type: "wheat", name: "");
            1957-10-15  [Wheat].Sow(cultivar:Rex, depth:30, population:100, rowSpacing:300);
            1959-04-15  [SurfaceOrganicMatter].Add(mass: 2000, N: 34, P:0.0, type: "wheat", name: "");
            1959-10-15  [Wheat].Sow(cultivar:Rex, depth:30, population:100, rowSpacing:300);
            1961-04-15  [SurfaceOrganicMatter].Add(mass: 2000, N: 34, P:0.0, type: "wheat", name: "");
            1961-10-15  [Wheat].Sow(cultivar:Rex, depth:30, population:100, rowSpacing:300);
            1963-04-15  [SurfaceOrganicMatter].Add(mass: 2000, N: 34, P:0.0, type: "wheat", name: "");
            1963-10-15  [Wheat].Sow(cultivar:Rex, depth:30, population:100, rowSpacing:300);
            1965-04-15  [SurfaceOrganicMatter].Add(mass: 2000, N: 34, P:0.0, type: "wheat", name: "");
            1965-10-15  [Wheat].Sow(cultivar:Rex, depth:30, population:150, rowSpacing:300);
            1967-04-15  [SurfaceOrganicMatter].Add(mass: 2000, N: 34, P:0.0, type: "wheat", name: "");
            1967-10-15  [Wheat].Sow(cultivar:Nugaines, depth:30, population:150, rowSpacing:300);
            1969-04-15  [SurfaceOrganicMatter].Add(mass: 2000, N: 34, P:0.0, type: "wheat", name: "");
            1969-10-15  [Wheat].Sow(cultivar:Nugaines, depth:30, population:150, rowSpacing:300);
            1971-04-15  [SurfaceOrganicMatter].Add(mass: 2000, N: 34, P:0.0, type: "wheat", name: "");
            1971-10-15  [Wheat].Sow(cultivar:Nugaines, depth:30, population:150, rowSpacing:300);
            1973-04-15  [SurfaceOrganicMatter].Add(mass: 2000, N: 34, P:0.0, type: "wheat", name: "");
            1973-10-15  [Wheat].Sow(cultivar:Nugaines, depth:30, population:150, rowSpacing:300);
            1975-04-15  [SurfaceOrganicMatter].Add(mass: 2000, N: 34, P:0.0, type: "wheat", name: "");
            1975-10-15  [Wheat].Sow(cultivar:Hyslop, depth:30, population:150, rowSpacing:300);
            1977-04-15  [SurfaceOrganicMatter].Add(mass: 2000, N: 34, P:0.0, type: "wheat", name: "");
            1977-10-15  [Wheat].Sow(cultivar:Hyslop, depth:30, population:150, rowSpacing:300);
            1979-04-15  [SurfaceOrganicMatter].Add(mass: 2000, N: 34, P:0.0, type: "wheat", name: "");
            1979-10-15  [Wheat].Sow(cultivar:Stephens, depth:30, population:150, rowSpacing:300);
            1981-04-15  [SurfaceOrganicMatter].Add(mass: 2000, N: 34, P:0.0, type: "wheat", name: "");
            1981-10-15  [Wheat].Sow(cultivar:Stephens, depth:30, population:150, rowSpacing:300);
            1983-04-15  [SurfaceOrganicMatter].Add(mass: 2000, N: 34, P:0.0, type: "wheat", name: "");
            1983-10-15  [Wheat].Sow(cultivar:Stephens, depth:30, population:150, rowSpacing:300);
            1985-04-15  [SurfaceOrganicMatter].Add(mass: 2000, N: 34, P:0.0, type: "wheat", name: "");
            1985-10-15  [Wheat].Sow(cultivar:Stephens, depth:30, population:150, rowSpacing:300);
            1987-04-15  [SurfaceOrganicMatter].Add(mass: 2000, N: 34, P:0.0, type: "wheat", name: "");
            1987-10-15  [Wheat].Sow(cultivar:Stephens, depth:30, population:150, rowSpacing:300);
            1989-04-15  [SurfaceOrganicMatter].Add(mass: 2000, N: 34, P:0.0, type: "wheat", name: "");
            1989-10-15  [Wheat].Sow(cultivar:Stephens, depth:30, population:150, rowSpacing:300);
            1991-04-15  [SurfaceOrganicMatter].Add(mass: 2000, N: 34, P:0.0, type: "wheat", name: "");
            1991-10-15  [Wheat].Sow(cultivar:Stephens, depth:30, population:150, rowSpacing:300);
            1993-04-15  [SurfaceOrganicMatter].Add(mass: 2000, N: 34, P:0.0, type: "wheat", name: "");
            1993-10-15  [Wheat].Sow(cultivar:Stephens, depth:30, population:150, rowSpacing:300);
            1995-04-15  [SurfaceOrganicMatter].Add(mass: 2000, N: 34, P:0.0, type: "wheat", name: "");
            1995-10-15  [Wheat].Sow(cultivar:Stephens, depth:30, population:150, rowSpacing:300);
            1997-04-15  [SurfaceOrganicMatter].Add(mass: 2000, N: 34, P:0.0, type: "wheat", name: "");
            1997-10-15  [Wheat].Sow(cultivar:Stephens, depth:30, population:150, rowSpacing:300);
            1999-04-15  [SurfaceOrganicMatter].Add(mass: 2000, N: 34, P:0.0, type: "wheat", name: "");
            1999-10-15  [Wheat].Sow(cultivar:Stephens, depth:30, population:150, rowSpacing:300);
          Operations 8_nBMn
            1931-04-15  [SurfaceOrganicMatter].Add(mass: 11379, N: 111, P:0.0, type: "wheat", name: "");
            1931-10-15  [Wheat].Sow(cultivar:Rex, depth:30, population:100, rowSpacing:300);
            1933-04-15  [SurfaceOrganicMatter].Add(mass: 11379, N: 111, P:0.0, type: "wheat", name: "");
            1933-10-15  [Wheat].Sow(cultivar:Rex, depth:30, population:100, rowSpacing:300);
            1935-04-15  [SurfaceOrganicMatter].Add(mass: 11379, N: 111, P:0.0, type: "wheat", name: "");
            1935-10-15  [Wheat].Sow(cultivar:Rex, depth:30, population:100, rowSpacing:300);
            1937-04-15  [SurfaceOrganicMatter].Add(mass: 11379, N: 111, P:0.0, type: "wheat", name: "");
            1937-10-15  [Wheat].Sow(cultivar:Rex, depth:30, population:100, rowSpacing:300);
            1939-04-15  [SurfaceOrganicMatter].Add(mass: 11379, N: 111, P:0.0, type: "wheat", name: "");
            1939-10-15  [Wheat].Sow(cultivar:Rex, depth:30, population:100, rowSpacing:300);
            1941-04-15  [SurfaceOrganicMatter].Add(mass: 11379, N: 111, P:0.0, type: "wheat", name: "");
            1941-10-15  [Wheat].Sow(cultivar:Rex, depth:30, population:100, rowSpacing:300);
            1943-10-15  [Wheat].Sow(cultivar:Rex, depth:30, population:100, rowSpacing:300);
            1945-10-15  [Wheat].Sow(cultivar:Rex, depth:30, population:100, rowSpacing:300);
            1947-10-15  [Wheat].Sow(cultivar:Rex, depth:30, population:100, rowSpacing:300);
            1949-04-15  [SurfaceOrganicMatter].Add(mass: 11379, N: 56, P:0.0, type: "wheat", name: "");
            1949-10-15  [Wheat].Sow(cultivar:Rex, depth:30, population:100, rowSpacing:300);
            1951-04-15  [SurfaceOrganicMatter].Add(mass: 11379, N: 56, P:0.0, type: "wheat", name: "");
            1951-10-15  [Wheat].Sow(cultivar:Rex, depth:30, population:100, rowSpacing:300);
            1953-04-15  [SurfaceOrganicMatter].Add(mass: 11379, N: 111, P:0.0, type: "wheat", name: "");
            1953-10-15  [Wheat].Sow(cultivar:Rex, depth:30, population:100, rowSpacing:300);
            1955-04-15  [SurfaceOrganicMatter].Add(mass: 11379, N: 111, P:0.0, type: "wheat", name: "");
            1955-10-15  [Wheat].Sow(cultivar:Rex, depth:30, population:100, rowSpacing:300);
            1957-04-15  [SurfaceOrganicMatter].Add(mass: 11379, N: 111, P:0.0, type: "wheat", name: "");
            1957-10-15  [Wheat].Sow(cultivar:Rex, depth:30, population:100, rowSpacing:300);
            1959-04-15  [SurfaceOrganicMatter].Add(mass: 11379, N: 111, P:0.0, type: "wheat", name: "");
            1959-10-15  [Wheat].Sow(cultivar:Rex, depth:30, population:100, rowSpacing:300);
            1961-04-15  [SurfaceOrganicMatter].Add(mass: 11379, N: 111, P:0.0, type: "wheat", name: "");
            1961-10-15  [Wheat].Sow(cultivar:Rex, depth:30, population:100, rowSpacing:300);
            1963-04-15  [SurfaceOrganicMatter].Add(mass: 11379, N: 111, P:0.0, type: "wheat", name: "");
            1963-10-15  [Wheat].Sow(cultivar:Rex, depth:30, population:100, rowSpacing:300);
            1965-04-15  [SurfaceOrganicMatter].Add(mass: 11379, N: 111, P:0.0, type: "wheat", name: "");
            1965-10-15  [Wheat].Sow(cultivar:Rex, depth:30, population:150, rowSpacing:300);
            1967-04-15  [SurfaceOrganicMatter].Add(mass: 11379, N: 111, P:0.0, type: "wheat", name: "");
            1967-10-15  [Wheat].Sow(cultivar:Nugaines, depth:30, population:150, rowSpacing:300);
            1969-04-15  [SurfaceOrganicMatter].Add(mass: 11379, N: 111, P:0.0, type: "wheat", name: "");
            1969-10-15  [Wheat].Sow(cultivar:Nugaines, depth:30, population:150, rowSpacing:300);
            1971-04-15  [SurfaceOrganicMatter].Add(mass: 11379, N: 111, P:0.0, type: "wheat", name: "");
            1971-10-15  [Wheat].Sow(cultivar:Nugaines, depth:30, population:150, rowSpacing:300);
            1973-04-15  [SurfaceOrganicMatter].Add(mass: 11379, N: 111, P:0.0, type: "wheat", name: "");
            1973-10-15  [Wheat].Sow(cultivar:Nugaines, depth:30, population:150, rowSpacing:300);
            1975-04-15  [SurfaceOrganicMatter].Add(mass: 11379, N: 111, P:0.0, type: "wheat", name: "");
            1975-10-15  [Wheat].Sow(cultivar:Hyslop, depth:30, population:150, rowSpacing:300);
            1977-04-15  [SurfaceOrganicMatter].Add(mass: 11379, N: 111, P:0.0, type: "wheat", name: "");
            1977-10-15  [Wheat].Sow(cultivar:Hyslop, depth:30, population:150, rowSpacing:300);
            1979-04-15  [SurfaceOrganicMatter].Add(mass: 11379, N: 111, P:0.0, type: "wheat", name: "");
            1979-10-15  [Wheat].Sow(cultivar:Stephens, depth:30, population:150, rowSpacing:300);
            1981-04-15  [SurfaceOrganicMatter].Add(mass: 11379, N: 111, P:0.0, type: "wheat", name: "");
            1981-10-15  [Wheat].Sow(cultivar:Stephens, depth:30, population:150, rowSpacing:300);
            1983-04-15  [SurfaceOrganicMatter].Add(mass: 11379, N: 111, P:0.0, type: "wheat", name: "");
            1983-10-15  [Wheat].Sow(cultivar:Stephens, depth:30, population:150, rowSpacing:300);
            1985-04-15  [SurfaceOrganicMatter].Add(mass: 11379, N: 111, P:0.0, type: "wheat", name: "");
            1985-10-15  [Wheat].Sow(cultivar:Stephens, depth:30, population:150, rowSpacing:300);
            1987-04-15  [SurfaceOrganicMatter].Add(mass: 11379, N: 111, P:0.0, type: "wheat", name: "");
            1987-10-15  [Wheat].Sow(cultivar:Stephens, depth:30, population:150, rowSpacing:300);
            1989-04-15  [SurfaceOrganicMatter].Add(mass: 11379, N: 111, P:0.0, type: "wheat", name: "");
            1989-10-15  [Wheat].Sow(cultivar:Stephens, depth:30, population:150, rowSpacing:300);
            1991-04-15  [SurfaceOrganicMatter].Add(mass: 11379, N: 111, P:0.0, type: "wheat", name: "");
            1991-10-15  [Wheat].Sow(cultivar:Stephens, depth:30, population:150, rowSpacing:300);
            1993-04-15  [SurfaceOrganicMatter].Add(mass: 11379, N: 111, P:0.0, type: "wheat", name: "");
            1993-10-15  [Wheat].Sow(cultivar:Stephens, depth:30, population:150, rowSpacing:300);
            1995-04-15  [SurfaceOrganicMatter].Add(mass: 11379, N: 111, P:0.0, type: "wheat", name: "");
            1995-10-15  [Wheat].Sow(cultivar:Stephens, depth:30, population:150, rowSpacing:300);
            1997-04-15  [SurfaceOrganicMatter].Add(mass: 11379, N: 111, P:0.0, type: "wheat", name: "");
            1997-10-15  [Wheat].Sow(cultivar:Stephens, depth:30, population:150, rowSpacing:300);
            1999-04-15  [SurfaceOrganicMatter].Add(mass: 11379, N: 111, P:0.0, type: "wheat", name: "");
            1999-10-15  [Wheat].Sow(cultivar:Stephens, depth:30, population:150, rowSpacing:300);
      Simulation PendletonBaseSimulation
        Weather: FileName=pendletonAPSIMtav.met
        Clock: StartDate=1930-01-01; EndDate=1940-12-31
        Summary summaryfile
        Zone Field: Area=1; Slope=0
          Operations
            1931-10-15  [Wheat].Sow(cultivar:PendletonTall, depth:30, population:100, rowSpacing:300);
            1933-10-15  [Wheat].Sow(cultivar:PendletonTall, depth:30, population:100, rowSpacing:300);
            1935-10-15  [Wheat].Sow(cultivar:PendletonTall, depth:30, population:100, rowSpacing:300);
            1937-10-15  [Wheat].Sow(cultivar:PendletonTall, depth:30, population:100, rowSpacing:300);
            1939-10-15  [Wheat].Sow(cultivar:PendletonTall, depth:30, population:100, rowSpacing:300);
            1941-10-15  [Wheat].Sow(cultivar:PendletonTall, depth:30, population:100, rowSpacing:300);
            1943-10-15  [Wheat].Sow(cultivar:PendletonTall, depth:30, population:100, rowSpacing:300);
            1945-10-15  [Wheat].Sow(cultivar:PendletonTall, depth:30, population:100, rowSpacing:300);
            1947-10-15  [Wheat].Sow(cultivar:PendletonTall, depth:30, population:100, rowSpacing:300);
            1949-10-15  [Wheat].Sow(cultivar:PendletonTall, depth:30, population:100, rowSpacing:300);
            1951-10-15  [Wheat].Sow(cultivar:PendletonTall, depth:30, population:100, rowSpacing:300);
            1953-10-15  [Wheat].Sow(cultivar:PendletonTall, depth:30, population:100, rowSpacing:300);
            1955-10-15  [Wheat].Sow(cultivar:PendletonTall, depth:30, population:100, rowSpacing:300);
            1957-10-15  [Wheat].Sow(cultivar:PendletonTall, depth:30, population:100, rowSpacing:300);
            1959-10-15  [Wheat].Sow(cultivar:PendletonTall, depth:30, population:100, rowSpacing:300);
            1961-10-15  [Wheat].Sow(cultivar:PendletonTall, depth:30, population:100, rowSpacing:300);
            1963-10-15  [Wheat].Sow(cultivar:PendletonTall, depth:30, population:100, rowSpacing:300);
            1965-10-15  [Wheat].Sow(cultivar:PendletonDwarf, depth:30, population:150, rowSpacing:300);
            1967-10-15  [Wheat].Sow(cultivar:PendletonDwarf, depth:30, population:150, rowSpacing:300);
            1969-10-15  [Wheat].Sow(cultivar:PendletonDwarf, depth:30, population:150, rowSpacing:300);
            1971-10-15  [Wheat].Sow(cultivar:PendletonDwarf, depth:30, population:150, rowSpacing:300);
            1973-10-15  [Wheat].Sow(cultivar:PendletonDwarf, depth:30, population:150, rowSpacing:300);
            1975-10-15  [Wheat].Sow(cultivar:PendletonDwarf, depth:30, population:150, rowSpacing:300);
            1977-10-15  [Wheat].Sow(cultivar:PendletonDwarf, depth:30, population:150, rowSpacing:300);
            1979-10-15  [Wheat].Sow(cultivar:PendletonDwarf, depth:30, population:150, rowSpacing:300);
            1981-10-15  [Wheat].Sow(cultivar:PendletonDwarf, depth:30, population:150, rowSpacing:300);
            1983-10-15  [Wheat].Sow(cultivar:PendletonDwarf, depth:30, population:150, rowSpacing:300);
            1985-10-15  [Wheat].Sow(cultivar:PendletonDwarf, depth:30, population:150, rowSpacing:300);
            1987-10-15  [Wheat].Sow(cultivar:PendletonDwarf, depth:30, population:150, rowSpacing:300);
            1989-10-15  [Wheat].Sow(cultivar:PendletonDwarf, depth:30, population:150, rowSpacing:300);
            1991-10-15  [Wheat].Sow(cultivar:PendletonDwarf, depth:30, population:150, rowSpacing:300);
            1993-10-15  [Wheat].Sow(cultivar:PendletonDwarf, depth:30, population:150, rowSpacing:300);
            1995-10-15  [Wheat].Sow(cultivar:PendletonDwarf, depth:30, population:150, rowSpacing:300);
            1997-10-15  [Wheat].Sow(cultivar:PendletonDwarf, depth:30, population:150, rowSpacing:300);
            1999-10-15  [Wheat].Sow(cultivar:PendletonDwarf, depth:30, population:150, rowSpacing:300);
          Manager TillageOperations
            Crop = Wheat
            TillDate = 16-may
            IncorpFraction = 0.95
```csharp
using System;
using Models.Core;
using Models.PMF;
using Models.Soils;
using Models.Utilities;
using APSIM.Shared.Utilities;
using Models.SurfaceOM;

namespace Models
{
    [Serializable] 
    public class Script : Model
    {
        [Description("Crop")]
        public ICrop Crop { get; set; }
        [Description("Tillage date (d-mmm)")]
        public string TillDate { get; set; }
        [Description("Incorporation fraction (0-1)")]
        public double IncorpFraction { get; set; }

        [Link] Clock Clock;
        [Link] SurfaceOrganicMatter SOM;
        
        [EventSubscribe("DoManagement")]
        private void OnDoManagement(object sender, EventArgs e)
        {
            if ((!Crop.IsAlive) && DateUtilities.WithinDates(TillDate, Clock.Today, TillDate))
                SOM.Incorporate(fraction: IncorpFraction, depth: 200);            
        }
    }
}
```
          Operations NOperations
          Report: EventNames=[Clock].DoReport
            VariableNames:
              [Clock].Today
              sum([Soil].SoilWater.SWmm) as TotalSW
              sum([Soil].LL15mm) as TotalLL15
              sum([Soil].DULmm) as TotalDUL
          Report SoilHarvestReport: EventNames=[Wheat].Harvesting
            VariableNames:
              [Clock].Today.Year
              [Wheat].Grain.Wt
              [Wheat].Grain.N*10 as NExport
              [Wheat].AboveGround.Wt
              sum([Soil].SoilNitrogen.TotalC[1:2]) as SOC30
              [Soil].SoilNitrogen.TotalC[3] as SOC60
              sum([Soil].SoilNitrogen.TotalN[1:2]) as SON30
              [Soil].SoilNitrogen.TotalN[3] as SON60
              sum([Soil].SoilNitrogen.TotalC[1:2])/sum([Soil].SoilNitrogen.TotalN[1:2]) as CNR30
              [Soil].SoilNitrogen.TotalC[3]/[Soil].SoilNitrogen.TotalN[3] as CNR60
          SurfaceOrganicMatter stubble: PoolName=wheat; type=wheat; mass=1000; standing_fraction=0; cnr=80; CriticalResidueWeight=2000; OptimumDecompTemp=20; MaxCumulativeEOS=20; CNRatioDecompCoeff=0.277; CNRatioDecompThreshold=25; TotalLeachRain=25; MinRainToLeach=10; CriticalMinimumOrganicC=0.004; DefaultCPRatio=0; DefaultStandingFraction=0; StandingExtinctCoeff=0.5; FractionFaecesAdded=0.5
            Pools:
              {PoolName=wheat, ResidueType=wheat, Mass=1000, CNRatio=80, StandingFraction=0}
            ResidueTypes ResidueTypesList: LoadFromResource=ResidueTypes
          Plant Wheat: CropType=Wheat
          MicroClimate: a_interception=0; b_interception=1; c_interception=0; d_interception=0; soil_albedo=0.23; sun_angle=15; soil_heat_flux_fraction=0.4; night_interception_fraction=0.5; refheight=2; albedo=0.15; emissivity=0.96; RadIntTotal=0
          Manager Harvesting
            Crop = Wheat
```csharp
using System;
using Models.Core;
using Models.PMF;
using Models.Soils;
using Models.Utilities;
using APSIM.Shared.Utilities;

namespace Models
{
    [Serializable] 
    public class Script : Model
    {
        [Description("Crop")]
        public ICrop Crop { get; set; }
        
       
        [EventSubscribe("DoManagement")]
        private void OnDoManagement(object sender, EventArgs e)
        {
            if (Crop.IsReadyForHarvesting)
            {
                Crop.Harvest();
                Crop.EndCrop();
            }
        }
    }
}
```
          Fertiliser
          Soil: Latitude=0; Longitude=0
            Water
              Thickness  BD    AirDry  LL15  DUL   SAT   KS
              150        1.24  0.055   0.11  0.32  0.52  562
              150        1.25  0.055   0.11  0.32  0.52  562
              300        1.26  0.09    0.11  0.31  0.51  557
              300        1.29  0.1     0.1   0.31  0.5   959
              300        1.3   0.1     0.1   0.3   0.49  1063
              300        1.3   0.1     0.1   0.3   0.49  1063
              300        1.3   0.1     0.1   0.3   0.49  1063
              SoilCrop WheatSoil: LL=[0.11, 0.11, 0.11, 0.1, 0.1, 0.1, 0.1]; KL=[0.06, 0.06, 0.05, 0.04, 0.04, 0.02, 0.01]; XF=[1, 1, 1, 1, 1, 1, 1]
            SoilWater: SummerDate=1-Apr; SummerU=6; SummerCona=3.5; WinterDate=1-Nov; WinterU=2; WinterCona=2; DiffusConst=88; DiffusSlope=35; Salb=0.13; CN2Bare=73; CNRed=20; CNCov=0.8; max_pond=0; Thickness=[100, 200, 300, 300, 900]; SWCON=[0.5, 0.5, 0.5, 0.5, 0.5]; residueinterception=0
            SoilNitrogen: fom_type=[default, manure, mucuna, lablab, shemp, stable]; fract_carb=[0.2, 0.3, 0.54, 0.57, 0.45, 0]; fract_cell=[0.7, 0.3, 0.37, 0.37, 0.47, 0.1]; fract_lign=[0.1, 0.4, 0.09, 0.06, 0.08, 0.9]
            SoilOrganicMatter: RootCN=57; RootWt=1109; SoilCN=13; EnrACoeff=7.4; EnrBCoeff=0.2; OCUnits=Total
              Thickness  OC     FBiom  FInert
              150        1.42   0.04   0.35
              150        1.2    0.03   0.5
              300        0.95   0.02   0.65
              300        0.5    0.02   0.75
              300        0.225  0.015  0.85
              300        0.15   0.01   0.99
              300        0.15   0.01   0.99
            Analysis: Thickness=[150, 150, 300, 300, 300, 300, 300]; PH=[6.64, 6.64, 6.64, 6.64, 6.64, 6.64, 6.64]; PHUnits=Water; BoronUnits=HotWater
            InitialWater Initial water: PercentMethod=FilledFromTop; FractionFull=1
            Sample Initial conditions: NO3Units=kgha; NH4Units=ppm; SWUnits=Volumetric; OCUnits=Total; PHUnits=Water
              Thickness  NO3   NH4
              100        10.2  0.0355556
              200        19.9  0
              300        19    0
              300        15.5  0
              300        21.1  0
              300        17.7  0
              300        17.7  0
            CERESSoilTemperature
          SoluteManager
        SoilArbitrator Soil Arbitrator
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