Simulations: Version=129
  Memo TitlePage
    # The APSIM-PMF White Clover Model

    _Rogerio Cichota, Plant and Food Research, New Zealand_

    ##Preamble

    White clover (*Trifolium repens*) is a herbaceous perennial herb in the Fabaceae family (former Leguminosae) native of Europe and west Asia.  It can now be be found in swards around the world in places with temperate and subtropical climates ([ThomasChapter1987]; [BrockEtAl1989]).  The plant aboveground consists of prostrate segmented stolons, from which tri-foliate leaves grow on top of a 5-15 cm petiole.  From the axils of each leaf emerges either a flower stalk (peduncle) or a branching stolon.  Roots are quite thick and relatively shallow; the initial taproot dies after a year or so, but roots can also grow from each branching stolon.  These rooted stolon behave and can become independent plants. Cultivated varieties are commonly classified into small-, medium- and large-leaved cultivars, which besides leaf size also reflects variations in plant height and proportion of stolons ([CaradusEtAl1989]).  The inflorescence is typically of white colour and grows about one third higher than the leaves.  As a legume, white clover can host N-fixing bacteria (*Rhizobium*) in a symbiotic relationship. N fixation by rhyzobia can tranfer large quantities of N from the atmosphere into the soil.  This is a major reason why white clover is typically sown alongside grasses in pastures.  Nonetheless, white clover is also a valuable forage, producing very high quality feed and is highly palatable to ruminants.

    **Objective:**  The model presented here was built to simulate the growth of white clover as a forage crop.  The current model focus on describing biomass accumulation and regrowth after defoliation in monocultural swards.  The model was developed using the Plant Modelling Framework (PMF) and thus, it is readily possible to use the WhiteClover model in mixed swards, but this usage has not been properly tested yet and should be done with caution.
    The simulation of variations in N concentration over the growing season can also be considered as incipient and only reasonably good. The model should be updated and its performance revised in the future when more data becomes available.

    ## Generic background
  Replacements
    Manager Defoliate
      Crop =
      cutPasture_StartDate = 2050-05-20
      cutPasture_EndDate = 2100-12-31
      defoliateType = Graze
      interval2Cut = 21
      durationOfCut = 1
      removeAmountType = DMToRemove
      herbageAmount = 500
      fracDM2Remove = 1
      fracN2Remove = 1
      urineDepth = 10
      fracN2Dung = 0.4
      fracPopDecline = 0.01
```csharp
// Defoliates on a regular cycle or one-off via a schedule
// currently defoliates by the amount specified spread evenly over the specified period

using APSIM.Shared.Utilities;
using System.Xml.Serialization;
using Models.PMF;
using Models.Soils;
using Models;
using System.Text;
using System.Collections.Generic;
using Models.Core;
using System;

namespace Models
{
    [Serializable]
    public class Script : Model
    {
        [Link] Zone zone;
        [Link] Clock Clock;
        [Link] Plant WhiteClover;
        [Link] Fertiliser fertiliser;
        [Link] ISummary summary = null;

        [Description("Choose the crop to harvest:")]
        public IPlant Crop { get; set; }

        [Description("Enter the date to start the rotation (dd/mm/yyyy):")]
        public DateTime cutPasture_StartDate { get; set; }

        [Description("Enter the date to end the rotation (dd/mm/yyyy):")]
        public DateTime cutPasture_EndDate { get; set; }

        [Description("Select type of defoliation:")]
        public defoliationTypes defoliateType { get; set; }

        [Description("Enter the interval between defoliations (days):")]
        public int interval2Cut { get; set; }

        [Description("Enter the number of days to defoliate over (days):")]
        public int durationOfCut { get; set; }

        [Description("Choose what amount is being defined:")]
        public removeAmountTypes removeAmountType { get; set; }

        [Description("Enter the amount to use (kgDM/ha):")]
        public double herbageAmount { get; set; }

        [Description("Enter the fraction of DM that is removed from the field (0-1):")]
        public double fracDM2Remove { get; set; }

        [Description("Enter the fraction of N that is removed from the field (0-1):")]
        public double fracN2Remove { get; set; }

        [Description("Enter the depth down to which urine will applied (mm):")]
        public double urineDepth { get; set; }

        [Description("Enter the proportion of N returned in dung (0-1):")]
        public double fracN2Dung { get; set; }

        [Description("Enter the fraction of population decline due to defoliation (0-1):")]
        public double fracPopDecline { get; set; }

        //fraction of each plant part returned as residue (0-1), wastage
        private double leafResidueFrac = 0.01;
        private double stolonResidueFrac = 0.01;
        private double petioleResidueFrac = 0.01;
        private double flowerResidueFrac = 0.01;
        private double minLeafAmount = 5.0;

        //maximum fraction of stolons to remove
        private double stolonMaxRemovalFrac = 0.10;

        //Outputs
        //Pasture DM defoliated today (kg/ha)
        [XmlIgnore] public double DefoliatedDM{ get; set; }
        //N defoliate today
        [XmlIgnore] public double DefoliatedN{ get; set; }
        //N concentration in today's defoliated material
        [XmlIgnore] public double DefoliatedNConc{ get; set; }
        //Pasture DM harvested today (kg/ha)
        [XmlIgnore] public double HarvestedDM{ get; set; }
        //N harvested today
        [XmlIgnore] public double HarvestedN{ get; set; }
        //N concentration in today's harvested material
        [XmlIgnore] public double HarvestedNConc{ get; set; }
        //DM removed from the paddock
        [XmlIgnore] public double RemovedDM{ get; set; }
        //N removed from the paddock
        [XmlIgnore] public double RemovedN{ get; set; }
        //N concentration in today's removed material
        [XmlIgnore] public double RemovedNConc{ get; set; }
        //DM returned to the paddock
        [XmlIgnore] public double ReturnedDM{ get; set; }
        //N returned to the paddock
        [XmlIgnore] public double ReturnedN{ get; set; }
        //N concentration in today's returned material
        [XmlIgnore] public double ReturnedNConc{ get; set; }
        //N returned as dung (SurfaceOM)
        [XmlIgnore] public double NReturnedInDung{ get; set; }
        //N returned as urine (urea)
        [XmlIgnore] public double NReturnedInUrine{ get; set; }
        //Number of days after last harvest
        [XmlIgnore] public int DaysAfterCut{ get; set; }
        //Total standing DM (Leaf + Stem/Sheath) before cut
        [XmlIgnore] public double PreHarvestDM{ get; set; }
        //Total standing DM (Leaf + Stem/Sheath) after cut
        [XmlIgnore] public double PostHarvestDM{ get; set; }

        //Pasture DM harvested this rotation (kg/ha)
        [XmlIgnore] public double RotationHarvestedDM{ get; set; }
        //Pasture DM to be harvested this rotation (kg/ha)
        [XmlIgnore] public double RotationHarvestingDM{ get; set; }

        //Internal variables
        private RemovalFractions removalFractions;
        //The fraction of urine to be applied in each layer
        private double[] FracLayer;
        // total herbage to remove in g/m2 per day
        private double herbageToRemove;
        // counter
        private int daysCutting = 0;
        // type of defoliation (Cut or Graze)
        private string defoliationType;
        // type of DM amount (ResidualDM or DMToRemove)
        private string amountType;
        // auxiliary
        private bool aCutHasHappened = false;
        private bool isStillCutting = false;
        private double cumAmountHarvested;

        // event to add residue / dung to surface OM
        public event BiomassRemovedDelegate BiomassRemoved;

        [EventSubscribe("StartOfSimulation")]
        private void OnSimulationCommencing(object sender, EventArgs e)
        {
            removalFractions = new RemovalFractions();
            DaysAfterCut = 0;
            resetVariables();
            if (defoliateType == defoliationTypes.Cut)
                defoliationType = "Cut";
            else
                defoliationType = "Graze";

            if (removeAmountType == removeAmountTypes.ResidualDM)
                amountType = "ResidualDM";
            else
                amountType = "DMToRemove";

            // make sure that rotation start when startDate<simulationStartDay
            if ((Clock.Today > cutPasture_StartDate) && (Clock.Today < cutPasture_EndDate))
                cutPasture_StartDate = Clock.Today;
        }

        [EventSubscribe("DoManagement")]
        private void OnDoManagement(object sender, EventArgs e)
        {
            if (Clock.Today == cutPasture_StartDate)
                DaysAfterCut = interval2Cut;

            if ((Clock.Today >= cutPasture_StartDate) && (Clock.Today <= cutPasture_EndDate))
            {
                // Check whether we should start cutting
                if ((WhiteClover.IsEmerged) && (DaysAfterCut > 0) && (DaysAfterCut == interval2Cut))
                {
                    Defoliate(defoliationType, herbageAmount * 0.1, amountType, durationOfCut);
                }
            }

            // Check whether we need to continue cutting
            //if ((daysCutting > 0) && (daysCutting <= durationOfCut))
            if (isStillCutting)
            {
                // reset outputs
                resetVariables();

                removeDM(herbageToRemove, defoliationType);
                returnExcreta();
                cumAmountHarvested += HarvestedDM;
                daysCutting += 1;
            }

            // reset outputs
            if (daysCutting < 0)
            {
                resetVariables();
                daysCutting = 0;
            }
        }

        [EventSubscribe("DoManagementCalculations")]
        private void OnDoManagementCalculations(object sender, EventArgs e)
        {
            if ((daysCutting > 0) && (daysCutting < durationOfCut))
                isStillCutting = true;

            if (daysCutting == durationOfCut)
            {
                PostHarvestDM = (double)zone.Get("WhiteClover.AboveGround.Wt");
                RotationHarvestedDM = cumAmountHarvested;
                aCutHasHappened = true;
                isStillCutting = false;
                daysCutting = -1;
                WhiteClover.Population = WhiteClover.Population * (1.0 - fracPopDecline);
            }

            if (aCutHasHappened && (daysCutting == 0))
                DaysAfterCut += 1;
        }

        public enum removeAmountTypes
        {
            /// <summary>Setting DM amount to remove</summary>
            DMToRemove,
            /// <summary>Setting residual DM amount</summary>
            ResidualDM
        }

        public enum defoliationTypes
        {
            /// <summary>Cut</summary>
            Cut,
            /// <summary>Graze</summary>
            Graze
        }

        // resets the values of all outputs
        private void resetVariables()
        {
            DefoliatedDM = 0.0;
            DefoliatedN = 0.0;
            DefoliatedNConc = 0.0;
            HarvestedDM = 0.0;
            HarvestedN = 0.0;
            HarvestedNConc = 0.0;
            RemovedDM = 0.0;
            RemovedN = 0.0;
            RemovedNConc = 0.0;
            ReturnedDM = 0.0;
            ReturnedN = 0.0;
            ReturnedNConc = 0.0;
            NReturnedInDung = 0.0;
            NReturnedInUrine = 0.0;
            RotationHarvestedDM = 0.0;
            RotationHarvestingDM = 0.0;
        }

        // Perform the basic calculations for defoliation
        public void Defoliate(string defoliationType, double amountDM, string amountType, int duration)
        {
            // get the existing plant amount
            PreHarvestDM = (double)zone.Get("WhiteClover.AboveGround.Wt");

            // check duration
            if (duration <= 0)
                throw new Exception("Duration of graze/cut rotation is zero or negative");
            
            // check amount to remove
            if ((amountType == "DMToRemove") && (PreHarvestDM > 0.0))
            {
                summary.WriteMessage(this, "   Defoliating " + (10.0 * amountDM).ToString("#0.0") + "kg/ha over " + duration + " days");
                herbageToRemove = amountDM / duration;
            }
            else if ((amountType == "ResidualDM") && (PreHarvestDM > amountDM))
            {
                summary.WriteMessage(this, "   Defoliating down to approximately " + (10.0 * amountDM).ToString("#0.0") + "kg/ha over " + duration + " days");
                herbageToRemove = (PreHarvestDM - amountDM) / duration;
            }
            else
            {
                herbageToRemove = 0.0;
                summary.WriteMessage(this, "   Defoliation will not happend because there is not enough plant material");
                return;
            }

            RotationHarvestingDM = herbageToRemove * duration;
            durationOfCut = duration;
            // first defoliation
            removeDM(herbageToRemove, defoliationType);
            returnExcreta();
            cumAmountHarvested = HarvestedDM;
            daysCutting = 1;
            DaysAfterCut = 0;
        }

        private void removeDM(double removeAmount, string removeType)
        {
            // get the existing biomass
            double leafLiveWt = (double)zone.Get("WhiteClover.Leaf.Live.Wt");
            double stolonLiveWt = (double)zone.Get("WhiteClover.Stolon.Live.Wt");
            double petioleLiveWt = (double)zone.Get("WhiteClover.Petiole.Live.Wt");
            double flowerLiveWt = (double)zone.Get("WhiteClover.Inflorescence.Live.Wt");
            double leafDeadWt = (double)zone.Get("WhiteClover.Leaf.Dead.Wt");
            double stolonDeadWt = (double)zone.Get("WhiteClover.Stolon.Dead.Wt");
            double petioleDeadWt = (double)zone.Get("WhiteClover.Petiole.Dead.Wt");
            double flowerDeadWt = (double)zone.Get("WhiteClover.Inflorescence.Dead.Wt");
            double leafLiveN = (double)zone.Get("WhiteClover.Leaf.Live.N");
            double stolonLiveN = (double)zone.Get("WhiteClover.Stolon.Live.N");
            double petioleLiveN = (double)zone.Get("WhiteClover.Petiole.Live.N");
            double flowerLiveN = (double)zone.Get("WhiteClover.Inflorescence.Live.N");
            double leafDeadN = (double)zone.Get("WhiteClover.Leaf.Dead.N");
            double stolonDeadN = (double)zone.Get("WhiteClover.Stolon.Dead.N");
            double petioleDeadN = (double)zone.Get("WhiteClover.Petiole.Dead.N");
            double flowerDeadN = (double)zone.Get("WhiteClover.Inflorescence.Dead.N");

            double existingWt = leafLiveWt + leafDeadWt + (stolonLiveWt + stolonDeadWt)*stolonMaxRemovalFrac + petioleLiveWt + petioleDeadWt + flowerLiveWt + flowerDeadWt;
            double existingN = leafLiveN + leafDeadN + (stolonLiveN + stolonDeadN)*stolonMaxRemovalFrac + petioleLiveN + petioleDeadN + flowerLiveN + flowerDeadN;

            // Can we harvest anything?
            double removingWt = Math.Min(existingWt, removeAmount);
            if (removingWt > 0.0)
            {
                // get the fractions to remove for each organ (will override the default values)
                // the default is [WhiteClover].Leaf.BiomassRemovalDefaults.Cut.FractionRemoved, or equivalent
                // >> double leafFracToRemove = removeAmount * (leafLiveWt + leafDeadWt) / existingWt / existingWt;
                double fracToRemove = removingWt / existingWt;
                double stolonFracToRemove = ((stolonLiveWt + stolonDeadWt) > 0.0) ? fracToRemove : 0.0;
                if(stolonFracToRemove>stolonMaxRemovalFrac)
                {
                    stolonFracToRemove = stolonMaxRemovalFrac;
                    fracToRemove += 2.0*(stolonFracToRemove-stolonMaxRemovalFrac)/6.0;
                }

                double leafFracToRemove = 0.0;
                if ((leafLiveWt + leafDeadWt) > 0.0)
                {
                    if (leafLiveWt < minLeafAmount)
                    {
                        // leafWt cannot go below a minimum
                        leafFracToRemove = (removingWt + leafLiveWt - minLeafAmount) / existingWt;
                        fracToRemove += Math.Max(0.0,fracToRemove-leafFracToRemove)/4.0;
                    }
                    else
                        leafFracToRemove = fracToRemove;
                }

                double petioleFracToRemove = ((petioleLiveWt + petioleDeadWt) > 0.0) ? fracToRemove : 0.0;
                double flowerFracToRemove = ((flowerLiveWt + flowerDeadWt) > 0.0) ? fracToRemove : 0.0;

                // get the fractions to residue (i.e. wastage - will override the default values)
                // the default is [WhiteClover].Leaf.BiomassRemovalDefaults.Cut.FractionToResidue, or equivalent
                double leafFracToResidue = leafResidueFrac * leafFracToRemove;
                double stolonFracToResidue = stolonResidueFrac * stolonFracToRemove;
                double petioleFracToResidue = petioleResidueFrac * petioleFracToRemove;
                double flowerFracToResidue = flowerResidueFrac * flowerFracToRemove;

                // correct the values to defoliate (so our removing = remove + residue)
                leafFracToRemove -= leafFracToResidue;
                stolonFracToRemove -= stolonFracToResidue;
                petioleFracToRemove -= petioleFracToResidue;
                flowerFracToRemove -= flowerFracToResidue;

                // set removal fractions (these overrides the default removals in the plant)
                removalFractions.SetFractionToRemove("Leaf", leafFracToRemove, "Live");
                removalFractions.SetFractionToResidue("Leaf", leafFracToResidue, "Live");
                removalFractions.SetFractionToRemove("Leaf", leafFracToRemove, "Dead");
                removalFractions.SetFractionToResidue("Leaf", leafFracToResidue, "Dead");
                removalFractions.SetFractionToRemove("Stolon", stolonFracToRemove, "Live");
                removalFractions.SetFractionToResidue("Stolon", stolonFracToResidue, "Live");
                removalFractions.SetFractionToRemove("Stolon", stolonFracToRemove, "Dead");
                removalFractions.SetFractionToResidue("Stolon", stolonFracToResidue, "Dead");
                removalFractions.SetFractionToRemove("Petiole", petioleFracToRemove, "Live");
                removalFractions.SetFractionToResidue("Petiole", petioleFracToResidue, "Live");
                removalFractions.SetFractionToRemove("Petiole", petioleFracToRemove, "Dead");
                removalFractions.SetFractionToResidue("Petiole", petioleFracToResidue, "Dead");
                removalFractions.SetFractionToRemove("Inflorescence", flowerFracToRemove, "Live");
                removalFractions.SetFractionToResidue("Inflorescence", flowerFracToResidue, "Live");
                removalFractions.SetFractionToRemove("Inflorescence", flowerFracToRemove, "Dead");
                removalFractions.SetFractionToResidue("Inflorescence", flowerFracToResidue, "Dead");

                removalFractions.SetFractionToRemove("Root", 0.0);
                removalFractions.SetFractionToResidue("Root", 0.0);
                removalFractions.SetFractionToRemove("Taproot", 0.0);
                removalFractions.SetFractionToResidue("Taproot", 0.0);
                removalFractions.SetFractionToRemove("Nodule", 0.0);
                removalFractions.SetFractionToResidue("Nodule", 0.0);

                // Actually do the biomass removal
                WhiteClover.RemoveBiomass(removeType, removalFractions);

                // get the new existing plant amount
                double postHarvestWt = (double)zone.Get("WhiteClover.AboveGround.Wt");
                double postHarvestN = (double)zone.Get("WhiteClover.AboveGround.N");

                // get total defoliation (total plant stuff lost)
                DefoliatedDM = existingWt - postHarvestWt;
                DefoliatedN = existingN - postHarvestN;
                if (DefoliatedDM > 0.0)
                    DefoliatedNConc = DefoliatedN/DefoliatedDM;

                // get total harvested (plant stuff removed from plants)
                HarvestedDM = (double)zone.Get("WhiteClover.Leaf.Removed.Wt")
                + (double)zone.Get("WhiteClover.Stolon.Removed.Wt")
                + (double)zone.Get("WhiteClover.Petiole.Removed.Wt")
                + (double)zone.Get("WhiteClover.Inflorescence.Removed.Wt");
                HarvestedN = (double)zone.Get("WhiteClover.Leaf.Removed.N")
                + (double)zone.Get("WhiteClover.Stolon.Removed.N")
                + (double)zone.Get("WhiteClover.Petiole.Removed.N")
                + (double)zone.Get("WhiteClover.Inflorescence.Removed.N");
                if (HarvestedDM > 0.0)
                    HarvestedNConc = HarvestedN/HarvestedDM;

                // get amounts actually removed from field and that to be returned (residue or dung/urine)
                RemovedDM = HarvestedDM * fracDM2Remove;
                RemovedN = HarvestedN * fracN2Remove;
                if (RemovedDM > 0.0)
                    RemovedNConc = RemovedN/RemovedDM;
                ReturnedDM = HarvestedDM - RemovedDM;
                ReturnedN = HarvestedN - RemovedN;
                if (ReturnedDM > 0.0)
                    ReturnedNConc = ReturnedN/ReturnedDM;
                NReturnedInDung = ReturnedN * fracN2Dung;
                NReturnedInUrine = ReturnedN - NReturnedInDung;
            }
            else
            {
            }
        }

        // Return dung and urine
        private void returnExcreta()
        {
            if ((ReturnedDM > 0.0) || (NReturnedInDung > 0.0))
            {
                PMF.BiomassRemovedType BiomassDung = new PMF.BiomassRemovedType();
                string[] type = new string[] { "RuminantDung_PastureFed" };
                float[] dltdm = new float[] { (Single)ReturnedDM };
                float[] dltn = new float[] { (Single)NReturnedInDung };
                float[] dltp = new float[] { 0 };
                float[] fraction = new float[] { 1 };     // fraction is always 1.0 here

                BiomassDung.crop_type = "RuminantDung_PastureFed";
                BiomassDung.dm_type = type;
                BiomassDung.dlt_crop_dm = dltdm;
                BiomassDung.dlt_dm_n = dltn;
                BiomassDung.dlt_dm_p = dltp;
                BiomassDung.fraction_to_residue = fraction;
                BiomassRemoved.Invoke(BiomassDung);
            }

            if (NReturnedInUrine > 0.0)
            {
                fertiliser.Apply(NReturnedInUrine * 10, Fertiliser.Types.UreaN, urineDepth);
            }
        }
    }
}
```
    Manager ExtraVariables
      InitialDay = False
      AccumPlantN = 0
      AccumMineralisation = 0
      AccumDenit = 0
      AccumFert = 0
      AccumLeach = 0
      AccumDetach = 0
      DeltaSoilOMN = 0
      DeltaSurfaceOMN = 0
      DeltaSoilMineralN = 0
      SoilNitrogenContent = 0
      AccumEO = 0
      AccumEP = 0
      AccumES = 0
      AccumDrainage = 0
      AccumRunoff = 0
      AccumOutflowLat = 0
      AccumIrrigation = 0
      AccumRainfall = 0
      SoilWaterDeficit = 0
      InitialSoilOMN = 0
      InitialSurfaceOMN = 0
      InitialMineralN = 0
      SWC = 0
      DUL = 0
      OutFlowLat = 0
      FomN = 0
      BiomN = 0
      HumN = 0
      OrganicN = 0
      NO3N = 0
      NH4N = 0
      UreaN = 0
      MineralN = 0
      DltNMinRes = 0
      DltNMinTot = 0
      LeafFraction = 0
      StolonFraction = 0
      PetioleFraction = 0
      InflorescenceFraction = 0
      ShootRootRatio = 0
      AccumHarvestedWt = 0
      AccumHarvestedN = 0
      HerbageNConc = 0
```csharp
using Models.Climate;
using APSIM.Shared.Utilities;
using System.Xml.Serialization;
using Models;
using Models.PMF;
using Models.Soils;
using System.Text;
using System.Collections.Generic;
using Models.Core;
using System;
using Models.Interfaces;
using Models.Soils.Nutrients;
using Models.PMF.Organs;

namespace Models
{
    [Serializable] 
    public class Script : Model
    {
        [Link] private Clock Clock;
        [Link] private Weather Met;
        [Link] private Fertiliser Fert;
        [Link] private Irrigation Irrig;
        [Link] private Plant WhiteClover;
        [Link] private Zone zone;
        [Link] private ISummary summary;
        private DateTime YearStartDate;
        private double yesterdayNconc;
        [Link(ByName = true)]
        private ISolute Urea;
        [Link(ByName = true)]
        private ISolute NO3;
        [Link(ByName = true)]
        private ISolute NH4;
        [Link(ByName = true)]
        private SoilNitrogen SoilNitrogen;
        [Link] private Soils.Soil Soil;
        [Link] private Models.Surface.SurfaceOrganicMatter SOM;
        [Link(Type = LinkType.Path, Path = "[WhiteClover].Root")]
        private Root root;
        [Link]
        private IPhysical soilPhysical;
        [Link]
        private ISoilWater waterBalance;
                    
        [XmlIgnore] public bool InitialDay { get; set; }
        
        [XmlIgnore] public double AccumPlantN { get; set; }
        [XmlIgnore] public double AccumMineralisation { get; set; }
        [XmlIgnore] public double AccumDenit { get; set; }
        [XmlIgnore] public double AccumFert { get; set; }
        [XmlIgnore] public double AccumLeach { get; set; }
        [XmlIgnore] public double AccumDetach { get; set; }
        [XmlIgnore] public double DeltaSoilOMN { get; set; }
        [XmlIgnore] public double DeltaSurfaceOMN { get; set; }
        [XmlIgnore] public double DeltaSoilMineralN { get; set; }
        [XmlIgnore] public double SoilNitrogenContent { get; set; }
        
        [XmlIgnore] public double AccumEO { get; set; }
        [XmlIgnore] public double AccumEP { get; set; }
        [XmlIgnore] public double AccumES { get; set; }
        [XmlIgnore] public double AccumDrainage { get; set; }
        [XmlIgnore] public double AccumRunoff { get; set; }
        [XmlIgnore] public double AccumOutflowLat { get; set; }
        [XmlIgnore] public double AccumIrrigation { get; set; }
        [XmlIgnore] public double AccumRainfall { get; set; }
        [XmlIgnore] public double SoilWaterDeficit { get; set; }
    
        [XmlIgnore] public double  InitialSoilOMN { get; set; }
        [XmlIgnore] public double  InitialSurfaceOMN { get; set; }
        [XmlIgnore] public double  InitialMineralN { get; set; }
        
        [XmlIgnore] public double SWC { get; set; }
        [XmlIgnore] public double DUL { get; set; }
        [XmlIgnore] public double OutFlowLat { get; set; }

        [XmlIgnore] public double FomN { get; set; }
        [XmlIgnore] public double BiomN { get; set; }
        [XmlIgnore] public double HumN { get; set; }
        [XmlIgnore] public double OrganicN { get; set; }
        [XmlIgnore] public double NO3N { get; set; }
        [XmlIgnore] public double NH4N { get; set; }
        [XmlIgnore] public double UreaN { get; set; }
        [XmlIgnore] public double MineralN { get; set; }
        [XmlIgnore] public double DltNMinRes { get; set; }
        [XmlIgnore] public double DltNMinTot { get; set; }
        
        [XmlIgnore] public double LeafFraction { get; set; }
        [XmlIgnore] public double StolonFraction { get; set; }
        [XmlIgnore] public double PetioleFraction { get; set; }
        [XmlIgnore] public double InflorescenceFraction { get; set; }

        [XmlIgnore] public double ShootRootRatio { get; set; }

        [XmlIgnore] public double AccumHarvestedWt { get; set; }
        [XmlIgnore] public double AccumHarvestedN { get; set; }
        [XmlIgnore] public double HerbageNConc { get; set; }


        [EventSubscribe("StartOfSimulation")]
        private void OnSimulationCommencing(object sender, EventArgs e)
        {
            InitialDay = true;
        }
        
        [EventSubscribe("StartOfDay")]
        private void OnStartOfDay(object sender, EventArgs e)
        {
            yesterdayNconc =  MathUtilities.Divide((double)zone.Get("WhiteClover.Leaf.N")+(double)zone.Get("WhiteClover.Petiole.N"), (double)zone.Get("WhiteClover.Leaf.Wt")+(double)zone.Get("WhiteClover.Petiole.Wt"), 0.0);
        }

        [EventSubscribe("DoManagement")]
        private void OnDoManagement(object sender, EventArgs e)
        {
            //!!!!!! Nitrogen balance components !!!!!!
            //!!!!!!^^^^^^^^^^^^^^^^^^^^^^^^^^^^^!!!!!!
            FomN = MathUtilities.Sum(SoilNitrogen.FOMN);
            HumN = MathUtilities.Sum(SoilNitrogen.HumicN);
            BiomN = MathUtilities.Sum(SoilNitrogen.MicrobialN);
            OrganicN = FomN + HumN + BiomN;
            NO3N = MathUtilities.Sum(NO3.kgha);
            NH4N = MathUtilities.Sum(NH4.kgha);
            UreaN = MathUtilities.Sum(Urea.kgha);
            MineralN = NO3N + NH4N + UreaN; 
            DltNMinRes = MathUtilities.Sum(SoilNitrogen.dlt_n_min_res);
            DltNMinTot = MathUtilities.Sum(SoilNitrogen.MineralisedN);
            int layers = soilPhysical.Thickness.Length;
            if (InitialDay == true)
            {
                InitialSurfaceOMN = SOM.N;
                InitialSoilOMN = OrganicN;
                InitialMineralN = MineralN;
                InitialDay = false;

                // check whether we're in the north or south hemisphere
                if (Met.Latitude >= 0.0)
                    YearStartDate = new DateTime(2000, 1, 1);
                else
                    YearStartDate = new DateTime(2000, 7, 1);
            }
            DeltaSurfaceOMN = SOM.N - InitialSurfaceOMN;
            AccumLeach = AccumLeach - waterBalance.LeachNH4 - waterBalance.LeachNO3 - waterBalance.LeachUrea; //Fails
            AccumMineralisation += MathUtilities.Sum(SoilNitrogen.MineralisedN);
            AccumDenit -= MathUtilities.Sum(SoilNitrogen.Denitrification);
            AccumPlantN -= (double)zone.Get("WhiteClover.Root.NUptake");
            DeltaSoilOMN = OrganicN - InitialSoilOMN;
            DeltaSoilMineralN = MineralN - InitialMineralN;
            SoilNitrogenContent = MineralN;

            //!!!!!! Water balance components !!!!!!
            //!!!!!!^^^^^^^^^^^^^^^^^^^^^^^^^^!!!!!!

            AccumRainfall += Met.Rain;
            //AccumEP -= (double)zone.Get("[WhiteClover].Leaf.Transpiration");
            AccumEP -= (double)zone.Get("WhiteClover.Root.WaterUptake");
            SoilWaterDeficit = (SWC - DUL);
            double OutFlowLat = MathUtilities.Sum(waterBalance.LateralOutflow);
            AccumOutflowLat -= OutFlowLat;
            
            //!!!!!! Stem and leaf fraction !!!!!!
            if ((double)zone.Get("WhiteClover.AboveGround.Wt") > 0.0)
            {
                LeafFraction = (double)zone.Get("WhiteClover.Leaf.Wt") / (double)zone.Get("WhiteClover.AboveGround.Wt");
                StolonFraction = (double)zone.Get("WhiteClover.Stolon.Wt") / (double)zone.Get("WhiteClover.AboveGround.Wt");
                PetioleFraction = (double)zone.Get("WhiteClover.Petiole.Wt") / (double)zone.Get("WhiteClover.AboveGround.Wt");
                InflorescenceFraction = (double)zone.Get("WhiteClover.Inflorescence.Wt") / (double)zone.Get("WhiteClover.AboveGround.Wt");
            }
            else
            {
                LeafFraction = 0.0;
                StolonFraction = 0.0;
                PetioleFraction = 0.0;
            }
            
            //!!!!!! Plant DM components !!!!!!
            //!!!!!!^^^^^^^^^^^^^^^^^^^^^^^^^^!!!!!!
            ShootRootRatio = MathUtilities.Divide((double)zone.Get("WhiteClover.AboveGroundLive.Wt"), (double)zone.Get("WhiteClover.BelowGroundLive.Wt"), 0.0);
            HerbageNConc = yesterdayNconc;
        }
        
        [EventSubscribe("DoManagementCalculations")]
        private void OnDoManagementCalculations(object sender, EventArgs e)
        {
            FomN = MathUtilities.Sum(SoilNitrogen.FOMN);
            HumN = MathUtilities.Sum(SoilNitrogen.HumicN);
            BiomN = MathUtilities.Sum(SoilNitrogen.MicrobialN);
            AccumFert += Fert.NitrogenApplied;
            AccumIrrigation += Irrig.IrrigationApplied;
            
            
            AccumEO -= waterBalance.Eo;
            AccumES -= waterBalance.Es; 
            AccumDrainage -= waterBalance.Drainage;
            AccumRunoff -= waterBalance.Runoff;
            SWC = MathUtilities.Sum(waterBalance.SWmm);
            DUL = MathUtilities.Sum(soilPhysical.DULmm);

            //!!!!!! Plant Harvest !!!!!!
            if (Clock.Today.DayOfYear == YearStartDate.DayOfYear)
            {
                AccumHarvestedWt = (double)zone.Get("[Defoliate].Script.DefoliatedDM");
                AccumHarvestedN = (double)zone.Get("[Defoliate].Script.DefoliatedN");
            }
            else
            {
                AccumHarvestedWt += (double)zone.Get("[Defoliate].Script.DefoliatedDM");
                AccumHarvestedN += (double)zone.Get("[Defoliate].Script.DefoliatedN");
            }
        }
    }
}
```
    Report: EventNames=[Clock].DoReport
      VariableNames:
        [Clock].Today as Date
        [Clock].Today.DayOfYear as DayOfYear
        [Weather].Radn as SolarRadiation
        [MicroClimate].NetRadiation
        [WhiteClover].Leaf.RadiationIntercepted as InterceptedRadiation
        [Weather].MeanT
        [Weather].Rain as Rainfall
        [Irrigation].IrrigationApplied as IrrigationApplied
        [MicroClimate].PrecipitationInterception as PrecipitationInterception
        [MicroClimate].PetTotal
        [Soil].SoilWater.Eo as Eo
        [Soil].SoilWater.Es as Evaporation
        [WhiteClover].Leaf.Transpiration as Transpiration
        [Soil].SoilWater.pond as PondedWater
        [Soil].SoilWater.Drainage as Drainage
        [Soil].SoilWater.Runoff as Runoff
        sum([Soil].SoilWater.LateralOutflow) as LateralFlow
        sum([Soil].SoilWater.SWmm) as TotalSWC
        sum([Soil].Physical.SATmm) as TotalSAT
        sum([Soil].Physical.DULmm) as TotalDUL
        sum([Soil].Physical.LL15mm) as TotalLL15
        [Soil].SoilWater.SW[1] as SWCTopLayer
        [Soil].Physical.DUL[1] as DULTopLayer
        [Fertiliser].NitrogenApplied as FertiliserN
        sum([Soil].SoilNitrogen.Denitrification) as DenitrifiedN
        ([Soil].SoilWater.LeachNH4 + [Soil].SoilWater.LeachNO3) as LeachedN
        (-1*[WhiteClover].Root.NUptake) as UptakeN
        sum([Soil].SoilNitrogen.MineralisedN) as MineralisedSoilN
        sum([Soil].SoilNitrogen.dlt_n_min_res) as MineralisedSurfOMN
        ([WhiteClover].Leaf.Detached.N+[WhiteClover].Petiole.Detached.N+[WhiteClover].Stolon.Detached.N+[WhiteClover].Inflorescence.Detached.N) as DetachedAGN
        ([WhiteClover].Nodule.Detached.N+[WhiteClover].Taproot.Detached.N+[WhiteClover].Root.Detached.N) as DetachedBGN
        (10*([WhiteClover].Leaf.Detached.N+[WhiteClover].Petiole.Detached.N+[WhiteClover].Stolon.Detached.N+[WhiteClover].Inflorescence.Detached.N+[WhiteClover].Nodule.Detached.N+[WhiteClover].Taproot.Detached.N+[WhiteClover].Root.Detached.N)) as DetachedTotalN
        (10*[WhiteClover].Nodule.NFixed) as WhiteClover.Nodule.NFixed
        (sum([Soil].SoilNitrogen.Urea.kgha) + sum([Soil].SoilNitrogen.NH4.kgha) + sum([Soil].SoilNitrogen.NO3.kgha)) as SoilNContent
        sum([Soil].SoilNitrogen.Urea.kgha) as SoilUrea
        sum([Soil].SoilNitrogen.NH4.kgha) as SoilNH4
        sum([Soil].SoilNitrogen.NO3.kgha) as SoilNO3
        (sum([Soil].SoilNitrogen.NH4.kgha[1:4])+sum([Soil].SoilNitrogen.NO3.kgha[1:4])) as TopSoilN
        [SurfaceOrganicMatter].N as TotalSurfOMN
        sum([Soil].SoilNitrogen.FOMN) as TotalFOMN
        sum([Soil].SoilNitrogen.HumicN) as TotalHumicN
        sum([Soil].SoilNitrogen.MicrobialN as TotalMicrobialN
        ([WhiteClover].Total.N) as TotalPlantN
        [Defoliate].Script.RotationHarvestedDM as RotationHarvestedWt
        [Defoliate].Script.PreHarvestDM
        [Defoliate].Script.PostHarvestDM
        [Defoliate].Script.DefoliatedDM
        [Defoliate].Script.HarvestedDM
        [Defoliate].Script.RemovedDM
        [Defoliate].Script.DefoliatedN as NTakenOff
        [Defoliate].Script.HarvestedN
        (10*[Defoliate].Script.RemovedN) as Defoliate.Script.RemovedN
        [Defoliate].Script.NReturnedInDung
        [Defoliate].Script.NReturnedInUrine
        [Defoliate].Script.DefoliatedDM as HarvestedWt
        [Defoliate].Script.DaysAfterCut
        [Defoliate].Script.DefoliatedNConc
        [Defoliate].Script.RemovedNConc
        [ExtraVariables].Script.AccumHarvestedWt as CumulativeHarvestedWt
        [ExtraVariables].Script.AccumHarvestedN as CumulativeNTakenOff
        [WhiteClover].Phenology.ThermalTime
        [WhiteClover].Phenology.Photoperiod
        [WhiteClover].Phenology.PhotoperiodVariation
        [WhiteClover].Phenology.CurrentPhase.Name
        [WhiteClover].Phenology.Stage
        [WhiteClover].Population
        [WhiteClover].Root.LengthDensity
        [WhiteClover].Leaf.ExtinctionCoefficient
        [WhiteClover].Arbitrator.DM.TotalFixationSupply
        [WhiteClover].Arbitrator.DM.TotalPlantDemand
        [WhiteClover].Arbitrator.DM.Allocated
        [WhiteClover].Arbitrator.DM.SinkLimitation
        [WhiteClover].Arbitrator.DM.NutrientLimitation
        [WhiteClover].Arbitrator.FDM
        [WhiteClover].Leaf.DMSupply.Total
        [WhiteClover].Petiole.DMSupply.Total
        [WhiteClover].Stolon.DMSupply.Total
        [WhiteClover].Inflorescence.DMSupply.Total
        [WhiteClover].Nodule.DMSupply.Total
        [WhiteClover].Taproot.DMSupply.Total
        [WhiteClover].Root.DMSupply.Total
        [WhiteClover].Leaf.DMDemand.Total
        [WhiteClover].Petiole.DMDemand.Total
        [WhiteClover].Stolon.DMDemand.Total
        [WhiteClover].Inflorescence.DMDemand.Total
        [WhiteClover].Nodule.DMDemand.Total
        [WhiteClover].Taproot.DMDemand.Total
        [WhiteClover].Root.DMDemand.Total
        ([WhiteClover].Leaf.DMSupply.Total+[WhiteClover].Petiole.DMSupply.Total+[WhiteClover].Stolon.DMSupply.Total+[WhiteClover].Inflorescence.DMSupply.Total+[WhiteClover].Nodule.DMSupply.Total+[WhiteClover].Taproot.DMSupply.Total+[WhiteClover].Root.DMSupply.Total) as WhiteClover.Total.Supply.Wt
        ([WhiteClover].Leaf.DMDemand.Total+[WhiteClover].Petiole.DMDemand.Total+[WhiteClover].Stolon.DMDemand.Total+[WhiteClover].Inflorescence.DMDemand.Total+[WhiteClover].Nodule.DMDemand.Total+[WhiteClover].Taproot.DMDemand.Total+[WhiteClover].Root.DMDemand.Total) as WhiteClover.Total.Demand.Wt
        [WhiteClover].Arbitrator.N.TotalPlantSupply
        [WhiteClover].Arbitrator.N.TotalPlantDemand
        [WhiteClover].Arbitrator.N.Allocated
        [WhiteClover].Arbitrator.N.SinkLimitation
        [WhiteClover].Arbitrator.N.NutrientLimitation
        [WhiteClover].Arbitrator.FN
        [WhiteClover].Arbitrator.N.TotalFixationSupply
        [WhiteClover].Arbitrator.N.TotalReallocationSupply
        [WhiteClover].Arbitrator.N.TotalRetranslocationSupply
        [WhiteClover].Arbitrator.N.TotalUptakeSupply
        [WhiteClover].Arbitrator.N.TotalReallocation
        [WhiteClover].Arbitrator.N.TotalRetranslocation
        [WhiteClover].Root.NSupply.Uptake
        [WhiteClover].Root.NUptake
        [WhiteClover].Root.NTakenUp
        [WhiteClover].Leaf.NSupply.Total
        [WhiteClover].Petiole.NSupply.Total
        [WhiteClover].Stolon.NSupply.Total
        [WhiteClover].Inflorescence.NSupply.Total
        [WhiteClover].Nodule.NSupply.Total
        [WhiteClover].Taproot.NSupply.Total
        [WhiteClover].Root.NSupply.Total
        [WhiteClover].Leaf.NDemand.Total
        [WhiteClover].Petiole.NDemand.Total
        [WhiteClover].Stolon.NDemand.Total
        [WhiteClover].Inflorescence.NDemand.Total
        [WhiteClover].Nodule.NDemand.Total
        [WhiteClover].Taproot.NDemand.Total
        [WhiteClover].Root.NDemand.Total
        ([WhiteClover].Leaf.NSupply.Total+[WhiteClover].Petiole.NSupply.Total+[WhiteClover].Stolon.NSupply.Total+[WhiteClover].Inflorescence.NSupply.Total+[WhiteClover].Nodule.NSupply.Total+[WhiteClover].Taproot.NSupply.Total+[WhiteClover].Root.NSupply.Total) as WhiteClover.Total.Supply.N
        ([WhiteClover].Leaf.NDemand.Total+[WhiteClover].Petiole.NDemand.Total+[WhiteClover].Stolon.NDemand.Total+[WhiteClover].Inflorescence.NDemand.Total+[WhiteClover].Nodule.NDemand.Total+[WhiteClover].Taproot.NDemand.Total+[WhiteClover].Root.NDemand.Total) as WhiteClover.Total.Demand.N
        [WhiteClover].ShootRootRatio
        [WhiteClover].TargetShootRootRatio
        [WhiteClover].TargetAboveGroundFraction
        ([WhiteClover].AboveGroundLive.Wt/([WhiteClover].TotalLive.Wt+0.000001)) as WhiteClover.AboveGroundFraction
        ([WhiteClover].Leaf.Live.Wt / ([WhiteClover].AboveGroundLive.Wt + 0.000001)) as WhiteClover.Leaf.BiomassProportion
        ([WhiteClover].Stolon.Live.Wt / ([WhiteClover].AboveGroundLive.Wt + 0.000001)) as WhiteClover.Stolon.BiomassProportion
        ([WhiteClover].Petiole.Live.Wt / ([WhiteClover].AboveGroundLive.Wt + 0.000001)) as WhiteClover.Petiole.BiomassProportion
        ([WhiteClover].Inflorescence.Live.Wt / ([WhiteClover].AboveGroundLive.Wt + 0.000001)) as WhiteClover.Inflorescence.BiomassProportion
        ([WhiteClover].Nodule.Live.Wt / ([WhiteClover].BelowGround.Wt + 0.000001)) as WhiteClover.Nodule.BiomassProportion
        ([WhiteClover].Taproot.Live.Wt / ([WhiteClover].BelowGround.Wt + 0.000001)) as WhiteClover.Taproot.BiomassProportion
        ([WhiteClover].Root.Live.Wt / ([WhiteClover].BelowGround.Wt + 0.000001)) as WhiteClover.Root.BiomassProportion
        [WhiteClover].Leaf.TargetBiomassProportion
        [WhiteClover].Petiole.TargetBiomassProportion
        [WhiteClover].Stolon.TargetBiomassProportion
        [WhiteClover].Inflorescence.TargetBiomassProportion
        [WhiteClover].Nodule.TargetBiomassProportion
        [WhiteClover].Taproot.TargetBiomassProportion
        [WhiteClover].Root.TargetBiomassProportion
        [WhiteClover].Leaf.DMDemands.Structural.DMDemandFunction as WhiteClover.Leaf.AdjustedOrganProportion
        [WhiteClover].Petiole.DMDemands.Structural.DMDemandFunction as WhiteClover.Petiole.AdjustedOrganProportion
        [WhiteClover].Stolon.DMDemands.Structural.DMDemandFunction as WhiteClover.Stolon.AdjustedOrganProportion
        [WhiteClover].Inflorescence.DMDemands.Structural.DMDemandFunction as WhiteClover.Inflorescence.AdjustedOrganProportion
        [WhiteClover].Nodule.DMDemands.Structural.DMDemandFunction as WhiteClover.Nodule.AdjustedOrganProportion
        [WhiteClover].Taproot.DMDemands.Structural.DMDemandFunction as WhiteClover.Taproot.AdjustedOrganProportion
        [WhiteClover].Root.DMDemands.Structural.DMDemandFunction as WhiteClover.Root.AdjustedOrganProportion
        [WhiteClover].Leaf.DMDemands.Structural.DMDemandFunction.BaseBiomassDemand
        [WhiteClover].Leaf.DMDemands.Structural.DMDemandFunction.DeficitBiomassDemand
        [WhiteClover].Petiole.DMDemands.Structural.DMDemandFunction.BaseBiomassDemand
        [WhiteClover].Petiole.DMDemands.Structural.DMDemandFunction.DeficitBiomassDemand
        [WhiteClover].Stolon.DMDemands.Structural.DMDemandFunction.BaseBiomassDemand
        [WhiteClover].Stolon.DMDemands.Structural.DMDemandFunction.DeficitBiomassDemand
        [WhiteClover].Inflorescence.DMDemands.Structural.DMDemandFunction.BaseBiomassDemand
        [WhiteClover].Inflorescence.DMDemands.Structural.DMDemandFunction.DeficitBiomassDemand
        [WhiteClover].Nodule.DMDemands.Structural.DMDemandFunction.BaseBiomassDemand
        [WhiteClover].Nodule.DMDemands.Structural.DMDemandFunction.DeficitBiomassDemand
        [WhiteClover].Taproot.DMDemands.Structural.DMDemandFunction.BaseBiomassDemand
        [WhiteClover].Taproot.DMDemands.Structural.DMDemandFunction.DeficitBiomassDemand
        [WhiteClover].Root.DMDemands.Structural.DMDemandFunction.BaseBiomassDemand
        [WhiteClover].Root.DMDemands.Structural.DMDemandFunction.DeficitBiomassDemand
        ([WhiteClover].Leaf.DMDemands.Structural.DMDemandFunction+[WhiteClover].Petiole.DMDemands.Structural.DMDemandFunction+[WhiteClover].Stolon.DMDemands.Structural.DMDemandFunction+[WhiteClover].Inflorescence.DMDemands.Structural.DMDemandFunction+[WhiteClover].Nodule.DMDemands.Structural.DMDemandFunction+[WhiteClover].Taproot.DMDemands.Structural.DMDemandFunction+[WhiteClover].Root.DMDemands.Structural.DMDemandFunction) as TotalDMDemanded
        ([WhiteClover].Leaf.Allocated.Wt/([WhiteClover].Arbitrator.DM.Allocated+0.000001)) as WhiteClover.Leaf.FractionDMAllocated
        ([WhiteClover].Petiole.Allocated.Wt/([WhiteClover].Arbitrator.DM.Allocated+0.000001)) as WhiteClover.Petiole.FractionDMAllocated
        ([WhiteClover].Stolon.Allocated.Wt/([WhiteClover].Arbitrator.DM.Allocated+0.000001)) as WhiteClover.Stolon.FractionDMAllocated
        ([WhiteClover].Inflorescence.Allocated.Wt/([WhiteClover].Arbitrator.DM.Allocated+0.000001)) as WhiteClover.Inflorescence.FractionDMAllocated
        ([WhiteClover].Nodule.Allocated.Wt/([WhiteClover].Arbitrator.DM.Allocated+0.000001)) as WhiteClover.Nodule.FractionDMAllocated
        ([WhiteClover].Taproot.Allocated.Wt/([WhiteClover].Arbitrator.DM.Allocated+0.000001)) as WhiteClover.Taproot.FractionDMAllocated
        ([WhiteClover].Root.Allocated.Wt/([WhiteClover].Arbitrator.DM.Allocated+0.000001)) as WhiteClover.Root.FractionDMAllocated
        [WhiteClover].Leaf.DMPotentialAllocation.Total
        [WhiteClover].Petiole.DMPotentialAllocation.Total
        [WhiteClover].Stolon.DMPotentialAllocation.Total
        [WhiteClover].Inflorescence.DMPotentialAllocation.Total
        [WhiteClover].Nodule.DMPotentialAllocation.Total
        [WhiteClover].Taproot.DMPotentialAllocation.Total
        [WhiteClover].Root.DMPotentialAllocation.Total
        ([WhiteClover].Leaf.DMPotentialAllocation.Total+[WhiteClover].Petiole.DMPotentialAllocation.Total+[WhiteClover].Stolon.DMPotentialAllocation.Total+[WhiteClover].Inflorescence.DMPotentialAllocation.Total+[WhiteClover].Nodule.DMPotentialAllocation.Total+[WhiteClover].Taproot.DMPotentialAllocation.Total+[WhiteClover].Root.DMPotentialAllocation.Total) as WhiteClover.Total.PotAllocation.Wt
        [WhiteClover].Total.Wt
        [WhiteClover].Total.N
        [WhiteClover].Total.NConc
        [WhiteClover].TotalLive.Wt
        [WhiteClover].AboveGround.Wt
        [WhiteClover].BelowGround.Wt
        [WhiteClover].AboveGround.N
        [WhiteClover].BelowGround.N
        [WhiteClover].AboveGroundLive.Wt
        [WhiteClover].BelowGroundLive.Wt
        [WhiteClover].AboveGroundLive.NConc
        [WhiteClover].BelowGroundLive.NConc
        [ExtraVariables].Script.HerbageNConc as HerbageNConc
        (([WhiteClover].Leaf.N+[WhiteClover].Petiole.N)/(([WhiteClover].Leaf.Wt+[WhiteClover].Petiole.Wt+0.000001)) as HerbageStandingNConc
        [WhiteClover].Leaf.Wt
        [WhiteClover].Leaf.Live.Wt
        [WhiteClover].Leaf.Live.N
        [WhiteClover].Leaf.Live.NConc
        [WhiteClover].Leaf.Dead.Wt
        [WhiteClover].Leaf.Dead.NConc
        [WhiteClover].Leaf.CoverTotal
        [WhiteClover].Leaf.CoverGreen
        [WhiteClover].Leaf.CoverDead
        [WhiteClover].Leaf.LAITotal
        [WhiteClover].Leaf.LAI
        [WhiteClover].Leaf.LAIDead
        [WhiteClover].Leaf.Height
        [WhiteClover].Leaf.Transpiration
        [WhiteClover].Leaf.Fw
        [WhiteClover].Leaf.Fn
        [WhiteClover].Leaf.FNmetabolic
        [WhiteClover].Leaf.Photosynthesis.FCO2
        [WhiteClover].Leaf.Photosynthesis.FN
        [WhiteClover].Leaf.Photosynthesis.FT
        [WhiteClover].Leaf.Photosynthesis.FW
        [WhiteClover].Leaf.Photosynthesis.FVPD
        [WhiteClover].Leaf.FRGR
        [WhiteClover].Petiole.Live.Wt
        [WhiteClover].Petiole.Live.N
        [WhiteClover].Petiole.Live.NConc
        [WhiteClover].Petiole.Dead.Wt
        [WhiteClover].Petiole.Dead.NConc
        [WhiteClover].Stolon.Live.Wt
        [WhiteClover].Stolon.Live.N
        [WhiteClover].Stolon.Live.NConc
        [WhiteClover].Stolon.Dead.Wt
        [WhiteClover].Stolon.Dead.NConc
        [WhiteClover].Inflorescence.Live.Wt
        [WhiteClover].Inflorescence.Live.N
        [WhiteClover].Inflorescence.Live.NConc
        [WhiteClover].Inflorescence.Dead.Wt
        [WhiteClover].Inflorescence.Dead.NConc
        [WhiteClover].Nodule.Live.Wt
        [WhiteClover].Nodule.Live.N
        [WhiteClover].Nodule.Live.NConc
        [WhiteClover].Nodule.Dead.Wt
        [WhiteClover].Nodule.Dead.NConc
        [WhiteClover].Taproot.Live.Wt
        [WhiteClover].Taproot.Live.N
        [WhiteClover].Taproot.Live.NConc
        [WhiteClover].Taproot.Dead.Wt
        [WhiteClover].Taproot.Dead.NConc
        [WhiteClover].Root.Live.Wt
        [WhiteClover].Root.Live.N
        [WhiteClover].Root.Live.NConc
        [WhiteClover].Root.Dead.Wt
        [WhiteClover].Root.Dead.NConc
        [WhiteClover].Root.Depth
        [WhiteClover].Root.WaterUptake
        [WhiteClover].Leaf.Live.StructuralWt
        [WhiteClover].Leaf.Live.MetabolicWt
        [WhiteClover].Leaf.Live.StorageWt
        [WhiteClover].Leaf.Live.StructuralN
        [WhiteClover].Leaf.Live.MetabolicN
        [WhiteClover].Leaf.Live.StorageN
        [WhiteClover].Leaf.Dead.StructuralWt
        [WhiteClover].Leaf.Dead.MetabolicWt
        [WhiteClover].Leaf.Dead.StorageWt
        [WhiteClover].Leaf.Dead.StructuralN
        [WhiteClover].Leaf.Dead.MetabolicN
        [WhiteClover].Leaf.Dead.StorageN
        [WhiteClover].Petiole.Live.StructuralWt
        [WhiteClover].Petiole.Live.MetabolicWt
        [WhiteClover].Petiole.Live.StorageWt
        [WhiteClover].Petiole.Live.StructuralN
        [WhiteClover].Petiole.Live.MetabolicN
        [WhiteClover].Petiole.Live.StorageN
        [WhiteClover].Stolon.Live.StructuralWt
        [WhiteClover].Stolon.Live.MetabolicWt
        [WhiteClover].Stolon.Live.StorageWt
        [WhiteClover].Stolon.Live.StructuralN
        [WhiteClover].Stolon.Live.MetabolicN
        [WhiteClover].Stolon.Live.StorageN
        [WhiteClover].Inflorescence.Live.StructuralWt
        [WhiteClover].Inflorescence.Live.MetabolicWt
        [WhiteClover].Inflorescence.Live.StorageWt
        [WhiteClover].Inflorescence.Live.StructuralN
        [WhiteClover].Inflorescence.Live.MetabolicN
        [WhiteClover].Inflorescence.Live.StorageN
        [WhiteClover].Nodule.Live.StructuralWt
        [WhiteClover].Nodule.Live.MetabolicWt
        [WhiteClover].Nodule.Live.StorageWt
        [WhiteClover].Nodule.Live.StructuralN
        [WhiteClover].Nodule.Live.MetabolicN
        [WhiteClover].Nodule.Live.StorageN
        [WhiteClover].Taproot.Live.StructuralWt
        [WhiteClover].Taproot.Live.MetabolicWt
        [WhiteClover].Taproot.Live.StorageWt
        [WhiteClover].Taproot.Live.StructuralN
        [WhiteClover].Taproot.Live.MetabolicN
        [WhiteClover].Taproot.Live.StorageN
        [WhiteClover].Root.Live.StructuralWt
        [WhiteClover].Root.Live.MetabolicWt
        [WhiteClover].Root.Live.StorageWt
        [WhiteClover].Root.Live.StructuralN
        [WhiteClover].Root.Live.MetabolicN
        [WhiteClover].Root.Live.StorageN
        [WhiteClover].Leaf.Live.StructuralNConc
        [WhiteClover].Root.Live.StructuralNConc
        [WhiteClover].Leaf.Allocated.Wt
        [WhiteClover].Petiole.Allocated.Wt
        [WhiteClover].Stolon.Allocated.Wt
        [WhiteClover].Inflorescence.Allocated.Wt
        [WhiteClover].Nodule.Allocated.Wt
        [WhiteClover].Taproot.Allocated.Wt
        [WhiteClover].Root.Allocated.Wt
        [WhiteClover].Leaf.Senesced.Wt
        [WhiteClover].Petiole.Senesced.Wt
        [WhiteClover].Stolon.Senesced.Wt
        [WhiteClover].Inflorescence.Senesced.Wt
        [WhiteClover].Nodule.Senesced.Wt
        [WhiteClover].Taproot.Senesced.Wt
        [WhiteClover].Root.Senesced.Wt
        [WhiteClover].Leaf.Detached.Wt
        [WhiteClover].Petiole.Detached.Wt
        [WhiteClover].Stolon.Detached.Wt
        [WhiteClover].Inflorescence.Detached.Wt
        [WhiteClover].Nodule.Detached.Wt
        [WhiteClover].Taproot.Detached.Wt
        [WhiteClover].Root.Detached.Wt
        [WhiteClover].Leaf.Removed.Wt
        [WhiteClover].Petiole.Removed.Wt
        [WhiteClover].Stolon.Removed.Wt
        [WhiteClover].Inflorescence.Removed.Wt
        [WhiteClover].Nodule.Removed.Wt
        [WhiteClover].Taproot.Removed.Wt
        [WhiteClover].Root.Removed.Wt
        ([WhiteClover].Leaf.Allocated.Wt+[WhiteClover].Petiole.Allocated.Wt+[WhiteClover].Stolon.Allocated.Wt+[WhiteClover].Inflorescence.Allocated.Wt+[WhiteClover].Nodule.Allocated.Wt+[WhiteClover].Taproot.Allocated.Wt+[WhiteClover].Root.Allocated.Wt) as WhiteClover.Total.Allocated.Wt
        ([WhiteClover].Leaf.Senesced.Wt+[WhiteClover].Petiole.Senesced.Wt+[WhiteClover].Stolon.Senesced.Wt+[WhiteClover].Inflorescence.Senesced.Wt+[WhiteClover].Nodule.Senesced.Wt+[WhiteClover].Taproot.Senesced.Wt+[WhiteClover].Root.Senesced.Wt) as WhiteClover.Total.Senesced.Wt
        ([WhiteClover].Leaf.Detached.Wt+[WhiteClover].Petiole.Detached.Wt+[WhiteClover].Stolon.Detached.Wt+[WhiteClover].Inflorescence.Detached.Wt+[WhiteClover].Nodule.Detached.Wt+[WhiteClover].Taproot.Detached.Wt+[WhiteClover].Root.Detached.Wt) as WhiteClover.Total.Detached.Wt
        ([WhiteClover].Leaf.Removed.Wt+[WhiteClover].Petiole.Removed.Wt+[WhiteClover].Stolon.Removed.Wt+[WhiteClover].Inflorescence.Removed.Wt+[WhiteClover].Nodule.Removed.Wt+[WhiteClover].Taproot.Removed.Wt+[WhiteClover].Root.Removed.Wt) as WhiteClover.Total.Removed.Wt
        [WhiteClover].Leaf.Allocated.N
        [WhiteClover].Petiole.Allocated.N
        [WhiteClover].Stolon.Allocated.N
        [WhiteClover].Inflorescence.Allocated.N
        [WhiteClover].Nodule.Allocated.N
        [WhiteClover].Taproot.Allocated.N
        [WhiteClover].Root.Allocated.N
        [WhiteClover].Leaf.Senesced.N
        [WhiteClover].Petiole.Senesced.N
        [WhiteClover].Stolon.Senesced.N
        [WhiteClover].Inflorescence.Senesced.N
        [WhiteClover].Nodule.Senesced.N
        [WhiteClover].Taproot.Senesced.N
        [WhiteClover].Root.Senesced.N
        [WhiteClover].Leaf.Detached.N
        [WhiteClover].Petiole.Detached.N
        [WhiteClover].Stolon.Detached.N
        [WhiteClover].Inflorescence.Detached.N
        [WhiteClover].Nodule.Detached.N
        [WhiteClover].Taproot.Detached.N
        [WhiteClover].Root.Detached.N
        [WhiteClover].Leaf.Removed.N
        [WhiteClover].Petiole.Removed.N
        [WhiteClover].Stolon.Removed.N
        [WhiteClover].Inflorescence.Removed.N
        [WhiteClover].Nodule.Removed.N
        [WhiteClover].Taproot.Removed.N
        [WhiteClover].Root.Removed.N
        ([WhiteClover].Leaf.Allocated.N+[WhiteClover].Petiole.Allocated.N+[WhiteClover].Stolon.Allocated.N+[WhiteClover].Inflorescence.Allocated.N+[WhiteClover].Nodule.Allocated.N+[WhiteClover].Taproot.Allocated.N+[WhiteClover].Root.Allocated.N) as WhiteClover.Total.Allocated.N
        ([WhiteClover].Leaf.Senesced.N+[WhiteClover].Petiole.Senesced.N+[WhiteClover].Stolon.Senesced.N+[WhiteClover].Inflorescence.Senesced.N+[WhiteClover].Nodule.Senesced.N+[WhiteClover].Taproot.Senesced.N+[WhiteClover].Root.Senesced.N) as WhiteClover.Total.Senesced.N
        ([WhiteClover].Leaf.Detached.N+[WhiteClover].Petiole.Detached.N+[WhiteClover].Stolon.Detached.N+[WhiteClover].Inflorescence.Detached.N+[WhiteClover].Nodule.Detached.N+[WhiteClover].Taproot.Detached.N+[WhiteClover].Root.Detached.N) as WhiteClover.Total.Detached.N
        ([WhiteClover].Leaf.Removed.N+[WhiteClover].Petiole.Removed.N+[WhiteClover].Stolon.Removed.N+[WhiteClover].Inflorescence.Removed.N+[WhiteClover].Nodule.Removed.N+[WhiteClover].Taproot.Removed.N+[WhiteClover].Root.Removed.N) as WhiteClover.Total.Removed.N
  DataStore
    ExcelInput Observed: FileNames=[Observed.xlsx]; SheetNames=[Observed]
    ExcelInput ObservedMeans: FileNames=[Observed.xlsx]; SheetNames=[ObservedMeans]
    PredictedObserved: PredictedTableName=Report; ObservedTableName=Observed; FieldNameUsedForMatch=Date; AllColumns=false
      Tests: POName=PredictedObserved
        AcceptedStats:
          Name                        n    Slope       Intercept  SEslope    SEintercept  R2          RMSE        NSE        ME           MAE         RSR
          CumulativeHarvestedWt       588  0.795178    113.814    0.03018    19.95        0.542263    256.099     0.424242   -2.60269     198.718     0.758142
          CumulativeNTakenOff         498  0.680333    4.09215    0.0274783  0.753111     0.552753    10.6729     0.472836   -3.30239     7.91333     0.725331
          HarvestedWt                 582  -0.0777377  181.277    0.0310379  4.99151      0.0106999   101.135     -0.857686  27.507       82.525      1.3618
          HerbageNConc                660  0.244251    0.0292903  0.0249988  0.00111277   0.126699    0.00672131  -0.566643  -0.00410467  0.00552725  1.25071
          NRate                       750  1           0          0          0            1           0           1          0            0           0
          NTakenOff                   498  -0.0520513  6.4214     0.0324875  0.21093      0.00514883  3.61772     -0.639537  0.271437     2.90444     1.27916
          RotationHarvestedWt         588  -0.0735546  178.649    0.0306001  4.90296      0.00976369  100.055     -0.825553  26.1106      81.5287     1.34998
          WhiteClover.AboveGround.Wt  162  0.424634    109.601    0.0634236  8.84965      0.218848    76.6438     -0.317721  39.107       59.2757     1.14437
        AcceptedStatsName=Name n Slope Intercept SEslope SEintercept R2 RMSE NSE ME MAE RSR
        Memo Note
          Where:
           - n: The number of PO (predicted-observed) pairs for the given variable;
           - Slope: The slope of the straight line linear regression. A perfect fit would have a value of 1;
           - Intercept: The intercept of the straight line linear regression. A perfect fit would have a value of 0;
           - SEslope: Standard error in the slope;
           - SEintercept: Standard error in the intercept.;
           - R2: The value for the coefficient of determination. It varies between 0 and 1, where 1 is a perfect fit;
           - RMSE: Root Mean Squared Error. 0 is a perfect fit. Values less than half the standard deviation of the observed data are acceptable;
           - NSE: Nash-Sutcliffe Efficiency. Indicates how well the PO data fits the 1:1 line. Ranges from -∞ to 1 with 1 being the optimal value while values  between 0 and 1 are generally viewed as acceptable. Values < 0 indicate unacceptable model performance;
           - ME: Mean Error between predicted and observed values. 0 is a perfect fit;
           - MAE: Mean Absolute Error. 0 is a perfect fit. Values less than half the standard deviation of the observed data are acceptable;
           - RSR: Ratio between the RMSE and the standard deviation of observations. 0 is a perfect fit;
    PredictedObserved PredictedObservedMeans: PredictedTableName=Report; ObservedTableName=ObservedMeans; FieldNameUsedForMatch=Date; AllColumns=false
      Tests: POName=PredictedObservedMeans
        AcceptedStats:
          Name                               n    Slope       Intercept  SEslope    SEintercept  R2           RMSE        NSE        ME           MAE        RSR
          CumulativeHarvestedWt              162  0.844837    84.5486    0.0558112  35.9564      0.588838     232.84      0.477503   -2.02338     183.07     0.720605
          CumulativeNTakenOff                132  0.722646    2.96025    0.0509111  1.3512       0.607816     9.62958     0.53177    -3.28086     7.33015    0.681677
          HarvestedWt                        162  -0.0519694  175.12     0.0636112  10.0018      0.00415432   94.5416     -0.900876  26.2743      76.753     1.37446
          HerbageNConc                       186  0.290509    0.0271952  0.0521192  0.00232256   0.144459     0.00635314  -0.811285  -0.0042435   0.0053289  1.34222
          NRate                              216  1           0          0          0            1            0           1          0            0          0
          NTakenOff                          132  -0.0167873  6.10316    0.0699225  0.441679     0.000443191  3.28928     -0.677122  0.222516     2.64537    1.29012
          RotationHarvestedWt                162  -0.051452   173.369    0.0629753  9.9018       0.00415468   93.7392     -0.868756  24.5964      75.9957    1.3628
          WhiteClover.AboveGround.Wt         54   0.476313    100.224    0.112952   15.5528      0.254829     70.7281     -0.267043  36.061       53.4428    1.11516
          WhiteClover.AboveGroundLive.NConc  186  0.183366    0.0288858  0.0473695  0.0021109    0.0753048    0.00879542  -2.47155   -0.00730056  0.0076042  1.85819
        AcceptedStatsName=Name n Slope Intercept SEslope SEintercept R2 RMSE NSE ME MAE RSR
        Memo Note: same as DataStore.PredictedObserved.Tests.Note
  Folder Validation
    Memo Note
      The performance of the white clover model is evaluated in simulations based on experiments conducted in New Zealand.
    Folder New Zealand
      Experiment FRNLLincoln
        Memo Presentation
          ###Presentation###

          The simulation setup was based on a field trial performed at Lincoln University Research Dairy Farm, New Zealand, between 2014 and 2016.  The experiment was part of the FRNL (Forages for Reduced Nitrogen Leaching) program (for more details see [MartinEtAl2017]).  Here only plots with pure white clover are used.
          The experiment consisted of six fertiliser treatments with four replicates.  The nominal N rates were 0, 50, 100, 200, 350 and 500 kg/ha/yr, but the actual amounts applied varied as each application was linked to a defoliation event, the plan was to have 10 defoliation per year, but this was not possible, with seven events actually happening for white clover.  The plots were mown at a height of about 4 cm and the harvested herbage was removed from the plots.  The measurements comprised of dry matter yield and quality indicators (here herbage N content is used).
          Data and general management of the experiment was supplied by Grant Edwards, Lincoln University.

          The soil at the experimental site was a Templeton fine sandy loam (an Immature Pallic soil, USDA: Udic Haplustept), the required parameters were inferred based on data from the New Zealand National Soils Database (Landcare Research).
          Weather data was obtained from nearby Broadfield weather station (NIWA).
        Factors
          Factor NRate: Specification=[NRate]
            Operations 0
            Operations 50
              2014-10-23  [Fertiliser].Apply(Amount: 5.6, Type: Fertiliser.Types.UreaN, Depth: 10)
              2014-11-26  [Fertiliser].Apply(Amount: 5.6, Type: Fertiliser.Types.UreaN, Depth: 10)
              2014-12-30  [Fertiliser].Apply(Amount: 5.6, Type: Fertiliser.Types.UreaN, Depth: 10)
              2015-02-05  [Fertiliser].Apply(Amount: 5.6, Type: Fertiliser.Types.UreaN, Depth: 10)
              2015-03-10  [Fertiliser].Apply(Amount: 5.6, Type: Fertiliser.Types.UreaN, Depth: 10)
              2015-04-17  [Fertiliser].Apply(Amount: 5.6, Type: Fertiliser.Types.UreaN, Depth: 10)
              2015-06-09  [Fertiliser].Apply(Amount: 5.6, Type: Fertiliser.Types.UreaN, Depth: 10)
              2015-10-06  [Fertiliser].Apply(Amount: 5.6, Type: Fertiliser.Types.UreaN, Depth: 10)
              2015-11-16  [Fertiliser].Apply(Amount: 5.6, Type: Fertiliser.Types.UreaN, Depth: 10)
              2015-12-16  [Fertiliser].Apply(Amount: 5.6, Type: Fertiliser.Types.UreaN, Depth: 10)
              2016-01-25  [Fertiliser].Apply(Amount: 5.6, Type: Fertiliser.Types.UreaN, Depth: 10)
              2016-02-26  [Fertiliser].Apply(Amount: 5.6, Type: Fertiliser.Types.UreaN, Depth: 10)
              2016-04-09  [Fertiliser].Apply(Amount: 5.6, Type: Fertiliser.Types.UreaN, Depth: 10)
              2016-05-24  [Fertiliser].Apply(Amount: 5.6, Type: Fertiliser.Types.UreaN, Depth: 10)
              2016-10-05  [Fertiliser].Apply(Amount: 5.6, Type: Fertiliser.Types.UreaN, Depth: 10)
              2016-11-10  [Fertiliser].Apply(Amount: 5.6, Type: Fertiliser.Types.UreaN, Depth: 10)
              2016-12-16  [Fertiliser].Apply(Amount: 5.6, Type: Fertiliser.Types.UreaN, Depth: 10)
            Operations 100
              2014-10-23  [Fertiliser].Apply(Amount: 11.1, Type: Fertiliser.Types.UreaN, Depth: 10)
              2014-11-26  [Fertiliser].Apply(Amount: 11.1, Type: Fertiliser.Types.UreaN, Depth: 10)
              2014-12-30  [Fertiliser].Apply(Amount: 11.1, Type: Fertiliser.Types.UreaN, Depth: 10)
              2015-02-05  [Fertiliser].Apply(Amount: 11.1, Type: Fertiliser.Types.UreaN, Depth: 10)
              2015-03-10  [Fertiliser].Apply(Amount: 11.1, Type: Fertiliser.Types.UreaN, Depth: 10)
              2015-04-17  [Fertiliser].Apply(Amount: 11.1, Type: Fertiliser.Types.UreaN, Depth: 10)
              2015-06-09  [Fertiliser].Apply(Amount: 11.1, Type: Fertiliser.Types.UreaN, Depth: 10)
              2015-10-06  [Fertiliser].Apply(Amount: 11.1, Type: Fertiliser.Types.UreaN, Depth: 10)
              2015-11-16  [Fertiliser].Apply(Amount: 11.1, Type: Fertiliser.Types.UreaN, Depth: 10)
              2015-12-16  [Fertiliser].Apply(Amount: 11.1, Type: Fertiliser.Types.UreaN, Depth: 10)
              2016-01-25  [Fertiliser].Apply(Amount: 11.1, Type: Fertiliser.Types.UreaN, Depth: 10)
              2016-02-26  [Fertiliser].Apply(Amount: 11.1, Type: Fertiliser.Types.UreaN, Depth: 10)
              2016-04-09  [Fertiliser].Apply(Amount: 11.1, Type: Fertiliser.Types.UreaN, Depth: 10)
              2016-05-24  [Fertiliser].Apply(Amount: 11.1, Type: Fertiliser.Types.UreaN, Depth: 10)
              2016-10-05  [Fertiliser].Apply(Amount: 11.1, Type: Fertiliser.Types.UreaN, Depth: 10)
              2016-11-10  [Fertiliser].Apply(Amount: 11.1, Type: Fertiliser.Types.UreaN, Depth: 10)
              2016-12-16  [Fertiliser].Apply(Amount: 11.1, Type: Fertiliser.Types.UreaN, Depth: 10)
            Operations 200
              2014-10-23  [Fertiliser].Apply(Amount: 22.2, Type: Fertiliser.Types.UreaN, Depth: 10)
              2014-11-26  [Fertiliser].Apply(Amount: 22.2, Type: Fertiliser.Types.UreaN, Depth: 10)
              2014-12-30  [Fertiliser].Apply(Amount: 22.2, Type: Fertiliser.Types.UreaN, Depth: 10)
              2015-02-05  [Fertiliser].Apply(Amount: 22.2, Type: Fertiliser.Types.UreaN, Depth: 10)
              2015-03-10  [Fertiliser].Apply(Amount: 22.2, Type: Fertiliser.Types.UreaN, Depth: 10)
              2015-04-17  [Fertiliser].Apply(Amount: 22.2, Type: Fertiliser.Types.UreaN, Depth: 10)
              2015-06-09  [Fertiliser].Apply(Amount: 22.2, Type: Fertiliser.Types.UreaN, Depth: 10)
              2015-10-06  [Fertiliser].Apply(Amount: 22.2, Type: Fertiliser.Types.UreaN, Depth: 10)
              2015-11-16  [Fertiliser].Apply(Amount: 22.2, Type: Fertiliser.Types.UreaN, Depth: 10)
              2015-12-16  [Fertiliser].Apply(Amount: 22.2, Type: Fertiliser.Types.UreaN, Depth: 10)
              2016-01-25  [Fertiliser].Apply(Amount: 22.2, Type: Fertiliser.Types.UreaN, Depth: 10)
              2016-02-26  [Fertiliser].Apply(Amount: 22.2, Type: Fertiliser.Types.UreaN, Depth: 10)
              2016-04-09  [Fertiliser].Apply(Amount: 22.2, Type: Fertiliser.Types.UreaN, Depth: 10)
              2016-05-24  [Fertiliser].Apply(Amount: 22.2, Type: Fertiliser.Types.UreaN, Depth: 10)
              2016-10-05  [Fertiliser].Apply(Amount: 22.2, Type: Fertiliser.Types.UreaN, Depth: 10)
              2016-11-10  [Fertiliser].Apply(Amount: 22.2, Type: Fertiliser.Types.UreaN, Depth: 10)
              2016-12-16  [Fertiliser].Apply(Amount: 22.2, Type: Fertiliser.Types.UreaN, Depth: 10)
            Operations 350
              2014-10-23  [Fertiliser].Apply(Amount: 38.9, Type: Fertiliser.Types.UreaN, Depth: 10)
              2014-11-26  [Fertiliser].Apply(Amount: 38.9, Type: Fertiliser.Types.UreaN, Depth: 10)
              2014-12-30  [Fertiliser].Apply(Amount: 38.9, Type: Fertiliser.Types.UreaN, Depth: 10)
              2015-02-05  [Fertiliser].Apply(Amount: 38.9, Type: Fertiliser.Types.UreaN, Depth: 10)
              2015-03-10  [Fertiliser].Apply(Amount: 38.9, Type: Fertiliser.Types.UreaN, Depth: 10)
              2015-04-17  [Fertiliser].Apply(Amount: 38.9, Type: Fertiliser.Types.UreaN, Depth: 10)
              2015-06-09  [Fertiliser].Apply(Amount: 38.9, Type: Fertiliser.Types.UreaN, Depth: 10)
              2015-10-06  [Fertiliser].Apply(Amount: 38.9, Type: Fertiliser.Types.UreaN, Depth: 10)
              2015-11-16  [Fertiliser].Apply(Amount: 38.9, Type: Fertiliser.Types.UreaN, Depth: 10)
              2015-12-16  [Fertiliser].Apply(Amount: 38.9, Type: Fertiliser.Types.UreaN, Depth: 10)
              2016-01-25  [Fertiliser].Apply(Amount: 38.9, Type: Fertiliser.Types.UreaN, Depth: 10)
              2016-02-26  [Fertiliser].Apply(Amount: 38.9, Type: Fertiliser.Types.UreaN, Depth: 10)
              2016-04-09  [Fertiliser].Apply(Amount: 38.9, Type: Fertiliser.Types.UreaN, Depth: 10)
              2016-05-24  [Fertiliser].Apply(Amount: 38.9, Type: Fertiliser.Types.UreaN, Depth: 10)
              2016-10-05  [Fertiliser].Apply(Amount: 38.9, Type: Fertiliser.Types.UreaN, Depth: 10)
              2016-11-10  [Fertiliser].Apply(Amount: 38.9, Type: Fertiliser.Types.UreaN, Depth: 10)
              2016-12-16  [Fertiliser].Apply(Amount: 38.9, Type: Fertiliser.Types.UreaN, Depth: 10)
            Operations 500
              2014-10-23  [Fertiliser].Apply(Amount: 55.6, Type: Fertiliser.Types.UreaN, Depth: 10)
              2014-11-26  [Fertiliser].Apply(Amount: 55.6, Type: Fertiliser.Types.UreaN, Depth: 10)
              2014-12-30  [Fertiliser].Apply(Amount: 55.6, Type: Fertiliser.Types.UreaN, Depth: 10)
              2015-02-05  [Fertiliser].Apply(Amount: 55.6, Type: Fertiliser.Types.UreaN, Depth: 10)
              2015-03-10  [Fertiliser].Apply(Amount: 55.6, Type: Fertiliser.Types.UreaN, Depth: 10)
              2015-04-17  [Fertiliser].Apply(Amount: 55.6, Type: Fertiliser.Types.UreaN, Depth: 10)
              2015-06-09  [Fertiliser].Apply(Amount: 55.6, Type: Fertiliser.Types.UreaN, Depth: 10)
              2015-10-06  [Fertiliser].Apply(Amount: 55.6, Type: Fertiliser.Types.UreaN, Depth: 10)
              2015-11-16  [Fertiliser].Apply(Amount: 55.6, Type: Fertiliser.Types.UreaN, Depth: 10)
              2015-12-16  [Fertiliser].Apply(Amount: 55.6, Type: Fertiliser.Types.UreaN, Depth: 10)
              2016-01-25  [Fertiliser].Apply(Amount: 55.6, Type: Fertiliser.Types.UreaN, Depth: 10)
              2016-02-26  [Fertiliser].Apply(Amount: 55.6, Type: Fertiliser.Types.UreaN, Depth: 10)
              2016-04-09  [Fertiliser].Apply(Amount: 55.6, Type: Fertiliser.Types.UreaN, Depth: 10)
              2016-05-24  [Fertiliser].Apply(Amount: 55.6, Type: Fertiliser.Types.UreaN, Depth: 10)
              2016-10-05  [Fertiliser].Apply(Amount: 55.6, Type: Fertiliser.Types.UreaN, Depth: 10)
              2016-11-10  [Fertiliser].Apply(Amount: 55.6, Type: Fertiliser.Types.UreaN, Depth: 10)
              2016-12-16  [Fertiliser].Apply(Amount: 55.6, Type: Fertiliser.Types.UreaN, Depth: 10)
        Simulation FRNLLincoln
          Clock: Start=2014-02-01; End=2016-12-31
          Weather: FileName=%root%\Tests\Validation\WhiteClover\Lincoln-Broadfields.met
          Summary summaryfile
          SoilArbitrator Soil Arbitrator
          Zone Field: Area=1; Slope=0; AspectAngle=0; Altitude=50
            Folder Management
              Operations Sowing
                2014-03-20  [WhiteClover].Sow(population: 500, cultivar: "Kopu", depth: 5, rowSpacing: 150)
              Operations IrrigationSchedule
                2014-10-31  [Irrigation].Apply(amount: 7, efficiency: 0.8)
                2014-11-03  [Irrigation].Apply(amount: 7, efficiency: 0.8)
                2014-11-05  [Irrigation].Apply(amount: 8, efficiency: 0.8)
                2014-11-07  [Irrigation].Apply(amount: 8, efficiency: 0.8)
                2014-11-10  [Irrigation].Apply(amount: 7, efficiency: 0.8)
                2014-11-11  [Irrigation].Apply(amount: 7, efficiency: 0.8)
                2014-11-12  [Irrigation].Apply(amount: 8, efficiency: 0.8)
                2014-11-17  [Irrigation].Apply(amount: 9, efficiency: 0.8)
                2014-11-18  [Irrigation].Apply(amount: 7, efficiency: 0.8)
                2014-11-19  [Irrigation].Apply(amount: 7, efficiency: 0.8)
                2014-11-24  [Irrigation].Apply(amount: 8, efficiency: 0.8)
                2014-11-25  [Irrigation].Apply(amount: 9, efficiency: 0.8)
                2014-11-27  [Irrigation].Apply(amount: 10, efficiency: 0.8)
                2014-12-01  [Irrigation].Apply(amount: 8, efficiency: 0.8)
                2014-12-02  [Irrigation].Apply(amount: 8, efficiency: 0.8)
                2014-12-04  [Irrigation].Apply(amount: 7, efficiency: 0.8)
                2014-12-08  [Irrigation].Apply(amount: 7, efficiency: 0.8)
                2014-12-09  [Irrigation].Apply(amount: 7, efficiency: 0.8)
                2014-12-12  [Irrigation].Apply(amount: 8, efficiency: 0.8)
                2014-12-15  [Irrigation].Apply(amount: 10, efficiency: 0.8)
                2014-12-17  [Irrigation].Apply(amount: 10, efficiency: 0.8)
                2014-12-19  [Irrigation].Apply(amount: 7, efficiency: 0.8)
                2014-12-20  [Irrigation].Apply(amount: 7, efficiency: 0.8)
                2014-12-21  [Irrigation].Apply(amount: 8, efficiency: 0.8)
                2014-12-22  [Irrigation].Apply(amount: 10, efficiency: 0.8)
                2014-12-25  [Irrigation].Apply(amount: 8, efficiency: 0.8)
                2014-12-26  [Irrigation].Apply(amount: 8, efficiency: 0.8)
                2014-12-27  [Irrigation].Apply(amount: 7, efficiency: 0.8)
                2014-12-28  [Irrigation].Apply(amount: 10, efficiency: 0.8)
                2014-12-29  [Irrigation].Apply(amount: 8, efficiency: 0.8)
                2014-12-30  [Irrigation].Apply(amount: 8, efficiency: 0.8)
                2015-01-02  [Irrigation].Apply(amount: 7, efficiency: 0.8)
                2015-01-05  [Irrigation].Apply(amount: 10, efficiency: 0.8)
                2015-01-08  [Irrigation].Apply(amount: 8, efficiency: 0.8)
                2015-01-09  [Irrigation].Apply(amount: 9, efficiency: 0.8)
                2015-01-12  [Irrigation].Apply(amount: 7, efficiency: 0.8)
                2015-01-13  [Irrigation].Apply(amount: 7, efficiency: 0.8)
                2015-01-16  [Irrigation].Apply(amount: 8, efficiency: 0.8)
                2015-01-19  [Irrigation].Apply(amount: 7, efficiency: 0.8)
                2015-01-20  [Irrigation].Apply(amount: 7, efficiency: 0.8)
                2015-01-21  [Irrigation].Apply(amount: 8, efficiency: 0.8)
                2015-01-26  [Irrigation].Apply(amount: 10, efficiency: 0.8)
                2015-01-27  [Irrigation].Apply(amount: 10, efficiency: 0.8)
                2015-01-29  [Irrigation].Apply(amount: 8, efficiency: 0.8)
                2015-02-02  [Irrigation].Apply(amount: 10, efficiency: 0.8)
                2015-02-04  [Irrigation].Apply(amount: 8, efficiency: 0.8)
                2015-02-05  [Irrigation].Apply(amount: 7, efficiency: 0.8)
                2015-02-09  [Irrigation].Apply(amount: 8, efficiency: 0.8)
                2015-02-11  [Irrigation].Apply(amount: 7, efficiency: 0.8)
                2015-02-12  [Irrigation].Apply(amount: 10, efficiency: 0.8)
                2015-02-16  [Irrigation].Apply(amount: 10, efficiency: 0.8)
                2015-02-17  [Irrigation].Apply(amount: 10, efficiency: 0.8)
                2015-02-18  [Irrigation].Apply(amount: 8, efficiency: 0.8)
                2015-02-24  [Irrigation].Apply(amount: 10, efficiency: 0.8)
                2015-02-26  [Irrigation].Apply(amount: 7, efficiency: 0.8)
                2015-02-27  [Irrigation].Apply(amount: 8, efficiency: 0.8)
                2015-03-02  [Irrigation].Apply(amount: 7, efficiency: 0.8)
                2015-03-03  [Irrigation].Apply(amount: 7, efficiency: 0.8)
                2015-03-05  [Irrigation].Apply(amount: 8, efficiency: 0.8)
                2015-03-10  [Irrigation].Apply(amount: 8, efficiency: 0.8)
                2015-03-12  [Irrigation].Apply(amount: 9, efficiency: 0.8)
                2015-03-13  [Irrigation].Apply(amount: 7, efficiency: 0.8)
                2015-03-16  [Irrigation].Apply(amount: 10, efficiency: 0.8)
                2015-03-19  [Irrigation].Apply(amount: 9, efficiency: 0.8)
                2015-03-20  [Irrigation].Apply(amount: 8, efficiency: 0.8)
                2015-03-23  [Irrigation].Apply(amount: 9, efficiency: 0.8)
                2015-03-24  [Irrigation].Apply(amount: 7, efficiency: 0.8)
                2015-03-26  [Irrigation].Apply(amount: 10, efficiency: 0.8)
                2015-03-30  [Irrigation].Apply(amount: 7, efficiency: 0.8)
                2015-04-02  [Irrigation].Apply(amount: 10, efficiency: 0.8)
                2015-04-03  [Irrigation].Apply(amount: 8, efficiency: 0.8)
                2015-04-06  [Irrigation].Apply(amount: 7, efficiency: 0.8)
                2015-04-08  [Irrigation].Apply(amount: 10, efficiency: 0.8)
                2015-04-17  [Irrigation].Apply(amount: 10, efficiency: 0.8)
                2015-05-20  [Irrigation].Apply(amount: 10, efficiency: 0.8)
                2015-06-09  [Irrigation].Apply(amount: 10, efficiency: 0.8)
                2015-09-09  [Irrigation].Apply(amount: 10, efficiency: 0.8)
                2015-09-30  [Irrigation].Apply(amount: 10, efficiency: 0.8)
                2015-10-02  [Irrigation].Apply(amount: 8, efficiency: 0.8)
                2015-10-06  [Irrigation].Apply(amount: 10, efficiency: 0.8)
                2015-10-09  [Irrigation].Apply(amount: 10, efficiency: 0.8)
                2015-10-12  [Irrigation].Apply(amount: 8, efficiency: 0.8)
                2015-10-13  [Irrigation].Apply(amount: 7, efficiency: 0.8)
                2015-10-16  [Irrigation].Apply(amount: 10, efficiency: 0.8)
                2015-10-20  [Irrigation].Apply(amount: 10, efficiency: 0.8)
                2015-10-21  [Irrigation].Apply(amount: 8, efficiency: 0.8)
                2015-10-23  [Irrigation].Apply(amount: 7, efficiency: 0.8)
                2015-10-26  [Irrigation].Apply(amount: 7, efficiency: 0.8)
                2015-10-27  [Irrigation].Apply(amount: 9, efficiency: 0.8)
                2015-11-02  [Irrigation].Apply(amount: 10, efficiency: 0.8)
                2015-11-03  [Irrigation].Apply(amount: 8, efficiency: 0.8)
                2015-11-04  [Irrigation].Apply(amount: 9, efficiency: 0.8)
                2015-11-06  [Irrigation].Apply(amount: 9, efficiency: 0.8)
                2015-11-09  [Irrigation].Apply(amount: 10, efficiency: 0.8)
                2015-11-11  [Irrigation].Apply(amount: 7, efficiency: 0.8)
                2015-11-16  [Irrigation].Apply(amount: 10, efficiency: 0.8)
                2015-11-18  [Irrigation].Apply(amount: 9, efficiency: 0.8)
                2015-11-20  [Irrigation].Apply(amount: 7, efficiency: 0.8)
                2015-11-23  [Irrigation].Apply(amount: 10, efficiency: 0.8)
                2015-11-24  [Irrigation].Apply(amount: 8, efficiency: 0.8)
                2015-11-25  [Irrigation].Apply(amount: 7, efficiency: 0.8)
                2015-11-27  [Irrigation].Apply(amount: 9, efficiency: 0.8)
                2015-11-30  [Irrigation].Apply(amount: 7, efficiency: 0.8)
                2015-12-01  [Irrigation].Apply(amount: 7, efficiency: 0.8)
                2015-12-04  [Irrigation].Apply(amount: 9, efficiency: 0.8)
                2015-12-07  [Irrigation].Apply(amount: 10, efficiency: 0.8)
                2015-12-09  [Irrigation].Apply(amount: 9, efficiency: 0.8)
                2015-12-10  [Irrigation].Apply(amount: 9, efficiency: 0.8)
                2015-12-22  [Irrigation].Apply(amount: 8, efficiency: 0.8)
                2015-12-24  [Irrigation].Apply(amount: 9, efficiency: 0.8)
                2015-12-26  [Irrigation].Apply(amount: 8, efficiency: 0.8)
                2015-12-29  [Irrigation].Apply(amount: 7, efficiency: 0.8)
                2015-12-31  [Irrigation].Apply(amount: 7, efficiency: 0.8)
                2016-01-01  [Irrigation].Apply(amount: 10, efficiency: 0.8)
                2016-01-07  [Irrigation].Apply(amount: 10, efficiency: 0.8)
                2016-01-09  [Irrigation].Apply(amount: 7, efficiency: 0.8)
                2016-01-11  [Irrigation].Apply(amount: 7, efficiency: 0.8)
                2016-01-12  [Irrigation].Apply(amount: 7, efficiency: 0.8)
                2016-01-13  [Irrigation].Apply(amount: 9, efficiency: 0.8)
                2016-01-15  [Irrigation].Apply(amount: 10, efficiency: 0.8)
                2016-01-21  [Irrigation].Apply(amount: 7, efficiency: 0.8)
                2016-01-25  [Irrigation].Apply(amount: 8, efficiency: 0.8)
                2016-01-30  [Irrigation].Apply(amount: 7, efficiency: 0.8)
                2016-02-02  [Irrigation].Apply(amount: 10, efficiency: 0.8)
                2016-02-03  [Irrigation].Apply(amount: 10, efficiency: 0.8)
                2016-02-05  [Irrigation].Apply(amount: 9, efficiency: 0.8)
                2016-02-08  [Irrigation].Apply(amount: 10, efficiency: 0.8)
                2016-02-11  [Irrigation].Apply(amount: 10, efficiency: 0.8)
                2016-02-12  [Irrigation].Apply(amount: 7, efficiency: 0.8)
                2016-02-15  [Irrigation].Apply(amount: 8, efficiency: 0.8)
                2016-02-16  [Irrigation].Apply(amount: 8, efficiency: 0.8)
                2016-02-22  [Irrigation].Apply(amount: 7, efficiency: 0.8)
                2016-02-23  [Irrigation].Apply(amount: 7, efficiency: 0.8)
                2016-02-25  [Irrigation].Apply(amount: 7, efficiency: 0.8)
                2016-02-26  [Irrigation].Apply(amount: 7, efficiency: 0.8)
                2016-03-01  [Irrigation].Apply(amount: 7, efficiency: 0.8)
                2016-03-02  [Irrigation].Apply(amount: 8, efficiency: 0.8)
                2016-03-04  [Irrigation].Apply(amount: 10, efficiency: 0.8)
                2016-03-07  [Irrigation].Apply(amount: 9, efficiency: 0.8)
                2016-03-08  [Irrigation].Apply(amount: 4, efficiency: 0.8)
                2016-03-10  [Irrigation].Apply(amount: 8, efficiency: 0.8)
                2016-03-14  [Irrigation].Apply(amount: 8, efficiency: 0.8)
                2016-03-15  [Irrigation].Apply(amount: 10, efficiency: 0.8)
                2016-03-18  [Irrigation].Apply(amount: 9, efficiency: 0.8)
                2016-03-21  [Irrigation].Apply(amount: 10, efficiency: 0.8)
                2016-03-22  [Irrigation].Apply(amount: 9, efficiency: 0.8)
                2016-03-23  [Irrigation].Apply(amount: 9, efficiency: 0.8)
                2016-03-28  [Irrigation].Apply(amount: 8, efficiency: 0.8)
                2016-04-02  [Irrigation].Apply(amount: 10, efficiency: 0.8)
                2016-04-08  [Irrigation].Apply(amount: 10, efficiency: 0.8)
                2016-05-04  [Irrigation].Apply(amount: 10, efficiency: 0.8)
                2016-08-31  [Irrigation].Apply(amount: 10, efficiency: 0.8)
                2016-09-30  [Irrigation].Apply(amount: 7, efficiency: 0.8)
                2016-10-01  [Irrigation].Apply(amount: 8, efficiency: 0.8)
                2016-10-05  [Irrigation].Apply(amount: 10, efficiency: 0.8)
                2016-10-12  [Irrigation].Apply(amount: 10, efficiency: 0.8)
                2016-10-18  [Irrigation].Apply(amount: 10, efficiency: 0.8)
                2016-10-19  [Irrigation].Apply(amount: 8, efficiency: 0.8)
                2016-10-27  [Irrigation].Apply(amount: 10, efficiency: 0.8)
                2016-10-31  [Irrigation].Apply(amount: 9, efficiency: 0.8)
                2016-11-01  [Irrigation].Apply(amount: 8, efficiency: 0.8)
                2016-11-03  [Irrigation].Apply(amount: 8, efficiency: 0.8)
                2016-11-08  [Irrigation].Apply(amount: 7, efficiency: 0.8)
                2016-11-10  [Irrigation].Apply(amount: 8, efficiency: 0.8)
                2016-11-11  [Irrigation].Apply(amount: 9, efficiency: 0.8)
                2016-11-14  [Irrigation].Apply(amount: 7, efficiency: 0.8)
                2016-11-21  [Irrigation].Apply(amount: 7, efficiency: 0.8)
                2016-11-22  [Irrigation].Apply(amount: 8, efficiency: 0.8)
                2016-11-23  [Irrigation].Apply(amount: 7, efficiency: 0.8)
                2016-11-24  [Irrigation].Apply(amount: 7, efficiency: 0.8)
                2016-11-28  [Irrigation].Apply(amount: 8, efficiency: 0.8)
                2016-11-29  [Irrigation].Apply(amount: 9, efficiency: 0.8)
              Operations NRate
              Manager Defoliate
                Message =
```csharp
using APSIM.Shared.Utilities;
using System.Xml.Serialization;
using Models.PMF;
using Models.Soils;
using Models;
using System.Text;
using System.Collections.Generic;
using Models.Core;
using System;

namespace Models
{
    [Serializable]
    public class Script : Model
    {
        [Description("This script is set in 'Replacements':")]
        public string Message { get; set; }
    }
}
```
              Operations DefoliationSchedule
                2014-10-23  [Defoliate].Script.Defoliate(defoliationType: "Cut", amountDM: 40, amountType: "ResidualDM", duration: 1)
                2014-11-25  [Defoliate].Script.Defoliate(defoliationType: "Cut", amountDM: 40, amountType: "ResidualDM", duration: 1)
                2014-12-30  [Defoliate].Script.Defoliate(defoliationType: "Cut", amountDM: 40, amountType: "ResidualDM", duration: 1)
                2015-02-04  [Defoliate].Script.Defoliate(defoliationType: "Cut", amountDM: 40, amountType: "ResidualDM", duration: 1)
                2015-03-10  [Defoliate].Script.Defoliate(defoliationType: "Cut", amountDM: 40, amountType: "ResidualDM", duration: 1)
                2015-04-16  [Defoliate].Script.Defoliate(defoliationType: "Cut", amountDM: 40, amountType: "ResidualDM", duration: 1)
                2015-06-09  [Defoliate].Script.Defoliate(defoliationType: "Cut", amountDM: 40, amountType: "ResidualDM", duration: 1)
                2015-10-06  [Defoliate].Script.Defoliate(defoliationType: "Cut", amountDM: 40, amountType: "ResidualDM", duration: 1)
                2015-11-16  [Defoliate].Script.Defoliate(defoliationType: "Cut", amountDM: 40, amountType: "ResidualDM", duration: 1)
                2015-12-16  [Defoliate].Script.Defoliate(defoliationType: "Cut", amountDM: 40, amountType: "ResidualDM", duration: 1)
                2016-01-25  [Defoliate].Script.Defoliate(defoliationType: "Cut", amountDM: 40, amountType: "ResidualDM", duration: 1)
                2016-02-24  [Defoliate].Script.Defoliate(defoliationType: "Cut", amountDM: 40, amountType: "ResidualDM", duration: 1)
                2016-04-09  [Defoliate].Script.Defoliate(defoliationType: "Cut", amountDM: 40, amountType: "ResidualDM", duration: 1)
                2016-05-24  [Defoliate].Script.Defoliate(defoliationType: "Cut", amountDM: 40, amountType: "ResidualDM", duration: 1)
                2016-10-03  [Defoliate].Script.Defoliate(defoliationType: "Cut", amountDM: 40, amountType: "ResidualDM", duration: 1)
                2016-11-10  [Defoliate].Script.Defoliate(defoliationType: "Cut", amountDM: 40, amountType: "ResidualDM", duration: 1)
                2016-12-16  [Defoliate].Script.Defoliate(defoliationType: "Cut", amountDM: 40, amountType: "ResidualDM", duration: 1)
              Manager ExtraVariables
```csharp
// This will be replaced by the "ExtraVariables" section in "Replacements"

using Models.Core;
using System;

namespace Models
{
    [Serializable] 
    public class Script : Model
    {
    }
}
```
            MicroClimate: a_interception=0; b_interception=1; c_interception=0; d_interception=0; soil_albedo=0.23; SoilHeatFluxFraction=0.4; MinimumHeightDiffForNewLayer=0; NightInterceptionFraction=0.5; ReferenceHeight=2
            Irrigation
            Fertiliser
            SurfaceOrganicMatter: InitialResidueName=grass; InitialResidueType=grass; InitialResidueMass=500; InitialStandingFraction=0; InitialCPR=0; InitialCNR=40
            Soil: SoilType=Udic Haplustept (US),  Immature Pallic Soil (NZ); LocalName=Paparua Deep Sandy Loam; Site=LURDF; NearestTown=Lincoln; Region=Canterbury; Country=New Zealand; Latitude=0; Longitude=0
              DataSource=Adapted based on data from the NZ National Soils Database plus published data (Carey et al, 2002; Schwaertzel et al, 2011; Woods et al, 2016)
              Comments=Different references name the soil at the site as either Templeton sandy loam or Paparua sandy loam (very similar soils)
              Chemical
                Thickness  NO3N       NH4N       PH
                100        11.1019    1.38773    6
                120        8.87479    1.00312    6
                150        4.05595    0.422709   6
                230        0.366719   0.0733439  6
                130        0.366719   0.0733439  6
                250        0.151593   0.0547699  6
                220        0.0729219  0.0170005  6
                300        0.0669254  0.0133851  6
              Physical
                Thickness  ParticleSizeClay  BD     AirDry  LL15   DUL    SAT    KS
                100        17.8              1.154  0.051   0.151  0.338  0.512  2559.2
                120        17.8              1.295  0.14    0.146  0.328  0.469  2142.3
                150        15.9              1.441  0.129   0.129  0.279  0.427  1019.5
                230        14.1              1.544  0.111   0.111  0.271  0.394  310.6
                130        7.3               1.505  0.08    0.08   0.244  0.413  434.9
                250        9.6               1.504  0.072   0.072  0.234  0.406  791
                220        7                 1.517  0.085   0.085  0.254  0.401  744.1
                300        9.5               1.479  0.082   0.082  0.257  0.413  411.2
                SoilCrop WhiteCloverSoil: LL=[0.151, 0.146, 0.129, 0.111, 0.08, 0.072, 0.085, 0.082]; KL=[0.12, 0.11, 0.08, 0.05, 0.02, 0.005, 0, 0]; XF=[1, 1, 1, 1, 1, 1, 1, 1]
              WaterBalance SoilWater: SummerDate=1-Oct; SummerU=9; SummerCona=4; WinterDate=1-apr; WinterU=6; WinterCona=3; DiffusConst=88; DiffusSlope=35; Salb=0.15; CN2Bare=70; CNRed=20; CNCov=0.8; DischargeWidth=0; CatchmentArea=0; Thickness=[100, 120, 150, 230, 130, 250, 220, 300]; SWCON=[0.59, 0.59, 0.55, 0.48, 0.53, 0.5, 0.51, 0.45]
              SoilNitrogen: fom_types=[default, manure, mucuna, lablab, shemp, stable]; fract_carb=[0.2, 0.3, 0.54, 0.57, 0.45, 0]; fract_cell=[0.7, 0.3, 0.37, 0.37, 0.47, 0.1]; fract_lign=[0.1, 0.4, 0.09, 0.06, 0.08, 0.9]; NPartitionApproach=0
                SoilNitrogenNO3 NO3
                SoilNitrogenNH4 NH4
                SoilNitrogenUrea Urea
                SoilNitrogenPlantAvailableNO3 PlantAvailableNO3
                SoilNitrogenPlantAvailableNH4 PlantAvailableNH4
              Organic: FOMCNRatio=40
                Thickness  Carbon  SoilCNRatio  FBiom  FInert  FOM
                100        2.94    11.3         0.08   0.3     297.215
                120        2.17    11.3         0.055  0.45    233.798
                150        0.99    11.3         0.015  0.72    173.202
                230        0.35    11.3         0.009  0.87    109.339
                130        0.24    11.3         0.008  0.95    84.3062
                250        0.2     11.3         0.007  0.99    51.1343
                220        0.15    11.3         0.005  0.995   32.9324
                300        0.1     11.3         0.005  0.995   18.0737
              CERESSoilTemperature Temperature
              InitialWater Initial water: PercentMethod=1; FractionFull=0.75
            Plant WhiteClover
            Report: EventNames=[Clock].DoReport
      Experiment FRNLRuakura
        Memo
          ###Presentation###

          This simulation setup was based on field trials performed at DairyNZ's Scott Farm, in Ruakura, New Zealand, between 2014 and 2016.  The experiment was part of the FRNL (Forages for Reduced Nitrogen Leaching) program and the data is basically unpublished (references will be added when this come about).  Here only plots with pure white clover are used.
          The experiment was set up with six fertiliser treatments and three replicates, with nominal N rates of 0, 50, 100, 200, 350 and 500 kg/ha/yr (actual rate varied).  The swards were mown at a a height of approximately 4 cm and the herbage was removed from the plots.  The measurements comprised of herbage yield and quality indicators (here N content is used).
          Observed data supplied by Grant Edwards, Lincoln University.

          The soil at the experimental site was a Horotiu silt loam (an Orthic Allophanic soil; USDA: Typic Udivitrand), the parameters required were inferred using data from the New Zealand National Soils Database (Landcare Research).
          Weather data was obtained from nearby Ruakura weather station (NIWA).
        Factors
          Factor NRate: Specification=[NRate]
            Operations 0
            Operations 50
              2014-12-22  [Fertiliser].Apply(Amount: 5, Type: Fertiliser.Types.UreaN, Depth: 10)
              2015-01-19  [Fertiliser].Apply(Amount: 5, Type: Fertiliser.Types.UreaN, Depth: 10)
              2015-03-03  [Fertiliser].Apply(Amount: 5, Type: Fertiliser.Types.UreaN, Depth: 10)
              2015-04-21  [Fertiliser].Apply(Amount: 5, Type: Fertiliser.Types.UreaN, Depth: 10)
              2015-06-10  [Fertiliser].Apply(Amount: 5, Type: Fertiliser.Types.UreaN, Depth: 10)
              2015-09-09  [Fertiliser].Apply(Amount: 5, Type: Fertiliser.Types.UreaN, Depth: 10)
              2015-10-19  [Fertiliser].Apply(Amount: 5, Type: Fertiliser.Types.UreaN, Depth: 10)
              2015-11-19  [Fertiliser].Apply(Amount: 5, Type: Fertiliser.Types.UreaN, Depth: 10)
              2015-12-22  [Fertiliser].Apply(Amount: 5, Type: Fertiliser.Types.UreaN, Depth: 10)
              2016-02-03  [Fertiliser].Apply(Amount: 5, Type: Fertiliser.Types.UreaN, Depth: 10)
              2016-05-06  [Fertiliser].Apply(Amount: 5, Type: Fertiliser.Types.UreaN, Depth: 10)
              2016-07-12  [Fertiliser].Apply(Amount: 5, Type: Fertiliser.Types.UreaN, Depth: 10)
              2016-09-14  [Fertiliser].Apply(Amount: 5, Type: Fertiliser.Types.UreaN, Depth: 10)
            Operations 100
              2014-12-22  [Fertiliser].Apply(Amount: 10, Type: Fertiliser.Types.UreaN, Depth: 10)
              2015-01-19  [Fertiliser].Apply(Amount: 10, Type: Fertiliser.Types.UreaN, Depth: 10)
              2015-03-03  [Fertiliser].Apply(Amount: 10, Type: Fertiliser.Types.UreaN, Depth: 10)
              2015-04-21  [Fertiliser].Apply(Amount: 10, Type: Fertiliser.Types.UreaN, Depth: 10)
              2015-06-10  [Fertiliser].Apply(Amount: 10, Type: Fertiliser.Types.UreaN, Depth: 10)
              2015-09-09  [Fertiliser].Apply(Amount: 10, Type: Fertiliser.Types.UreaN, Depth: 10)
              2015-10-19  [Fertiliser].Apply(Amount: 10, Type: Fertiliser.Types.UreaN, Depth: 10)
              2015-11-19  [Fertiliser].Apply(Amount: 10, Type: Fertiliser.Types.UreaN, Depth: 10)
              2015-12-22  [Fertiliser].Apply(Amount: 10, Type: Fertiliser.Types.UreaN, Depth: 10)
              2016-02-03  [Fertiliser].Apply(Amount: 10, Type: Fertiliser.Types.UreaN, Depth: 10)
              2016-05-06  [Fertiliser].Apply(Amount: 10, Type: Fertiliser.Types.UreaN, Depth: 10)
              2016-07-12  [Fertiliser].Apply(Amount: 10, Type: Fertiliser.Types.UreaN, Depth: 10)
              2016-09-14  [Fertiliser].Apply(Amount: 10, Type: Fertiliser.Types.UreaN, Depth: 10)
            Operations 200
              2014-12-22  [Fertiliser].Apply(Amount: 20, Type: Fertiliser.Types.UreaN, Depth: 10)
              2015-01-19  [Fertiliser].Apply(Amount: 20, Type: Fertiliser.Types.UreaN, Depth: 10)
              2015-03-03  [Fertiliser].Apply(Amount: 20, Type: Fertiliser.Types.UreaN, Depth: 10)
              2015-04-21  [Fertiliser].Apply(Amount: 20, Type: Fertiliser.Types.UreaN, Depth: 10)
              2015-06-10  [Fertiliser].Apply(Amount: 20, Type: Fertiliser.Types.UreaN, Depth: 10)
              2015-09-09  [Fertiliser].Apply(Amount: 20, Type: Fertiliser.Types.UreaN, Depth: 10)
              2015-10-19  [Fertiliser].Apply(Amount: 20, Type: Fertiliser.Types.UreaN, Depth: 10)
              2015-11-19  [Fertiliser].Apply(Amount: 20, Type: Fertiliser.Types.UreaN, Depth: 10)
              2015-12-22  [Fertiliser].Apply(Amount: 20, Type: Fertiliser.Types.UreaN, Depth: 10)
              2016-02-03  [Fertiliser].Apply(Amount: 20, Type: Fertiliser.Types.UreaN, Depth: 10)
              2016-05-06  [Fertiliser].Apply(Amount: 20, Type: Fertiliser.Types.UreaN, Depth: 10)
              2016-07-12  [Fertiliser].Apply(Amount: 20, Type: Fertiliser.Types.UreaN, Depth: 10)
              2016-09-14  [Fertiliser].Apply(Amount: 20, Type: Fertiliser.Types.UreaN, Depth: 10)
            Operations 350
              2014-12-22  [Fertiliser].Apply(Amount: 35, Type: Fertiliser.Types.UreaN, Depth: 10)
              2015-01-19  [Fertiliser].Apply(Amount: 35, Type: Fertiliser.Types.UreaN, Depth: 10)
              2015-03-03  [Fertiliser].Apply(Amount: 35, Type: Fertiliser.Types.UreaN, Depth: 10)
              2015-04-21  [Fertiliser].Apply(Amount: 35, Type: Fertiliser.Types.UreaN, Depth: 10)
              2015-06-10  [Fertiliser].Apply(Amount: 35, Type: Fertiliser.Types.UreaN, Depth: 10)
              2015-09-09  [Fertiliser].Apply(Amount: 35, Type: Fertiliser.Types.UreaN, Depth: 10)
              2015-10-19  [Fertiliser].Apply(Amount: 35, Type: Fertiliser.Types.UreaN, Depth: 10)
              2015-11-19  [Fertiliser].Apply(Amount: 35, Type: Fertiliser.Types.UreaN, Depth: 10)
              2015-12-22  [Fertiliser].Apply(Amount: 35, Type: Fertiliser.Types.UreaN, Depth: 10)
              2016-02-03  [Fertiliser].Apply(Amount: 35, Type: Fertiliser.Types.UreaN, Depth: 10)
              2016-05-06  [Fertiliser].Apply(Amount: 35, Type: Fertiliser.Types.UreaN, Depth: 10)
              2016-07-12  [Fertiliser].Apply(Amount: 35, Type: Fertiliser.Types.UreaN, Depth: 10)
              2016-09-14  [Fertiliser].Apply(Amount: 35, Type: Fertiliser.Types.UreaN, Depth: 10)
            Operations 500
              2014-12-22  [Fertiliser].Apply(Amount: 50, Type: Fertiliser.Types.UreaN, Depth: 10)
              2015-01-19  [Fertiliser].Apply(Amount: 50, Type: Fertiliser.Types.UreaN, Depth: 10)
              2015-03-03  [Fertiliser].Apply(Amount: 50, Type: Fertiliser.Types.UreaN, Depth: 10)
              2015-04-21  [Fertiliser].Apply(Amount: 50, Type: Fertiliser.Types.UreaN, Depth: 10)
              2015-06-10  [Fertiliser].Apply(Amount: 50, Type: Fertiliser.Types.UreaN, Depth: 10)
              2015-09-09  [Fertiliser].Apply(Amount: 50, Type: Fertiliser.Types.UreaN, Depth: 10)
              2015-10-19  [Fertiliser].Apply(Amount: 50, Type: Fertiliser.Types.UreaN, Depth: 10)
              2015-11-19  [Fertiliser].Apply(Amount: 50, Type: Fertiliser.Types.UreaN, Depth: 10)
              2015-12-22  [Fertiliser].Apply(Amount: 50, Type: Fertiliser.Types.UreaN, Depth: 10)
              2016-02-03  [Fertiliser].Apply(Amount: 50, Type: Fertiliser.Types.UreaN, Depth: 10)
              2016-05-06  [Fertiliser].Apply(Amount: 50, Type: Fertiliser.Types.UreaN, Depth: 10)
              2016-07-12  [Fertiliser].Apply(Amount: 50, Type: Fertiliser.Types.UreaN, Depth: 10)
              2016-09-14  [Fertiliser].Apply(Amount: 50, Type: Fertiliser.Types.UreaN, Depth: 10)
        Simulation FRNLRuakura
          Clock: Start=2014-09-01; End=2016-12-31
          Weather: FileName=%root%\Tests\Validation\WhiteClover\Ruakura.met
          Summary summaryfile
          SoilArbitrator Soil Arbitrator
          Zone Field: Area=1; Slope=0; AspectAngle=0; Altitude=50
            Folder Management
              Operations Sowing
                2014-10-24  [WhiteClover].Sow(population: 500, cultivar: "Kopu", depth: 5, rowSpacing: 150)
              Operations NRate
              Operations BaseFertiliser
                2014-10-13  [Fertiliser].Apply(Amount: 26.4, Type: Fertiliser.Types.UreaN, Depth: 10)
                2014-12-23  [Fertiliser].Apply(Amount: 3.9, Type: Fertiliser.Types.UreaN, Depth: 10)
              Manager Defoliate: same as Validation.New Zealand.FRNLLincoln.FRNLLincoln.Field.Management.Defoliate
              Operations DefoliationSchedule
                2015-01-14  [Defoliate].Script.Defoliate(defoliationType: "Cut", amountDM: 60, amountType: "ResidualDM", duration: 1)
                2015-03-02  [Defoliate].Script.Defoliate(defoliationType: "Cut", amountDM: 60, amountType: "ResidualDM", duration: 1)
                2015-04-20  [Defoliate].Script.Defoliate(defoliationType: "Cut", amountDM: 60, amountType: "ResidualDM", duration: 1)
                2015-06-08  [Defoliate].Script.Defoliate(defoliationType: "Cut", amountDM: 60, amountType: "ResidualDM", duration: 1)
                2015-09-03  [Defoliate].Script.Defoliate(defoliationType: "Cut", amountDM: 60, amountType: "ResidualDM", duration: 1)
                2015-10-14  [Defoliate].Script.Defoliate(defoliationType: "Cut", amountDM: 60, amountType: "ResidualDM", duration: 1)
                2015-11-17  [Defoliate].Script.Defoliate(defoliationType: "Cut", amountDM: 60, amountType: "ResidualDM", duration: 1)
                2015-12-21  [Defoliate].Script.Defoliate(defoliationType: "Cut", amountDM: 60, amountType: "ResidualDM", duration: 1)
                2016-02-02  [Defoliate].Script.Defoliate(defoliationType: "Cut", amountDM: 60, amountType: "ResidualDM", duration: 1)
                2016-05-02  [Defoliate].Script.Defoliate(defoliationType: "Cut", amountDM: 60, amountType: "ResidualDM", duration: 1)
                2016-07-11  [Defoliate].Script.Defoliate(defoliationType: "Cut", amountDM: 60, amountType: "ResidualDM", duration: 1)
                2016-09-12  [Defoliate].Script.Defoliate(defoliationType: "Cut", amountDM: 60, amountType: "ResidualDM", duration: 1)
                2016-10-18  [Defoliate].Script.Defoliate(defoliationType: "Cut", amountDM: 60, amountType: "ResidualDM", duration: 1)
                2016-11-22  [Defoliate].Script.Defoliate(defoliationType: "Cut", amountDM: 60, amountType: "ResidualDM", duration: 1)
                2016-12-15  [Defoliate].Script.Defoliate(defoliationType: "Cut", amountDM: 60, amountType: "ResidualDM", duration: 1)
              Manager ExtraVariables
                script: same as in Validation.New Zealand.FRNLLincoln.FRNLLincoln.Field.Management.ExtraVariables
            MicroClimate: a_interception=0; b_interception=1; c_interception=0; d_interception=0; soil_albedo=0.23; SoilHeatFluxFraction=0.4; MinimumHeightDiffForNewLayer=0; NightInterceptionFraction=0.5; ReferenceHeight=2
            Irrigation
            Fertiliser
            SurfaceOrganicMatter: InitialResidueName=grass; InitialResidueType=grass; InitialResidueMass=500; InitialStandingFraction=0; InitialCPR=0; InitialCNR=40
            Soil: SoilType=Typic Udivitrand (US), Typic Orthic Allophanic Soil (NZ); LocalName=Horotiu Silt Loam; Site=Ruakura; NearestTown=Hamilton; Region=Waikato; Country=New Zealand; Latitude=0; Longitude=0
              DataSource=Based primarily on data from Close et al (2003), complemented with NZ NSD.
              Chemical
                Thickness  NO3N      NH4N      PH
                200        8.52273   0.5       6
                200        4.11765   0.2       6
                130        0.797423  0.097239  6
                140        0.797423  0.097239  6
                380        0.798126  0.100377  6
                230        0.80277   0.121085  6
                220        0.80277   0.121085  6
              Physical
                Thickness  ParticleSizeClay  BD     AirDry  LL15   DUL    SAT    KS
                200        20                0.88   0.07    0.22   0.421  0.587  507.8
                200        18.5              0.85   0.21    0.219  0.327  0.623  4445.1
                130        11                1.009  0.177   0.177  0.314  0.572  7262
                140        6.5               1.055  0.139   0.139  0.291  0.536  11928
                380        5.1               1.055  0.125   0.125  0.182  0.504  25031
                230        3.8               0.839  0.102   0.102  0.123  0.439  28410.4
                220        2.4               0.695  0.083   0.083  0.101  0.363  42658.3
                SoilCrop WhiteCloverSoil: LL=[0.22, 0.219, 0.177, 0.139, 0.125, 0.102, 0.083]; KL=[0.1, 0.08, 0.05, 0.035, 0.005, 0, 0]; XF=[1, 1, 1, 1, 1, 1, 0.5]
              WaterBalance SoilWater: SummerDate=1-Oct; SummerU=9; SummerCona=4; WinterDate=1-Apr; WinterU=6; WinterCona=3; DiffusConst=88; DiffusSlope=35; Salb=0.15; CN2Bare=70; CNRed=20; CNCov=0.8; DischargeWidth=0; CatchmentArea=0; Thickness=[200, 200, 130, 140, 380, 230, 220]; SWCON=[0.48, 0.59, 0.61, 0.6, 0.63, 0.7, 0.71]
              SoilNitrogen: same as Validation.New Zealand.FRNLLincoln.FRNLLincoln.Field.Soil.SoilNitrogen
              Organic: FOMCNRatio=40
                Thickness  Carbon  SoilCNRatio  FBiom  FInert  FOM
                200        8       12.5         0.075  0.7     338.974
                200        1.88    12.5         0.013  0.79    227.221
                130        0.93    12.5         0.009  0.9     175.199
                140        0.43    12.5         0.008  0.94    132.413
                380        0.13    12.5         0.007  0.96    61.9249
                230        0.1     12.5         0.005  0.99    39.0922
                220        0.07    12.5         0.005  0.995   25.1768
              CERESSoilTemperature Temperature
              InitialWater Initial water: PercentMethod=1; FractionFull=0.9
            Plant WhiteClover
            Report: EventNames=[Clock].DoReport
      Memo SubTitle
        ## All data from New Zealand
      Memo Discussion
        ##Discussion##

        The results show that the model was able to capture the general growth pattern and the cumulative amounts of herbage harvested.  Given the large uncertainties that measurements of plant biomass have, it is generally more appropriate to compare season cumulative values instead of values for individual measurements.  The experimental results showed no significant effect of N fertilisation on biomass accumulation, which was expected as white clover can compensate for those variations through biological N fixation.
        The values for N content were also highly variable, and they did show some response to fertilisation.  The model results also shows similar response, but the general pattern was not we described by the model.  The way the model computes demand and remobilisation of N seems to be a specific part of the model that still needs improvement.
  Memo Acknowledgements
    # Acknowledgements
    This model was developed with support and datasets provided by the Forages for Reduced Nitrogen Leaching (FRNL) programme, funded by the New Zealand Ministry of Business, Innovation and Employment.  The programme is a partnership between DairyNZ, AgResearch, Plant & Food Research, Lincoln University, the Foundation for Arable Research, and Landcare Research.
    It should be recognised that the model was also build upon the work of several people, especially at AgResearch, that have been developing the understanding and modelling of pastural systems over many years.  The author is also thankfull to Ellen Hume for her help on gathering plant parameters and organising the dataset.
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