Simulations: Area=0
  Simulation Wheat: Area=0
    WeatherFile: FileName=C:\Users\hol353\ApsimX\Tests\WeatherFiles\Dalby.met
    Clock: StartDate=1988-10-20; EndDate=1988-12-31
    Summary
    Zone Field: Area=0
      Irrigation
      Fertiliser
        Definitions:
          Name   FractionNO3  FractionNH4  FractionUrea
          UreaN  0            0            1
          NO3N   1            0            0
      Report: Events=[Clock].EndOfDay
        Variables:
          [Clock].Today
          [WeatherFile].DayLength
          [WeatherFile].MaxT
          [WeatherFile].MinT
          [WeatherFile].Radn
          [WeatherFile].Rain
          [SoilWater].sw_dep
          [SoilNitrogen].no3
          [SurfaceOrganicMatter].surfaceom_wt
      Soil: SoilType=Black Vertosol; LocalName=Waco; Site=Jimbour; NearestTown=Jimbour, Q 4352; Region=South East Queensland; NaturalVegetation=Grassland, mainly Qld bluegrass; Latitude=0; Longitude=0
        Water
          Thickness  BD    AirDry  LL15  DUL   SAT
          150        1.02  0.15    0.29  0.54  0.59
          150        1.03  0.26    0.29  0.53  0.58
          300        1.02  0.29    0.29  0.54  0.59
          300        1.02  0.29    0.29  0.54  0.58
          300        1.06  0.3     0.3   0.52  0.57
          300        1.11  0.31    0.31  0.5   0.55
          300        1.12  0.32    0.32  0.5   0.55
          300        1.15  0.33    0.33  0.48  0.53
          300        1.18  0.34    0.34  0.47  0.52
          300        1.2   0.35    0.35  0.46  0.51
          300        1.25  0.36    0.36  0.44  0.49
          SoilCrop WheatSoilCrop
            LL=[0.29, 0.29, 0.32, 0.38, 0.39, 0.39, 0.41, 0.48, 0.47, 0.46, 0.44]
            KL=[0.1, 0.1, 0.08, 0.06, 0.04, 0.02, 0.01, 0, 0, 0, 0]
            XF=[1, 1, 1, 1, 1, 1, 1, 0, 0, 0, 0]
          SoilCrop BarleySoilCrop
            LL=[0.29, 0.29, 0.36, 0.43, 0.51, 0.5, 0.5, 0.48, 0.47, 0.46, 0.44]
            KL=[0.1, 0.1, 0.08, 0.06, 0.04, 0.02, 0.01, 0, 0, 0, 0]
            XF=[1, 1, 1, 1, 1, 1, 1, 0, 0, 0, 0]
          SoilCrop PotatoSoilCrop
            LL=[0.29, 0.29, 0.36, 0.43, 0.51, 0.5, 0.5, 0.48, 0.47, 0.46, 0.44]
            KL=[0.1, 0.1, 0.08, 0.06, 0.04, 0.02, 0.01, 0, 0, 0, 0]
            XF=[1, 1, 1, 1, 1, 1, 1, 0, 0, 0, 0]
        SoilWater: min_crit_temp=5; max_crit_temp=35; max_albedo=0.23; A_to_evap_fact=0.44; canopy_eos_coef=1.7; sw_top_crit=0.9; sumes1_max=100; sumes2_max=25; solute_flow_eff=[1]; solute_flux_eff=[1]; gravity_gradient=2E-05; specific_bd=2.65; hydrol_effective_depth=450; immobile_solutes=[nh4]; canopy_fact=[1, 1, 0, 0]; canopy_fact_height=[0, 600, 1800, 30000]; canopy_fact_default=0.5; act_evap_method=ritchie; irrigation_will_runoff=false; irrigation_layer=1; SummerCona=3; SummerU=6; SummerDate=1-Nov; WinterCona=3; WinterU=6; WinterDate=1-Apr; DiffusConst=40; DiffusSlope=16; Salb=0.13; slope=0; discharge_width=0; catchment_area=0; max_pond=0; CN2Bare=73; CNRed=20; CNCov=0.8
          Thickness  SWCON  KLAT
          150        0.3    0
          150        0.3    0
          300        0.3    0
          300        0.3    0
          300        0.3    0
          300        0.3    0
          300        0.3    0
          300        0.3    0
          300        0.3    0
          300        0.3    0
          300        0.3    0
          mobile_solutes=[no3, urea, cl, br, org_n, org_c_pool1, org_c_pool2, org_c_pool3]
        SoilNitrogen: NPartitionApproach=BasedOnLayerConcentration; wnmm_n_alpha=0.002; wnmm_dn_alpha=0.5; nemis_dn_km=22; nemis_dn_pot=7.194; cent_n_soilt_ave=15; cent_n_maxt_ave=25; cent_n_wfps_ave=0.7; cent_n_max_rate=0.1; ini_FOMtype=default; fom_type=[default, manure, mucuna, lablab, shemp, stable]; fract_carb=[0.2, 0.3, 0.54, 0.57, 0.45, 0]; fract_cell=[0.7, 0.3, 0.37, 0.37, 0.47, 0.1]; fract_lign=[0.1, 0.4, 0.09, 0.06, 0.08, 0.9]; ef_res=0.4; fr_res_biom=0.9; min_depth=100; rd_carb=[0.2, 0.1]; rd_cell=[0.05, 0.25]; rd_lign=[0.0095, 0.003]; ef_fom=0.4; fr_fom_biom=0.9; cnrf_coeff=0.693; cnrf_optcn=25; rd_biom=[0.0081, 0.004]; ef_biom=0.4; fr_biom_biom=0.6; rd_hum=[0.00015, 7E-05]; ef_hum=0.4; opt_temp=[32, 32]; wfmin_index=[0, 0.5, 1, 2]; wfmin_values=[0, 1, 1, 0.5]; soiltype=standard; allow_simpleSoilTemp=no; profile_reduction=no; use_organic_solutes=no; c_in_fom=0.4; minPatchArea=1; mcn=8; root_depth=3000; root_cn_pool=[40, 40, 40]
          zero: n2o_approach, ureappm_min, nh4ppm_min, no3ppm_min, fom_min, oc2om_factor, ini_pH, WarningThreshold, FatalThreshold, potHydrol_min, potHydrol_parmA, potHydrol_parmB, potHydrol_parmC, potHydrol_parmD, nitrification_pot, nh4_at_half_pot, dnit_rate_coeff, dnit_nitrf_loss, dnit_k1, dnit_wf_power, actC_parmB, actC_parmA, N2N2O_parmA, N2N2O_parmB
        SoilOrganicMatter: RootCN=40; RootWt=200; SoilCN=12.5; EnrACoeff=7.4; EnrBCoeff=0.2; OCUnits=Total
          Thickness  OC    FBiom  FInert
          150        1.04  0.025  0.4
          150        0.89  0.02   0.6
          300        0.89  0.015  0.8
          300        0.89  0.01   0.9
          300        0.77  0.01   0.95
          300        0.45  0.01   0.95
          300        0.27  0.01   0.95
          300        0.22  0.01   0.95
          300        0.16  0.01   0.95
          300        0.13  0.01   0.95
          300        0.12  0.01   0.95
        Analysis: PHUnits=Water; BoronUnits=HotWater
          Thickness  EC    PH
          150        0.2   8.4
          150        0.25  8.8
          300        0.31  9
          300        0.4   9.2
          300        0.59  9.2
          300        0.84  9.1
          300        0.93  9
          300        1.01  9
          300        1.06  8.9
          300        1.05  8.9
          300        1.01  8.9
        InitialWater Initial water: FractionFull=1; PercentMethod=FilledFromTop
        Sample: NO3Units=ppm; NH4Units=ppm; SWUnits=Volumetric; OCUnits=Total; PHUnits=Water
          Thickness  NO3     NH4
          150        1116.5  0.599004
          150        2.101   0.100001
          300        2.101   0.100001
          300        1.701   0.100001
          300        1.701   0.100001
          300        1.701   0.100001
          300        1.701   0.100001
          300        1.701   0.100001
          300        1.701   0.100001
          300        1.701   0.100001
          300        1.701   0.100001
      SurfaceOrganicMatter: crit_residue_wt=2000; opt_temp=20; cum_eos_max=20; cnrf_coeff=0.277; cnrf_optcn=25; c_fract=0.4; leach_rain_tot=25; min_rain_to_leach=10; crit_min_surfom_orgC=0.004; default_cpr=0; default_standing_fraction=0; standing_extinct_coeff=0.5; fractionFaecesAdded=0.5; PoolName=Potato; type=Potato; mass=1000; standing_fraction=0; cnr=80
        ResidueTypes:
          {Name=Potato, fraction_C=0.08, po4ppm=10, nh4ppm=10, no3ppm=10, specific_area=0.0001, cf_contrib=1, pot_decomp_rate=0.1, fr_c=[0.3, 0.3, 0.4], fr_n=[0.3, 0.3, 0.4], fr_p=[0.3, 0.3, 0.4]}
        TillageTypes
      MicroClimate: air_pressure=1010; soil_emissivity=0.96; sun_angle=15; soil_heat_flux_fraction=0.4; night_interception_fraction=0.5; windspeed_default=3; refheight=2; albedo=0.293662; emissivity=0.96; gsmax=0.01; r50=200; a_interception=0; b_interception=1; c_interception=0; d_interception=0; soil_albedo=0.3
        ComponentData Potato: Type=Potato; Albedo=0.26; Emissivity=0.96; Gsmax=0.011; R50=200
      Manager IrrigationRule
        ApplicationAmount = 100
        ApplicationDate = 2003-12-20
```csharp
        using System;
        using Models.Core;
        using Models.PMF;
        namespace Models
        {
            [Serializable]
            public class Script : Model
            {      
               [Link] Irrigation Irrigation;
               [Link] Clock Clock;
			
			   [Description("Amount of water to apply")]
               public double ApplicationAmount {get; set;} 
               [Description("Date irrigation is applied")]
               public DateTime ApplicationDate {get; set;}
			   
			   [EventSubscribe("StartOfDay")]
               private void OnStartOfDay(object sender, EventArgs e)
               {
				if (Clock.Today.Date.Equals(ApplicationDate))
                    Irrigation.Apply(Amount:ApplicationAmount);
                  //Irrigation.Apply(Amount:a, Depth:b, Efficiency:c, willRunoff:"d");
                  //a is a double and can be represented by a variable name or a number representing the amount (mm) of irrigation to apply
			      //b is an optional double and can be represented by a variable name or a number representing the depth (mm) at which irrigation is applied
			      //if b is omitted a default value of 0 is used (irrigation is applied to the surface by defalt)
			      //c is an optional double and can be represented by a varialbe name or a number representing the efficiency (0-1) with which irrigation is applied
			      //if c is omitted a default of 1 is used (irrigation efficiency is 100% by defalt)
			      //d is a optional boolen and can be represented by text strings "true" or "false" determining if irrigation water will runoff or not
			      //if d is omitted a default of false is used (irrigation won't run off by defalt)
			   }
            }
        }
```
      Manager FertiliserRule
        ApplicationAmount = 500
        FertType = NO3N
        ApplicationDate = 2003-12-30
```csharp
        using System;
        using Models.Core;
        using Models.PMF;
        namespace Models
        {
            [Serializable]
            public class Script : Model
            {      
               [Link] Fertiliser Fertiliser;
               [Link] Clock Clock;

               [Description("Amount (kg/ha) of fertiliser to apply")]
               public double ApplicationAmount {get; set;} //= 500;
               [Description("Type of fertiliser to apply")]
               public Fertiliser.Types FertType {get; set;}//= "NO3_N";
               [Description("Date of fertiliser application")]
               public DateTime ApplicationDate {get; set;} //= new DateTime(2003, 12, 30, 0, 0, 0);

               [EventSubscribe("StartOfDay")]
               private void OnStartOfDay(object sender, EventArgs e)
               {
               if (Clock.Today.Date.Equals(ApplicationDate))
                    Fertiliser.Apply(Amount:ApplicationAmount,Type:FertType);
			      //Fertiliser.Apply(Amount:a, Type:"b", Depth:c)
			      //a is a double and can be represented by a variable name or a number representing the amount (kg/ha) of fertiliser to apply
			      //b is a string and can be represented by a variable name or text string (in quotes eg "UreaN") representing the type of fertiliser to apply
			      //c is an optional double and can be represented by a variable name or a number representing the depth (mm) to which fertiliser is applied
			      //if c is omitted a default depth of 0 is used (fertiliser is applied to the surface by defalt)
			   }
            }
        }
```
      Plant15: CropType=Wheat; EOCropFactor=1.5; NSupplyPreference=active; DoRetranslocationBeforeNDemand=false
        Population1 Population: LeafNumberCritical=10; TTEmergenceLimit=300; DaysToGerminationLimit=40; SWStressPhenoLimit=25; SWStressPhotoLimit=99; SWStressPhotoRate=0; Density=0
          PhaseBasedSwitch CropFailureStressPeriod: Start=Emergence; End=Flowering
          SoilTemperatureWeightedFunction DeathHighTemperatureDuringEmergence
        Phenology
          GerminatingPhase SowingToGermination: Start=Sowing; End=Germination
          EmergingPhase15 GerminationToEmergence: Start=Germination; End=Emergence; ShootLag=40; ShootRate=1.5
            LinearInterpolationFunction ThermalTime: XProperty=Phenology.Vernalisation.CrownTemperature
              XYPairs: X=[0, 26, 34]; Y=[0, 26, 0]
          GenericPhase EmergenceToEndOfJuvenile: Start=Emergence; End=EndOfJuvenile
            Constant Target: Value=1
            LinearInterpolationFunction ThermalTime: XProperty=Phenology.Vernalisation.CrownTemperature
              XYPairs: X=[0, 26, 34]; Y=[0, 26, 0]
            MultiplyFunction Stress
              MinimumFunction
                VariableReference: VariableName=Phenology.Vernalisation.VernEff
                VariableReference Variable1: VariableName=Phenology.Vernalisation.PhotopEff
              MinimumFunction Stresses
                VariableReference Variable2: VariableName=SWStress.Pheno
                VariableReference Variable3: VariableName=NStress.Pheno
                VariableReference Variable4: VariableName=PStress.Pheno
          GenericPhase EndOfJuvenileToFloralInitiation: Start=EndOfJuvenile; End=FloralInitiation
            Constant Target: Value=400
            LinearInterpolationFunction ThermalTime: XProperty=Phenology.Vernalisation.CrownTemperature
              XYPairs: X=[0, 26, 34]; Y=[0, 26, 0]
            MultiplyFunction Stress: same as Wheat.Field.Plant15.Phenology.EmergenceToEndOfJuvenile.Stress
          GenericPhase FloralInitiationToFlowering: Start=FloralInitiation; End=Flowering
            Constant Target: Value=555
            LinearInterpolationFunction ThermalTime: XProperty=Phenology.Vernalisation.CrownTemperature
              XYPairs: X=[0, 26, 34]; Y=[0, 26, 0]
            MultiplyFunction Stress: same as Wheat.Field.Plant15.Phenology.EmergenceToEndOfJuvenile.Stress
          GenericPhase FloweringToStartGrainFill: Start=Flowering; End=StartGrainFill
            Constant Target: Value=120
            LinearInterpolationFunction ThermalTime: XProperty=Phenology.Vernalisation.CrownTemperature
              XYPairs: X=[0, 26, 34]; Y=[0, 26, 0]
          GenericPhase StartGrainFillToEndGrainFill: Start=StartGrainFill; End=EndGrainFill
            Constant Target: Value=545
            LinearInterpolationFunction ThermalTime: XProperty=Phenology.Vernalisation.CrownTemperature
              XYPairs: X=[0, 26, 34]; Y=[0, 26, 0]
          GenericPhase EndGrainFillToMaturity: Start=EndGrainFill; End=Maturity
            Constant Target: Value=35
            LinearInterpolationFunction ThermalTime: XProperty=Phenology.Vernalisation.CrownTemperature
              XYPairs: X=[0, 26, 34]; Y=[0, 26, 0]
          GenericPhase MaturityToHarvestRipe: Start=Maturity; End=HarvestRipe
            Constant Target: Value=1
            LinearInterpolationFunction ThermalTime: XProperty=Phenology.Vernalisation.CrownTemperature
              XYPairs: X=[0, 26, 34]; Y=[0, 26, 0]
          GenericPhase ReadyForHarvesting: Start=HarvestRipe; End=EndCrop
            Constant Target: Value=1000
            LinearInterpolationFunction ThermalTime: XProperty=Phenology.Vernalisation.CrownTemperature
              XYPairs: X=[0, 26, 34]; Y=[0, 26, 0]
          GenericPhase EndCrop: Start=EndCrop; End=Unused
            Constant Target: Value=1000
            LinearInterpolationFunction ThermalTime: XProperty=Phenology.Vernalisation.CrownTemperature
              XYPairs: X=[0, 26, 34]; Y=[0, 26, 0]
          LinearInterpolationFunction RewindDueToBiomassRemoved: XProperty=Phenology.FractionBiomassRemoved
            XYPairs: X=[0, 0.1, 0.4, 0.5, 1]; Y=[0, 0.08, 0.4, 0.5, 1]
          PhaseBasedSwitch AboveGroundPeriod: Start=Emergence; End=EndCrop
        Root1 Root: NConcentrationCritical=0.02; NConcentrationMinimum=0.01; NConcentrationMaximum=0.02; InitialRootDepth=100; DieBackFraction=0; ModifyKL=false; ClA=4; ClB=-0.005; ESPA=10; ESPB=-0.15; ECA=3; ECB=-1.3; NDeficitUptakeFraction=0.0001; NSenescenceConcentration=0.005; NSupplyPreference=active; SenescenceDetachmentFraction=1; InitialWt=0.01; InitialNConcentration=0.02; SpecificRootLength=105000; RootDepth=0
          Biomass Live
          Biomass Dead
          LinearInterpolationFunction RootAdvanceFactorTemp: XProperty=Environment.MeanT
            XYPairs: X=[0, 25, 35]; Y=[0, 1, 0]
          LinearInterpolationFunction RootAdvanceFactorWaterStress: XProperty=SWStress.Photo
            XYPairs: X=[0, 1]; Y=[1, 1]
          LinearInterpolationFunction SWFactorRootDepth: XProperty=Root.FASW
            XYPairs: X=[0, 0.25]; Y=[0, 1]
          LinearInterpolationFunction SWFactorRootLength: XProperty=Root.FASWLayered
            XYPairs: X=[0, 0.25]; Y=[0, 1]
          StageBasedInterpolation RootDepthRate: Codes=[0, 5, 30, 30, 30, 30, 0, 0, 0, 0, 0]; Proportional=false
            Stages=[Sowing, Germination, Emergence, EndOfJuvenile, FloralInitiation, Flowering, StartGrainFill, EndGrainFill, Maturity, HarvestRipe, EndCrop]
          LinearInterpolationFunction RelativeRootRate: XProperty=Root.RootLengthDensity
            XYPairs: X=[0, 0.0001, 0.0003]; Y=[0.02, 0.1, 1]
          NUptake3 NUptakeFunction: kno3=0.02; knh4=0; no3ppm_min=0; nh4ppm_min=0; total_n_uptake_max=0.6
            PhaseBasedSwitch NStressPeriod: Start=EndOfJuvenile(0.3); End=EndCrop
          Constant GrowthStructuralFractionStage: Value=1
          LinearInterpolationFunction DMSenescenceFraction: XProperty=Leaf.FractionCanopySenescing
            XYPairs: X=[0, 1]; Y=[0.005, 0.005]
        GenericArbitratorXY Arbitrator1: DMSupply=0
          LinearInterpolationFunction FracDMRemainingInleaf: XProperty=Phenology.Stage
            XYPairs: X=[1, 2, 3, 4, 4.9, 5, 5.4, 6, 6.9, 7, 8, 9, 10, 11]; Y=[0, 0, 0.6, 0.6, 0.6, 0.42, 0, 0, 0, 0, 0, 0, 0, 0]
          LinearInterpolationFunction RatioRootShoot: XProperty=Phenology.Stage
            XYPairs: X=[1, 2, 3, 4, 4.9, 5, 5.4, 6, 6.9, 7, 8, 9, 10, 11]; Y=[0, 0, 1, 1, 0.3, 0.3, 0.3, 0.08, 0.01, 0, 0, 0, 0, 0]
        Leaf1 Leaf: NodeNumberCorrection=2; SLAMin=18000; FractionLeafSenescenceRate=0.035; NodeSenescenceRate=60; NFactLeafSenescenceRate=0; MinTPLA=5; NDeficitUptakeFraction=0.0001; InitialWt=0.003; InitialNConcentration=0.063; InitialTPLA=200; InitialLeafNumber=2; LAISenLight=7; SenLightSlope=0.002; SenRateWater=0.1; NSenescenceConcentration=0.005; SenescenceDetachmentFraction=0; dlt_dm_pot_rue=0; dlt_n_senesced_retrans=0; dlt_n_senesced_trans=0; dlt_height=0; dlt_width=0; width=0
          Biomass Live
          Biomass Dead
          RUEModel1 Photosynthesis
            StageBasedInterpolation RUE: Codes=[0, 0, 1.24, 1.24, 1.24, 1.24, 1.24, 1.24, 0, 0, 0]; Proportional=false
              Stages=[Sowing, Germination, Emergence, EndOfJuvenile, FloralInitiation, Flowering, StartGrainFill, EndGrainFill, Maturity, HarvestRipe, EndCrop]
            RUECO2Function RUEModifier: PhotosyntheticPathway=C3
          StageBasedInterpolation TE: Proportional=false
            Stages=[Sowing, Germination, Emergence, EndOfJuvenile, FloralInitiation, Flowering, StartGrainFill, EndGrainFill, Maturity, HarvestRipe, EndCrop]
            Codes=[0, 0, 0.006, 0.006, 0.006, 0.006, 0.006, 0.006, 0.0025, 0, 0]
          LinearInterpolationFunction TEModifier: XProperty=CO2
            XYPairs: X=[350, 700, 1000]; Y=[1, 1.37, 1.69]
          LinearInterpolationFunction NConcCriticalModifier: XProperty=CO2
            XYPairs: X=[350, 700, 1000]; Y=[1, 0.93, 0.9]
          PhaseBasedSwitch NodeFormationPeriod: Start=Emergence; End=HarvestRipe
          LinearInterpolationFunction NodeAppearanceRate: XProperty=Leaf.NodeNo
            XYPairs: X=[0, 20]; Y=[95, 95]
          LinearInterpolationFunction LeavesPerNode: XProperty=Leaf.NodeNo
            XYPairs: X=[0, 2.5, 6]; Y=[1, 1, 6]
          LinearInterpolationFunction LeafSize: XProperty=Leaf.NodeNumberNow
            XYPairs: X=[1, 5, 8, 10]; Y=[1400, 3700, 4800, 5600]
          Constant GrowthStructuralFractionStage: Value=1
          LinearInterpolationFunction SLAMax: XProperty=Leaf.LAI
            XYPairs: X=[0, 5]; Y=[27000, 22000]
          LinearInterpolationFunction LeafNumberFraction: XProperty=Leaf.LAIRatio
            XYPairs: X=[0, 0.1, 0.8, 1]; Y=[0, 1, 1, 1]
          PhaseBasedSwitch LeafSenescencePeriod: Start=EndOfJuvenile(0.4); End=EndCrop
          LinearInterpolationFunction LeafSenescenceFrost: XProperty=Environment.MinT
            XYPairs: X=[-15, -5]; Y=[0, 0]
          LinearInterpolationFunction DMSenescenceFraction: XProperty=Leaf.FractionCanopySenescing
            XYPairs: X=[0, 1]; Y=[0, 1]
          LinearInterpolationFunction ExtinctionCoefficient: XProperty=PlantSpatial.RowSpacing
            XYPairs: X=[200, 350, 1000]; Y=[0.5, 0.5, 0.5]
          LinearInterpolationFunction ExtinctionCoefficientDead: XProperty=PlantSpatial.RowSpacing
            XYPairs: X=[200, 350, 1000]; Y=[0.3, 0.3, 0.3]
          StageBasedInterpolation NConcentrationMinimum: Codes=[0.025, 0.025, 0.021, 0.01, 0.005, 0.0025]; Proportional=true
            Stages=[Emergence, EndOfJuvenile, FloralInitiation, Flowering, EndGrainFill, HarvestRipe]
          StageBasedInterpolation NConcentrationMaximum: Codes=[0.07, 0.07, 0.05, 0.02, 0.01, 0.005]; Proportional=true
            Stages=[Emergence, EndOfJuvenile, FloralInitiation, Flowering, EndGrainFill, HarvestRipe]
          StageBasedInterpolation NConcentrationCritical: Codes=[0.063, 0.063, 0.042, 0.015, 0.008, 0.0035]; Proportional=true
            Stages=[Emergence, EndOfJuvenile, FloralInitiation, Flowering, EndGrainFill, HarvestRipe]
        Stem1 Stem: NDeficitUptakeFraction=0.0001; NSenescenceConcentration=0.0025; SenescenceDetachmentFraction=0; InitialWt=0.0016; InitialNConcentration=0.05; dlt_n_senesced_retrans=0; dlt_n_senesced_trans=0; dlt_height=0; dlt_width=0
          Biomass Live
          Biomass Dead
          LinearInterpolationFunction RetainFraction: XProperty=Stem.FractionHeightRemoved
            XYPairs: X=[0, 0.1, 1]; Y=[0, 0.2, 1]
          LinearInterpolationFunction HeightFunction: XProperty=Stem.GreenWtPerPlant
            XYPairs: X=[0, 6]; Y=[0, 1500]
          LinearInterpolationFunction GrowthStructuralFractionStage: XProperty=Phenology.Stage
            XYPairs: X=[7, 7.01]; Y=[0.65, 0]
          LinearInterpolationFunction DMSenescenceFraction: XProperty=Leaf.FractionCanopySenescing
            XYPairs: X=[0, 1]; Y=[0, 0]
          StageBasedInterpolation NConcentrationMinimum: Codes=[0.025, 0.025, 0.004, 0.003, 0.003, 0.0025]; Proportional=true
            Stages=[Emergence, EndOfJuvenile, FloralInitiation, Flowering, EndGrainFill, HarvestRipe]
          StageBasedInterpolation NConcentrationMaximum: Codes=[0.07, 0.07, 0.04, 0.015, 0.015, 0.015]; Proportional=true
            Stages=[Emergence, EndOfJuvenile, FloralInitiation, Flowering, EndGrainFill, HarvestRipe]
          StageBasedInterpolation NConcentrationCritical: Codes=[0.05, 0.05, 0.02, 0.01, 0.005, 0.0035]; Proportional=true
            Stages=[Emergence, EndOfJuvenile, FloralInitiation, Flowering, EndGrainFill, HarvestRipe]
        Pod: InitialWt=0; InitialNConcentration=0.063; NDeficitUptakeFraction=0.0001; NSenescenceConcentration=0.007; SenescenceDetachmentFraction=0
          Biomass Live
          Biomass Dead
          RUECO2Function Fco2: PhotosyntheticPathway=C3
          StageBasedInterpolation TE: Proportional=false
            Stages=[Sowing, Germination, Emergence, EndOfJuvenile, FloralInitiation, Flowering, StartGrainFill, EndGrainFill, Maturity, HarvestRipe, EndCrop]
            Codes=[0, 0, 0.006, 0.006, 0.006, 0.006, 0.006, 0.006, 0.0025, 0, 0]
          LinearInterpolationFunction FractionGrainInPod: XProperty=Phenology.Stage
            XYPairs: X=[1, 2, 3, 4, 4.9, 5, 5.4, 6, 6.9, 7, 8, 9, 10, 11]; Y=[0, 0, 0, 0, 0, 0, 0.33, 0.33, 0.33, 0, 0, 0, 0, 0]
          Constant GrowthStructuralFractionStage: Value=1
          LinearInterpolationFunction DMSenescenceFraction: XProperty=Leaf.FractionCanopySenescing
            XYPairs: X=[0, 1]; Y=[0, 0]
          StageBasedInterpolation NConcentrationMinimum: Codes=[0.025, 0.025, 0.004, 0.003, 0.003, 0.0025]; Proportional=true
            Stages=[Emergence, EndOfJuvenile, FloralInitiation, Flowering, EndGrainFill, HarvestRipe]
          StageBasedInterpolation NConcentrationMaximum: Codes=[0.07, 0.07, 0.04, 0.015, 0.015, 0.015]; Proportional=true
            Stages=[Emergence, EndOfJuvenile, FloralInitiation, Flowering, EndGrainFill, HarvestRipe]
          StageBasedInterpolation NConcentrationCritical: Codes=[0.05, 0.05, 0.02, 0.01, 0.005, 0.0035]; Proportional=true
            Stages=[Emergence, EndOfJuvenile, FloralInitiation, Flowering, EndGrainFill, HarvestRipe]
        Grain: GrainsPerGramStem=25; PotentialGrainFillingRate=0.002; PotentialGrainGrowthRate=0.001; MinimumGrainNFillingRate=1.5E-05; GrainMaxDailyNConc=0.03; PotentialGrainNFillingRate=5.5E-05; MaxGrainSize=0.041; NSenescenceConcentration=0.014; WaterContentFraction=0.125
          zero: InitialWt, InitialNConcentration, CriticalGrainFillingRate, SenescenceDetachmentFraction, dlt_dm_pot_rue, dlt_n_senesced_retrans, dlt_n_senesced_trans, dlt_height, dlt_width
          Biomass Live
          Biomass Dead
          PhaseBasedSwitch GrainGrowthPeriod: Start=Flowering; End=EndGrainFill
          PhaseBasedSwitch ReproductivePeriod: Start=Flowering; End=EndGrainFill
          LinearInterpolationFunction RelativeGrainFill: XProperty=Environment.MeanT
            XYPairs: X=[0, 26, 35]; Y=[0, 1, 1]
          LinearInterpolationFunction RelativeGrainNFill: XProperty=Environment.MeanT
            XYPairs: X=[0, 25]; Y=[0, 1]
          Constant GrowthStructuralFractionStage: Value=1
          LinearInterpolationFunction DMSenescenceFraction: XProperty=Leaf.FractionCanopySenescing
            XYPairs: X=[0, 1]; Y=[0, 0]
          StageBasedInterpolation NConcentrationMinimum: Codes=[0, 0, 0, 0, 0.014, 0.014]; Proportional=true
            Stages=[Emergence, EndOfJuvenile, FloralInitiation, Flowering, EndGrainFill, HarvestRipe]
          StageBasedInterpolation NConcentrationMaximum: Codes=[0, 0, 0, 0, 0.03, 0.03]; Proportional=true
            Stages=[Emergence, EndOfJuvenile, FloralInitiation, Flowering, EndGrainFill, HarvestRipe]
          StageBasedInterpolation NConcentrationCritical: Codes=[0, 0, 0, 0, 0.03, 0.03]; Proportional=true
            Stages=[Emergence, EndOfJuvenile, FloralInitiation, Flowering, EndGrainFill, HarvestRipe]
        NStress: N_fact_photo=1.5; N_fact_pheno=100; N_fact_expansion=1; N_fact_grain=1.5
        SWStress
          LinearInterpolationFunction ExpansionFactor: XProperty=SWSupplyDemandRatio
            XYPairs: X=[0.1, 1.1]; Y=[0, 1]
          LinearInterpolationFunction PhenoFactor: XProperty=Root.SWAvailRatio
            XYPairs: X=[0, 0.16]; Y=[1, 1]
          LinearInterpolationFunction FixationFactor: XProperty=Root.SWAvailRatio
            XYPairs: X=[0, 0.5, 0.95, 1]; Y=[1, 1, 1, 1]
          LinearInterpolationFunction OxygenDeficitPhotoFactor: XProperty=Root.WetRootFraction
            XYPairs: X=[0, 0.8, 1]; Y=[1, 1, 1]
          LinearInterpolationFunction PhenoFlowerFactor: XProperty=Root.SWAvailRatio
            XYPairs: X=[0.2, 0.5, 1]; Y=[1, 1, 1]
          LinearInterpolationFunction PhenoGrainFillingFactor: XProperty=Root.SWAvailRatio
            XYPairs: X=[0.2, 0.5, 1]; Y=[1, 1, 1]
        LinearInterpolationFunction TempStress: XProperty=Environment.MeanT
          XYPairs: X=[0, 10, 25, 35]; Y=[0, 1, 1, 0]
        RadiationPartitioning: FractIncidentRadn=0
        StageBasedInterpolation NFixRate: Codes=[0, 0, 0, 0, 0, 0, 0, 0, 0, 0, 0]; Proportional=false
          Stages=[Sowing, Germination, Emergence, EndOfJuvenile, FloralInitiation, Flowering, StartGrainFill, EndGrainFill, Maturity, HarvestRipe, EndCrop]
        CompositeBiomass AboveGroundLive: Propertys=[[Plant].Organ1s[AboveGround].Live]
        CompositeBiomass AboveGroundDead: Propertys=[Organ1s[AboveGround].Dead]
        CompositeBiomass BelowGroundLive: Propertys=[Organ1s[BelowGround].Live]
        CompositeBiomass BelowGroundDead: Propertys=[Organ1s[BelowGround].Dead]
        CompositeBiomass TotalLive: Propertys=[Organ1s[].Live]
        CompositeBiomass TotalDead: Propertys=[Organ1s[].Dead]
        CompositeBiomass AboveGround: Propertys=[Organ1s[AboveGround].Live, Organ1s[AboveGround].Dead]
        CompositeBiomass BelowGround: Propertys=[Organ1s[BelowGround].Live, Organ1s[BelowGround].Dead]
        CompositeBiomass Total: Propertys=[Organ1s[].Live, Organ1s[].Dead]
        CompositeBiomass Head: Propertys=[Pod.Live, Pod.Dead, Grain.Live, Grain.Dead]
        StageBasedInterpolation StageCode: Codes=[1, 2, 3, 4, 5, 6, 7, 8, 9, 10, 11]; Proportional=false
          Stages=[Sowing, Germination, Emergence, EndOfJuvenile, FloralInitiation, Flowering, StartGrainFill, EndGrainFill, Maturity, HarvestRipe, EndCrop]
        PlantSpatial1
        Environment: CO2=350
        PStress
        Zadok
    Input Observed: FileName=TestObserved.txt
  DataStore
  Tests
    Test={SimulationName=Test, TableName=Report, Type=AllPos, ColumnNames=WeatherFile.MaxT}
  Memo
    This is some text
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