Simulations
  Replacements
    Plant15 Wheat: AutoHarvest=false; CropType=Wheat
      Population1 Population: Density=120; LeafNumberCritical=10; TTEmergenceLimit=300; DaysToGerminationLimit=40; SWStressPhenoLimit=25; SWStressPhotoLimit=99; SWStressPhotoRate=0
        PhaseBasedSwitch CropFailureStressPeriod: Start=Emergence; End=Flowering
        SoilTemperatureWeightedFunction DeathHighTemperatureDuringEmergence
          XYPairs: X=[55, 60]; Y=[0, 1]
      Phenology: Emerged=false
        GerminatingPhase SowingToGermination: Start=Sowing; End=Germination
        EmergingPhase15 GerminationToEmergence: Start=Germination; End=Emergence; ShootLag=40; ShootRate=1.5
          LinearInterpolationFunction ThermalTime: XProperty=[Vernalisation].CrownTemperature
            XYPairs: X=[0, 26, 34]; Y=[0, 26, 0]
        GenericPhase EmergenceToEndOfJuvenile: Start=Emergence; End=EndOfJuvenile
          Constant Target: Value=1
          Constant ThermalTime: Value=1.1
          Memo Cludge Alert
            This phase has a target of 1 and a Tt of 1 so it always lasts for a day.  Phase should be removed but leaving there for the time being
        GenericPhase EndOfJuvenileToFloralInitiation: Start=EndOfJuvenile; End=FloralInitiation
          Constant Target: Value=400
          LinearInterpolationFunction ThermalTime: XProperty=[Vernalisation].CrownTemperature
            XYPairs: X=[0, 26, 34]; Y=[0, 26, 0]
          MultiplyFunction Stress
            MinimumFunction
              VariableReference: VariableName=[Vernalisation].VernEff
              VariableReference Variable1: VariableName=[Vernalisation].PhotopEff
            MinimumFunction Stresses
              VariableReference Variable2: VariableName=[SWStress].Pheno
              VariableReference Variable3: VariableName=[NStress].Pheno
              VariableReference Variable4: VariableName=[PStress].Pheno
        GenericPhase FloralInitiationToFlowering: Start=FloralInitiation; End=Flowering
          Constant Target: Value=555
          LinearInterpolationFunction ThermalTime: XProperty=[Vernalisation].CrownTemperature
            XYPairs: X=[0, 26, 34]; Y=[0, 26, 0]
          MultiplyFunction Stress: same as Replacements.Wheat.Phenology.EndOfJuvenileToFloralInitiation.Stress
        GenericPhase FloweringToStartGrainFill: Start=Flowering; End=StartGrainFill
          Constant Target: Value=120
          LinearInterpolationFunction ThermalTime: XProperty=[Vernalisation].CrownTemperature
            XYPairs: X=[0, 26, 34]; Y=[0, 26, 0]
        GenericPhase StartGrainFillToEndGrainFill: Start=StartGrainFill; End=EndGrainFill
          Constant Target: Value=545
          LinearInterpolationFunction ThermalTime: XProperty=[Vernalisation].CrownTemperature
            XYPairs: X=[0, 26, 34]; Y=[0, 26, 0]
        GenericPhase EndGrainFillToMaturity: Start=EndGrainFill; End=Maturity
          Constant Target: Value=35
          LinearInterpolationFunction ThermalTime: XProperty=[Vernalisation].CrownTemperature
            XYPairs: X=[0, 26, 34]; Y=[0, 26, 0]
        GenericPhase MaturityToHarvestRipe: Start=Maturity; End=HarvestRipe
          Constant Target: Value=1
          Constant ThermalTime: Value=1.1
          Memo Cludge Alert
            This phase has a target of 1 and a Tt of 1 so it always lasts for a day.  Phase should be replaced with a ripening model when one is built
        GenericPhase ReadyForHarvesting: Start=HarvestRipe; End=EndCrop
          Constant Target: Value=1000
          LinearInterpolationFunction ThermalTime: XProperty=[Vernalisation].CrownTemperature
            XYPairs: X=[0, 26, 34]; Y=[0, 26, 0]
        GenericPhase EndCrop: Start=EndCrop; End=Unused
          Constant Target: Value=1000
          LinearInterpolationFunction ThermalTime: XProperty=[Vernalisation].CrownTemperature
            XYPairs: X=[0, 26, 34]; Y=[0, 26, 0]
        VernalisationCW Vernalisation: VernSens=2.5; PhotopSens=3.5; StartStageForEffects=Germination; EndStageForEffects=FloralInitiation; StartStageForCumulativeVD=Germination; EndStageForCumulativeVD=FloralInitiation
          AirTemperatureFunction VDModel
            XYPairs: X=[0, 2, 8, 15]; Y=[0, 1, 0.5, 0]
          PhotoperiodFunction Photoperiod: Twilight=-6
        LinearInterpolationFunction RewindDueToBiomassRemoved: XProperty=[Phenology].FractionBiomassRemoved
          XYPairs: X=[0, 0.1, 0.4, 0.5, 1]; Y=[0, 0.08, 0.4, 0.5, 1]
        PhaseBasedSwitch AboveGroundPeriod: Start=Emergence; End=EndCrop
      Root1 Root: NConcentrationCritical=0.02; NConcentrationMinimum=0.01; NConcentrationMaximum=0.02; InitialRootDepth=100; DieBackFraction=0; ll=[0.2, 0.2, 0.2, 0.2, 0.21, 0.19, 0.14, 0.14]; kl=[0.06, 0.06, 0.06, 0.06, 0.06, 0.06, 0.06, 0.06]; xf=[1, 1, 1, 1, 1, 1, 1, 1]; ModifyKL=false; ClA=4; ClB=-0.005; ESPA=10; ESPB=-0.15; ECA=3; ECB=-1.3; NDeficitUptakeFraction=0.0001; NSenescenceConcentration=0.005; NSupplyPreference=active; SenescenceDetachmentFraction=1; InitialWt=0.01; InitialNConcentration=0.02; SpecificRootLength=105000
        Biomass Live
        Biomass Dead
        LinearInterpolationFunction RootAdvanceFactorTemp: XProperty=[Environment].MeanT
          XYPairs: X=[0, 25, 35]; Y=[0, 1, 0]
        LinearInterpolationFunction RootAdvanceFactorWaterStress: XProperty=[SWStress].Photo
          XYPairs: X=[0, 1]; Y=[1, 1]
        LinearInterpolationFunction SWFactorRootDepth: XProperty=[Root].FASW
          XYPairs: X=[0, 0.25]; Y=[0, 1]
        LinearInterpolationFunction SWFactorRootLength: XProperty=[Root].FASWLayered
          XYPairs: X=[0, 0.25]; Y=[0, 1]
        StageBasedInterpolation RootDepthRate: Codes=[0, 5, 30, 30, 30, 30, 0, 0, 0, 0, 0]; Proportional=false
          Stages=[Sowing, Germination, Emergence, EndOfJuvenile, FloralInitiation, Flowering, StartGrainFill, EndGrainFill, Maturity, HarvestRipe, EndCrop]
        LinearInterpolationFunction RelativeRootRate: XProperty=[Root].RootLengthDensity
          XYPairs: X=[0, 0.0001, 0.0003]; Y=[0.02, 0.1, 1]
        NUptake3 NUptakeFunction: kno3=0.02; knh4=0; no3ppm_min=0; nh4ppm_min=0; total_n_uptake_max=0.6
          PhaseBasedSwitch NStressPeriod: Start=EndOfJuvenile(0.3); End=EndCrop
        Constant GrowthStructuralFractionStage: Value=1
        LinearInterpolationFunction DMSenescenceFraction: XProperty=[Leaf].FractionCanopySenescing
          XYPairs: X=[0, 1]; Y=[0.005, 0.005]
        Live
        Dead
      GenericArbitratorXY Arbitrator1: DMSupply=0; PartitionOrgans=[Root, Pod, Grain, Leaf, Stem]; PartitionRules=[magic, demand, demand, frac, remainder]
        LinearInterpolationFunction FracDMRemainingInLeaf: XProperty=[Phenology].Stage
          XYPairs: X=[1, 2, 3, 4, 4.9, 5, 5.4, 6, 6.9, 7, 8, 9, 10, 11]; Y=[0, 0, 0.6, 0.6, 0.6, 0.42, 0, 0, 0, 0, 0, 0, 0, 0]
        LinearInterpolationFunction RatioRootShoot: XProperty=[Phenology].Stage
          XYPairs: X=[1, 2, 3, 4, 4.9, 5, 5.4, 6, 6.9, 7, 8, 9, 10, 11]; Y=[0, 0, 1, 1, 0.3, 0.3, 0.3, 0.08, 0.01, 0, 0, 0, 0, 0]
      Leaf1 Leaf: dlt_dm_pot_rue=0; dlt_n_senesced_retrans=5.86292e-07; dlt_n_senesced_trans=0; dlt_height=0; dlt_width=0; width=0; NodeNumberCorrection=2; SLAMin=18000; FractionLeafSenescenceRate=0.035; NodeSenescenceRate=60; NFactLeafSenescenceRate=0; MinTPLA=5; NDeficitUptakeFraction=0.0001; InitialWt=0.003; InitialNConcentration=0.063; InitialTPLA=200; InitialLeafNumber=2; LAISenLight=7; SenLightSlope=0.002; SenRateWater=0.1; NSenescenceConcentration=0.005; SenescenceDetachmentFraction=0
        Biomass Live
        Biomass Dead
        RUEModel1 Photosynthesis
          StageBasedInterpolation RUE: Codes=[0, 0, 1.24, 1.24, 1.24, 1.24, 1.24, 1.24, 0, 0, 0]; Proportional=false
            Stages=[Sowing, Germination, Emergence, EndOfJuvenile, FloralInitiation, Flowering, StartGrainFill, EndGrainFill, Maturity, HarvestRipe, EndCrop]
          RUECO2Function RUEModifier: PhotosyntheticPathway=C3
        StageBasedInterpolation TE: Proportional=false
          Stages=[Sowing, Germination, Emergence, EndOfJuvenile, FloralInitiation, Flowering, StartGrainFill, EndGrainFill, Maturity, HarvestRipe, EndCrop]
          Codes=[0, 0, 0.006, 0.006, 0.006, 0.006, 0.006, 0.006, 0.0025, 0, 0]
        LinearInterpolationFunction TEModifier: XProperty=[Weather].CO2
          XYPairs: X=[350, 700, 1000]; Y=[1, 1.37, 1.69]
        LinearInterpolationFunction NConcCriticalModifier: XProperty=[Weather].CO2
          XYPairs: X=[350, 700, 1000]; Y=[1, 0.93, 0.9]
        PhaseBasedSwitch NodeFormationPeriod: Start=Emergence; End=HarvestRipe
        LinearInterpolationFunction NodeAppearanceRate: XProperty=[Leaf].NodeNo
          XYPairs: X=[0, 20]; Y=[95, 95]
        LinearInterpolationFunction LeavesPerNode: XProperty=[Leaf].NodeNo
          XYPairs: X=[0, 2.5, 6]; Y=[1, 1, 6]
        LinearInterpolationFunction LeafSize: XProperty=[Leaf].NodeNumberNow
          XYPairs: X=[1, 5, 8, 10]; Y=[1400, 3700, 4800, 5600]
        Constant GrowthStructuralFractionStage: Value=1
        LinearInterpolationFunction SLAMax: XProperty=[Leaf].LAI
          XYPairs: X=[0, 5]; Y=[27000, 22000]
        LinearInterpolationFunction LeafNumberFraction: XProperty=[Leaf].LAIRatio
          XYPairs: X=[0, 0.1, 0.8, 1]; Y=[0, 1, 1, 1]
        PhaseBasedSwitch LeafSenescencePeriod: Start=EndOfJuvenile(0.4); End=EndCrop
        LinearInterpolationFunction LeafSenescenceFrost: XProperty=[Weather].MinT
          XYPairs: X=[-15, -5]; Y=[0, 0]
        LinearInterpolationFunction DMSenescenceFraction: XProperty=[Leaf].FractionCanopySenescing
          XYPairs: X=[0, 1]; Y=[0, 1]
        LinearInterpolationFunction ExtinctionCoefficient: XProperty=[PlantSpatial].RowSpacing
          XYPairs: X=[200, 350, 1000]; Y=[0.5, 0.5, 0.5]
        LinearInterpolationFunction ExtinctionCoefficientDead: XProperty=[PlantSpatial].RowSpacing
          XYPairs: X=[200, 350, 1000]; Y=[0.3, 0.3, 0.3]
        StageBasedInterpolation NConcentrationMinimum: Codes=[0.025, 0.025, 0.021, 0.01, 0.005, 0.0025]; Proportional=true
          Stages=[Emergence, EndOfJuvenile, FloralInitiation, Flowering, EndGrainFill, HarvestRipe]
        StageBasedInterpolation NConcentrationMaximum: Codes=[0.07, 0.07, 0.05, 0.02, 0.01, 0.005]; Proportional=true
          Stages=[Emergence, EndOfJuvenile, FloralInitiation, Flowering, EndGrainFill, HarvestRipe]
        StageBasedInterpolation NConcentrationCritical: Codes=[0.063, 0.063, 0.042, 0.015, 0.008, 0.0035]; Proportional=true
          Stages=[Emergence, EndOfJuvenile, FloralInitiation, Flowering, EndGrainFill, HarvestRipe]
        Live
        Dead
      Stem1 Stem: dlt_n_senesced_retrans=4.34468e-05; dlt_n_senesced_trans=0; dlt_height=0; dlt_width=0; NDeficitUptakeFraction=0.0001; NSenescenceConcentration=0.0025; SenescenceDetachmentFraction=0; InitialWt=0.0016; InitialNConcentration=0.05
        Biomass Live
        Biomass Dead
        LinearInterpolationFunction RetainFraction: XProperty=[Stem].FractionHeightRemoved
          XYPairs: X=[0, 0.1, 1]; Y=[0, 0.2, 1]
        LinearInterpolationFunction HeightFunction: XProperty=[Stem].GreenWtPerPlant
          XYPairs: X=[0, 6]; Y=[0, 1500]
        LinearInterpolationFunction GrowthStructuralFractionStage: XProperty=[Phenology].Stage
          XYPairs: X=[5.6, 6.01]; Y=[0.7, 0]
        LinearInterpolationFunction DMSenescenceFraction: XProperty=[Leaf].FractionCanopySenescing
          XYPairs: X=[0, 1]; Y=[0, 0]
        StageBasedInterpolation NConcentrationMinimum: Codes=[0.025, 0.025, 0.004, 0.003, 0.003, 0.0025]; Proportional=true
          Stages=[Emergence, EndOfJuvenile, FloralInitiation, Flowering, EndGrainFill, HarvestRipe]
        StageBasedInterpolation NConcentrationMaximum: Codes=[0.07, 0.07, 0.04, 0.015, 0.015, 0.015]; Proportional=true
          Stages=[Emergence, EndOfJuvenile, FloralInitiation, Flowering, EndGrainFill, HarvestRipe]
        StageBasedInterpolation NConcentrationCritical: Codes=[0.05, 0.05, 0.02, 0.01, 0.005, 0.0035]; Proportional=true
          Stages=[Emergence, EndOfJuvenile, FloralInitiation, Flowering, EndGrainFill, HarvestRipe]
        Live
        Dead
      Pod: InitialWt=0; InitialNConcentration=0.063; NDeficitUptakeFraction=0.0001; NSenescenceConcentration=0.007; SenescenceDetachmentFraction=0
        Biomass Live
        Biomass Dead
        RUECO2Function Fco2: PhotosyntheticPathway=C3
        StageBasedInterpolation TE: Proportional=false
          Stages=[Sowing, Germination, Emergence, EndOfJuvenile, FloralInitiation, Flowering, StartGrainFill, EndGrainFill, Maturity, HarvestRipe, EndCrop]
          Codes=[0, 0, 0.006, 0.006, 0.006, 0.006, 0.006, 0.006, 0.0025, 0, 0]
        LinearInterpolationFunction FractionGrainInPod: XProperty=[Phenology].Stage
          XYPairs: X=[1, 2, 3, 4, 4.9, 5, 5.4, 6, 6.9, 7, 8, 9, 10, 11]; Y=[0, 0, 0, 0, 0, 0, 0.33, 0.33, 0.33, 0, 0, 0, 0, 0]
        Constant GrowthStructuralFractionStage: Value=1
        LinearInterpolationFunction DMSenescenceFraction: XProperty=[Leaf].FractionCanopySenescing
          XYPairs: X=[0, 1]; Y=[0, 0]
        StageBasedInterpolation NConcentrationMinimum: Codes=[0.025, 0.025, 0.004, 0.003, 0.003, 0.0025]; Proportional=true
          Stages=[Emergence, EndOfJuvenile, FloralInitiation, Flowering, EndGrainFill, HarvestRipe]
        StageBasedInterpolation NConcentrationMaximum: Codes=[0.07, 0.07, 0.04, 0.015, 0.015, 0.015]; Proportional=true
          Stages=[Emergence, EndOfJuvenile, FloralInitiation, Flowering, EndGrainFill, HarvestRipe]
        StageBasedInterpolation NConcentrationCritical: Codes=[0.05, 0.05, 0.02, 0.01, 0.005, 0.0035]; Proportional=true
          Stages=[Emergence, EndOfJuvenile, FloralInitiation, Flowering, EndGrainFill, HarvestRipe]
        Live
        Dead
      Grain: GrainsPerGramStem=25; PotentialGrainFillingRate=0.002; PotentialGrainGrowthRate=0.001; MinimumGrainNFillingRate=1.5E-05; GrainMaxDailyNConc=0.03; PotentialGrainNFillingRate=5.5E-05; MaxGrainSize=0.041; NSenescenceConcentration=0.014; WaterContentFraction=0.125
        zero: dlt_dm_pot_rue, dlt_n_senesced_retrans, dlt_n_senesced_trans, dlt_height, dlt_width, InitialWt, InitialNConcentration, CriticalGrainFillingRate, SenescenceDetachmentFraction
        Biomass Live
        Biomass Dead
        PhaseBasedSwitch GrainGrowthPeriod: Start=Flowering; End=EndGrainFill
        PhaseBasedSwitch ReproductivePeriod: Start=Flowering; End=EndGrainFill
        LinearInterpolationFunction RelativeGrainFill: XProperty=[Environment].MeanT
          XYPairs: X=[0, 26, 35]; Y=[0, 1, 1]
        LinearInterpolationFunction RelativeGrainNFill: XProperty=[Environment].MeanT
          XYPairs: X=[0, 25]; Y=[0, 1]
        Constant GrowthStructuralFractionStage: Value=1
        LinearInterpolationFunction DMSenescenceFraction: XProperty=[Leaf].FractionCanopySenescing
          XYPairs: X=[0, 1]; Y=[0, 0]
        StageBasedInterpolation NConcentrationMinimum: Codes=[0, 0, 0, 0, 0.014, 0.014]; Proportional=true
          Stages=[Emergence, EndOfJuvenile, FloralInitiation, Flowering, EndGrainFill, HarvestRipe]
        StageBasedInterpolation NConcentrationMaximum: Codes=[0, 0, 0, 0, 0.03, 0.03]; Proportional=true
          Stages=[Emergence, EndOfJuvenile, FloralInitiation, Flowering, EndGrainFill, HarvestRipe]
        StageBasedInterpolation NConcentrationCritical: Codes=[0, 0, 0, 0, 0.03, 0.03]; Proportional=true
          Stages=[Emergence, EndOfJuvenile, FloralInitiation, Flowering, EndGrainFill, HarvestRipe]
        Live
        Dead
      NStress: N_fact_photo=1.5; N_fact_pheno=100; N_fact_expansion=1; N_fact_grain=1.5
      SWStress
        LinearInterpolationFunction ExpansionFactor: XProperty=[Wheat].SWSupplyDemandRatio
          XYPairs: X=[0.1, 1.1]; Y=[0, 1]
        LinearInterpolationFunction PhenoFactor: XProperty=[Root].SWAvailRatio
          XYPairs: X=[0, 0.16]; Y=[1, 1]
        LinearInterpolationFunction FixationFactor: XProperty=[Root].SWAvailRatio
          XYPairs: X=[0, 0.5, 0.95, 1]; Y=[1, 1, 1, 1]
        LinearInterpolationFunction OxygenDeficitPhotoFactor: XProperty=[Root].WetRootFraction
          XYPairs: X=[0, 0.8, 1]; Y=[1, 1, 1]
        LinearInterpolationFunction PhenoFlowerFactor: XProperty=[Root].SWAvailRatio
          XYPairs: X=[0.2, 0.5, 1]; Y=[1, 1, 1]
        LinearInterpolationFunction PhenoGrainFillingFactor: XProperty=[Root].SWAvailRatio
          XYPairs: X=[0.2, 0.5, 1]; Y=[1, 1, 1]
      LinearInterpolationFunction TempStress: XProperty=[Environment].MeanT
        XYPairs: X=[0, 10, 25, 35]; Y=[0, 1, 1, 0]
      RadiationPartitioning: FractIncidentRadn=1; RadiationPartitioningOrder=[Pod, Grain, Leaf]
      StageBasedInterpolation NFixRate: Codes=[0, 0, 0, 0, 0, 0, 0, 0, 0, 0, 0]; Proportional=false
        Stages=[Sowing, Germination, Emergence, EndOfJuvenile, FloralInitiation, Flowering, StartGrainFill, EndGrainFill, Maturity, HarvestRipe, EndCrop]
      CompositeBiomass AboveGroundLive: Propertys=[[Leaf].Live, [Stem].Live, [Pod].Live, [Grain].Live]
      CompositeBiomass AboveGroundDead: Propertys=[[Leaf].Dead, [Stem].Dead, [Pod].Dead, [Grain].Dead]
      CompositeBiomass BelowGroundLive: Propertys=[[Root].Live]
      CompositeBiomass BelowGroundDead: Propertys=[[Root].Dead]
      CompositeBiomass TotalLive
        Propertys=[[Leaf].Live, [Stem].Live, [Pod].Live, [Grain].Live, [Root].Live]
      CompositeBiomass TotalDead
        Propertys=[[Leaf].Dead, [Stem].Dead, [Pod].Dead, [Grain].Dead, [Root].Dead]
      CompositeBiomass AboveGround
        Propertys=[[Leaf].Live, [Stem].Live, [Pod].Live, [Grain].Live, [Leaf].Dead, [Stem].Dead, [Pod].Dead, [Grain].Dead]
      CompositeBiomass BelowGround: Propertys=[[Root].Live, [Root].Dead]
      CompositeBiomass Total
        Propertys=[[AboveGroundLive], [AboveGroundDead], [BelowGroundLive], [BelowGroundDead]]
      CompositeBiomass Head: Propertys=[[Pod].Live, [Grain].Live, [Pod].Dead, [Grain].Dead]
      CompositeBiomass VegetativeLive: Propertys=[[Leaf].Live, [Stem].Live, [Pod].Live]
      CompositeBiomass VegetativeDead: Propertys=[[Leaf].Dead, [Stem].Dead, [Pod].Dead]
      CompositeBiomass Vegetative
        Propertys=[[Leaf].Live, [Stem].Live, [Pod].Live, [Leaf].Dead, [Stem].Dead, [Pod].Dead]
      StageBasedInterpolation StageCode: Codes=[1, 2, 3, 4, 5, 6, 7, 8, 9, 10, 11]; Proportional=false
        Stages=[Sowing, Germination, Emergence, EndOfJuvenile, FloralInitiation, Flowering, StartGrainFill, EndGrainFill, Maturity, HarvestRipe, EndCrop]
      PlantSpatial1 PlantSpatial
      Environment: CO2=350
      PStress
      Zadok
      Summariser
      Cultivar GattonHartog
        Command:
          [Phenology].Vernalisation.VernSens = 2.5
          [Phenology].Vernalisation.PhotopSens = 3.5
      Cultivar h45
        Command:
          [Phenology].Vernalisation.VernSens = 1.5
          [Phenology].Vernalisation.PhotopSens = 1.5
      Cultivar Rongotea
        Command:
          [Phenology].Vernalisation.VernSens = 2.0
          [Phenology].Vernalisation.PhotopSens = 4.0
          [Grain].MaxGrainSize = 0.047
          [Grain].GrainsPerGramStem = 22
      Cultivar Hartog
        Command:
          [Phenology].Vernalisation.VernSens = 1.5
          [Phenology].Vernalisation.PhotopSens = 3.0
      Cultivar Gamenya
        Command:
          [Phenology].Vernalisation.VernSens = 1.6
          [Phenology].Vernalisation.PhotopSens = 2.0
          [Phenology].FloralInitiationToFlowering.Target.Value = 630.0
      Cultivar Spear
        Command:
          [Phenology].Vernalisation.VernSens = 1.5
          [Phenology].Vernalisation.PhotopSens = 3.5
          [Phenology].FloralInitiationToFlowering.Target.Value = 555.0
          [Grain].GrainsPerGramStem = 20
          [Grain].MaxGrainSize = 0.045
          [Phenology].StartGrainFillToEndGrainFill.Target.Value = 580
      Cultivar Gutha
        Command:
          [Phenology].Vernalisation.VernSens = 1.5
          [Phenology].Vernalisation.PhotopSens = 3.0
          [Grain].GrainsPerGramStem = 20
      Cultivar Wilgoyne
        Command:
          [Phenology].Vernalisation.VernSens = 1.4
          [Phenology].Vernalisation.PhotopSens = 1.8
          [Phenology].FloralInitiationToFlowering.Target.Value = 555.0
          [Grain].GrainsPerGramStem = 20
          [Grain].MaxGrainSize = 0.045
          [Phenology].StartGrainFillToEndGrainFill.Target.Value = 580
  Memo Introduction
    The APSIM Wheat model has been tested on a range of datasets to provide tests across a range of environmental conditions.
  DataStore
    ExcelInput Observed: FileName=%root%\Tests\Wheat\Observed.xlsx; SheetNames=[Observed]
    PredictedObserved: PredictedTableName=Report; ObservedTableName=Observed; FieldNameUsedForMatch=Wheat.Phenology.CurrentStageName
    Input NZObservations: FileName=%root%\Tests\Wheat\RainShelterBiomass.txt
    TimeSeriesStats: TableName=PredictedObserved
  Experiment APS26
    Factors
      Factor NRate: Specifications=[ApplyFertiliser].Script.Amount=0,40,80,160
      Factor Water: Specifications=[IrrigationSchedule]
        Operations Wet
          1995-05-31  [Irrigation].Apply(amount:31);
          1995-06-01  [Irrigation].Apply(amount:13);
          1995-06-02  [Irrigation].Apply(amount:26);
          1995-06-05  [Irrigation].Apply(amount:26);
          1995-06-06  [Irrigation].Apply(amount:26);
          1995-06-07  [Irrigation].Apply(amount:26);
          1995-06-08  [Irrigation].Apply(amount:26);
          1995-06-15  [Wheat].Sow(population:120, cultivar:"GattonHartog", depth:40, rowSpacing:250);
          1995-07-05  [Irrigation].Apply(amount:26);
          1995-07-21  [Irrigation].Apply(amount:14);
          1995-08-01  [Irrigation].Apply(amount:28);
          1995-08-11  [Irrigation].Apply(amount:30);
          1995-08-25  [Irrigation].Apply(amount:15);
          1995-08-31  [Irrigation].Apply(amount:14);
          1995-09-04  [Irrigation].Apply(amount:15);
          1995-09-15  [Irrigation].Apply(amount:25);
          1995-09-22  [Irrigation].Apply(amount:20);
          1995-10-02  [Irrigation].Apply(amount:11);
        Operations Dry
          1995-06-15  [Wheat].Sow(population:120, cultivar:"GattonHartog", depth:40, rowSpacing:250);
    Simulation APS26NRate160WaterWet: Area=0; Slope=0
      Clock: StartDate=1995-06-13; EndDate=1995-10-31
      Summary summaryfile
      Weather: FileName=APS26.met
      Zone paddock: Area=1; Slope=0
        Report
          VariableNames:
            [Clock].Today
            Wheat.Zadok.Stage
            Wheat.Phenology.CurrentStageName
            Wheat.AboveGround.Wt
            Wheat.AboveGround.N
            Wheat.Grain.Yield
            Wheat.Grain.Protein
            Wheat.Grain.Size
            Wheat.Grain.GrainNo
            Wheat.Grain.Wt
            Wheat.Grain.N
            Wheat.Leaf.LAI
            Wheat.Leaf.Live.Wt
            Wheat.Leaf.Live.N
            Wheat.Head.Wt
            Wheat.Head.N
            Wheat.Stem.Live.Wt
            Wheat.Stem.Live.N
            Wheat.Root.RootDepth
            Wheat.EP
            Wheat.SWStress.Photo
            Wheat.SWStress.Expansion
            Wheat.NStress.Photo
            Wheat.NStress.Expansion
            Wheat.Total.Wt
          EventNames:
            [Clock].DoReport
        Irrigation
        Fertiliser
        Manager ApplyFertiliser
          FertDayOfYear = 186
          Amount = 160
```csharp
using System;
using Models.Core;
using Models.PMF;
using APSIM.Shared.Utilities;

namespace Models
{
	[Serializable]
	public class Script : Model
	{
		[Link] Clock Clock;
		[Link] Fertiliser Fertiliser;
		[Link] Summary Summary;
		
		[Description("Day of year fertiliser is to be applied")]
		public int FertDayOfYear { get; set;}

		[Description("Amount of fertiliser to be applied")]
		public double Amount { get; set;}

		[EventSubscribe("DoManagement")]
		private void OnDoManagement(object sender, EventArgs e)
		{
			if (Clock.Today.DayOfYear == FertDayOfYear)
			{
				Fertiliser.Apply(Amount: Amount, Type: Fertiliser.Types.NO3N);
			}
		
		}
		
	}
}
```
        Soil APS26Field: SoilType=APS26Soil; LocalName=APS26Site; Site=APS26Site; NearestTown=Unknown; Region=Lawes; NaturalVegetation=Unknown; Latitude=0; Longitude=0
          Water
            Thickness  BD    AirDry  LL15  DUL   SAT
            150        1.38  0.1     0.2   0.38  0.44
            150        1.38  0.1     0.2   0.38  0.44
            150        1.38  0.1     0.2   0.38  0.44
            150        1.38  0.1     0.2   0.38  0.44
            300        1.46  0.1     0.21  0.38  0.43
            300        1.51  0.1     0.19  0.4   0.42
            300        1.49  0.1     0.14  0.38  0.43
            300        1.47  0.1     0.14  0.38  0.43
            SoilCrop WheatSoil: LL=[0.2, 0.2, 0.2, 0.2, 0.21, 0.19, 0.14, 0.14]; KL=[0.06, 0.06, 0.06, 0.06, 0.06, 0.06, 0.06, 0.06]; XF=[1, 1, 1, 1, 1, 1, 1, 1]
          SoilWater: residueinterception=0; SummerDate=1-Nov; SummerU=6; SummerCona=3.5; WinterDate=1-Apr; WinterU=6; WinterCona=3.5; DiffusConst=88; DiffusSlope=35.4; Salb=0.13; CN2Bare=60; CNRed=20; CNCov=0.8; slope=0; discharge_width=0; catchment_area=0; max_pond=0
            Thickness  SWCON  KLAT
            150        0.3    0
            150        0.3    0
            150        0.3    0
            150        0.3    0
            300        0.3    0
            300        0.3    0
            300        0.3    0
            300        0.3    0
          SoilNitrogen: fom_type=[default, manure, mucuna, lablab, shemp, stable]; fract_carb=[0.2, 0.3, 0.54, 0.57, 0.45, 0]; fract_cell=[0.7, 0.3, 0.37, 0.37, 0.47, 0.1]; fract_lign=[0.1, 0.4, 0.09, 0.06, 0.08, 0.9]; wfpsN2N2O_x=[22, 88]; wfpsN2N2O_y=[0.1, 1]
          SoilOrganicMatter: RootCN=40; RootWt=500; SoilCN=14.5; EnrACoeff=1; EnrBCoeff=1; OCUnits=Total
            Thickness  OC    FBiom  FInert
            150        2.2   0.03   0.4
            150        1.6   0.02   0.6
            150        1.35  0.01   0.7
            150        0.95  0.01   0.5
            300        1     0.01   0.9
            300        0.8   0.01   0.9
            300        0.45  0.01   0.9
            300        0.45  0.01   0.9
          Analysis: Thickness=[150, 150, 150, 150, 300, 300, 300, 300]; PH=[7.5, 8, 8, 8, 8, 8, 8, 8]; PHUnits=Water; BoronUnits=HotWater
          Sample Initial Water: Thickness=[150, 150, 150, 150, 300, 300, 300, 300]; SW=[0.31, 0.36, 0.37, 0.37, 0.35, 0.34, 0.34, 0.28]; NO3Units=ppm; NH4Units=ppm; SWUnits=Volumetric; OCUnits=Total; PHUnits=Water
          Sample Initial Nitrogen: NO3Units=ppm; NH4Units=ppm; SWUnits=Volumetric; OCUnits=Total; PHUnits=Water
            Thickness  NO3  NH4
            150        1.5  1.3
            150        1.8  1
            150        1.5  1
            150        1.5  0.8
            300        0.4  0.8
            300        0.2  0.5
            300        0.4  0.5
            300        0.3  0.5
        SurfaceOrganicMatter: PoolName=wheat_stubble; type=Wheat; mass=0; standing_fraction=0; cpr=0; cnr=80; CriticalResidueWeight=2000; OptimumDecompTemp=20; MaxCumulativeEOS=20; CNRatioDecompCoeff=0.277; CNRatioDecompThreshold=25; TotalLeachRain=25; MinRainToLeach=10; CriticalMinimumOrganicC=0.004; DefaultCPRatio=0; DefaultStandingFraction=0; StandingExtinctCoeff=0.5; FractionFaecesAdded=0.5
          Pools:
            {PoolName=wheat_stubble, ResidueType=Wheat, Mass=0, CNRatio=80, CPRatio=0, StandingFraction=0}
          ResidueTypes: LoadFromResource=ResidueTypes
        Plant15 Wheat: AutoHarvest=true; CropType=Wheat
        Operations IrrigationSchedule: same as APS26.Factors.Water.Wet
        MicroClimate: air_pressure=1010; soil_emissivity=0.96; sun_angle=15; soil_heat_flux_fraction=0.4; night_interception_fraction=0.5; windspeed_default=3; refheight=2; albedo=0.15; emissivity=0.96; gsmax=0.01; r50=200; a_interception=0; b_interception=1; c_interception=0; d_interception=0; soil_albedo=0.3
        PredictedObserved: FieldNameUsedForMatch=Wheat.Zadok.Stage
        Manager Calculations
          NitTot = 27077.4
          CarbonTot = 0
```csharp
using System;
using Models.Core;
using Models.PMF;
using Models.PMF.OilPalm;
using Models.Soils;
using Models.SurfaceOM;
using APSIM.Shared.Utilities;

namespace Models
{
	[Serializable]
	[System.Xml.Serialization.XmlInclude(typeof(Model))]
	public class Script : Model
	{
		[Link] Clock Clock;
		[Link] Soil Soil;
		[Link] SurfaceOrganicMatter SurfaceOM;
		[Link] Summary Summary;
		
	    public double NitTot {get;set;}
	    public double CarbonTot {get;set;}
		
        [EventSubscribe("Commencing")]
        private void OnSimulationCommencing(object sender, EventArgs e)
		{	
			NitTot=0;
			CarbonTot = 0;
		}
		
		
       [EventSubscribe("DoManagement")]
       private void OnDoManagement(object sender, EventArgs e)
		{
			NitTot = MathUtilities.Sum(Soil.SoilNitrogen.TotalN);
			CarbonTot = MathUtilities.Sum(Soil.SoilNitrogen.TotalC);
		}
	}
}
```
  Experiment APS6
    Factors
      Factor NRate: Specifications=[ApplyFertiliser]
        Operations 40
          1992-06-16  [Fertiliser].Apply(Amount: 40, Type: Fertiliser.Types.NO3N);
        Operations 80
          1992-06-16  [Fertiliser].Apply(Amount: 80, Type: Fertiliser.Types.NO3N);
        Operations 120
          1992-06-16  [Fertiliser].Apply(Amount: 60, Type: Fertiliser.Types.NO3N);
          1992-08-05  [Fertiliser].Apply(Amount: 60, Type: Fertiliser.Types.NO3N);
        Operations 160
          1992-06-16  [Fertiliser].Apply(Amount: 40, Type: Fertiliser.Types.NO3N);
          1992-08-05  [Fertiliser].Apply(Amount: 120, Type: Fertiliser.Types.NO3N);
        Operations 360
          1992-06-16  [Fertiliser].Apply(Amount: 120, Type: Fertiliser.Types.NO3N);
          1992-08-05  [Fertiliser].Apply(Amount: 120, Type: Fertiliser.Types.NO3N);
          1992-09-08  [Fertiliser].Apply(Amount: 120, Type: Fertiliser.Types.NO3N);
    Simulation APS6NRate0: Area=0; Slope=0
      Clock: StartDate=1992-06-14; EndDate=1992-11-17
      Summary summaryfile
      Weather: FileName=APS6.met
      Zone paddock: Area=1; Slope=0
        Report
          VariableNames:
            [Clock].Today
            Wheat.Zadok.Stage
            Wheat.Phenology.CurrentStageName
            Wheat.AboveGroundLive.Wt
            Wheat.AboveGroundDead.Wt
            Wheat.AboveGround.Wt
            Wheat.AboveGround.N
            Wheat.Grain.Yield
            Wheat.Grain.Protein
            Wheat.Grain.Size
            Wheat.Grain.GrainNo
            Wheat.Grain.Wt
            Wheat.Grain.N
            Wheat.Leaf.LAI
            Wheat.Leaf.Live.Wt
            Wheat.Leaf.Live.N
            Wheat.Head.Wt
            Wheat.Head.N
            Wheat.Stem.Live.Wt
            Wheat.Stem.Live.N
            Wheat.Root.RootDepth
            Wheat.EP
            Wheat.SWStress.Photo
            Wheat.SWStress.Expansion
            Wheat.NStress.Photo
            Wheat.NStress.Expansion
            Wheat.Total.Wt
          EventNames:
            [Clock].DoReport
        Irrigation
        Fertiliser
        Soil APS6Field: SoilType=APS6Soil; LocalName=APS6Site; Site=APS6Site; NearestTown=Unknown; Region=Lawes; NaturalVegetation=Unknown; Latitude=0; Longitude=0
          Water
            Thickness  BD    AirDry  LL15  DUL   SAT
            150        1.38  0.1     0.2   0.38  0.43
            150        1.34  0.1     0.2   0.38  0.43
            300        1.35  0.1     0.22  0.4   0.43
            300        1.5   0.1     0.18  0.4   0.43
            300        1.49  0.1     0.14  0.39  0.42
            300        1.46  0.1     0.2   0.38  0.4
            300        1.46  0.1     0.2   0.38  0.4
            SoilCrop WheatSoil: LL=[0.2, 0.2, 0.22, 0.18, 0.14, 0.25, 0.28]; KL=[0.06, 0.06, 0.06, 0.06, 0.06, 0.06, 0.06]; XF=[1, 1, 1, 1, 1, 1, 1]
          SoilWater: residueinterception=0; SummerDate=1-Nov; SummerU=6; SummerCona=3.5; WinterDate=1-Apr; WinterU=6; WinterCona=3.5; DiffusConst=88; DiffusSlope=35.4; Salb=0.13; CN2Bare=60; CNRed=20; CNCov=0.8; slope=0; discharge_width=0; catchment_area=0; max_pond=0
            Thickness  SWCON  KLAT
            150        0.3    0
            150        0.3    0
            300        0.3    0
            300        0.3    0
            300        0.3    0
            300        0.3    0
            300        0.3    0
          SoilNitrogen: fom_type=[default, manure, mucuna, lablab, shemp, stable]; fract_carb=[0.2, 0.3, 0.54, 0.57, 0.45, 0]; fract_cell=[0.7, 0.3, 0.37, 0.37, 0.47, 0.1]; fract_lign=[0.1, 0.4, 0.09, 0.06, 0.08, 0.9]; wfpsN2N2O_x=[22, 88]; wfpsN2N2O_y=[0.1, 1]
          SoilOrganicMatter: RootCN=60; RootWt=2000; SoilCN=14.5; EnrACoeff=1; EnrBCoeff=1; OCUnits=Total
            Thickness  OC    FBiom  FInert
            150        2.2   0.03   0.45
            150        1.6   0.02   0.6
            300        1.15  0.01   0.78
            300        1     0.01   0.9
            300        0.8   0.01   0.99
            300        0.45  0.01   0.99
            300        0.45  0.01   0.99
          Analysis: Thickness=[150, 150, 300, 300, 300, 300, 300]; PH=[7.5, 8, 8, 8, 8, 8, 8]; PHUnits=Water; BoronUnits=HotWater
          Sample Initial Water: Thickness=[150, 150, 300, 300, 300, 300, 300]; SW=[0.326, 0.326, 0.346, 0.333, 0.315, 0.326, 0.326]; NO3Units=ppm; NH4Units=ppm; SWUnits=Volumetric; OCUnits=Total; PHUnits=Water
          Sample Initial Nitrogen: NO3Units=ppm; NH4Units=ppm; SWUnits=Volumetric; OCUnits=Total; PHUnits=Water
            Thickness  NO3   NH4
            150        1.3   1.3
            150        0.6   1
            300        0.25  1
            300        0.2   0.8
            300        0.1   0.8
            300        0.1   0.5
            300        0.1   0.5
        SurfaceOrganicMatter: PoolName=wheat_stubble; type=wheat; mass=500; standing_fraction=0; cnr=100; CriticalResidueWeight=2000; OptimumDecompTemp=20; MaxCumulativeEOS=20; CNRatioDecompCoeff=0.277; CNRatioDecompThreshold=25; TotalLeachRain=25; MinRainToLeach=10; CriticalMinimumOrganicC=0.004; DefaultCPRatio=0; DefaultStandingFraction=0; StandingExtinctCoeff=0.5; FractionFaecesAdded=0.5
          Pools:
            {PoolName=wheat_stubble, ResidueType=wheat, Mass=500, CNRatio=100, StandingFraction=0}
          ResidueTypes: LoadFromResource=ResidueTypes
        Plant15 Wheat: AutoHarvest=true; CropType=Wheat
        Operations ApplyFertiliser
          1992-06-16  [Fertiliser].Apply(Amount: 0, Type: Fertiliser.Types.NO3N);
        Operations IrrigationSchedule
          1992-06-17  [Wheat].Sow(population:121.61, cultivar:"GattonHartog", depth:30, rowSpacing:250);
          1992-06-24  [Irrigation].Apply(amount:10);
          1992-06-26  [Irrigation].Apply(amount:10);
          1992-07-28  [Irrigation].Apply(amount:30);
          1992-08-05  [Irrigation].Apply(amount:30);
          1992-08-19  [Irrigation].Apply(amount:40);
          1992-08-26  [Irrigation].Apply(amount:40);
          1992-09-09  [Irrigation].Apply(amount:40);
          1992-09-21  [Irrigation].Apply(amount:40);
          1992-10-01  [Irrigation].Apply(amount:50);
          1992-10-07  [Irrigation].Apply(amount:20);
          1992-10-08  [Irrigation].Apply(amount:20);
          1992-10-09  [Irrigation].Apply(amount:20);
          1992-10-13  [Irrigation].Apply(amount:20);
        MicroClimate: same as APS26.APS26NRate160WaterWet.paddock.MicroClimate
  Experiment APS14
    Factors
      Factor Stubble: Specifications=[OMSchedule]
        Operations Bare
          1993-06-03  [SurfaceOrganicMatter].Incorporate(fraction: 1.0, depth:100);
        Operations Lucerne
          1993-06-03  [SurfaceOrganicMatter].Add(mass: 3560, N: 108.8, P:0.0, type: "lucerne", name: "");
          1993-06-03  [SurfaceOrganicMatter].Incorporate(fraction: 1.0, depth:100);
        Operations Straw
          1993-06-03  [SurfaceOrganicMatter].Add(mass: 3584, N: 28.8, P:0.0, type: "barley", name: "");
          1993-06-03  [SurfaceOrganicMatter].Incorporate(fraction: 1.0, depth:100);
      Factor NRate: Specifications=[FertiliserSchedule]
        Operations 000
          1993-06-18  [Fertiliser].Apply(Amount: 0, Type: Fertiliser.Types.NO3N);
        Operations 040
          1993-06-18  [Fertiliser].Apply(Amount: 40, Type: Fertiliser.Types.NO3N);
        Operations 080
          1993-06-18  [Fertiliser].Apply(Amount: 80, Type: Fertiliser.Types.NO3N);
        Operations 200
          1993-06-18  [Fertiliser].Apply(Amount: 120, Type: Fertiliser.Types.NO3N);
          1993-08-18  [Fertiliser].Apply(Amount: 80, Type: Fertiliser.Types.NO3N);
    Simulation APS14StubbleBareNRate0: Area=0; Slope=0
      Clock: StartDate=1993-06-02; EndDate=1993-11-26
      Summary summaryfile
      Weather: FileName=APS14.met
      Zone paddock: Area=1; Slope=0
        Report
          VariableNames:
            [Clock].Today
            Wheat.Zadok.Stage
            Wheat.Phenology.CurrentStageName
            Wheat.AboveGround.Wt
            Wheat.AboveGround.N
            Wheat.Grain.Yield
            Wheat.Grain.Protein
            Wheat.Grain.Size
            Wheat.Grain.GrainNo
            Wheat.Grain.Wt
            Wheat.Grain.N
            Wheat.Leaf.LAI
            Wheat.Leaf.Live.Wt
            Wheat.Leaf.Live.N
            Wheat.Head.Wt
            Wheat.Head.N
            Wheat.Stem.Live.Wt
            Wheat.Stem.Live.N
            Wheat.Root.RootDepth
            Wheat.EP
            Wheat.SWStress.Photo
            Wheat.SWStress.Expansion
            Wheat.NStress.Photo
            Wheat.NStress.Expansion
            Wheat.Total.Wt
            [ExtraVariables].Script.MineralN
            [ExtraVariables].Script.TotalNO3
            [ExtraVariables].Script.TotalNH4
          EventNames:
            [Clock].DoReport
        Irrigation
        Fertiliser
        Soil APS14Field: SoilType=Clay Loam; LocalName=Gatton; Site=Gatton; NearestTown=Gatton; Region=Lockyer Valley; State=Qld; Country=Australia; NaturalVegetation=Unknown; Latitude=0; Longitude=0
          Water
            Thickness  BD    AirDry  LL15  DUL   SAT
            150        1.38  0.1     0.2   0.38  0.43
            150        1.34  0.2     0.2   0.38  0.43
            150        1.31  0.24    0.24  0.4   0.45
            150        1.4   0.19    0.19  0.41  0.45
            300        1.5   0.18    0.18  0.4   0.43
            300        1.49  0.14    0.14  0.39  0.43
            300        1.46  0.2     0.2   0.38  0.4
            300        1.46  0.2     0.2   0.38  0.4
            SoilCrop WheatSoil: LL=[0.2, 0.2, 0.24, 0.19, 0.18, 0.14, 0.25, 0.28]; KL=[0.06, 0.06, 0.06, 0.05, 0.04, 0.03, 0.02, 0.02]; XF=[1, 1, 1, 1, 1, 1, 1, 1]
          SoilWater: residueinterception=0; SummerDate=1-Nov; SummerU=6; SummerCona=3.5; WinterDate=1-Apr; WinterU=6; WinterCona=3.5; DiffusConst=40; DiffusSlope=16; Salb=0.13; CN2Bare=60; CNRed=20; CNCov=0.8; slope=0; discharge_width=0; catchment_area=0; max_pond=0
            Thickness  SWCON  KLAT
            150        0.3    0
            150        0.3    0
            150        0.3    0
            150        0.3    0
            300        0.3    0
            300        0.3    0
            300        0.3    0
            300        0.3    0
          SoilNitrogen: fom_type=[default, manure, mucuna, lablab, shemp, stable]; fract_carb=[0.2, 0.3, 0.54, 0.57, 0.45, 0]; fract_cell=[0.7, 0.3, 0.37, 0.37, 0.47, 0.1]; fract_lign=[0.1, 0.4, 0.09, 0.06, 0.08, 0.9]; wfpsN2N2O_x=[22, 88]; wfpsN2N2O_y=[0.1, 1]
          SoilOrganicMatter: RootCN=40; RootWt=1500; SoilCN=14.5; EnrACoeff=0; EnrBCoeff=0; OCUnits=Total
            Thickness  OC    FBiom  FInert
            150        2.2   0.02   0.4
            150        1.6   0.02   0.6
            150        1.35  0.01   0.7
            150        0.95  0.01   0.8
            300        1     0.01   0.9
            300        0.8   0.01   0.9
            300        0.45  0.01   0.9
            300        0.45  0.01   0.9
          Analysis: Thickness=[150, 150, 150, 150, 300, 300, 300, 300]; PH=[7.5, 8, 8, 8, 8, 8, 8, 8]; PHUnits=Water; BoronUnits=HotWater
          Sample Initial Water: Thickness=[150, 150, 150, 150, 300, 300, 300, 300]; SW=[0.336, 0.336, 0.302, 0.302, 0.319, 0.345, 0.294, 0.264]; NO3Units=ppm; NH4Units=ppm; SWUnits=Volumetric; OCUnits=Total; PHUnits=Water
          Sample Initial Nitrogen: NO3Units=ppm; NH4Units=ppm; SWUnits=Volumetric; OCUnits=Total; PHUnits=Water
            Thickness  NO3  NH4
            150        2    0.3
            150        0.5  0.3
            150        0.2  0.2
            150        0.2  0.1
            300        0.2  0.1
            300        0.2  0.1
            300        0.2  0.1
            300        0.2  0.1
        SurfaceOrganicMatter: PoolName=wheat_stubble; type=Wheat; mass=500; standing_fraction=0; cpr=0; cnr=120; CriticalResidueWeight=2000; OptimumDecompTemp=20; MaxCumulativeEOS=20; CNRatioDecompCoeff=0.277; CNRatioDecompThreshold=25; TotalLeachRain=25; MinRainToLeach=10; CriticalMinimumOrganicC=0.004; DefaultCPRatio=0; DefaultStandingFraction=0; StandingExtinctCoeff=0.5; FractionFaecesAdded=0.5
          Pools:
            {PoolName=wheat_stubble, ResidueType=Wheat, Mass=500, CNRatio=120, CPRatio=0, StandingFraction=0}
          ResidueTypes: LoadFromResource=ResidueTypes
        Plant15 Wheat: AutoHarvest=true; CropType=Wheat
        Operations IrrigationSchedule
          1993-06-04  [Irrigation].Apply(amount:14);
          1993-06-18  [Irrigation].Apply(amount:26);
          1993-06-23  [Irrigation].Apply(amount:13);
          1993-07-09  [Irrigation].Apply(amount:25);
          1993-07-22  [Irrigation].Apply(amount:20);
          1993-08-06  [Irrigation].Apply(amount:31);
          1993-08-18  [Irrigation].Apply(amount:36);
          1993-08-27  [Irrigation].Apply(amount:38);
          1993-09-06  [Irrigation].Apply(amount:33);
          1993-09-24  [Irrigation].Apply(amount:35);
          1993-10-01  [Irrigation].Apply(amount:36);
        MicroClimate: same as APS26.APS26NRate160WaterWet.paddock.MicroClimate
        Operations FertiliserSchedule
          1993-06-18  [Fertiliser].Apply(Amount: 0, Type: Fertiliser.Types.NO3N);
        Operations OMSchedule
          1993-06-03  [SurfaceOrganicMatter].Add(mass: 0, N: 0, P:0.0, type: "wheat", name: "");
          1993-06-03  [SurfaceOrganicMatter].Incorporate(fraction: 1.0, depth:100);
        Operations SowingSchedule
          1993-06-29  [Wheat].Sow(population:114, cultivar:"GattonHartog", depth:30, rowSpacing:250);
        PredictedObserved: FieldNameUsedForMatch=Wheat.Zadok.Stage
        Manager ExtraVariables
```csharp
        using System;
        using Models.Core;
		using System.Collections.Generic;
        using System.Text;
        using Models.PMF.OldPlant;
        using Models.PMF;
        using Models.Soils;
        using Models;
        using System.Xml.Serialization;
        using APSIM.Shared.Utilities;

        namespace Models
        {
[Serializable] 
public class Script : Model
{      
[Link] Clock Clock;
[Link] Soils.Soil Soil;
[Link] Models.SurfaceOM.SurfaceOrganicMatter SOM;
[Link] Plant15 Plant;          
[Link] Weather Met;   
[Link] Fertiliser Fert;
[Link] Irrigation Irrig;  
               
[XmlIgnore] public bool InitialDay { get; set; }

[XmlIgnore] public double AccumPlantN { get; set; }
[XmlIgnore] public double AccumMineralisation { get; set; }
[XmlIgnore] public double AccumDenit { get; set; }
[XmlIgnore] public double AccumFert { get; set; }
[XmlIgnore] public double AccumLeach { get; set; }
[XmlIgnore] public double AccumDetach { get; set; }
[XmlIgnore] public double DeltaSoilOMN { get; set; }
[XmlIgnore] public double DeltaSurfaceOMN { get; set; }
[XmlIgnore] public double DeltaSoilMineralN { get; set; }
[XmlIgnore] public double SoilNitrogenContent { get; set; }

[XmlIgnore] public double AccumEO { get; set; }
[XmlIgnore] public double AccumEP { get; set; }
[XmlIgnore] public double AccumES { get; set; }
[XmlIgnore] public double AccumDrainage { get; set; }
[XmlIgnore] public double AccumRunoff { get; set; }
[XmlIgnore] public double AccumOutflowLat { get; set; }
[XmlIgnore] public double AccumIrrigation { get; set; }
[XmlIgnore] public double AccumRainfall { get; set; }
[XmlIgnore] public double SoilWaterDeficit { get; set; }

[XmlIgnore] public double AccumTtemerg { get; set; }

[XmlIgnore] public double  InitialSoilOMN { get; set; }
[XmlIgnore] public double  InitialSurfaceOMN { get; set; }
[XmlIgnore] public double  InitialMineralN { get; set; }

[XmlIgnore] public double SWC { get; set; }
[XmlIgnore] public double DUL { get; set; }
[XmlIgnore] public double OutFlowLat { get; set; }
[XmlIgnore] public double MineralN {get; set;}
[XmlIgnore] public double TotalNO3 {get; set;}
[XmlIgnore] public double TotalNH4 {get; set;}

[EventSubscribe("Initialised")]
private void OnInitialised(object sender, EventArgs e)
{
InitialDay = true;
AccumPlantN = 0;
AccumMineralisation = 0;
AccumDenit = 0;
AccumFert = 0;
AccumLeach = 0;
AccumDetach = 0;
DeltaSoilOMN = 0;
DeltaSurfaceOMN = 0;
DeltaSoilMineralN = 0;
SoilNitrogenContent = 0;

AccumEO = 0;
AccumEP = 0;
AccumES = 0;
AccumDrainage = 0;
AccumRunoff = 0;
AccumOutflowLat = 0;
AccumIrrigation = 0;
AccumRainfall = 0;
SoilWaterDeficit = 0;

AccumTtemerg = 0;

SWC = 0;
DUL = 0;
}	   

[EventSubscribe("DoManagementCalculations")]
private void OnDoManagementCalculations(object sender, EventArgs e)
{
	int layers = Soil.Thickness.Length;
    if (InitialDay)
	{
      InitialSurfaceOMN = SOM.N;
      for (int layer = 0; layer < layers; layer++)
      { 
      InitialSoilOMN += (Soil.SoilNitrogen.MicrobialN[layer] + Soil.SoilNitrogen.FOMN[layer] + Soil.SoilNitrogen.HumicN[layer]);
      InitialMineralN += (Soil.NO3N[layer] + Soil.NH4N[layer] + Soil.SoilNitrogen.urea[layer]);
      }
      InitialDay = false;
    }

//!!!!!! Nitrogen balance components !!!!!!
//!!!!!!^^^^^^^^^^^^^^^^^^^^^^^^^^^^^!!!!!!
//AccumPlantN -= (double)this.Get("[Plant].Root.NUptake");
AccumFert += Fert.NitrogenApplied;
DeltaSurfaceOMN = SOM.N - InitialSurfaceOMN;
AccumDetach = 0; //plant2 doesn't detach yet
MineralN = 0;
TotalNO3 = 0;
TotalNH4 = 0;
double OrganicN = 0;
//AccumLeach = AccumLeach - Soil.SoilNitrogen.leach_urea - Soil.SoilNitrogen.leach_no3 - Soil.SoilNitrogen.leach_nh4; //Fails
   for (int layer = 0; layer < layers; layer++)
    { 
    AccumMineralisation += (Soil.SoilNitrogen.MineralisedN[layer] + Soil.SoilNitrogen.dlt_n_min_res[layer]);
    AccumDenit -= MathUtilities.Sum(Soil.SoilNitrogen.Denitrification);
    OrganicN += (Soil.SoilNitrogen.MicrobialN[layer] + Soil.SoilNitrogen.FOMN[layer] + Soil.SoilNitrogen.HumicN[layer]);
    MineralN += (Soil.NO3N[layer] + Soil.NH4N[layer] + Soil.SoilNitrogen.urea[layer]);
    TotalNO3 += Soil.NO3N[layer];
    TotalNH4 += Soil.NH4N[layer];
    }
DeltaSoilOMN = OrganicN - InitialSoilOMN;
DeltaSoilMineralN = MineralN - InitialMineralN;
SoilNitrogenContent = MineralN;
//!!!!!! Water balance components !!!!!!
//!!!!!!^^^^^^^^^^^^^^^^^^^^^^^^^^!!!!!!
AccumEO -= Soil.SoilWater.Eo;
//AccumEP -= (double)this.Get("[Plant].Leaf.Transpiration");
AccumES -= Soil.SoilWater.Es; 
AccumDrainage -= Soil.SoilWater.Drainage; 
AccumRunoff -= Soil.SoilWater.Runoff; 
AccumIrrigation += Irrig.IrrigationApplied; 
AccumRainfall += Met.Rain;
SWC = 0;
DUL = 0;
double OutFlowLat = 0;
   for (int layer = 0; layer < layers; layer++)
   {
     SWC += Soil.SoilWater.SWmm[layer];
     DUL += Soil.SoilWater.DULmm[layer];
     OutFlowLat = Soil.SoilWater.outflow_lat[layer];
   }
AccumOutflowLat -= OutFlowLat;
SoilWaterDeficit =  (SWC - DUL);
}

[EventSubscribe("DoManagement")]
private void OnDoManagement(object sender, EventArgs e)
{
//!!!!!! Thermal time calculation !!!!!!
//!!!!!! ^^^^^^^^^^^^^^^^^^^^^^^^ !!!!!!

}
}
}
```
  Experiment Mer86
    Factors
      Factor NRate: Specifications=[FertiliserOperations]
        Operations 15
          1986-06-14  [Fertiliser].Apply(Amount: 15, Type: Fertiliser.Types.NO3N, Depth: 50);
        Operations 60
          1986-05-29  [Fertiliser].Apply(Amount: 30, Type: Fertiliser.Types.NO3N, Depth: 50);
      Factor Water: Specifications=[IrrigationOperations]
        Operations Dry
          1986-09-03  [Irrigation].Apply (amount:0);
          1986-09-05  [Irrigation].Apply (amount:0);
          1986-09-10  [Irrigation].Apply (amount:0);
          1986-09-11  [Irrigation].Apply (amount:0);
          1986-09-14  [Irrigation].Apply (amount:0);
          1986-09-16  [Irrigation].Apply (amount:0);
          1986-09-18  [Irrigation].Apply (amount:0);
          1986-09-21  [Irrigation].Apply (amount:0);
          1986-09-23  [Irrigation].Apply (amount:0);
          1986-09-24  [Irrigation].Apply (amount:0);
          1986-09-30  [Irrigation].Apply (amount:0);
          1986-10-02  [Irrigation].Apply (amount:0);
          1986-10-04  [Irrigation].Apply (amount:0);
          1986-10-10  [Irrigation].Apply (amount:0);
          1986-10-12  [Irrigation].Apply (amount:0);
          1986-10-14  [Irrigation].Apply (amount:0);
          1986-10-16  [Irrigation].Apply (amount:0);
          1986-10-18  [Irrigation].Apply (amount:0);
          1986-10-20  [Irrigation].Apply (amount:0);
          1986-10-22  [Irrigation].Apply (amount:0);
          1986-10-25  [Irrigation].Apply (amount:0);
          1986-10-26  [Irrigation].Apply (amount:0);
          1986-10-28  [Irrigation].Apply (amount:0);
          1986-10-30  [Irrigation].Apply (amount:0);
          1986-11-01  [Irrigation].Apply (amount:0);
          1986-11-03  [Irrigation].Apply (amount:0);
          1986-11-05  [Irrigation].Apply (amount:0);
          1986-11-07  [Irrigation].Apply (amount:0);
        Operations Wet
          1986-09-03  [Irrigation].Apply (amount:10);
          1986-09-05  [Irrigation].Apply (amount:20);
          1986-09-10  [Irrigation].Apply (amount:20);
          1986-09-11  [Irrigation].Apply (amount:10);
          1986-09-14  [Irrigation].Apply (amount:10);
          1986-09-16  [Irrigation].Apply (amount:10);
          1986-09-18  [Irrigation].Apply (amount:10);
          1986-09-21  [Irrigation].Apply (amount:10);
          1986-09-23  [Irrigation].Apply (amount:10);
          1986-09-24  [Irrigation].Apply (amount:20);
          1986-09-30  [Irrigation].Apply (amount:30);
          1986-10-02  [Irrigation].Apply (amount:20);
          1986-10-04  [Irrigation].Apply (amount:20);
          1986-10-10  [Irrigation].Apply (amount:20);
          1986-10-12  [Irrigation].Apply (amount:20);
          1986-10-14  [Irrigation].Apply (amount:20);
          1986-10-16  [Irrigation].Apply (amount:20);
          1986-10-18  [Irrigation].Apply (amount:20);
          1986-10-20  [Irrigation].Apply (amount:20);
          1986-10-22  [Irrigation].Apply (amount:20);
          1986-10-25  [Irrigation].Apply (amount:20);
          1986-10-26  [Irrigation].Apply (amount:20);
          1986-10-28  [Irrigation].Apply (amount:20);
          1986-10-30  [Irrigation].Apply (amount:20);
          1986-11-01  [Irrigation].Apply (amount:20);
          1986-11-03  [Irrigation].Apply (amount:20);
          1986-11-05  [Irrigation].Apply (amount:20);
          1986-11-07  [Irrigation].Apply (amount:20);
    Simulation Base: Area=0; Slope=0
      Clock: StartDate=1986-05-01; EndDate=1986-11-30
      Summary summaryfile
      Weather: FileName=MER-86.met
      Zone paddock: Area=1; Slope=0
        Report: EventNames=[Clock].DoReport
          VariableNames:
            [Clock].Today
            Wheat.Zadok.Stage
            Wheat.Phenology.CurrentStageName
            Wheat.AboveGround.Wt
            Wheat.AboveGround.N
            Wheat.Grain.Yield
            Wheat.Grain.Protein
            Wheat.Grain.Size
            Wheat.Grain.GrainNo
            Wheat.Grain.Wt
            Wheat.Grain.N
            Wheat.Leaf.LAI
            Wheat.Leaf.Live.Wt
            Wheat.Leaf.Live.N
            Wheat.Head.Wt
            Wheat.Head.N
            Wheat.Stem.Live.Wt
            Wheat.Stem.Live.N
            Wheat.Root.RootDepth
            Wheat.EP
            Wheat.SWStress.Photo
            Wheat.SWStress.Expansion
            Wheat.NStress.Photo
            Wheat.NStress.Expansion
            Wheat.Total.Wt
        Soil MER-86Field: SoilType=sand; LocalName=Merredin; Site=Merredin; NearestTown=Unknown; Region=WA; NaturalVegetation=Unknown; Latitude=0; Longitude=0
          Water
            Thickness  BD    AirDry  LL15  DUL   SAT
            100        1.7   0.03    0.03  0.16  0.26
            100        1.75  0.03    0.03  0.21  0.26
            100        1.8   0.03    0.03  0.22  0.25
            100        1.85  0.04    0.05  0.23  0.24
            100        1.85  0.04    0.1   0.22  0.23
            100        1.85  0.04    0.12  0.22  0.22
            100        1.85  0.04    0.17  0.22  0.22
            200        1.85  0.04    0.17  0.22  0.23
            200        1.85  0.04    0.17  0.22  0.23
            200        1.85  0.04    0.17  0.22  0.23
            SoilCrop WheatSoil
              LL=[0.03, 0.03, 0.03, 0.05, 0.1, 0.12, 0.17, 0.17, 0.17, 0.17]
              KL=[0.06, 0.06, 0.06, 0.06, 0.06, 0.06, 0.06, 0.06, 0.06, 0.06]
              XF=[0.2, 0.6, 0.6, 0.6, 0.6, 0.6, 0.6, 0.6, 0.6, 0.6]
          SoilWater: residueinterception=0; SummerDate=1-Nov; SummerU=6; SummerCona=2; WinterDate=1-Apr; WinterU=6; WinterCona=2; DiffusConst=88; DiffusSlope=35; Salb=0.13; CN2Bare=60; CNRed=20; CNCov=0.8; slope=0; discharge_width=0; catchment_area=0; max_pond=0
            Thickness  SWCON  KLAT
            100        1      0
            100        1      0
            100        1      0
            100        1      0
            100        0.3    0
            100        1      0
            100        1      0
            200        1      0
            200        1      0
            200        1      0
          SoilNitrogen: fom_type=[default, manure, mucuna, lablab, shemp, stable]; fract_carb=[0.2, 0.3, 0.54, 0.57, 0.45, 0]; fract_cell=[0.7, 0.3, 0.37, 0.37, 0.47, 0.1]; fract_lign=[0.1, 0.4, 0.09, 0.06, 0.08, 0.9]; wfpsN2N2O_x=[22, 88]; wfpsN2N2O_y=[0.1, 1]
          SoilOrganicMatter: RootCN=40; RootWt=1000; SoilCN=13; EnrACoeff=1; EnrBCoeff=1; OCUnits=Total
            Thickness  OC    FBiom  FInert
            100        0.5   0.04   0.1
            100        0.1   0.03   0.1
            100        0.1   0.02   0.2
            100        0.05  0.01   0.8
            100        0.05  0.01   0.9
            100        0.05  0.01   0.9
            100        0.05  0.01   0.9
            200        0.05  0.01   0.9
            200        0.05  0.01   0.9
            200        0.05  0.01   0.9
          Analysis: Thickness=[100, 100, 100, 100, 100, 100, 100, 200, 200, 200]; PH=[4.7, 4.7, 4.7, 6, 6, 6, 6, 6, 6, 6]; PHUnits=Water; BoronUnits=HotWater
          Sample Initial Water: Thickness=[100, 100, 100, 100, 100, 100, 100, 200, 200, 200]; SW=[0.03, 0.03, 0.07, 0.1, 0.22, 0.22, 0.22, 0.22, 0.21, 0.19]; NO3Units=ppm; NH4Units=ppm; SWUnits=Volumetric; OCUnits=Total; PHUnits=Water
          Sample Initial Nitrogen: NO3Units=ppm; NH4Units=ppm; SWUnits=Volumetric; OCUnits=Total; PHUnits=Water
            Thickness  NO3  NH4
            100        10   5
            100        5    3
            100        0.3  1
            100        0    0
            100        0    0
            100        0    0
            100        0    0
            200        0    0
            200        0    0
            200        0    0
        Irrigation
        SurfaceOrganicMatter: PoolName=wheat_stubble; type=wheat; mass=0; standing_fraction=0; cpr=0; cnr=80; CriticalResidueWeight=2000; OptimumDecompTemp=20; MaxCumulativeEOS=20; CNRatioDecompCoeff=0.277; CNRatioDecompThreshold=25; TotalLeachRain=25; MinRainToLeach=10; CriticalMinimumOrganicC=0.004; DefaultCPRatio=0; DefaultStandingFraction=0; StandingExtinctCoeff=0.5; FractionFaecesAdded=0.5
          Pools:
            {PoolName=wheat_stubble, ResidueType=wheat, Mass=0, CNRatio=80, CPRatio=0, StandingFraction=0}
          ResidueTypes: LoadFromResource=ResidueTypes
        Operations SowingOperations
          1986-05-29  [Wheat].Sow(population:149, cultivar:"Gutha", depth:30, rowSpacing:250);
        Plant15 Wheat: AutoHarvest=true; CropType=Wheat
        MicroClimate: same as APS26.APS26NRate160WaterWet.paddock.MicroClimate
        Fertiliser
        Operations FertiliserOperations
          1986-06-14  [Fertiliser].Apply(Amount: 15, Type: Fertiliser.Types.NO3N, Depth: 50);
        Operations IrrigationOperations: same as Mer86.Factors.Water.Wet
        MicroClimate: same as APS26.APS26NRate160WaterWet.paddock.MicroClimate
  Experiment Mer73
    Factors
      Factor NRate: Specifications=[FertiliserOperations]
        Operations 0
          1986-06-14  [Fertiliser].Apply(Amount: 0, Type: Fertiliser.Types.NO3N, Depth: 50);
        Operations 15
          1973-06-21  [Fertiliser].Apply(Amount: 15, Type: Fertiliser.Types.NO3N, Depth: 50);
      Factor Water: Specifications=[IrrigationOperations]
        Operations Dry: same as Mer86.Factors.Water.Dry
        Operations 40
          1973-09-21  [Irrigation].Apply (amount:40);
        Operations 150
          1973-08-28  [Irrigation].Apply (amount:20);
          1973-09-21  [Irrigation].Apply (amount:30);
          1973-10-12  [Irrigation].Apply (amount:50);
          1973-10-28  [Irrigation].Apply (amount:50);
    Simulation Base: Area=0; Slope=0
      Clock: StartDate=1973-05-01; EndDate=1973-11-30
      Summary summaryfile
      Weather: FileName=MER-73.met
      Zone paddock: Area=1; Slope=0
        Report: EventNames=[Clock].DoReport
          VariableNames:
            [Clock].Today
            Wheat.Zadok.Stage
            Wheat.Phenology.CurrentStageName
            Wheat.AboveGround.Wt
            Wheat.AboveGround.N
            Wheat.Grain.Yield
            Wheat.Grain.Protein
            Wheat.Grain.Size
            Wheat.Grain.GrainNo
            Wheat.Grain.Wt
            Wheat.Grain.N
            Wheat.Leaf.LAI
            Wheat.Leaf.Live.Wt
            Wheat.Leaf.Live.N
            Wheat.Head.Wt
            Wheat.Head.N
            Wheat.Stem.Live.Wt
            Wheat.Stem.Live.N
            Wheat.Root.RootDepth
            Wheat.EP
            Wheat.SWStress.Photo
            Wheat.SWStress.Expansion
            Wheat.NStress.Photo
            Wheat.NStress.Expansion
            Wheat.Total.Wt
            [ExtraVariables].Script.MineralN
            [ExtraVariables].Script.TotalNO3
            [ExtraVariables].Script.TotalNH4
        Soil MER-73Field: SoilType=sand; LocalName=Merredin; Site=Merredin; NearestTown=Unknown; Region=WA; NaturalVegetation=Unknown; Latitude=0; Longitude=0
          Water
            Thickness  BD    AirDry  LL15  DUL   SAT
            100        1.7   0.03    0.03  0.15  0.28
            100        1.85  0.03    0.04  0.2   0.27
            100        1.75  0.03    0.04  0.2   0.27
            100        1.7   0.04    0.05  0.2   0.25
            100        1.7   0.04    0.05  0.21  0.25
            100        1.85  0.04    0.08  0.21  0.25
            100        1.95  0.04    0.11  0.21  0.25
            200        2     0.04    0.14  0.21  0.23
            200        2     0.04    0.16  0.23  0.23
            200        2     0.04    0.14  0.23  0.23
            SoilCrop WheatSoil
              LL=[0.03, 0.03, 0.03, 0.05, 0.1, 0.12, 0.17, 0.17, 0.17, 0.17]
              KL=[0.06, 0.06, 0.06, 0.06, 0.06, 0.06, 0.06, 0.06, 0.06, 0.06]
              XF=[0.2, 0.2, 0.4, 0.4, 0.4, 0.4, 0.4, 0.4, 0.2, 0]
          SoilWater: residueinterception=0; SummerDate=1-Nov; SummerU=6; SummerCona=2; WinterDate=1-Apr; WinterU=6; WinterCona=2; DiffusConst=88; DiffusSlope=35; Salb=0.13; CN2Bare=60; CNRed=20; CNCov=0.8; slope=0; discharge_width=0; catchment_area=0; max_pond=0
            Thickness  SWCON  KLAT
            100        1      0
            100        1      0
            100        1      0
            100        1      0
            100        0.1    0
            100        1      0
            100        1      0
            200        1      0
            200        1      0
            200        1      0
          SoilNitrogen: fom_type=[default, manure, mucuna, lablab, shemp, stable]; fract_carb=[0.2, 0.3, 0.54, 0.57, 0.45, 0]; fract_cell=[0.7, 0.3, 0.37, 0.37, 0.47, 0.1]; fract_lign=[0.1, 0.4, 0.09, 0.06, 0.08, 0.9]; wfpsN2N2O_x=[22, 88]; wfpsN2N2O_y=[0.1, 1]
            oc=[1.2033, 0.792285, 0.299009, 0.0513806, 0.0510005, 0.0506757, 0.0504969, 0.0501203, 0.0500588, 0.05002]
          SoilOrganicMatter: RootCN=20; RootWt=1500; SoilCN=13; EnrACoeff=1; EnrBCoeff=1; OCUnits=Total
            Thickness  OC    FBiom  FInert
            100        1.2   0.04   0.1
            100        0.8   0.03   0.1
            100        0.3   0.02   0.2
            100        0.05  0.01   0.8
            100        0.05  0.01   0.9
            100        0.05  0.01   0.9
            100        0.05  0.01   0.9
            200        0.05  0.01   0.9
            200        0.05  0.01   0.9
            200        0.05  0.01   0.9
          Analysis: Thickness=[100, 100, 100, 100, 100, 100, 100, 200, 200, 200]; PH=[4.7, 4.7, 4.7, 6, 6, 6, 6, 6, 6, 6]; PHUnits=Water; BoronUnits=HotWater
          Sample Initial Water: Thickness=[100, 100, 100, 100, 100, 100, 100, 200, 200, 200]; SW=[0.03, 0.03, 0.07, 0.1, 0.22, 0.22, 0.22, 0.22, 0.21, 0.19]; NO3Units=ppm; NH4Units=ppm; SWUnits=Volumetric; OCUnits=Total; PHUnits=Water
          Sample Initial Nitrogen: NO3Units=ppm; NH4Units=ppm; SWUnits=Volumetric; OCUnits=Total; PHUnits=Water
            Thickness  NO3  NH4
            100        2    1
            100        1    0
            100        0    0
            100        0    0
            100        0    0
            100        0    0
            100        0    0
            200        0    0
            200        0    0
            200        0    0
        Irrigation
        SurfaceOrganicMatter: PondActive=no; ReportAdditions=no; ReportRemovals=no; PoolName=wheat_stubble; type=wheat; mass=2500; standing_fraction=0; cpr=0; cnr=30; CriticalResidueWeight=2000; OptimumDecompTemp=20; MaxCumulativeEOS=20; CNRatioDecompCoeff=0.277; CNRatioDecompThreshold=25; TotalLeachRain=25; MinRainToLeach=10; CriticalMinimumOrganicC=0.004; DefaultCPRatio=0; DefaultStandingFraction=0; StandingExtinctCoeff=0.5; FractionFaecesAdded=0.5
          Pools:
            {PoolName=wheat_stubble, ResidueType=wheat, Mass=2500, CNRatio=30, CPRatio=0, StandingFraction=0}
          ResidueTypes: LoadFromResource=ResidueTypes
          TillageTypes TillageTypesList
        Operations SowingOperations
          1973-06-21  [Wheat].Sow(population:100, cultivar:"Gamenya", depth:30, rowSpacing:250);
        Plant15 Wheat: AutoHarvest=true; CropType=Wheat
        MicroClimate: same as APS26.APS26NRate160WaterWet.paddock.MicroClimate
        Fertiliser
        Operations FertiliserOperations
          1986-06-14  [Fertiliser].Apply(Amount: 15, Type: Fertiliser.Types.NO3N, Depth: 50);
        Operations IrrigationOperations: same as Mer86.Factors.Water.Wet
        Manager ExtraVariables: same as APS14.APS14StubbleBareNRate0.paddock.ExtraVariables
  Experiment RainShelter
    Factors
      Factor Irrig: Specifications=[IrrigationEvents]
        Operations Control
          1991-08-30  [Irrigation].Apply(20);
          1991-09-08  [Irrigation].Apply(12);
          1991-09-13  [Irrigation].Apply(22);
          1991-09-20  [Irrigation].Apply(14);
          1991-10-04  [Irrigation].Apply(27);
          1991-10-11  [Irrigation].Apply(18);
          1991-10-18  [Irrigation].Apply(30);
          1991-10-25  [Irrigation].Apply(42);
          1991-11-01  [Irrigation].Apply(33);
          1991-11-08  [Irrigation].Apply(24);
          1991-11-15  [Irrigation].Apply(28);
          1991-11-22  [Irrigation].Apply(37);
          1991-11-28  [Irrigation].Apply(51);
          1991-12-06  [Irrigation].Apply(36);
          1991-12-13  [Irrigation].Apply(38);
          1991-12-20  [Irrigation].Apply(35);
          1991-12-27  [Irrigation].Apply(47);
          1992-01-04  [Irrigation].Apply(40);
          1992-01-10  [Irrigation].Apply(41);
        Operations SpringD1
          1991-08-30  [Irrigation].Apply(0);
          1991-09-08  [Irrigation].Apply(0);
          1991-09-13  [Irrigation].Apply(0);
          1991-09-20  [Irrigation].Apply(0);
          1991-10-04  [Irrigation].Apply(0);
          1991-10-11  [Irrigation].Apply(18);
          1991-10-18  [Irrigation].Apply(30);
          1991-10-25  [Irrigation].Apply(42);
          1991-11-01  [Irrigation].Apply(33);
          1991-11-08  [Irrigation].Apply(24);
          1991-11-15  [Irrigation].Apply(28);
          1991-11-22  [Irrigation].Apply(37);
          1991-11-28  [Irrigation].Apply(51);
          1991-12-06  [Irrigation].Apply(36);
          1991-12-13  [Irrigation].Apply(38);
          1991-12-20  [Irrigation].Apply(35);
          1991-12-27  [Irrigation].Apply(47);
          1992-01-04  [Irrigation].Apply(40);
          1992-01-10  [Irrigation].Apply(41);
        Operations SpringD2
          1991-08-30  [Irrigation].Apply(0);
          1991-09-08  [Irrigation].Apply(0);
          1991-09-13  [Irrigation].Apply(0);
          1991-09-20  [Irrigation].Apply(0);
          1991-10-04  [Irrigation].Apply(0);
          1991-10-11  [Irrigation].Apply(0);
          1991-10-18  [Irrigation].Apply(0);
          1991-10-25  [Irrigation].Apply(42);
          1991-11-01  [Irrigation].Apply(33);
          1991-11-08  [Irrigation].Apply(24);
          1991-11-15  [Irrigation].Apply(28);
          1991-11-22  [Irrigation].Apply(37);
          1991-11-28  [Irrigation].Apply(51);
          1991-12-06  [Irrigation].Apply(36);
          1991-12-13  [Irrigation].Apply(38);
          1991-12-20  [Irrigation].Apply(35);
          1991-12-27  [Irrigation].Apply(47);
          1992-01-04  [Irrigation].Apply(40);
          1992-01-10  [Irrigation].Apply(41);
        Operations SpringD3
          1991-08-30  [Irrigation].Apply(20);
          1991-09-08  [Irrigation].Apply(0);
          1991-09-13  [Irrigation].Apply(0);
          1991-09-20  [Irrigation].Apply(0);
          1991-10-04  [Irrigation].Apply(0);
          1991-10-11  [Irrigation].Apply(0);
          1991-10-18  [Irrigation].Apply(0);
          1991-10-25  [Irrigation].Apply(0);
          1991-11-01  [Irrigation].Apply(0);
          1991-11-08  [Irrigation].Apply(0);
          1991-11-15  [Irrigation].Apply(0);
          1991-11-22  [Irrigation].Apply(37);
          1991-11-28  [Irrigation].Apply(51);
          1991-12-06  [Irrigation].Apply(36);
          1991-12-13  [Irrigation].Apply(38);
          1991-12-20  [Irrigation].Apply(35);
          1991-12-27  [Irrigation].Apply(47);
          1992-01-04  [Irrigation].Apply(40);
          1992-01-10  [Irrigation].Apply(41);
        Operations SpringD4
          1991-08-30  [Irrigation].Apply(20);
          1991-09-08  [Irrigation].Apply(12);
          1991-09-13  [Irrigation].Apply(24);
          1991-09-20  [Irrigation].Apply(14);
          1991-10-04  [Irrigation].Apply(0);
          1991-10-11  [Irrigation].Apply(0);
          1991-10-18  [Irrigation].Apply(0);
          1991-10-25  [Irrigation].Apply(0);
          1991-11-01  [Irrigation].Apply(0);
          1991-11-08  [Irrigation].Apply(0);
          1991-11-15  [Irrigation].Apply(0);
          1991-11-22  [Irrigation].Apply(0);
          1991-11-28  [Irrigation].Apply(0);
          1991-12-06  [Irrigation].Apply(0);
          1991-12-13  [Irrigation].Apply(0);
          1991-12-20  [Irrigation].Apply(35);
          1991-12-27  [Irrigation].Apply(47);
          1992-01-04  [Irrigation].Apply(40);
          1992-01-10  [Irrigation].Apply(41);
        Operations SummerD1
          1991-08-30  [Irrigation].Apply(20);
          1991-09-08  [Irrigation].Apply(12);
          1991-09-13  [Irrigation].Apply(24);
          1991-09-20  [Irrigation].Apply(14);
          1991-10-04  [Irrigation].Apply(0);
          1991-10-11  [Irrigation].Apply(0);
          1991-10-18  [Irrigation].Apply(0);
          1991-10-25  [Irrigation].Apply(0);
          1991-11-01  [Irrigation].Apply(0);
          1991-11-08  [Irrigation].Apply(0);
          1991-11-15  [Irrigation].Apply(0);
          1991-11-22  [Irrigation].Apply(0);
          1991-11-28  [Irrigation].Apply(0);
          1991-12-06  [Irrigation].Apply(0);
          1991-12-13  [Irrigation].Apply(0);
          1991-12-20  [Irrigation].Apply(0);
          1991-12-27  [Irrigation].Apply(0);
          1992-01-04  [Irrigation].Apply(0);
          1992-01-10  [Irrigation].Apply(0);
        Operations SummerD2
          1991-08-30  [Irrigation].Apply(20);
          1991-09-08  [Irrigation].Apply(12);
          1991-09-13  [Irrigation].Apply(24);
          1991-09-20  [Irrigation].Apply(14);
          1991-10-04  [Irrigation].Apply(27);
          1991-10-11  [Irrigation].Apply(18);
          1991-10-18  [Irrigation].Apply(30);
          1991-10-25  [Irrigation].Apply(0);
          1991-11-01  [Irrigation].Apply(0);
          1991-11-08  [Irrigation].Apply(0);
          1991-11-15  [Irrigation].Apply(0);
          1991-11-22  [Irrigation].Apply(0);
          1991-11-28  [Irrigation].Apply(0);
          1991-12-06  [Irrigation].Apply(0);
          1991-12-13  [Irrigation].Apply(0);
          1991-12-20  [Irrigation].Apply(0);
          1991-12-27  [Irrigation].Apply(0);
          1992-01-04  [Irrigation].Apply(0);
          1992-01-10  [Irrigation].Apply(0);
        Operations SummerD3
          1991-08-30  [Irrigation].Apply(20);
          1991-09-08  [Irrigation].Apply(12);
          1991-09-13  [Irrigation].Apply(24);
          1991-09-20  [Irrigation].Apply(14);
          1991-10-04  [Irrigation].Apply(27);
          1991-10-11  [Irrigation].Apply(18);
          1991-10-18  [Irrigation].Apply(30);
          1991-10-25  [Irrigation].Apply(42);
          1991-11-01  [Irrigation].Apply(33);
          1991-11-08  [Irrigation].Apply(24);
          1991-11-15  [Irrigation].Apply(0);
          1991-11-22  [Irrigation].Apply(0);
          1991-11-28  [Irrigation].Apply(0);
          1991-12-06  [Irrigation].Apply(0);
          1991-12-13  [Irrigation].Apply(0);
          1991-12-20  [Irrigation].Apply(0);
          1991-12-27  [Irrigation].Apply(0);
          1992-01-04  [Irrigation].Apply(0);
          1992-01-10  [Irrigation].Apply(0);
        Operations SummerD4
          1991-08-30  [Irrigation].Apply(20);
          1991-09-08  [Irrigation].Apply(12);
          1991-09-13  [Irrigation].Apply(24);
          1991-09-20  [Irrigation].Apply(14);
          1991-10-04  [Irrigation].Apply(27);
          1991-10-11  [Irrigation].Apply(18);
          1991-10-18  [Irrigation].Apply(30);
          1991-10-25  [Irrigation].Apply(42);
          1991-11-01  [Irrigation].Apply(33);
          1991-11-08  [Irrigation].Apply(24);
          1991-11-15  [Irrigation].Apply(28);
          1991-11-22  [Irrigation].Apply(37);
          1991-11-28  [Irrigation].Apply(51);
          1991-12-06  [Irrigation].Apply(0);
          1991-12-13  [Irrigation].Apply(0);
          1991-12-20  [Irrigation].Apply(0);
          1991-12-27  [Irrigation].Apply(0);
          1992-01-04  [Irrigation].Apply(0);
          1992-01-10  [Irrigation].Apply(0);
        Operations SummerD5
          1991-08-30  [Irrigation].Apply(20);
          1991-09-08  [Irrigation].Apply(12);
          1991-09-13  [Irrigation].Apply(24);
          1991-09-20  [Irrigation].Apply(14);
          1991-10-04  [Irrigation].Apply(27);
          1991-10-11  [Irrigation].Apply(18);
          1991-10-18  [Irrigation].Apply(30);
          1991-10-25  [Irrigation].Apply(42);
          1991-11-01  [Irrigation].Apply(33);
          1991-11-08  [Irrigation].Apply(24);
          1991-11-15  [Irrigation].Apply(28);
          1991-11-22  [Irrigation].Apply(37);
          1991-11-28  [Irrigation].Apply(51);
          1991-12-06  [Irrigation].Apply(36);
          1991-12-13  [Irrigation].Apply(38);
          1991-12-20  [Irrigation].Apply(0);
          1991-12-27  [Irrigation].Apply(0);
          1992-01-04  [Irrigation].Apply(0);
          1992-01-10  [Irrigation].Apply(0);
        Operations Nil
          1991-08-30  [Irrigation].Apply(0);
          1991-09-08  [Irrigation].Apply(0);
          1991-09-13  [Irrigation].Apply(0);
          1991-09-20  [Irrigation].Apply(0);
          1991-10-04  [Irrigation].Apply(0);
          1991-10-11  [Irrigation].Apply(0);
          1991-10-18  [Irrigation].Apply(0);
          1991-10-25  [Irrigation].Apply(0);
          1991-11-01  [Irrigation].Apply(0);
          1991-11-08  [Irrigation].Apply(0);
          1991-11-15  [Irrigation].Apply(0);
          1991-11-22  [Irrigation].Apply(0);
          1991-11-28  [Irrigation].Apply(0);
          1991-12-06  [Irrigation].Apply(0);
          1991-12-13  [Irrigation].Apply(0);
          1991-12-20  [Irrigation].Apply(0);
          1991-12-27  [Irrigation].Apply(0);
          1992-01-04  [Irrigation].Apply(0);
          1992-01-10  [Irrigation].Apply(0);
        Operations Half
          1991-08-30  [Irrigation].Apply(20);
          1991-09-08  [Irrigation].Apply(0);
          1991-09-13  [Irrigation].Apply(22);
          1991-09-20  [Irrigation].Apply(0);
          1991-10-04  [Irrigation].Apply(0);
          1991-10-11  [Irrigation].Apply(18);
          1991-10-18  [Irrigation].Apply(0);
          1991-10-25  [Irrigation].Apply(42);
          1991-11-01  [Irrigation].Apply(0);
          1991-11-08  [Irrigation].Apply(24);
          1991-11-15  [Irrigation].Apply(0);
          1991-11-22  [Irrigation].Apply(37);
          1991-11-28  [Irrigation].Apply(0);
          1991-12-06  [Irrigation].Apply(36);
          1991-12-13  [Irrigation].Apply(0);
          1991-12-20  [Irrigation].Apply(35);
          1991-12-27  [Irrigation].Apply(0);
          1992-01-04  [Irrigation].Apply(40);
          1992-01-10  [Irrigation].Apply(0);
    Simulation Control_full_irrig: Area=0; Slope=0
      Clock: StartDate=1991-06-08; EndDate=1992-01-26
      Summary summaryfile
      Weather: FileName=lincoln.met
      Zone paddock: Area=1; Slope=0
        Folder Manager folder
          Operations
            1991-06-08  [Wheat].Sow(population:300, cultivar:"GattonHartog", depth:40, rowSpacing:250);
          Operations IrrigationEvents: same as RainShelter.Factors.Irrig.Control
          Operations FertiliserEvents
            1991-06-10  [Fertiliser].Apply(60, Fertiliser.Types.UreaN, 0);
            1991-06-10  [Irrigation].Apply(7);
            1991-08-16  [Fertiliser].Apply(100, Fertiliser.Types.UreaN,0);
            1991-08-16  [Irrigation].Apply(7);
            1991-09-26  [Fertiliser].Apply(50, Fertiliser.Types.UreaN,0);
            1991-09-26  [Irrigation].Apply(7);
          Manager PotatoSowingRule
```csharp
using System;
using Models.Core;
using APSIM.Shared.Utilities;

namespace Models
{
[Serializable] 
[System.Xml.Serialization.XmlInclude(typeof(Model))]
public class Script : Model
 {      
   [Link] Weather Met;  
               
   [EventSubscribe("PreparingNewWeatherData")]
   private void OnPreparingNewWeatherData(object sender, EventArgs e)
   {
	Met.Rain = 0;		
   }
 }
}
```
        Irrigation
        Soil LincolnField: SoilType=LincolnSoil; LocalName=Lincoln; Site=Lincoln; NearestTown=Unknown; Region=NZ; NaturalVegetation=Unknown; Latitude=0; Longitude=0
          Water
            Thickness  BD   AirDry  LL15  DUL   SAT
            100        1.3  0.05    0.08  0.31  0.44
            200        1.3  0.05    0.07  0.3   0.44
            200        1.3  0.05    0.07  0.28  0.44
            200        1.3  0.05    0.09  0.31  0.44
            200        1.3  0.05    0.11  0.3   0.44
            200        1.3  0.05    0.16  0.28  0.44
            200        1.3  0.05    0.15  0.3   0.44
            200        1.3  0.05    0.12  0.34  0.44
            SoilCrop WheatSoil: LL=[0.08, 0.07, 0.07, 0.09, 0.11, 0.16, 0.15, 0.12]; KL=[0.06, 0.06, 0.06, 0.04, 0.03, 0.02, 0.02, 0.02]; XF=[1, 1, 1, 1, 0.6, 0.4, 0.4, 0.4]
          SoilWater: residueinterception=0; SummerDate=1-Nov; SummerU=7; SummerCona=3; WinterDate=1-Apr; WinterU=7; WinterCona=3; DiffusConst=40; DiffusSlope=16; Salb=0.2; CN2Bare=75; CNRed=20; CNCov=0.8; slope=0; discharge_width=0; catchment_area=0; max_pond=0
            Thickness  SWCON  KLAT
            100        0.6    0
            200        0.6    0
            200        0.6    0
            200        0.6    0
            200        0.6    0
            200        0.6    0
            200        0.6    0
            200        0.6    0
          SoilNitrogen: fom_type=[default, manure, mucuna, lablab, shemp, stable]; fract_carb=[0.2, 0.3, 0.54, 0.57, 0.45, 0]; fract_cell=[0.7, 0.3, 0.37, 0.37, 0.47, 0.1]; fract_lign=[0.1, 0.4, 0.09, 0.06, 0.08, 0.9]; wfpsN2N2O_x=[22, 88]; wfpsN2N2O_y=[0.1, 1]
          SoilOrganicMatter: RootCN=0; RootWt=0; SoilCN=0; EnrACoeff=0; EnrBCoeff=0; OCUnits=Total
            Thickness  OC    FBiom  FInert
            100        0.35  0.04   0.31
            200        0.27  0.03   0.31
            200        0.24  0.02   0.31
            200        0.16  0.01   0.31
            200        0.16  0.01   0.31
            200        0.3   0.01   0.25
            200        0.1   0.01   0.2
            200        0.1   0.01   0.2
          Analysis: Thickness=[100, 200, 200, 200, 200, 200, 200, 200]; PH=[8.5, 8.5, 8.6, 8.6, 8.6, 8.6, 8.6, 8.6]; PHUnits=Water; BoronUnits=HotWater
          Sample Initial nitrogen: NO3Units=ppm; NH4Units=ppm; SWUnits=Volumetric; OCUnits=Total; PHUnits=Water
            Thickness  NO3   NH4
            100        24.9  1.3
            200        16    1
            200        9.8   1
            200        9.8   0.8
            200        2.1   0.8
            200        2.1   0.5
            200        2.1   0.5
            200        2.1   0.5
          Sample Initial water: Thickness=[100, 200, 200, 200, 200, 200, 200, 200]; SW=[0.24, 0.27, 0.26, 0.23, 0.24, 0.23, 0.23, 0.18]; NO3Units=ppm; NH4Units=ppm; SWUnits=Volumetric; OCUnits=Total; PHUnits=Water
        Report: EventNames=[Clock].DoReport
          VariableNames:
            [Clock].Today
            Wheat.Zadok.Stage
            Wheat.Phenology.CurrentStageName
            Wheat.AboveGround.Wt
            Wheat.AboveGround.N
            Wheat.Grain.Yield
            Wheat.Grain.Protein
            Wheat.Grain.Size
            Wheat.Grain.GrainsPerGramStem
            Wheat.Grain.Wt
            Wheat.Grain.N
            Wheat.Leaf.LAI
            Wheat.Leaf.Live.Wt
            Wheat.Leaf.Live.N
            Wheat.Head.Wt
            Wheat.Head.N
            Wheat.Stem.Live.Wt
            Wheat.Stem.Live.N
            Wheat.Root.RootDepth
            Wheat.EP
            Wheat.SWStress.Photo
            Wheat.SWStress.Expansion
            Wheat.NStress.Photo
            Wheat.NStress.Expansion
            Wheat.Total.Wt
        SurfaceOrganicMatter Surface Organic Matter: PoolName=wheat_stubble; type=wheat; mass=1000; standing_fraction=0; cnr=80; CriticalResidueWeight=2000; OptimumDecompTemp=20; MaxCumulativeEOS=20; CNRatioDecompCoeff=0.277; CNRatioDecompThreshold=25; TotalLeachRain=25; MinRainToLeach=10; CriticalMinimumOrganicC=0.004; DefaultCPRatio=0; DefaultStandingFraction=0; StandingExtinctCoeff=0.5; FractionFaecesAdded=0.5
          Pools:
            {PoolName=wheat_stubble, ResidueType=wheat, Mass=1000, CNRatio=80, StandingFraction=0}
          ResidueTypes: LoadFromResource=ResidueTypes
        Plant15 Wheat: AutoHarvest=true; CropType=Wheat
        Fertiliser
        MicroClimate: air_pressure=1010; soil_emissivity=0.96; sun_angle=15; soil_heat_flux_fraction=0.4; night_interception_fraction=0.5; windspeed_default=3; refheight=2; albedo=0.293662; emissivity=0.96; gsmax=0.01; r50=200; a_interception=0; b_interception=1; c_interception=0; d_interception=0; soil_albedo=0.3
  Experiment Lincoln9192
    Factors
      Factor Irrig: Specifications=[IrrigationEvents]
        Operations 01
          1991-06-10  [Irrigation].Apply(7);
          1991-08-16  [Irrigation].Apply(7);
          1991-08-29  [Irrigation].Apply(20);
          1991-09-07  [Irrigation].Apply(12);
          1991-09-12  [Irrigation].Apply(22);
          1991-09-19  [Irrigation].Apply(4);
          1991-09-26  [Irrigation].Apply(7);
          1991-10-03  [Irrigation].Apply(27);
          1991-10-10  [Irrigation].Apply(18);
          1991-10-17  [Irrigation].Apply(30);
          1991-10-24  [Irrigation].Apply(42);
          1991-10-31  [Irrigation].Apply(33);
          1991-11-07  [Irrigation].Apply(24);
          1991-11-14  [Irrigation].Apply(28);
          1991-11-21  [Irrigation].Apply(37);
          1991-11-27  [Irrigation].Apply(51);
          1991-12-05  [Irrigation].Apply(36);
          1991-12-12  [Irrigation].Apply(38);
          1991-12-19  [Irrigation].Apply(35);
          1991-12-26  [Irrigation].Apply(47);
          1992-01-03  [Irrigation].Apply(40);
          1992-01-09  [Irrigation].Apply(41);
        Operations 03
          1991-06-10  [Irrigation].Apply(7);
          1991-08-16  [Irrigation].Apply(7);
          1991-08-29  [Irrigation].Apply(20);
          1991-09-26  [Irrigation].Apply(7);
          1991-10-24  [Irrigation].Apply(42);
          1991-10-31  [Irrigation].Apply(33);
          1991-11-07  [Irrigation].Apply(24);
          1991-11-14  [Irrigation].Apply(28);
          1991-11-21  [Irrigation].Apply(37);
          1991-11-27  [Irrigation].Apply(51);
          1991-12-05  [Irrigation].Apply(36);
          1991-12-12  [Irrigation].Apply(38);
          1991-12-19  [Irrigation].Apply(35);
          1991-12-26  [Irrigation].Apply(47);
          1992-01-03  [Irrigation].Apply(40);
          1992-01-09  [Irrigation].Apply(41);
        Operations 05
          1991-06-10  [Irrigation].Apply(7);
          1991-08-16  [Irrigation].Apply(7);
          1991-08-29  [Irrigation].Apply(20);
          1991-09-26  [Irrigation].Apply(7);
          1991-12-19  [Irrigation].Apply(35);
          1991-12-26  [Irrigation].Apply(47);
          1992-01-03  [Irrigation].Apply(40);
        Operations 06
          1991-06-10  [Irrigation].Apply(7);
          1991-08-16  [Irrigation].Apply(7);
          1991-08-29  [Irrigation].Apply(20);
          1991-09-07  [Irrigation].Apply(12);
          1991-09-12  [Irrigation].Apply(22);
          1991-09-19  [Irrigation].Apply(14);
          1991-09-26  [Irrigation].Apply(7);
        Operations 07
          1991-06-10  [Irrigation].Apply(7);
          1991-08-16  [Irrigation].Apply(7);
          1991-08-29  [Irrigation].Apply(20);
          1991-09-07  [Irrigation].Apply(12);
          1991-09-12  [Irrigation].Apply(22);
          1991-09-19  [Irrigation].Apply(14);
          1991-09-26  [Irrigation].Apply(7);
          1991-10-03  [Irrigation].Apply(27);
          1991-10-10  [Irrigation].Apply(18);
          1991-10-17  [Irrigation].Apply(30);
        Operations 08
          1991-06-10  [Irrigation].Apply(7);
          1991-08-16  [Irrigation].Apply(7);
          1991-08-29  [Irrigation].Apply(20);
          1991-09-07  [Irrigation].Apply(12);
          1991-09-12  [Irrigation].Apply(22);
          1991-09-19  [Irrigation].Apply(14);
          1991-09-26  [Irrigation].Apply(7);
          1991-10-03  [Irrigation].Apply(27);
          1991-10-10  [Irrigation].Apply(18);
          1991-10-17  [Irrigation].Apply(30);
          1991-10-24  [Irrigation].Apply(42);
          1991-10-31  [Irrigation].Apply(33);
          1991-11-07  [Irrigation].Apply(24);
        Operations 11
          1991-06-10  [Irrigation].Apply(7);
          1991-08-16  [Irrigation].Apply(7);
          1991-09-26  [Irrigation].Apply(7);
    Simulation LincolnBase: Area=0; Slope=0
      Clock: StartDate=1991-06-08; EndDate=1992-01-26
      Summary summaryfile
      Weather: FileName=Lincoln9192.met
      Zone paddock: Area=1; Slope=0
        Folder Manager folder
          Operations
            1991-06-08  [Wheat].Sow(population:300, cultivar:"Rongotea", depth:40, rowSpacing:250);
          Operations IrrigationEvents: same as RainShelter.Factors.Irrig.SpringD1
          Operations FertiliserEvents
            1991-06-10  [Fertiliser].Apply(30, Fertiliser.Types.NO3N, 0);
            1991-08-16  [Fertiliser].Apply(100, Fertiliser.Types.NO3N,0);
            1991-09-26  [Fertiliser].Apply(50, Fertiliser.Types.NO3N,0);
        Irrigation
        Soil: SoilType=LincolnSoil; LocalName=Lincoln; Site=Lincoln; NearestTown=Unknown; Region=NZ; NaturalVegetation=Unknown; Latitude=0; Longitude=0
          Water: same as RainShelter.Control_full_irrig.paddock.LincolnField.Water
          SoilWater: same as RainShelter.Control_full_irrig.paddock.LincolnField.SoilWater
          SoilNitrogen: fom_type=[default, manure, mucuna, lablab, shemp, stable]; fract_carb=[0.2, 0.3, 0.54, 0.57, 0.45, 0]; fract_cell=[0.7, 0.3, 0.37, 0.37, 0.47, 0.1]; fract_lign=[0.1, 0.4, 0.09, 0.06, 0.08, 0.9]; wfpsN2N2O_x=[22, 88]; wfpsN2N2O_y=[0.1, 1]
            oc=[0.360302, 0.270806, 0.241057, 0.16141, 0.160396, 0.299235, 0.0996345, 0.0996568]
          SoilOrganicMatter: same as RainShelter.Control_full_irrig.paddock.LincolnField.SoilOrganicMatter
          Analysis: Thickness=[100, 200, 200, 200, 200, 200, 200, 200]; PH=[8.5, 8.5, 8.6, 8.6, 8.6, 8.6, 8.6, 8.6]; PHUnits=Water; BoronUnits=HotWater
          Sample Initial nitrogen: NO3Units=ppm; NH4Units=ppm; SWUnits=Volumetric; OCUnits=Total; PHUnits=Water
            Thickness  NO3   NH4
            100        24.9  1.3
            200        16    1
            200        9.8   1
            200        9.8   0.8
            200        2.1   0.8
            200        2.1   0.5
            200        2.1   0.5
            200        2.1   0.5
          Sample Initial water: Thickness=[100, 200, 200, 200, 200, 200, 200, 200]; SW=[0.24, 0.27, 0.26, 0.23, 0.24, 0.23, 0.23, 0.18]; NO3Units=ppm; NH4Units=ppm; SWUnits=Volumetric; OCUnits=Total; PHUnits=Water
        Report: EventNames=[Clock].DoReport
          VariableNames:
            [Clock].Today
            Wheat.Zadok.Stage
            Wheat.Phenology.CurrentStageName
            Wheat.AboveGround.Wt
            Wheat.AboveGround.N
            Wheat.Grain.Yield
            Wheat.Grain.Protein
            Wheat.Grain.Size
            Wheat.Grain.GrainsPerGramStem
            Wheat.Grain.Wt
            Wheat.Grain.N
            Wheat.Leaf.LAI
            Wheat.Leaf.Live.Wt
            Wheat.Leaf.Live.N
            Wheat.Head.Wt
            Wheat.Head.N
            Wheat.Stem.Live.Wt
            Wheat.Stem.Live.N
            Wheat.Root.RootDepth
            Wheat.EP
            Wheat.SWStress.Photo
            Wheat.SWStress.Expansion
            Wheat.NStress.Photo
            Wheat.NStress.Expansion
            Wheat.Total.Wt
            sum([Soil].SoilWater.SWmm) as TotalSW
        SurfaceOrganicMatter Surface Organic Matter: same as RainShelter.Control_full_irrig.paddock.Surface Organic Matter
        Fertiliser
        MicroClimate: same as RainShelter.Control_full_irrig.paddock.MicroClimate
        Plant15 Wheat: AutoHarvest=true; CropType=Wheat
        Manager ResetSW
          reset_date = 1991-09-02
```csharp
using System;
using Models.Core;
using Models.PMF;
using Models.PMF.OilPalm;
using Models.Soils;
using Models.SurfaceOM;
using APSIM.Shared.Utilities;

namespace Models
{ 
	[Serializable]
	[System.Xml.Serialization.XmlInclude(typeof(Model))]
	public class Script : Model
	{
		[Link] Clock Clock;
		[Link] Soil Soil;
		[Link] SurfaceOrganicMatter SurfaceOM;
		[Description("Reset date")]
		public DateTime reset_date {get; set;}

		
       [EventSubscribe("DoManagement")]
       private void OnDoManagement(object sender, EventArgs e)
		{
		if (Clock.Today == reset_date)
		   Soil.SoilWater.Reset();
        }
	}
}
```
  Experiment Cunderdin97
    Factors
      Factor Sow: Specifications=[SowingSchedule]
        Operations SpearEarly
          1997-06-06  [Wheat].Sow(population:150, cultivar:"spear", depth:30, rowSpacing:250);
        Operations SpearMid
          1997-07-08  [Wheat].Sow(population:108, cultivar:"spear", depth:30, rowSpacing:250);
        Operations WilgoyneEarly
          1997-06-06  [Wheat].Sow(population:150, cultivar:"wilgoyne", depth:30, rowSpacing:250);
        Operations WilgoyneMid
          1997-07-08  [Wheat].Sow(population:108, cultivar:"wilgoyne", depth:30, rowSpacing:250);
        Operations WilgoyneLate
          1997-07-08  [Wheat].Sow(population:100, cultivar:"wilgoyne", depth:30, rowSpacing:250);
      Factor SowN: Specifications=[SowingFertiliser].Script.Amount=0,50
      Factor TopN: Specifications=[SowingFertiliser].Script.Amount=0,30
      Factor Irr: Specifications=[IrrigationSchedule]
        Operations Wet
          1997-09-23  [Irrigation].Apply(amount:15);
          1997-10-01  [Irrigation].Apply(amount:15);
          1997-10-06  [Irrigation].Apply(amount:15);
          1997-10-14  [Irrigation].Apply(amount:20);
          1997-10-21  [Irrigation].Apply(amount:17.5);
          1997-10-26  [Irrigation].Apply(amount:17.5);
        Operations Dry
    Simulation Cunderdin97Base: Area=0; Slope=0
      Clock: StartDate=1997-04-16; EndDate=1997-12-30
      Summary summaryfile
      Weather: FileName=Cunderdin.met
      Zone paddock: Area=1; Slope=0
        Report: same as Mer73.Base.paddock.Report
        Irrigation
        Soil: SoilType=heavy; LocalName=Beverley; Site=Cunderdin; NearestTown=Cunderdin; Region=WA; NaturalVegetation=Unknown; Latitude=0; Longitude=0
          Water
            Thickness  BD   AirDry  LL15   DUL    SAT
            50         1.3  0.034   0.07   0.156  0.48
            50         1.3  0.034   0.07   0.156  0.48
            100        1.4  0.121   0.121  0.22   0.44
            100        1.4  0.123   0.123  0.224  0.44
            100        1.5  0.132   0.132  0.243  0.4
            100        1.5  0.132   0.132  0.243  0.4
            100        1.5  0.135   0.135  0.243  0.4
            100        1.5  0.145   0.145  0.243  0.4
            200        1.5  0.145   0.145  0.243  0.4
            200        1.5  0.145   0.145  0.243  0.4
            200        1.5  0.145   0.145  0.243  0.4
            200        1.5  0.145   0.145  0.243  0.4
            200        1.5  0.145   0.145  0.243  0.4
            200        1.5  0.145   0.145  0.243  0.4
            200        1.5  0.145   0.145  0.243  0.4
            200        1.5  0.145   0.145  0.243  0.4
            200        1.5  0.145   0.145  0.243  0.4
            SoilCrop wheatSoil
              LL=[0.07, 0.07, 0.121, 0.123, 0.132, 0.132, 0.135, 0.145, 0.145, 0.145, 0.145, 0.145, 0.145, 0.145, 0.145, 0.145, 0.145]
              KL=[0.06, 0.06, 0.05, 0.05, 0.04, 0.04, 0.04, 0.04, 0.03, 0.03, 0.03, 0.03, 0.03, 0.03, 0.03, 0.03, 0.03]
              XF=[0.7, 0.6, 0.5, 0.5, 0.5, 0.5, 0.5, 0.5, 0.3, 0.3, 0.3, 0.3, 0.3, 0.3, 0.3, 0.3, 0.3]
          SoilWater: residueinterception=0; SummerDate=1-Nov; SummerU=7.5; SummerCona=3; WinterDate=1-Apr; WinterU=7.5; WinterCona=3; DiffusConst=88; DiffusSlope=35; Salb=0.13; CN2Bare=25; CNRed=20; CNCov=0.8; slope=0; discharge_width=0; catchment_area=0; max_pond=0
            Thickness  SWCON  KLAT
            50         0.6    0
            50         0.6    0
            100        0.6    0
            100        0.6    0
            100        0.6    0
            100        0.6    0
            100        0.6    0
            100        0.6    0
            200        0.6    0
            200        0.6    0
            200        0.6    0
            200        0.6    0
            200        0.6    0
            200        0.6    0
            200        0.6    0
            200        0.6    0
            200        0.6    0
          SoilOrganicMatter: RootCN=40; RootWt=500; SoilCN=13; EnrACoeff=1; EnrBCoeff=1; OCUnits=Total
            Thickness  OC    FBiom  FInert
            50         0.73  0.03   0.3
            50         0.73  0.03   0.3
            100        0.46  0.02   0.3
            100        0.39  0.01   0.4
            100        0.3   0.01   0.8
            100        0.22  0.01   0.9
            100        0.19  0.01   0.9
            100        0.19  0.01   0.9
            200        0.1   0.01   0.9
            200        0.1   0.01   0.9
            200        0.1   0.01   0.9
            200        0.1   0.01   0.9
            200        0.1   0.01   0.9
            200        0.1   0.01   0.9
            200        0.1   0.01   0.9
            200        0.1   0.01   0.9
            200        0.1   0.01   0.9
          Analysis: PH=[4.7, 4.7, 4.7, 4.7, 6, 6, 6, 6, 6, 6, 6, 6, 6, 6, 6, 6, 6]; PHUnits=Water; BoronUnits=HotWater
            Thickness=[50, 50, 100, 100, 100, 100, 100, 100, 200, 200, 200, 200, 200, 200, 200, 200, 200]
          Sample: NO3Units=ppm; NH4Units=ppm; SWUnits=Volumetric; OCUnits=Total; PHUnits=Water
            Thickness  NO3  NH4  SW
            50         23   2    0.034
            50         23   2    0.156
            100        12   1    0.22
            100        9    2    0.224
            100        4    1    0.244
            100        2    1    0.245
            100        2    1    0.246
            100        2    1    0.243
            200        2    1    0.24
            200        2    1    0.145
            200        2    1    0.145
            200        2    1    0.145
            200        2    1    0.145
            200        2    1    0.145
            200        2    1    0.145
            200        2    1    0.145
            200        2    1    0.145
          SoilNitrogen: fom_type=[default, manure, mucuna, lablab, shemp, stable]; fract_carb=[0.2, 0.3, 0.54, 0.57, 0.45, 0]; fract_cell=[0.7, 0.3, 0.37, 0.37, 0.47, 0.1]; fract_lign=[0.1, 0.4, 0.09, 0.06, 0.08, 0.9]; wfpsN2N2O_x=[22, 88]; wfpsN2N2O_y=[0.1, 1]
            oc=[0.723526, 0.723012, 0.45528, 0.387092, 0.299501, 0.219998, 0.190011, 0.189986, 0.099965, 0.0999681, 0.0999903, 0.100014, 0.100005, 0.1, 0.1, 0.1, 0.0999999]
        SurfaceOrganicMatter: PondActive=no; ReportAdditions=no; ReportRemovals=no; PoolName=wheat_stubble; type=wheat; mass=500; standing_fraction=0; cpr=0; cnr=120; CriticalResidueWeight=2000; OptimumDecompTemp=20; MaxCumulativeEOS=20; CNRatioDecompCoeff=0.277; CNRatioDecompThreshold=25; TotalLeachRain=25; MinRainToLeach=10; CriticalMinimumOrganicC=0.004; DefaultCPRatio=0; DefaultStandingFraction=0; StandingExtinctCoeff=0.5; FractionFaecesAdded=0.5
          Pools:
            {PoolName=wheat_stubble, ResidueType=wheat, Mass=500, CNRatio=120, CPRatio=0, StandingFraction=0}
          ResidueTypes: LoadFromResource=ResidueTypes
          TillageTypes TillageTypesList
        Fertiliser
        Plant15 Wheat: AutoHarvest=true; CropType=Wheat
        Operations IrrigationSchedule: same as APS14.APS14StubbleBareNRate0.paddock.IrrigationSchedule
        MicroClimate: same as APS26.APS26NRate160WaterWet.paddock.MicroClimate
        Operations SowingSchedule
          1993-06-29  [Wheat].Sow(population:114, cultivar:"GattonHartog", depth:30, rowSpacing:250);
        PredictedObserved: FieldNameUsedForMatch=Wheat.Zadok.Stage
        Manager ExtraVariables: same as APS14.APS14StubbleBareNRate0.paddock.ExtraVariables
        Manager SowingFertiliser
          Amount = 160
```csharp
using System;
using Models.Core;
using Models.PMF;
using APSIM.Shared.Utilities;

namespace Models
{
	[Serializable]
	public class Script : Model
	{
		[Link] Clock Clock;
		[Link] Fertiliser Fertiliser;
		[Link] Summary Summary;
		
		[Description("Amount of fertiliser to be applied")]
		public double Amount { get; set;}

		[EventSubscribe("Sowing")]
		private void OnSowing(object sender, EventArgs e)
		{
				Fertiliser.Apply(Amount: Amount, Type: Fertiliser.Types.NO3N);
		}
		
	}
}
```
        Manager TopdressFertiliser
          FertDayOfYear = 239
          Amount = 0
          script: same as in APS26.APS26NRate160WaterWet.paddock.ApplyFertiliser
  Experiment Mouse
    Factors
      Factor Damage: Specifications=[DamageSchedule]
        Operations Control
          2002-09-10  [Wheat].Population.KillCrop(KillFraction:0.0);
        Operations Emerg05
          2002-09-10  [Wheat].Population.KillCrop(KillFraction:0.05);
        Operations Emerg10
          2002-09-10  [Wheat].Population.KillCrop(KillFraction:0.10);
        Operations Emerg25
          2002-09-10  [Wheat].Population.KillCrop(KillFraction:0.25);
        Operations Emerg50
          2002-09-10  [Wheat].Population.KillCrop(KillFraction:0.5);
        Operations Tiller05
          2002-10-11  [Wheat].Population.KillCrop(KillFraction:0.05);
        Operations Tiller10
          2002-10-11  [Wheat].Population.KillCrop(KillFraction:0.10);
        Operations Tiller25
          2002-10-11  [Wheat].Population.KillCrop(KillFraction:0.25);
        Operations Tiller50
          2002-10-11  [Wheat].Population.KillCrop(KillFraction:0.5);
        Operations Boot05
          2002-10-31  [Wheat].Population.KillCrop(KillFraction:0.05);
        Operations Boot10
          2002-10-31  [Wheat].Population.KillCrop(KillFraction:0.10);
        Operations Boot25
          2002-10-31  [Wheat].Population.KillCrop(KillFraction:0.25);
        Operations Boot50
          2002-10-31  [Wheat].Population.KillCrop(KillFraction:0.5);
        Operations PreHarv05
          2002-12-13  [Wheat].Population.KillCrop(KillFraction:0.05);
        Operations PreHarv10
          2002-12-13  [Wheat].Population.KillCrop(KillFraction:0.10);
        Operations PreHarv25
          2002-12-13  [Wheat].Population.KillCrop(KillFraction:0.25);
        Operations PreHarv50
          2002-12-13  [Wheat].Population.KillCrop(KillFraction:0.5);
    Simulation MouseBase: Area=0; Slope=0
      Clock: StartDate=2002-07-10; EndDate=2002-12-31
      Summary summaryfile
      Weather: FileName=hall2002.met
      Zone paddock: Area=1; Slope=0
        Report: same as Mer73.Base.paddock.Report
        Irrigation
        Soil: SoilType=unknown; LocalName=Ginninderra; Site=Ginninderra; NearestTown=Ginninderra; Region=ACT; NaturalVegetation=Unknown; Latitude=0; Longitude=0
          InitialWater: PercentMethod=FilledFromTop; FractionFull=1
          Water
            Thickness  BD    AirDry  LL15   DUL    SAT
            100        1.45  0.04    0.073  0.21   0.414
            100        1.5   0.04    0.075  0.234  0.394
            100        1.55  0.06    0.074  0.22   0.375
            100        1.5   0.1     0.12   0.29   0.394
            100        1.52  0.1     0.16   0.293  0.386
            100        1.55  0.1     0.25   0.37   0.375
            100        1.57  0.1     0.25   0.36   0.367
            100        1.6   0.1     0.24   0.35   0.355
            100        1.62  0.1     0.259  0.34   0.347
            100        1.65  0.1     0.281  0.33   0.335
            100        1.62  0.1     0.295  0.34   0.347
            100        1.6   0.1     0.272  0.35   0.355
            100        1.58  0.1     0.269  0.36   0.363
            100        1.55  0.1     0.264  0.37   0.375
            100        1.55  0.1     0.256  0.37   0.375
            100        1.55  0.1     0.256  0.355  0.375
            100        1.55  0.1     0.256  0.35   0.375
            100        1.55  0.1     0.256  0.33   0.375
            100        1.55  0.1     0.256  0.33   0.375
            100        1.55  0.1     0.256  0.33   0.375
            SoilCrop wheatSoil
              LL=[0.073, 0.075, 0.074, 0.12, 0.16, 0.25, 0.25, 0.24, 0.259, 0.281, 0.295, 0.272, 0.269, 0.264, 0.256, 0.256, 0.256, 0.256, 0.256, 0.256]
              KL=[0.08, 0.08, 0.08, 0.08, 0.08, 0.08, 0.08, 0.08, 0.08, 0.07, 0.07, 0.06, 0.06, 0.05, 0.05, 0.04, 0.04, 0.03, 0.02, 0.01]
              XF=[1, 1, 1, 1, 1, 1, 1, 1, 1, 1, 1, 1, 1, 1, 1, 1, 1, 1, 0, 0]
          SoilWater: residueinterception=0; SummerDate=1-Nov; SummerU=2; SummerCona=2; WinterDate=1-Apr; WinterU=2; WinterCona=2; DiffusConst=88; DiffusSlope=35.4; Salb=0.13; CN2Bare=72; CNRed=20; CNCov=0.8; slope=0; discharge_width=0; catchment_area=0; max_pond=0
            Thickness  SWCON  KLAT
            100        0.4    0
            100        0.4    0
            100        0.4    0
            100        0.4    0
            100        0.4    0
            100        0.4    0
            100        0.4    0
            100        0.4    0
            100        0.4    0
            100        0.4    0
            100        0.4    0
            100        0.4    0
            100        0.4    0
            100        0.4    0
            100        0.4    0
            100        0.4    0
            100        0.4    0
            100        0.4    0
            100        0.4    0
            100        0.4    0
          SoilOrganicMatter: RootCN=40; RootWt=2000; SoilCN=14.5; EnrACoeff=1; EnrBCoeff=1; OCUnits=Total
            Thickness  OC    FBiom  FInert
            100        0.83  0.04   0.36
            100        0.35  0.03   0.35
            100        0.33  0.03   0.45
            100        0.22  0.02   0.45
            100        0.22  0.02   0.59
            100        0.22  0.02   0.6
            100        0.19  0.02   0.84
            100        0.17  0.02   0.8
            100        0.15  0.01   0.8
            100        0.12  0.01   0.99
            100        0.11  0.01   0.99
            100        0.1   0.01   0.99
            100        0.1   0.01   0.99
            100        0.1   0.01   0.99
            100        0.1   0.01   0.99
            100        0.1   0.01   0.99
            100        0.1   0.01   0.99
            100        0.1   0.01   0.99
            100        0.1   0.01   0.99
            100        0.1   0.01   0.99
          Analysis: PHUnits=Water; BoronUnits=HotWater
            Thickness=[100, 100, 100, 100, 100, 100, 100, 100, 100, 100, 100, 100, 100, 100, 100, 100, 100, 100, 100, 100]
            PH=[5.8, 5.9, 6.6, 6.8, 7, 7.1, 7.2, 7.3, 7.4, 7.4, 7.6, 7.8, 8, 8.2, 8.3, 8.4, 8.4, 8.5, 8.5, 8.5]
          Sample: NO3Units=ppm; NH4Units=ppm; SWUnits=Volumetric; OCUnits=Total; PHUnits=Water
            Thickness  NO3  NH4
            100        10   1
            100        15   1
            100        10   1
            100        8    1
            100        5    1
            100        2    1
            100        1    1
            100        1    1
            100        1    1
            100        1    1
            100        1    1
            100        1    1
            100        1    1
            100        1    1
            100        0    0
            100        0    0
            100        0    0
            100        0    0
            100        0    0
            100        0    0
          SoilNitrogen: fom_type=[default, manure, mucuna, lablab, shemp, stable]; fract_carb=[0.2, 0.3, 0.54, 0.57, 0.45, 0]; fract_cell=[0.7, 0.3, 0.37, 0.37, 0.47, 0.1]; fract_lign=[0.1, 0.4, 0.09, 0.06, 0.08, 0.9]; wfpsN2N2O_x=[22, 88]; wfpsN2N2O_y=[0.1, 1]
            oc=[0.830987, 0.349129, 0.329455, 0.220339, 0.220441, 0.220335, 0.190667, 0.170504, 0.150477, 0.120544, 0.110476, 0.100412, 0.100356, 0.100312, 0.100249, 0.100216, 0.100177, 0.100129, 0.100094, 0.100043]
        SurfaceOrganicMatter: PondActive=no; ReportAdditions=no; ReportRemovals=no; PoolName=canola_stubble; type=canola; mass=1000; standing_fraction=0; cpr=0; cnr=20; CriticalResidueWeight=2000; OptimumDecompTemp=20; MaxCumulativeEOS=20; CNRatioDecompCoeff=0.277; CNRatioDecompThreshold=25; TotalLeachRain=25; MinRainToLeach=10; CriticalMinimumOrganicC=0.004; DefaultCPRatio=0; DefaultStandingFraction=0; StandingExtinctCoeff=0.5; FractionFaecesAdded=0.5
          Pools:
            {PoolName=canola_stubble, ResidueType=canola, Mass=1000, CNRatio=20, CPRatio=0, StandingFraction=0}
          ResidueTypes: LoadFromResource=ResidueTypes
          TillageTypes TillageTypesList
        Fertiliser
        Plant15 Wheat: AutoHarvest=true; CropType=Wheat
        Operations IrrigationSchedule
          2002-11-08  [Irrigation].Apply(amount:35);
          2002-11-22  [Irrigation].Apply(amount:35);
        MicroClimate: same as APS26.APS26NRate160WaterWet.paddock.MicroClimate
        Operations SowingSchedule
          2002-08-15  [Wheat].Sow(population:100, cultivar:"hartog", depth:30, rowSpacing:250);
        Manager SowingFertiliser
          Amount = 100
          script: same as in Cunderdin97.Cunderdin97Base.paddock.SowingFertiliser
        Manager ExtraVariables: same as APS14.APS14StubbleBareNRate0.paddock.ExtraVariables
        Operations DamageSchedule
          2002-09-10  [Wheat].Population.KillCrop(KillFraction:0.0);
  Experiment Wongan83
    Factors
      Factor Soil: Specifications=[WonganSoil]
        Soil Ripped: SoilType=sand; LocalName=WonganSite; Site=WonganSite; NearestTown=Unknown; Region=WA; NaturalVegetation=Unknown; Latitude=0; Longitude=0
          Water
            Thickness  BD    AirDry  LL15  DUL   SAT
            50         1.31  0.04    0.07  0.11  0.35
            50         1.31  0.05    0.07  0.11  0.35
            100        1.45  0.05    0.08  0.14  0.35
            200        1.48  0.05    0.09  0.14  0.35
            200        1.53  0.05    0.09  0.15  0.35
            200        1.5   0.05    0.09  0.15  0.35
            400        1.5   0.05    0.1   0.16  0.35
            400        1.5   0.05    0.11  0.17  0.35
            600        1.5   0.05    0.13  0.17  0.35
            600        1.5   0.05    0.13  0.17  0.35
            SoilCrop WheatSoil
              LL=[0.08, 0.08, 0.09, 0.1, 0.11, 0.12, 0.12, 0.12, 0.14, 0.14]
              KL=[0.06, 0.06, 0.06, 0.06, 0.06, 0.06, 0.06, 0.06, 0.06, 0.06]
              XF=[1, 1, 1, 1, 1, 1, 1, 1, 1, 1]
          SoilWater: residueinterception=0; SummerDate=1-Nov; SummerU=6; SummerCona=2; WinterDate=1-Apr; WinterU=6; WinterCona=2; DiffusConst=88; DiffusSlope=35; Salb=0.13; CN2Bare=60; CNRed=20; CNCov=0.8; max_pond=0; Thickness=[50, 50, 100, 200, 200, 200, 400, 400, 600, 600]
            SWCON=[0.35, 0.35, 0.35, 0.35, 0.35, 0.35, 0.35, 0.35, 0.35, 0.35]
          SoilOrganicMatter: RootCN=40; RootWt=1500; SoilCN=13; EnrACoeff=1; EnrBCoeff=1; OCUnits=Total
            Thickness  OC    FBiom  FInert
            50         1.23  0.04   0.1
            50         0.43  0.04   0.1
            100        0.37  0.03   0.1
            200        0.26  0.02   0.2
            200        0.21  0.01   0.8
            200        0.2   0.01   0.9
            400        0.18  0.01   0.9
            400        0.18  0.01   0.9
            600        0.17  0.01   0.9
            600        0.17  0.01   0.9
          Analysis: Thickness=[50, 50, 100, 200, 200, 200, 400, 400, 600, 600]; PH=[4.7, 5.1, 5.1, 6, 6, 6, 6, 6, 6, 6]; PHUnits=Water; BoronUnits=HotWater
          Sample: NO3Units=ppm; NH4Units=ppm; SWUnits=Volumetric; OCUnits=Total; PHUnits=Water
            Thickness  NO3  NH4  SW
            50         7    2    0.07
            50         7    2    0.07
            100        5    1    0.13
            200        3    1    0.14
            200        2    0    0.14
            200        2    0    0.11
            400        2    0    0.1
            400        1    0    0.11
            600        1    0    0.12
            600        1    0    0.13
          SoilNitrogen: same as Mouse.MouseBase.paddock.Soil.SoilNitrogen
        Soil Unripped: SoilType=sand; LocalName=WonganSite; Site=WonganSite; NearestTown=Unknown; Region=WA; NaturalVegetation=Unknown; Latitude=0; Longitude=0
          Water
            Thickness  BD    AirDry  LL15  DUL   SAT
            50         1.31  0.04    0.07  0.13  0.35
            50         1.31  0.05    0.07  0.13  0.35
            100        1.45  0.05    0.08  0.14  0.35
            200        1.48  0.05    0.09  0.14  0.35
            200        1.53  0.05    0.09  0.15  0.35
            200        1.5   0.05    0.09  0.15  0.35
            400        1.5   0.05    0.1   0.16  0.35
            400        1.5   0.05    0.11  0.17  0.35
            600        1.5   0.05    0.13  0.17  0.35
            600        1.5   0.05    0.13  0.17  0.35
            SoilCrop WheatSoil
              LL=[0.08, 0.08, 0.09, 0.1, 0.11, 0.12, 0.12, 0.12, 0.14, 0.14]
              KL=[0.06, 0.06, 0.06, 0.06, 0.06, 0.06, 0.06, 0.06, 0.06, 0.06]
              XF=[0.2, 0.1, 0.2, 0.7, 1, 1, 1, 1, 1, 1]
          SoilWater: same as Wongan83.Factors.Soil.Ripped.SoilWater
          SoilOrganicMatter: same as Wongan83.Factors.Soil.Ripped.SoilOrganicMatter
          Analysis: Thickness=[50, 50, 100, 200, 200, 200, 400, 400, 600, 600]; PH=[4.7, 5.1, 5.1, 6, 6, 6, 6, 6, 6, 6]; PHUnits=Water; BoronUnits=HotWater
          Sample: same as Wongan83.Factors.Soil.Ripped.Sample
          SoilNitrogen: same as Mouse.MouseBase.paddock.Soil.SoilNitrogen
      Factor N: Specifications=[SowingFertiliser].Script.Amount=0,10,25,50,100
    Simulation WonganBase: Area=0; Slope=0
      Clock: StartDate=1983-06-13; EndDate=1983-11-11
      Summary summaryfile
      Weather: FileName=Wongan83.met
      Zone paddock: Area=1; Slope=0
        Report: same as Mer73.Base.paddock.Report
        Irrigation
        Soil WonganSoil: SoilType=unknown; LocalName=Ginninderra; Site=Ginninderra; NearestTown=Ginninderra; Region=ACT; NaturalVegetation=Unknown; Latitude=0; Longitude=0
          InitialWater: PercentMethod=FilledFromTop; FractionFull=1
          Water: same as Mouse.MouseBase.paddock.Soil.Water
          SoilWater: same as Mouse.MouseBase.paddock.Soil.SoilWater
          SoilOrganicMatter: same as Mouse.MouseBase.paddock.Soil.SoilOrganicMatter
          Analysis: PHUnits=Water; BoronUnits=HotWater
            Thickness=[100, 100, 100, 100, 100, 100, 100, 100, 100, 100, 100, 100, 100, 100, 100, 100, 100, 100, 100, 100]
            PH=[5.8, 5.9, 6.6, 6.8, 7, 7.1, 7.2, 7.3, 7.4, 7.4, 7.6, 7.8, 8, 8.2, 8.3, 8.4, 8.4, 8.5, 8.5, 8.5]
          Sample: same as Mouse.MouseBase.paddock.Soil.Sample
          SoilNitrogen: fom_type=[default, manure, mucuna, lablab, shemp, stable]; fract_carb=[0.2, 0.3, 0.54, 0.57, 0.45, 0]; fract_cell=[0.7, 0.3, 0.37, 0.37, 0.47, 0.1]; fract_lign=[0.1, 0.4, 0.09, 0.06, 0.08, 0.9]; wfpsN2N2O_x=[22, 88]; wfpsN2N2O_y=[0.1, 1]
            oc=[0.835354, 0.35073, 0.330728, 0.221338, 0.221193, 0.220685, 0.191071, 0.170898, 0.150786, 0.120778, 0.110619, 0.100528, 0.100411, 0.100323, 0.100272, 0.100233, 0.100199, 0.10017, 0.100144, 0.100122]
        SurfaceOrganicMatter: PondActive=no; ReportAdditions=no; ReportRemovals=no; PoolName=wheat_stubble; type=wheat; mass=1000; standing_fraction=0; cpr=0; cnr=20; CriticalResidueWeight=2000; OptimumDecompTemp=20; MaxCumulativeEOS=20; CNRatioDecompCoeff=0.277; CNRatioDecompThreshold=25; TotalLeachRain=25; MinRainToLeach=10; CriticalMinimumOrganicC=0.004; DefaultCPRatio=0; DefaultStandingFraction=0; StandingExtinctCoeff=0.5; FractionFaecesAdded=0.5
          Pools:
            {PoolName=wheat_stubble, ResidueType=wheat, Mass=1000, CNRatio=20, CPRatio=0, StandingFraction=0}
          ResidueTypes: LoadFromResource=ResidueTypes
          TillageTypes TillageTypesList
        Fertiliser
        Plant15 Wheat: AutoHarvest=true; CropType=Wheat
        MicroClimate: same as APS26.APS26NRate160WaterWet.paddock.MicroClimate
        Operations SowingSchedule
          1983-06-14  [Wheat].Sow(population:159, cultivar:"gamenya", depth:80, rowSpacing:250);
        Manager SowingFertiliser
          Amount = 0
          script: same as in Cunderdin97.Cunderdin97Base.paddock.SowingFertiliser
        Manager ExtraVariables: same as APS14.APS14StubbleBareNRate0.paddock.ExtraVariables
  Memo Combined Results
    Combined Results

    Simulation results for the combined datasets from the various countries are shown in the following graphs.  The model is able to adequately capture the influence of growing conditions (soil, climate) and management (population, Nitrogen, irrigation, sowing date).
  Tests
    Test:
      SimulationName  TableName        Type       ColumnNames  Parameters
      All             TimeSeriesStats  Tolerance  n            1,1
      All             TimeSeriesStats  Tolerance  residual     1,1
      All             TimeSeriesStats  Tolerance  R^2          1,1
      All             TimeSeriesStats  Tolerance  RMSD         1,1
      All             TimeSeriesStats  Tolerance  SB           1,1
      All             TimeSeriesStats  Mean       SDSD         1,value
      All             TimeSeriesStats  Tolerance  LCS          1,1
      All             TimeSeriesStats  Tolerance  %            1,1
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