Simulations
  DataStore
  Simulation PMFWheatTestBase: Area=0; Slope=0
    Weather: FileName=%root%\Tests\WeatherFiles\lincoln.met
    Clock: StartDate=1998-05-30; EndDate=1999-12-31
    Summary
    SoilArbitrator Soil Arbitrator
    Zone Field: Area=0; Slope=0
      Soil: Latitude=0; Longitude=0
        Analysis: Thickness=[100, 200, 300, 300, 300, 300]; PH=[6.6, 6.2, 5.7, 5.5, 5.5, 5.5]; PHUnits=Water; BoronUnits=HotWater
        InitialWater Initial water: PercentMethod=EvenlyDistributed; FractionFull=1
        Water
          Thickness  BD   AirDry  LL15  DUL   SAT
          100        1.2  0.08    0.13  0.33  0.5
          200        1.2  0.13    0.13  0.33  0.5
          300        1.2  0.1     0.1   0.31  0.44
          300        1.2  0.06    0.06  0.15  0.46
          300        1.2  0.04    0.04  0.1   0.44
          300        1.2  0.02    0.02  0.06  0.44
          SoilCrop WheatPMFPrototypeSoil: LL=[0.13, 0.13, 0.1, 0.08, 0.11, 0.11]; KL=[0.06, 0.06, 0.06, 0.06, 0.06, 0.06]; XF=[1, 1, 1, 1, 1, 1]
          SoilCrop PotatoSoil: LL=[0.13, 0.13, 0.27, 0.27, 0.3, 0.3]; KL=[0.1, 0.06, 0.03, 0.01, 0, 0]; XF=[1, 1, 0.1, 0, 0, 0]
        SoilWater: residueinterception=0; SummerDate=1-Nov; SummerU=9; SummerCona=4.4; WinterDate=1-Apr; WinterU=9; WinterCona=4.4; DiffusConst=88; DiffusSlope=35.4; Salb=0.18; CN2Bare=68; CNRed=20; CNCov=0.8; slope=0; discharge_width=0; catchment_area=0; max_pond=0
          Thickness  SWCON  KLAT
          100        0.55   0
          200        0.55   0
          300        0.55   0
          300        0.55   0
          300        0.55   0
          300        0.55   0
        SoilNitrogen: fom_type=[default, manure, mucuna, lablab, shemp, stable]; fract_carb=[0.2, 0.3, 0.54, 0.57, 0.45, 0]; fract_cell=[0.7, 0.3, 0.37, 0.37, 0.47, 0.1]; fract_lign=[0.1, 0.4, 0.09, 0.06, 0.08, 0.9]; wfpsN2N2O_x=[22, 88]; wfpsN2N2O_y=[0.1, 1]; oc=[1.83576, 1.46334, 1.19884, 1.0301, 0.470338, 0.470138]
        SoilOrganicMatter: RootCN=30; RootWt=3000; SoilCN=11.5; EnrACoeff=7.4; EnrBCoeff=0.2; OCUnits=Total
          Thickness  OC    FBiom  FInert
          100        1.82  0.025  0.3
          200        1.47  0.025  0.4
          300        1.2   0.015  0.75
          300        1.03  0.01   0.9
          300        0.47  0.01   0.96
          300        0.47  0.01   0.96
        Sample Initial nitrogen: NO3Units=kgha; NH4Units=ppm; SWUnits=Volumetric; OCUnits=Total; PHUnits=Water
          Thickness  NO3  NH4
          100        217  0
          200        30   0
          300        5    0
          300        5    0
          300        0    0
          300        0    0
      Plant WheatPMFPrototype: CropType=Wheat
        Cultivar hartog: Alias=hartog
          Command:
            [Phenology].Vernalisation.VernSens = 0.9
            [Phenology].Vernalisation.PhotopSens = 0.9
            [Phenology].TerminalSpikeletToFloweringPhase.Target = 630
        OrganArbitrator Arbitrator: NArbitrationOption=PriorityThenRelativeAllocation; DMArbitrationOption=PriorityThenRelativeAllocation
        Phenology: Emerged=false
          AirTemperatureFunction ThermalTime
            XYPairs: X=[0, 26, 34]; Y=[0, 26, 0]
          GerminatingPhase SowingToGermination: Start=Sowing; End=Germination
          EmergingPhase GerminationToEmergence: Start=Germination; End=Emergence; ShootLag=40; ShootRate=1.5
            VariableReference ThermalTime: VariableName=[Phenology].ThermalTime.Value
          GenericPhase EmergenceEndOfJuvenilePhase: Start=Emergence; End=EndOfJuvenile
            Constant Target: Value=1
            VariableReference ThermalTime: VariableName=[Phenology].ThermalTime.Value
          GenericPhase EndOfJuvenileFloralInitiationPhase: Start=EndOfJuvenile; End=FloralInitiation
            MultiplyFunction ThermalTime
              VariableReference ThermalTime: VariableName=[Phenology].ThermalTime.Value
              VariableReference VernEff1: VariableName=[Phenology].Vernalisation.VernEff
              VariableReference PhotopEff: VariableName=[Phenology].Vernalisation.PhotopEff
            Constant Target: Value=200
          GenericPhase FloralInitiationToDoubleRidgePhase: Start=FloralInitiation; End=DoubleRidge
            MultiplyFunction ThermalTime: same as PMFWheatTestBase.Field.WheatPMFPrototype.Phenology.EndOfJuvenileFloralInitiationPhase.ThermalTime
            Constant Target: Value=100
          GenericPhase DoubleRidgeToTerminalSpikelet: Start=DoubleRidge; End=TerminalSpikelet
            MultiplyFunction ThermalTime: same as PMFWheatTestBase.Field.WheatPMFPrototype.Phenology.EndOfJuvenileFloralInitiationPhase.ThermalTime
            Constant Target: Value=100
          GenericPhase TerminalSpikeletToFloweringPhase: Start=TerminalSpikelet; End=Flowering
            MultiplyFunction ThermalTime
              VariableReference ThermalTime: VariableName=[Phenology].ThermalTime.Value
              VariableReference PhotopEff: VariableName=[Phenology].Vernalisation.PhotopEff
            Constant Target: Value=630
          GenericPhase FloweringStartGrainFillPHase: Start=Flowering; End=StartGrainFill
            Constant Target: Value=120
            VariableReference ThermalTime: VariableName=[Phenology].ThermalTime.Value
          GenericPhase GrainFillingPhase: Start=StartGrainFill; End=EndGrainFill
            Constant Target: Value=545
            VariableReference ThermalTime: VariableName=[Phenology].ThermalTime.Value
          GenericPhase MaturityPhase: Start=EndGrainFill; End=Maturity
            Constant Target: Value=35
            VariableReference ThermalTime: VariableName=[Phenology].ThermalTime.Value
          GenericPhase HarvestRipePhase: Start=Maturity; End=HarvestRipe
            Constant Target: Value=1
            VariableReference ThermalTime: VariableName=[Phenology].ThermalTime.Value
          EndPhase ReadyForHarvesting: Start=HarvestRipe; End=Unused
            VariableReference ThermalTime: VariableName=[Phenology].ThermalTime.Value
          PhotoperiodFunction Photoperiod: Twilight=-6
          VernalisationCW Vernalisation: StartStageForEffects=Emergence; EndStageForEffects=Flowering; StartStageForCumulativeVD=Germination; EndStageForCumulativeVD=TerminalSpikelet; VernSens=0.8; PhotopSens=0.7
        Structure: InitialiseStage=Emergence; PrimaryBudNo=1
          PhaseLookup MainStemPrimordiaInitiationRate
            PhaseLookupValue MainStemPrimordiaInitiationRate: Start=Emergence; End=TerminalSpikelet
              DivideFunction NodeInitiationRateFunction
                VariableReference Phyllochron
                  VariableName=[Structure].MainStemNodeAppearanceRate.BasePhyllochron.Value
                Constant PrimordiaPerMainstemNode: Value=2
          MultiplyFunction MainStemNodeAppearanceRate
            LinearInterpolationFunction LeafStageFactor: XProperty=[Structure].MainStemNodeNo
              XYPairs: X=[0, 2, 7, 14]; Y=[0.6, 0.8, 1.3, 1.4]
            Constant BasePhyllochron: Value=120
          HeightFunction HeightModel
            LinearInterpolationFunction PotentialHeight: XProperty=[Phenology].Stage
              XYPairs: X=[3, 4, 4.8, 6, 7]; Y=[10, 50, 100, 1100, 1200]
            LinearInterpolationFunction WaterStress: XProperty=[WheatPMFPrototype].WaterSupplyDemandRatio
              XYPairs: X=[0.3, 1]; Y=[0, 1]
          MultiplyFunction BranchingRate
            PhaseLookup PotentialBranchingRate
              PhaseLookupValue Vegetative: Start=Emergence; End=TerminalSpikelet
                LinearInterpolationFunction PotentialBranchingRate: XProperty=[Leaf].AppearedCohortNo
                  XYPairs: X=[1, 2, 5, 14]; Y=[0, 1, 2, 2]
              PhaseLookupValue Reproductive: Start=TerminalSpikelet; End=HarvestRipe
                Constant Zero: Value=0
            LinearInterpolationFunction WaterStress: XProperty=[WheatPMFPrototype].WaterSupplyDemandRatio
              XYPairs: X=[0, 1]; Y=[0, 1]
            LinearInterpolationFunction Shading: XProperty=[Leaf].CoverGreen
              XYPairs: X=[0, 0.6, 0.7]; Y=[1, 1, 0]
          PhaseLookup ShadeInducedBranchMortality
            PhaseLookupValue Vegetative: Start=Emergence; End=StartGrainFill
              LinearInterpolationFunction ShadeInducedBranchMortality: XProperty=[Leaf].CoverGreen
                XYPairs: X=[0, 0.98, 0.99, 1]; Y=[0, 0, 0.01, 0.01]
          PhaseLookup DroughtInducedBranchMortality
            PhaseLookupValue Vegetative: Start=Emergence; End=StartGrainFill
              LinearInterpolationFunction DroughtInducedBranchMortality: XProperty=[WheatPMFPrototype].WaterSupplyDemandRatio
                XYPairs: X=[0.1, 0.6]; Y=[0.1, 0]
          VariableReference ThermalTime: VariableName=[Phenology].ThermalTime.Value
          Constant MaximumMainStemNodeNumber: Value=18
          MainStemFinalNodeNumberFunction MainStemFinalNodeNumber: MaximumMainStemNodeNumber=0
        ReproductiveOrgan Grain: MaximumSize=0.052; RipeStage=Ripe; Number=0
          Biomass Live
          Biomass Dead
          Constant MaxNConcDailyGrowth: Value=0.03
          Constant WaterContent: Value=0.12
          Constant MinimumNConc: Value=0.006
          Constant MaximumNConc: Value=0.022
          PhaseBasedSwitch NitrogenDemandSwitch: Start=Germination; End=Maturity
          AccumulateFunction AccumThermalTime: StartStageName=Flowering; EndStageName=Maturity
            VariableReference DailyThermalTimeValue: VariableName=[Phenology].ThermalTime.Value
          AirTemperatureFunction FillingRate
            XYPairs: X=[0, 26, 30, 35]; Y=[0, 0.0015, 0.0015, 0.0015]
          AirTemperatureFunction NFillingRate
            XYPairs: X=[0, 25, 30, 35]; Y=[0, 55, 55, 55]
          PhaseLookup DMDemandFunction
            PhaseLookupValue Grainfilling: Start=StartGrainFill; End=EndGrainFill
              MinimumFunction
                MultiplyFunction Demand
                  VariableReference GrainNumber: VariableName=[Grain].NumberFunction.Value
                  AirTemperatureFunction FillingRate
                    XYPairs: X=[0, 26, 30, 35]; Y=[0, 0.0015, 0.0015, 0.0015]
                MultiplyFunction Capacity
                  SubtractFunction IndividualGrainCapacity
                    Constant MaximumGrainSize: Value=0.042
                    DivideFunction CurrentSize
                      VariableReference Wt: VariableName=[Grain].Live.Wt
                      VariableReference GrainNumber: VariableName=[Grain].NumberFunction.Value
                  VariableReference GrainNumber: VariableName=[Grain].NumberFunction.Value
          MultiplyFunction NumberFunction
            VariableReference StemNumber: VariableName=[Structure].TotalStemPopn
            LinearInterpolationFunction GrainsPerSpike: XProperty=[Spike].Live.Wt
              XYPairs: X=[0, 1]; Y=[0, 80]
            Constant FertileTillers: Value=1
        Root: InitialDM=0.2; SpecificRootLength=40000; KNO3=0.03; KNH4=0; NuptakeSupply=0
          CompositeBiomass Live: Propertys=[[Root].LayerLive]
          CompositeBiomass Dead: Propertys=[[Root].LayerDead]
          LinearInterpolationFunction KLModifier: XProperty=[Leaf].LAI
            XYPairs: X=[0, 3]; Y=[1, 1]
          Constant SoilWaterEffect: Value=1
          AirTemperatureFunction TemperatureEffect
            XYPairs: X=[0, 26, 35]; Y=[1, 1, 1]
          Constant MaxDailyNUptake: Value=20
          Constant SenescenceRate: Value=0
          Constant StructuralFraction: Value=1
          Constant MaximumNConc: Value=0.01
          Constant MinimumNConc: Value=0.01
          Constant PartitionFraction: Value=0.1
          PhaseLookup RootFrontVelocity
            PhaseLookupValue PreEmergence: Start=Germination; End=Emergence
              Constant Function: Value=5
            PhaseLookupValue PostEmergence: Start=Emergence; End=Maturity
              Constant Function: Value=30
          PhaseBasedSwitch NitrogenDemandSwitch: Start=Germination; End=Maturity
        Leaf: CurrentExpandingLeaf=0; StartFractionExpanded=0; FractionNextleafExpanded=0; _ExpandedNodeNo=0; DeadNodesYesterday=0; MaxCover=1; PotentialEP=0; KDead=0.03; GsMax=0.03; R50=200; Emissivity=0.96; Albido=0.26; FractionDied=0
          LeafCohort InitialLeaves[1]: Rank=1; Area=200
          LeafCohort InitialLeaves[2]: Rank=2; Area=0
          CompositeBiomass Live: Propertys=[[Leaf].CohortLive]
          CompositeBiomass Dead: Propertys=[[Leaf].CohortDead]
          ArrayBiomass CohortArrayLive: Propertys=[[Leaf].Live]; ArraySize=[Leaf].MaxNodeNo
          ArrayBiomass CohortArrayDead: Propertys=[[Leaf].Dead]; ArraySize=[Leaf].MaxNodeNo
          InitialLeafValues
            Constant NReallocationFactor: Value=0.05
            Constant NRetranslocationFactor: Value=0.1
            Constant DMReallocationFactor: Value=1
            Constant DMRetranslocationFactor: Value=0.5
            LinearInterpolationFunction CellDivisionStress: XProperty=[WheatPMFPrototype].WaterSupplyDemandRatio
              XYPairs: X=[0.5, 1]; Y=[0.1, 1]
            LinearInterpolationFunction ExpansionStress: XProperty=[WheatPMFPrototype].WaterSupplyDemandRatio
              XYPairs: X=[0.3, 1]; Y=[0, 1]
            MultiplyFunction GrowthDuration
              VariableReference Phyllochron
                VariableName=[Structure].MainStemNodeAppearanceRate.BasePhyllochron.Value
              LinearInterpolationFunction NumberOfExpandingLeaves: XProperty=[Structure].RelativeNodeApperance
                XYPairs: X=[0, 1]; Y=[1, 1]
            Constant LagDuration: Value=900
            Constant SenescenceDuration: Value=200
            Constant DetachmentLagDuration: Value=1000000
            Constant DetachmentDuration: Value=1000000
            Constant RelativeBranchLeafSize: Value=1
            Constant MaximumNConc: Value=0.063
            Constant CriticalNConc: Value=0.05
            Constant MinimumNConc: Value=0.01
            AddFunction DroughtInducedSenAcceleration
              Constant One: Value=1
              MultiplyFunction Stress
                Constant StressResponseCoefficient: Value=1
                LinearInterpolationFunction StressFactor: XProperty=[WheatPMFPrototype].WaterSupplyDemandRatio
                  XYPairs: X=[0, 0.7]; Y=[1, 0]
            LinearInterpolationFunction SpecificLeafAreaMax: XProperty=[Structure].MainStemNodeNo
              XYPairs: X=[0, 9]; Y=[20000, 20000]
            LinearInterpolationFunction SpecificLeafAreaMin: XProperty=[Structure].MainStemNodeNo
              XYPairs: X=[0, 9]; Y=[10000, 10000]
            Constant InitialNConc: Value=0
            Constant StructuralFraction: Value=0.5
            Constant NonStructuralFraction: Value=0
            LinearInterpolationFunction ShadeInducedSenescenceRate: XProperty=[Leaf].CohortCurrentRankCoverAbove
              XYPairs: X=[0, 0.7, 0.8, 0.97, 0.98]; Y=[0, 0, 0, 0, 0]
            MultiplyFunction MaxArea
              LinearInterpolationFunction Length: XProperty=[Structure].MainStemNodeNo
                XYPairs: X=[1, 10, 15]; Y=[100, 270, 200]
              LinearInterpolationFunction Width: XProperty=[Structure].MainStemNodeNo
                XYPairs: X=[1, 9, 15]; Y=[4, 14, 22]
              Constant TaperFactor: Value=0.61
          RUEModel Photosynthesis
            Constant RUE: Value=1.24
            WeightedTemperatureFunction FT: MaximumTemperatureWeighting=0.75
              XYPairs: X=[0, 10, 25, 35]; Y=[0, 1, 1, 0]
            LinearInterpolationFunction FVPD: XProperty=[Leaf].Photosynthesis.VPD
              XYPairs: X=[0, 10, 50]; Y=[1, 1, 1]
            LinearInterpolationFunction FN: XProperty=[Leaf].Fn
              XYPairs: X=[0, 1, 1.5]; Y=[0, 1, 1]
            LinearInterpolationFunction FW: XProperty=[Leaf].Fw
              XYPairs: X=[0, 0.3]; Y=[0, 1]
            RUECO2Function FCO2: PhotosyntheticPathway=C3
          MultiplyFunction ExtinctionCoeff
            LinearInterpolationFunction PotentialExtinctionCoeff: XProperty=[Leaf].LAI
              XYPairs: X=[0, 0.45]; Y=[0.7, 0.7]
            LinearInterpolationFunction WaterStress: XProperty=[WheatPMFPrototype].WaterSupplyDemandRatio
              XYPairs: X=[0, 0.7]; Y=[0.5, 1]
          LinearInterpolationFunction FrostFraction: XProperty=[Weather].MinT
            XYPairs: X=[-1, 0]; Y=[0, 0]
          VariableReference ThermalTime: VariableName=[Phenology].ThermalTime.Value
        GenericAboveGroundOrgan Spike
          PopulationBasedDemandFunction DMDemandFunction: StartStage=5.2; GrowthDuration=453; MaximumOrganWt=0.7
            VariableReference ThermalTime: VariableName=[Phenology].ThermalTime.Value
            Constant ExpansionStress: Value=1
          Biomass Live
          Biomass Dead
          Constant NReallocationFactor: Value=0
          Constant NRetranslocationFactor: Value=0.1
          Constant MaximumNConc: Value=0.01
          Constant StructuralFraction: Value=1
          Constant MinimumNConc: Value=0.01
        GenericAboveGroundOrgan Stem
          Biomass Live
          Biomass Dead
          MinimumFunction DMDemandFunction
            MultiplyFunction NodeNumberLimitedDemand
              LinearInterpolationFunction SpecificStemDensityMax: XProperty=[Phenology].Stage
                XYPairs: X=[3, 4, 6]; Y=[0, 6, 30]
              VariableReference DeltaNodes: VariableName=[Structure].DeltaNodeNumber
              VariableReference Stems: VariableName=[Structure].TotalStemPopn
            MultiplyFunction HeightLimitedDemand
              Constant SpecificStemLengthMax: Value=0.022
              VariableReference DeltaHeight: VariableName=[Structure].HeightModel.DeltaHeight
              VariableReference Stems: VariableName=[Structure].TotalStemPopn
          Constant StructuralFraction: Value=0.7
          LinearInterpolationFunction MaximumNConc: XProperty=[Phenology].Stage
            XYPairs: X=[3, 4, 5.3]; Y=[0.06, 0.06, 0.025]
          Constant MinimumNConc: Value=0.006
          PhaseBasedSwitch NitrogenDemandSwitch: Start=Emergence; End=StartGrainFill
          Constant NReallocationFactor: Value=0
          Constant NRetranslocationFactor: Value=0.5
          Constant DMRetranslocationFactor: Value=0.5
        Summariser
          CompositeBiomass AboveGround
            Propertys=[[Leaf].Live, [Leaf].Dead, [Stem].Live, [Stem].Dead, [Spike].Live, [Spike].Dead, [Grain].Live, [Grain].Dead]
          CompositeBiomass BelowGround: Propertys=[[Root].Live, [Root].Dead]
          CompositeBiomass Total
            Propertys=[[Leaf].Live, [Leaf].Dead, [Stem].Live, [Stem].Dead, [Root].Live, [Root].Dead, [Spike].Live, [Spike].Dead, [Grain].Live, [Grain].Dead]
          CompositeBiomass TotalLive
            Propertys=[[Leaf].Live, [Stem].Live, [Root].Live, [Spike].Live, [Grain].Live]
          CompositeBiomass TotalDead
            Propertys=[[Leaf].Dead, [Stem].Dead, [Root].Dead, [Spike].Dead, [Grain].Dead]
      MicroClimate: air_pressure=1010; soil_emissivity=0.96; sun_angle=15; soil_heat_flux_fraction=0.4; night_interception_fraction=0.5; windspeed_default=3; refheight=2; albedo=0.26; emissivity=0.96; gsmax=0.01; r50=200; a_interception=0; b_interception=1; c_interception=0; d_interception=0; soil_albedo=0.23
      Irrigation
      Fertiliser
      Operations sowing
        1998-06-03  [WheatPMFPrototype].Sow(cultivar:"hartog", population:120, depth:50, rowSpacing:250);
      SurfaceOrganicMatter surface organic matter: PondActive=no; ReportAdditions=no; ReportRemovals=no; PoolName=wheat; type=wheat; mass=2000; standing_fraction=0; cnr=80; CriticalResidueWeight=2000; OptimumDecompTemp=20; MaxCumulativeEOS=20; CNRatioDecompCoeff=0.277; CNRatioDecompThreshold=25; TotalLeachRain=25; MinRainToLeach=10; CriticalMinimumOrganicC=0.004; DefaultCPRatio=0; DefaultStandingFraction=0; StandingExtinctCoeff=0.5; FractionFaecesAdded=0.5
        Pools:
          {PoolName=wheat, ResidueType=wheat, Mass=2000, CNRatio=80, StandingFraction=0}
        ResidueTypes: LoadFromResource=ResidueTypes
        TillageTypes TillageTypesList
      Report: EventNames=[Clock].DoReport
        VariableNames:
          [Clock].Today
          [WheatPMFPrototype].Phenology.CurrentPhaseName
          [WheatPMFPrototype].Phenology.Stage
