Simulations
  DataStore
  Experiment BTOS_2008GE3
    Factors
      Factor Cultivar: Specifications=[Operations]
        Operations hartog
          2008-06-03  [WheatPMFPrototype].Sow(cultivar:"hartog", population:120, depth:50, rowSpacing:250);
    Simulation: Area=0; Slope=0
      Weather
        FileName=%root%\Tests\WheatPMFPrototype\Mets\geraldton airport_btos.met
      Clock: StartDate=2008-05-24; EndDate=2009-06-03
      Summary
      Zone Field: Area=0; Slope=0
        Plant WheatPMFPrototype: CropType=Wheat
        Operations
          2008-06-03  [WheatPMFPrototype].Sow(cultivar:"hartog", population:120, depth:50, rowSpacing:250);
        Report: EventNames=[Clock].DoReport
          VariableNames:
            [Clock].Today
            [WheatPMFPrototype].Phenology.CurrentPhaseName
            [WheatPMFPrototype].Phenology.Stage
            [WheatPMFPrototype].Phenology.Vernalisation.PhotopEff
            [WheatPMFPrototype].Phenology.Vernalisation.VernEff
            [WheatPMFPrototype].Phenology.Vernalisation.VernSens
            [WheatPMFPrototype].Phenology.Vernalisation.PhotopSens
            [WheatPMFPrototype].Phenology.FloralInitiationFloweringPhase.Target
