Simulations Standard toolbox
  Folder Structural
    Folder
    Zone: Area=0; Slope=0
  Folder Standard models
    Weather: FileName=Goondiwindi.met
    Clock: StartDate=1940-01-01; EndDate=1989-12-31
    Summary
    Arbitrator: NutrientUptakeMethod=0
    Supplement: SpoilageTime=0
      stores:
        {IsRoughage=true, DMContent=0.85, DMD=0, MEContent=0, CPConc=0, ProtDg=0, PConc=0, SConc=0, EEConc=0, ADIP2CP=0, AshAlk=0, MaxPassage=0, Name=fodder, Stored=0}
    Report: EventNames=[Clock].EndOfDay
      VariableNames:
        [Clock].Today
        [Weather].MaxT
        [Weather].MinT
        [Weather].Radn
        [Weather].Rain
    Fertiliser
    Irrigation
    Operations
    Soil: SoilType=Black Vertosol; LocalName=Waco; Site=Jimbour; NearestTown=Jimbour, Q 4352; Region=South East Queensland; NaturalVegetation=Grassland, mainly Qld bluegrass; Latitude=0; Longitude=0
      Water
        Thickness  BD    AirDry  LL15  DUL   SAT
        150        1.02  0.15    0.29  0.54  0.59
        150        1.03  0.26    0.29  0.53  0.58
        300        1.02  0.29    0.29  0.54  0.59
        300        1.02  0.29    0.29  0.54  0.58
        300        1.06  0.3     0.3   0.52  0.57
        300        1.11  0.31    0.31  0.5   0.55
        300        1.12  0.32    0.32  0.5   0.55
        300        1.15  0.33    0.33  0.48  0.53
        300        1.18  0.34    0.34  0.47  0.52
        300        1.2   0.35    0.35  0.46  0.51
        300        1.25  0.36    0.36  0.44  0.49
        SoilCrop WheatSoil
          LL=[0.29, 0.29, 0.32, 0.38, 0.39, 0.39, 0.41, 0.48, 0.47, 0.46, 0.44]
          KL=[0.1, 0.1, 0.08, 0.06, 0.04, 0.02, 0.01, 0, 0, 0, 0]
          XF=[1, 1, 1, 1, 1, 1, 1, 0, 0, 0, 0]
        SoilCropOilPalm OilPalm: XF=[1, 1, 1, 1, 1, 1, 1, 1, 1, 0, 0, 0]
          KL=[0.06, 0.04, 0.03, 0.02, 0.02, 0.02, 0.01, 0.01, 0.01, 0, 0, 0]
      SoilWater: residueinterception=0; SummerDate=1-Nov; SummerU=6; SummerCona=3.5; WinterDate=1-Apr; WinterU=6; WinterCona=3.5; DiffusConst=40; DiffusSlope=16; Salb=0.13; CN2Bare=73; CNRed=20; CNCov=0.8; max_pond=0; Thickness=[150, 150, 300, 300, 300, 300, 300, 300, 300, 300, 300]; SWCON=[0.3, 0.3, 0.3, 0.3, 0.3, 0.3, 0.3, 0.3, 0.3, 0.3, 0.3]
      SoilNitrogen: fom_type=[default, manure, mucuna, lablab, shemp, stable]; fract_carb=[0.2, 0.3, 0.54, 0.57, 0.45, 0]; fract_cell=[0.7, 0.3, 0.37, 0.37, 0.47, 0.1]; fract_lign=[0.1, 0.4, 0.09, 0.06, 0.08, 0.9]; wfpsN2N2O_x=[22, 88]; wfpsN2N2O_y=[0.1, 1]
      SoilOrganicMatter: RootCN=40; RootWt=200; SoilCN=12.5; EnrACoeff=7.4; EnrBCoeff=0.2; OCUnits=Total
        Thickness  OC    FBiom  FInert
        150        1.04  0.025  0.4
        150        0.89  0.02   0.6
        300        0.89  0.015  0.8
        300        0.89  0.01   0.9
        300        0.77  0.01   0.95
        300        0.45  0.01   0.95
        300        0.27  0.01   0.95
        300        0.22  0.01   0.95
        300        0.16  0.01   0.95
        300        0.13  0.01   0.95
        300        0.12  0.01   0.95
      Analysis: PHUnits=Water; BoronUnits=HotWater
        Thickness  EC    PH
        150        0.2   8.4
        150        0.25  8.8
        300        0.31  9
        300        0.4   9.2
        300        0.59  9.2
        300        0.84  9.1
        300        0.93  9
        300        1.01  9
        300        1.06  8.9
        300        1.05  8.9
        300        1.01  8.9
      InitialWater Initial water: PercentMethod=FilledFromTop; FractionFull=1
      Sample: NO3Units=ppm; NH4Units=ppm; SWUnits=Volumetric; OCUnits=Total; PHUnits=Water
        Thickness  NO3    NH4
        150        6.503  0.599004
        150        2.101  0.100001
        300        2.101  0.100001
        300        1.701  0.100001
        300        1.701  0.100001
        300        1.701  0.100001
        300        1.701  0.100001
        300        1.701  0.100001
        300        1.701  0.100001
        300        1.701  0.100001
        300        1.701  0.100001
    SurfaceOrganicMatter: PoolName=wheat; type=wheat; mass=1000; standing_fraction=0; cnr=80; CriticalResidueWeight=2000; OptimumDecompTemp=20; MaxCumulativeEOS=20; CNRatioDecompCoeff=0.277; CNRatioDecompThreshold=25; TotalLeachRain=25; MinRainToLeach=10; CriticalMinimumOrganicC=0.004; DefaultCPRatio=0; DefaultStandingFraction=0; StandingExtinctCoeff=0.5; FractionFaecesAdded=0.5
      Pools:
        {PoolName=wheat, ResidueType=wheat, Mass=1000, CNRatio=80, StandingFraction=0}
      ResidueTypes ResidueTypesList: LoadFromResource=ResidueTypes
        ResidueType wheat: fom_type=inert; fraction_C=0.08; po4ppm=10; nh4ppm=10; no3ppm=10; specific_area=0.0001; cf_contrib=1; pot_decomp_rate=0.1; fr_c=[0.3, 0.3, 0.4]; fr_n=[0.3, 0.3, 0.4]; fr_p=[0.3, 0.3, 0.4]
      TillageTypes TillageTypesList
    MicroClimate: air_pressure=1010; soil_emissivity=0.96; sun_angle=15; soil_heat_flux_fraction=0.4; night_interception_fraction=0.5; windspeed_default=3; refheight=2; albedo=0.15; emissivity=0.96; gsmax=0.01; r50=200; a_interception=0; b_interception=1; c_interception=0; d_interception=0; soil_albedo=0.23
    Log
  Folder Crops
    Plant Slurp: CropType=Slurp
      Cultivar StaticCrop: Alias=StaticCrop
      OrganArbitrator Arbitrator: NArbitrationOption=PriorityThenRelativeAllocation; DMArbitrationOption=RelativeAllocation
      Root: InitialDM=50; SpecificRootLength=40000; KNO3_yProperty=[0.02, 0.02]; KNO3_xRootLength=[0, 0.003]; KNH4_yProperty=[0, 0]; KNH4_xRootLength=[0, 0.003]
        CompositeBiomass Live: Propertys=[[Root].LayerLive]
        CompositeBiomass Dead: Propertys=[[Root].LayerDead]
        Constant NitrogenDemandSwitch: Value=1
        AirTemperatureFunction TemperatureEffect
          XYPairs: X=[0, 26, 35]; Y=[1, 1, 1]
        Constant RootFrontVelocity: Value=0
        Constant PartitionFraction: Value=0
        Constant MaximumNConc: Value=0.01
        Constant MaxDailyNUptake: Value=6
        Constant MinimumNConc: Value=0.01
        Constant KLModifier: Value=1
      SimpleLeaf Leaf
        Biomass Live
        Biomass Dead
        Constant FRGRFunction: Value=1
        Constant PotentialBiomass: Value=5
        PartitionFractionDemandFunction DMDemandFunction
          Constant PartitionFraction: Value=1
        Constant NConc: Value=.05
        Constant LAIFunction: Value=5
        Constant ExtinctionCoefficientFunction: Value=0.7
        Constant HeightFunction: Value=150
        Constant StructuralFraction: Value=0.5
    Plant MCSP: CropType=MCSP
      OrganArbitrator={NArbitrationOption=RelativeAllocation, DMArbitrationOption=RelativeAllocation}
      Root={InitialDM=0.2, SpecificRootLength=40000, KNO3_yProperty=[0.02, 0.02], KNO3_xRootLength=[0, 0.003], KNH4_yProperty=[0, 0], KNH4_xRootLength=[0, 0.003], CompositeBiomass=[{Name=Live, Propertys=[[Root].LayerLive]}, {Name=Dead, Propertys=[[Root].LayerDead]}], LinearInterpolationFunction={Name=KLModifier, XProperty=[Leaf].LAI, XYPairs={Name=XYPairs, X=[0, 200, 1500], Y=[1, 1, 0]}}, Constant=[{Name=SoilWaterEffect, Value=1.0}, {Name=MaxDailyNUptake, Value=12}, {Name=SenescenceRate, Value=0.0}, {Name=MaximumNConc, Value=0.009}, {Name=MinimumNConc, Value=0.009}, {Name=TemperatureEffect, Value=1}, {Name=MaximumRootDepth, Value=1500}], PhaseLookup={Name=PartitionFraction, PhaseLookupValue={Start=Germination, End=Maturity, VariableReference={Name=PartitionFraction, VariableName=[RootProportion].Value}}}, PhaseBasedSwitch={Name=NitrogenDemandSwitch, Start=Germination, End=Maturity}, MultiplyFunction={Name=RootFrontVelocity, LessThanFunction={Name=RootFrontVelocity, VariableReference={VariableName=[Phenology].AccumulatedThermalTime.Value}, Constant=[{Name=Criteria, Value=2010}, {Name=IfTrue, Value=10}, {Name=IfFalse, Value=0}]}, VariableReference={Name=ThermalTime, VariableName=[Phenology].ThermalTime.Value}}}
      Nodule={Biomass=[{Name=Live}, {Name=Dead}], Constant=[{Name=FixationSwitch, Value=0}, {Name=MaximumNConc, Value=0}, {Name=MinimumNConc, Value=0}, {Name=DMDemandFunction}, {Name=FT, Value=1}, {Name=FW, Value=1}, {Name=FWlog, Value=0.01}, {Name=FixationMetabolicCost, Value=0}, {Name=SpecificNitrogenaseActivity, Value=0}]}
      Phenology
        AirTemperatureFunction ThermalTime
          XYPairs: X=[0, 30, 40]; Y=[0, 30, 0]
        GerminatingPhase Germinating: Start=Sowing; End=Germination
        EmergingPhase Emerging: Start=Germination; End=Emergence; ShootLag=0; ShootRate=0
          VariableReference ThermalTime: VariableName=[Phenology].ThermalTime.Value
        GenericPhase CanopyExpanding: Start=Emergence; End=StartReproductive
          Constant Target: Value=1000
          VariableReference ThermalTime: VariableName=[Phenology].ThermalTime.Value
        GenericPhase YieldIncreasing: Start=StartReproductive; End=StartSenescence
          Constant Target: Value=600
          VariableReference ThermalTime: VariableName=[Phenology].ThermalTime.Value
        GenericPhase Senescing: Start=StartSenescence; End=EndReproductive
          Constant Target: Value=600
          VariableReference ThermalTime: VariableName=[Phenology].ThermalTime.Value
        GenericPhase Maturing: Start=EndReproductive; End=Maturity
          Constant Target: Value=600
          VariableReference ThermalTime: VariableName=[Phenology].ThermalTime.Value
        EndPhase ReadyForHarvest: Start=Maturity; End=Unused
          VariableReference ThermalTime: VariableName=[Phenology].ThermalTime.Value
        AccumulateFunction AccumulatedThermalTime: StartStageName=Emergence; EndStageName=Maturity
          VariableReference ThermalTime: VariableName=[Phenology].ThermalTime.Value
        AccumulateFunction AccumulatedEmergingThermalTime: StartStageName=Germination; EndStageName=Emergence
          VariableReference ThermalTime: VariableName=[Phenology].ThermalTime.Value
      SimpleLeaf Leaf
        XYPairs FT: X=[5, 20, 25, 40]; Y=[1, 1, 1, 1, 1]
        XYPairs FVPD: X=[0, 10, 50]; Y=[0, 0, 0]
        Biomass Live
        Biomass Dead
        Constant NConc: Value=0.008
        PhaseLookup NitrogenDemandSwitch
          PhaseLookupValue PreErmergence: Start=Sowing; End=Emergence
            Constant Function: Value=0
          PhaseLookupValue Expanding: Start=Emergence; End=StartSenescence
            Constant Function: Value=1
          PhaseLookupValue Senescence: Start=StartSenescence; End=EndReproductive
            Constant:
              {Value=0}
          PhaseLookupValue Mature: Start=EndReproductive; End=Maturity
            Constant:
              {Value=0}
        DeltaFunction PotentialBiomass
          SigmoidFunction2 Integral: Xo=1080; b=216
            VariableReference Ymax1: VariableName=[Ymax].Value
            VariableReference XValue: VariableName=[Phenology].AccumulatedThermalTime.Value
        PartitionFractionDemandFunction DMDemandFunction
          PhaseLookup PartitionFraction
            PhaseLookupValue PreErmergence: Start=Sowing; End=Emergence
              Constant Function: Value=0
            PhaseLookupValue Expanding: Start=Emergence; End=StartReproductive
              SubtractFunction DMPartitionCoefficient
                Constant:
                  {Value=1}
                VariableReference RootFraction: VariableName=[RootProportion].Value
            PhaseLookupValue YieldIncreasing: Start=StartReproductive; End=StartSenescence
              DivideFunction:
                {Name=Stover, MultiplyFunction=[{Name=StoverAtMaturity, VariableReference={Name=TotalBiomassAtMaturity, VariableName=[Ymax].Value}, SubtractFunction=[{Name=AboveGroundProportion, Constant={Value=1}, VariableReference={Name=RootFraction, VariableName=[RootProportion].Value}}, {Name=StoverProportion, Constant={Value=1}, VariableReference={Name=HI, VariableName=[HarvestIndex].Value}}]}, {Name=StoverAtStartReproductive, VariableReference={Name=BiomassAtStartReproductive, VariableName=[TotalBiomassAtStartReproductive].Value}, SubtractFunction={Name=AboveGroundProportion, Constant={Value=1}, VariableReference={Name=RootFraction, VariableName=[RootProportion].Value}}}]}
                {Name=TotalBiomass, VariableReference=[{Name=BiomassAtStartSenescence, VariableName=[TotalBiomassAtStartSenescence].Value}, {Name=BiomassAtStartReproductive, VariableName=[TotalBiomassAtStartReproductive].Value}]}
            PhaseLookupValue Maturing: Start=StartSenescence; End=Maturity
              Constant Function: Value=0
        PhaseLookup CoverFunction
          PhaseLookupValue PreErmergence: Start=Sowing; End=Emergence
            Constant Function: Value=0
          PhaseLookupValue Expanding: Start=Emergence; End=StartSenescence
            SigmoidFunction2 SigCoverFunction: Xo=540; b=120
              Constant Ymax: Value=0.97
              VariableReference XValue: VariableName=[Phenology].AccumulatedThermalTime.Value
          PhaseLookupValue Senescence: Start=StartSenescence; End=Maturity
            MultiplyFunction TotalCoverLoss
              OnEventFunction MaxCoverFunction: SetEvent=StartSenescence; ReSetEvent=never
                Constant PreEventValue: Value=0
                VariableReference PostEventValue: VariableName=[Leaf].CoverFunction.Expanding.SigCoverFunction.Ymax.Value
              SubtractFunction LossOfCover
                Constant:
                  {Value=0.999}
                MultiplyFunction PCLoss
                  DivideFunction SenescenceRate
                    Constant Inverse: Value=1
                    VariableReference Duration: VariableName=[Phenology].Senescing.Target.Value
                  SubtractFunction TTSenesce
                    VariableReference XValue: VariableName=[Phenology].AccumulatedThermalTime.Value
                    OnEventFunction TTToSenescence: SetEvent=StartSenescence; ReSetEvent=Maturity
                      VariableReference XValue: VariableName=[Phenology].AccumulatedThermalTime.Value
                      Constant PreEventValue: Value=3000
                      Constant PostEventValue: Value=0
          PhaseLookupValue Mature: Start=Maturity; End=Unused
            Constant:
              {Value=0}
        Constant FRGRFunction: Value=1
        Constant HeightFunction: Value=150
        Constant ExtinctionCoefficientFunction: Value=0.5
      GenericAboveGroundOrgan Product
        Biomass Live
        Biomass Dead
        Constant MaximumNConc: Value=0.012
        Constant MinimumNConc: Value=0.008
        PartitionFractionDemandFunction DMDemandFunction
          PhaseLookup PartitionFraction
            PhaseLookupValue PreErmergence: Start=Sowing; End=Emergence
              Constant Function: Value=0
            PhaseLookupValue Expanding: Start=Emergence; End=StartReproductive
              Constant Function: Value=0
            PhaseLookupValue YieldIncreasing: Start=StartReproductive; End=StartSenescence
              SubtractFunction ProductProportion
                Constant:
                  {Value=1}
                VariableReference RootFraction: VariableName=[RootProportion].Value
                VariableReference StoverFraction
                  VariableName=[Leaf].DMDemandFunction.PartitionFraction.YieldIncreasing.Value
            PhaseLookupValue Maturing: Start=StartSenescence; End=Maturity
              SubtractFunction DMPartitionCoefficient
                Constant:
                  {Value=1}
                VariableReference RootFraction: VariableName=[RootProportion].Value
        SubtractFunction WaterContent
          Constant One: Value=1.0
          VariableReference DMcontent: VariableName=[ProductDMProportion].Value
      Summariser
        CompositeBiomass Total
          Propertys=[[Leaf].Live, [Leaf].Dead, [Product].Live, [Product].Dead, [Root].Live, [Root].Dead]
      Constant ExpectedYield: Value=800
      LinearInterpolationFunction HarvestIndex: XProperty=[ExpectedYield].Value
        XYPairs: X=[0, 696, 1392]; Y=[0.14, 0.46, 0.78]
      Constant RootProportion: Value=0.1
      Constant ProductDMProportion: Value=0.87
      MultiplyFunction DryYield
        VariableReference FreshYld: VariableName=[ExpectedYield].Value
        VariableReference DMPercent: VariableName=[ProductDMProportion].Value
      SigmoidFunction2 TotalBiomassAtStartReproductive: Xo=1080; b=216
        VariableReference Ymax1: VariableName=[Ymax].Value
        VariableReference XValue: VariableName=[Phenology].CanopyExpanding.Target.Value
      SigmoidFunction2 TotalBiomassAtStartSenescence: Xo=1080; b=216
        AddFunction XValue
          VariableReference CanopyExpandingTT: VariableName=[Phenology].CanopyExpanding.Target.Value
          VariableReference YieldIncreasingTT: VariableName=[Phenology].YieldIncreasing.Target.Value
        VariableReference Ymax1: VariableName=[Ymax].Value
      DivideFunction Ymax
        LessThanFunction={VariableReference=[{VariableName=[HarvestIndex].Value}, {Name=IfFalse, VariableName=[HarvestIndex].Value}], Constant=[{Name=Criteria, Value=0.011}, {Name=IfTrue, Value=1}]}
        VariableReference DryYield1: VariableName=[DryYield].Value
        SubtractFunction AboveGroundDM
          Constant Function: Value=1
          VariableReference RootFraction: VariableName=[RootProportion].Value
      Cultivar Dash
      Cultivar Barley_Spring: Alias=Barley_Spring
        Command:
          [Root].MaximumRootDepth.Value = 1000
          [Root].RootFrontVelocity.RootFrontVelocity.Criteria.Value = 2010
          [Root].RootFrontVelocity.RootFrontVelocity.IfTrue.Value = 0.5
          [Leaf].CoverFunction.Expanding.SigCoverFunction.Xo = 540
          [Leaf].CoverFunction.Expanding.SigCoverFunction.b = 120
          [Leaf].CoverFunction.Expanding.SigCoverFunction.Ymax.Value = 0.97
          [Leaf].PotentialBiomass.Integral.Xo = 1080
          [Leaf].PotentialBiomass.Integral.b = 216
          [TotalBiomassAtStartReproductive].Xo = 1080
          [TotalBiomassAtStartReproductive].b = 216
          [TotalBiomassAtStartSenescence].Xo = 1080
          [TotalBiomassAtStartSenescence].b = 216
          [ExpectedYield].Value = 800
          [RootProportion].Value = 0.1
          [HarvestIndex].XYPairs.X = 0,1150
          [HarvestIndex].XYPairs.Y = 0.14,0.6
          [ProductDMProportion].Value = 0.87
          [Phenology].CanopyExpanding.Target.Value = 1021
          [Phenology].YieldIncreasing.Target.Value= 479
          [Phenology].Senescing.Target.Value = 300
          [Phenology].Maturing.Target.Value = 300
          [leaf].NConc.Value = 0.005
          [Product].MinimumNConc.Value = 0.005
          [Product].MaximumNConc.Value = 0.012
          [Root].MinimumNConc.Value = 0.009
          [Root].MaximumNConc.Value = 0.009
    Plant Maize: CropType=Maize
      Memo TitlePage
        The APSIM Maize Model

        Brown, H.E., Teixeira, E.I., Huth, N.I. and Holzworth, D.P.

        The APSIM maize model has been developed using the Plant Modelling Framework (PMF) of Brown et al(2014).
        This new framework provides a library of plant organ and process submodels that can be coupled, at runtime, to construct a model in much the same way that models can be coupled to construct a simulation. This means that dynamic composition of lower level process and organ classes (e.g. photosynthesis, leaf) into larger constructions (e.g. maize, wheat, sorghum) can be achieved by the model developer without additional coding.
      OrganArbitrator Arbitrator: NArbitrationOption=PrioritythenRelativeAllocation; DMArbitrationOption=RelativeAllocation
        Memo
          There are a number of passes involved in the allocation of Weight (Wt).

          Wt_Step 1. Set up DM supplies and demands.  Each organ may have a demand for Structural, Metabolic and Non-structural Wt.  Each organ may supply Fresh DM from photosynthesis and/or stored DM from retranslocation of its Non-structural pool.

          Wt_Step 2. In this step freshly fixed Wt is partitioned to organs based on their relative Structural and Metabolic demands such that if there is not enough freshly fixed Wt to meet these demands the organs with the highest demands get the greatest share of the photosynthesis.

          Wt_Step 3. In the second step any freshly fixed DM that was surplus to Structural and Metabolic demands is partitioned to sink organs.  An organ will be a sink if it is parameterised to have a Non-structural (mobile) component and the capacity of each organ to receive excess DM depends on its structural fraction (which determines the Non-structural Fraction and subsequent sink capacity).  If there is still fresh DM unallocated after the second pass this remains unallocated with the assumption that in this case the plant would down regulate photosynthesis due to lack of sink capacity.

          Wt_Step 4. In this step, Non-structural DM is reallocated from Non-Structural pools if there was insufficient DM to meet the structural and metabolic DM demands of organs.

          The arbitrator then sends a potential DM allocation to each organ that they use to calculate their N demands and then steps through N partitioning routines.  The final pass in biomass partitioning comes after N partitioning

          N_Step 1. Set up N supplies and demands.  Each organ may (or may not) supply N in a number of ways.  Each organ has (potentially) a structural, metabolic and Non-structural N Demand.  The structural N demand is that required to grow immobile biomass components, Metabolic N is that required to produce working biomass such as the photosynthetic mechanism in the leaves.  The Non-structural N demand is considered to be the luxury uptake and storage of highly mobile N compounds such as nitrate.

          Each of the following 4 steps have a number of processes in common; Firstly the arbitrator determines each organs current N demand (that outstanding after previous N partitioning steps), then it allocates N to each demanding organ (There are three ways that N can be allocated, see below), then it sets for each supplying organ the amount of N that was taken up.

          N_Step 2. NReallocation.  This is the supply of N within the plant by the reallocation of sensing and/or Non-structural N which is the lowest energy form of N available to the plant so is partitioned first.

          N_Step 3. NUptake.  This is the supply of mineral N from the environment (typically by roots from the soil). In this step the arbitrator partitions the potential N uptake supply to satisfy all organs N demands (Structural, Metabolic and Non-structural).  If supply is sufficient this will replenish all Non-structural N that was reallocated in the previous step.  If not the N conc of organs with a Non-structural N component will begin to fall.  If total N demand is less than the uptake supply the crop will leave the surplus mineral N in the soil.

          N_Step 4. NFixation.  This is the supply of symbiotically fixed N and is redundant for Non-fixers!  The arbitrator will asks all N fixing organs (typically nodules) for their potential N fixation supply and then partition this to meet the Structural and Metabolic N demands of organs.  The arbitrator will not fix N to meet Non-structural N demands to minimise the biomass cost of fixation which is metabolically expensive.  Fixation follows uptake to enable the arbitrator to capture the "Lazy" N fixing behaviour of some legumes.  Once fixation is calculated the arbitrator determines the DM cost of this fixation.

          N_Step 5. NRetranslocation.  This is only invoked under sever N shortage when NReallocation and Uptake (and fixation if appropriate) cannot meet structural and metabolic N demands.  It this step the arbitrator will remove Metabolic N from older leaf cohorts to meet the N demand of new leaves and reproductive organs.

          In all of these N partitioning steps there are three options the developer may chose for determining the allocation of N between demanding organs.

          1. RelativeAllocation.  If this option is used all N is partitioned to organs relative to their demand so that the organs with the larger N demand get a larger share of a limited N supply.

          2. PriorityAllocation.  If this option is used the arbitrator steps through all organs in order of priority (set by the order they appear in the IDE) allocating N to meet all of the first organs structural and metabolic N demands before partitioning any to the next organ in the hierarchy.  Once it has stepped through all organs and allocated their minimum (structural and metabolic) N demands it will then step through them again and allocate their luxury (Non-structural) N demands in the same way.

          3. PrioritythenRelativeAllocation.  If this option is used the arbitrator steps through all organs in order of priority allocating N to meet minimum N demands.  However on the second pass it allocated N relative to the organs outstanding demands such that the organ with the greatest luxury N demand will get the greatest share of the N allocation.

          Wt_Step 5. Once N is allocated the arbitrator then reduces the Wt allocation of each organ to account for the metabolic cost of N fixation.  The Wt reduction is spread around all organs and an organ will only have its Wt allocation limited until it reaches maximum N conc.

          Wt_Step 6. Then the arbitrator determines if the N allocated to each organ is sufficient for that organ to reach its minimum N concentration.  If not the arbitrator will constrain the biomass growth of that organ and discards the surplus biomass.  This assume that under sever N stress photosynthesis would be down regulated due to N inadequacy limiting sink strength.

          Once these steps are complete the Arbitrator finally communicates to each organ its state changes as a result of arbitration.
      Phenology: Emerged=false
        Memo
          The phenology model used in the APSIM maize model follows the approach used in earlier maize models(Jones and Kiniry (1986), Carberry and Arbrecht (1991), Carberry et al (1989).
          The model predicts development of primordia on the apex of the main stem and appearance of individual leaves to predict time to flag leaf.  Other stages use thermal time targets.
        MultiplyFunction ThermalTime
          PhaseLookup TT
            PhaseLookupValue EarlyTT: Start=Sowing; End=Germination
              SoilTemperatureFunction ThermalTime: maxt_soil_surface=20; mint_soil_surface=10
                XYPairs: X=[0, 18, 26, 34, 44]; Y=[0, 10, 18, 26, 44]
            PhaseLookupValue LateTT: Start=Germination; End=HarvestRipe
              AirTemperatureFunction ThermalTime
                XYPairs: X=[0, 18, 26, 34, 44]; Y=[0, 10, 18, 26, 0]
          AddFunction DroughtPhenologyAcceleration
            Constant One: Value=1
            MultiplyFunction Stress
              Constant StressResponseCoefficient: Value=2
              LinearInterpolationFunction StressFactor: XProperty=[Maize].WaterSupplyDemandRatio
                XYPairs: X=[0, 1]; Y=[0, 0]
        GerminatingPhase Germinating: Start=Sowing; End=Germination
        EmergingPhase Emerging: Start=Germination; End=Emergence; ShootLag=55; ShootRate=0.6
          VariableReference ThermalTime: VariableName=[Phenology].ThermalTime.Value
        GenericPhase Juvenile: Start=Emergence; End=End_Juvenile
          Constant Target: Value=200
          VariableReference ThermalTime: VariableName=[Phenology].ThermalTime.Value
        GenericPhase Photosensitive: Start=End_Juvenile; End=Floral_Initiation
          VariableReference ThermalTime: VariableName=[Phenology].ThermalTime.Value
          LinearInterpolationFunction Target: XProperty=[Phenology].Photoperiod.Value
            XYPairs: X=[0, 12.5, 24]; Y=[0, 0, 10]
        LeafAppearancePhase LeafAppearance: Start=Floral_Initiation; End=Flag_Leaf
          VariableReference ThermalTime: VariableName=[Phenology].ThermalTime.Value
        GenericPhase FlagLeafToFlowering: Start=Flag_Leaf; End=Flowering
          Constant Target: Value=50
          VariableReference ThermalTime: VariableName=[Phenology].ThermalTime.Value
        GenericPhase FloweringToGrainFilling: Start=Flowering; End=StartGrainFill
          Constant Target: Value=120
          VariableReference ThermalTime: VariableName=[Phenology].ThermalTime.Value
        GenericPhase GrainFilling: Start=StartGrainFill; End=EndGrainFill
          Constant Target: Value=550
          VariableReference ThermalTime: VariableName=[Phenology].ThermalTime.Value
        GenericPhase Maturing: Start=EndGrainFill; End=Maturity
          Constant Target: Value=10
          VariableReference ThermalTime: VariableName=[Phenology].ThermalTime.Value
        GenericPhase MaturityToHarvestRipe: Start=Maturity; End=HarvestRipe
          Constant Target: Value=10
          VariableReference ThermalTime: VariableName=[Phenology].ThermalTime.Value
        EndPhase ReadyForHarvesting: Start=HarvestRipe; End=Unused
          VariableReference ThermalTime: VariableName=[Phenology].ThermalTime.Value
        PhotoperiodFunction Photoperiod: Twilight=-6
        OnEventFunction FloweringDAS: SetEvent=Flowering; ReSetEvent=never
          Memo
            A function is used to provide flowering date as days after sowing(DAS).
          Constant PreEventValue: Value=0
          VariableReference PostEventValue: VariableName=[Phenology].DaysAfterSowing
        OnEventFunction MaturityDAS: SetEvent=Maturity; ReSetEvent=never
          Memo
            A function is used to provide maturity date as days after sowing(DAS).
          Constant PreEventValue: Value=0
          VariableReference PostEventValue: VariableName=[Phenology].DaysAfterSowing
      Structure: InitialiseStage=Emergence; PrimaryBudNo=1
        Memo
          Though tillering is common in some maize varieties under certain agronomic conditions, no tillering is accounted for within this model.  Therefore all branching has been parameterised out of the current maize model.
        VariableReference ThermalTime: VariableName=[Phenology].ThermalTime.Value
        PhaseLookup MainStemPrimordiaInitiationRate
          PhaseLookupValue Plastochron: Start=Emergence; End=Floral_Initiation
            MultiplyFunction Plastochron
              VariableReference Phyllochron: VariableName=[Structure].MainStemNodeAppearanceRate.Value
              Constant LeafTipsPerPrimordia: Value=0.5
        PhaseLookup MainStemNodeAppearanceRate
          PhaseLookupValue Phyllochron: Start=Emergence; End=Flag_Leaf
            LinearInterpolationFunction Phyllochron: XProperty=[Structure].MainStemNodeNo
              XYPairs: X=[1, 3.4, 4]; Y=[30, 30, 42]
        MainStemFinalNodeNumberFunction MainStemFinalNodeNumber: MaximumMainStemNodeNumber=30
          OnEventFunction FinalLeafNumber: SetEvent=Floral_Initiation
            AddFunction PreEventValue
              Constant PrimordiaAtEmergence: Value=6
              DivideFunction PrimordiaDuringJuvenilePhase
                VariableReference JuvenilePhaseDuration: VariableName=[Phenology].Juvenile.Target.Value
                Constant ApproximatePlastochron: Value=15
            VariableReference PostEventValue: VariableName=[Structure].MainStemPrimordiaNo
        HeightFunction HeightModel
          LinearInterpolationFunction PotentialHeight: XProperty=[Phenology].Stage
            XYPairs: X=[3, 4, 5, 6]; Y=[20, 50, 60, 1700]
          LinearInterpolationFunction WaterStress: XProperty=[Maize].WaterSupplyDemandRatio
            XYPairs: X=[0.3, 1]; Y=[1, 1]
        Constant BranchingRate: Value=0.0
        Constant ShadeInducedBranchMortality: Value=0.0
        Constant DroughtInducedBranchMortality: Value=0.0
      ReproductiveOrgan Grain
        Constant InitialGrainProportion: Value=0.05
        Constant MaximumPotentialGrainSize: Value=0.3
        PhaseLookup DMDemandFunction
          PhaseLookupValue InitialPhase: Start=Flowering; End=StartGrainFill
            FillingRateFunction
              VariableReference NumberFunction: VariableName=[Grain].NumberFunction.Value
              VariableReference FillingDuration: VariableName=[Phenology].FloweringToGrainFilling.Target.Value
              VariableReference ThermalTime: VariableName=[Phenology].ThermalTime.Value
              MultiplyFunction PotentialSizeIncrement
                VariableReference InitialProportion: VariableName=[Grain].InitialGrainProportion.Value
                VariableReference MaximumSize: VariableName=[Grain].MaximumPotentialGrainSize.Value
          PhaseLookupValue LinearPhase: Start=StartGrainFill; End=EndGrainFill
            FillingRateFunction
              VariableReference NumberFunction: VariableName=[Grain].NumberFunction.Value
              VariableReference FillingDuration: VariableName=[Phenology].GrainFilling.Target.Value
              VariableReference ThermalTime: VariableName=[Phenology].ThermalTime.Value
              MultiplyFunction PotentialSizeIncrement
                SubtractFunction ProportionLinearPhase
                  Constant One: Value=1
                  VariableReference InitialProportion: VariableName=[Grain].InitialGrainProportion.Value
                VariableReference MaximumSize: VariableName=[Grain].MaximumPotentialGrainSize.Value
        Biomass Live
        Biomass Dead
        Constant MinimumNConc: Value=0.008
        PhaseLookup MaximumNConc
          PhaseLookupValue InitialPhase: Start=Flowering; End=StartGrainFill
            Constant InitialNconc: Value=0.05
          PhaseLookupValue LinearPhase: Start=StartGrainFill; End=EndGrainFill
            Constant FinalNconc: Value=0.013
        Constant WaterContent: Value=0.12
        PhaseLookup NFillingRate
          PhaseLookupValue GrainFilling: Start=Flowering; End=EndGrainFill
            FillingRateFunction
              VariableReference NumberFunction: VariableName=[Grain].NumberFunction.Value
              AddFunction FillingDuration
                VariableReference FloweringToGrainFilling: VariableName=[Phenology].FloweringToGrainFilling.Target.Value
                VariableReference GrainFilling: VariableName=[Phenology].GrainFilling.Target.Value
              VariableReference ThermalTime: VariableName=[Phenology].ThermalTime.Value
              MultiplyFunction PotentialSizeIncrement
                Constant MaximumFinalNConc: Units=g/g; Value=0.013
                VariableReference MaximumSize: VariableName=[Grain].MaximumPotentialGrainSize.Value
        MultiplyFunction NumberFunction
          VariableReference CobNumber: VariableName=[Rachis].CobNumber.Value
          LinearInterpolationFunction KernalsPerCob: XProperty=[Rachis].CobSize.Value
            XYPairs: X=[0, 25]; Y=[0, 550]
          Constant GrainPerKernal: Value=1
      Root: InitialDM=0.2; SpecificRootLength=40000; KNO3_yProperty=[0, 0.03]; KNO3_xRootLength=[0, 0.003]; KNH4_yProperty=[0, 0.0003]; KNH4_xRootLength=[0, 0.003]; KNO3=0.03; KNH4=0; NuptakeSupply=0
        CompositeBiomass Live: Propertys=[[Root].LayerLive]
        CompositeBiomass Dead: Propertys=[[Root].LayerDead]
        LinearInterpolationFunction KLModifier: XProperty=[Maize].Population
          Memo
            The parameter KL is is described by Meinke et al (1993) to combine elements of soil conductivity (K) with root length (L) in determining root water uptake.  Peake et al (2013) demonstrated that in maize KL varied with plant population through impacts on root length density.  Here we adjust KL linearly with plant population.
          XYPairs: X=[0, 10]; Y=[1, 1]
        Constant SoilWaterEffect: Value=1
          Memo
            No effect of soil water content on root growth is currently captured in the model.
        Constant TemperatureEffect: Value=1
          Memo
            No effect of temperature on root growth is currently captured in the model.
        Constant MaxDailyNUptake: Value=20
          Memo
            Maximum daily N uptake is set to an arbitrarily high value.
        Constant SenescenceRate: Value=0.005
          Memo
            Jones and Kiniry (1986) used a constant root senescence fraction in the CERES-Maize model.
        Constant StructuralFraction: Value=1
        Constant MaximumNConc: Value=0.01
        Constant MinimumNConc: Value=0.01
        LinearInterpolationFunction PartitionFraction: XProperty=[Phenology].Stage
          XYPairs: X=[0, 2.99, 3, 6, 7]; Y=[0, 0, 0.2, 0.2, 0]
        PhaseLookup RootFrontVelocity
          Memo
            Hammer et al (2009) used a constant extraction front velocity of 2.5cm per day in their analysis of historical maize yield trends in the US corn belt.
          PhaseLookupValue PreFlowering: Start=Germination; End=Flowering
            Constant Function: Value=25
          PhaseLookupValue PostFlowering: Start=Flowering; End=Maturity
            Constant Function: Value=0
        PhaseBasedSwitch NitrogenDemandSwitch: Start=Germination; End=Maturity
      Leaf: CurrentExpandingLeaf=0; StartFractionExpanded=0; FractionNextleafExpanded=0; _ExpandedNodeNo=0; DeadNodesYesterday=0; MaxCover=1; PotentialEP=0; KDead=0.03; GsMax=0.03; R50=200; Emissivity=0.96; Albido=0.26; FractionDied=0
        LeafCohort InitialLeaves[1]: Rank=1; Area=380
        LeafCohort InitialLeaves[2]: Rank=2; Area=0
        LeafCohort InitialLeaves[3]: Rank=3; Area=0
        LeafCohort InitialLeaves[4]: Rank=4; Area=0
        LeafCohort InitialLeaves[5]: Rank=5; Area=0
        LeafCohort InitialLeaves[6]: Rank=6; Area=0
        CompositeBiomass Live: Propertys=[[Leaf].CohortLive]
        CompositeBiomass Dead: Propertys=[[Leaf].CohortDead]
        ArrayBiomass CohortArrayLive: Propertys=[[Leaf].Live]; ArraySize=[Leaf].MaxNodeNo
        ArrayBiomass CohortArrayDead: Propertys=[[Leaf].Dead]; ArraySize=[Leaf].MaxNodeNo
        LeafCohortParameters CohortParameters
          BellCurveFunction MaxArea
            Memo
              Potential leaf area is calculated from leaf number using the approach of Keating and Wafula (1992).
              Individual leaf size is described using a bell-shaped curve, the parameters of which are derived from final leaf number.
            MultiplyFunction LargestLeafPosition
              VariableReference FinalLeafNumber: VariableName=[Structure].MainStemFinalNodeNumber.Value
              Constant RelativePositionOfLargestLeaf: Value=0.67
            LinearInterpolationFunction AreaMax: XProperty=[Structure].MainStemFinalNodeNumber.Value
              XYPairs: X=[1, 5, 10, 15, 20, 25]; Y=[32530, 39259, 49659, 60000, 75000, 90000]
            LinearInterpolationFunction Breadth: XProperty=[Structure].MainStemFinalNodeNumber.Value
              XYPairs: X=[5, 10, 15, 20, 25]; Y=[-0.377, -0.144, -0.059, -0.027, -0.016]
            Constant Skewness: Value=0.00025
          Constant NReallocationFactor: Value=0.1
          Constant NRetranslocationFactor: Value=0.03
          Constant DMRetranslocationFactor: Value=0.5
          LinearInterpolationFunction CellDivisionStress: XProperty=[Maize].WaterSupplyDemandRatio
            XYPairs: X=[0.9, 1]; Y=[1, 1]
          LinearInterpolationFunction ExpansionStress: XProperty=[Maize].WaterSupplyDemandRatio
            XYPairs: X=[0.3, 1]; Y=[0.1, 1]
          LinearInterpolationFunction GrowthDuration: XProperty=[Structure].RelativeNodeApperance
            XYPairs: X=[0, 0.3, 0.5, 1]; Y=[0, 200, 250, 100]
          LinearInterpolationFunction LagDuration: XProperty=[Structure].RelativeNodeApperance
            XYPairs: X=[0, 0.5, 1]; Y=[350, 650, 600]
          LinearInterpolationFunction SenescenceDuration: XProperty=[Structure].RelativeNodeApperance
            XYPairs: X=[0, 11, 20]; Y=[359, 350, 350]
          Constant DetachmentLagDuration: Value=1000000
          Constant DetachmentDuration: Value=1000000
          LinearInterpolationFunction MaximumNConc: XProperty=[Structure].MainStemNodeNo
            XYPairs: X=[1, 10]; Y=[0.04, 0.02]
          Constant CriticalNConc: Value=0.015
          Constant MinimumNConc: Value=0.008
          AddFunction DroughtInducedSenAcceleration
            Constant One: Value=1
            MultiplyFunction Stress
              Constant StressResponseCoefficient: Value=1
              LinearInterpolationFunction StressFactor: XProperty=[Maize].WaterSupplyDemandRatio
                XYPairs: X=[0, 0.7]; Y=[0, 0]
          LinearInterpolationFunction SpecificLeafAreaMax: XProperty=[Structure].MainStemNodeNo
            XYPairs: X=[1, 9]; Y=[60000, 30000]
          LinearInterpolationFunction SpecificLeafAreaMin: XProperty=[Structure].MainStemNodeNo
            XYPairs: X=[1, 9]; Y=[6000, 6000]
          Constant StructuralFraction: Value=0.7
          Constant NonStructuralFraction: Value=0
          LinearInterpolationFunction ShadeInducedSenescenceRate: XProperty=[Leaf].CohortCurrentRankCoverAbove
            XYPairs: X=[0, 0.7, 0.8, 0.96, 0.99]; Y=[0, 0, 0, 0, 0]
          Constant InitialNConc: Value=0
        RUEModel Photosynthesis
          Constant RUE: Value=1.75
          WeightedTemperatureFunction FT: MaximumTemperatureWeighting=0.75
            XYPairs: X=[0, 8, 15, 35, 50]; Y=[0, 0, 1, 1, 0]
          LinearInterpolationFunction FVPD: XProperty=[Leaf].Photosynthesis.VPD
            XYPairs: X=[0, 10, 50]; Y=[1, 1, 1]
          LinearInterpolationFunction FN: XProperty=[Leaf].Fn
            XYPairs: X=[0, 1]; Y=[0.3, 1]
          LinearInterpolationFunction FW: XProperty=[Leaf].Fw
            XYPairs: X=[0, 0.3]; Y=[0, 1]
          RUECO2Function FCO2: PhotosyntheticPathway=C4
        MultiplyFunction ExtinctionCoeff
          Memo
            Extinction coefficient is specified in terms of a potential extinction coefficient which is then discounted during periods of water stress to account for the impact of leaf curling.
          LinearInterpolationFunction PotentialExtinctionCoeff: XProperty=[Leaf].LAI
            XYPairs: X=[0, 0.45]; Y=[0.65, 0.65]
          LinearInterpolationFunction WaterStressImpact: XProperty=[Maize].WaterSupplyDemandRatio
            XYPairs: X=[0, 0.7]; Y=[0.5, 1]
        LinearInterpolationFunction FrostFraction: XProperty=[Weather].MinT
          XYPairs: X=[-10, -9]; Y=[1, 0]
        VariableReference ThermalTime: VariableName=[Phenology].ThermalTime.Value
      GenericAboveGroundOrgan Husk
        PopulationBasedDemandFunction DMDemandFunction: StartStage=5.2; GrowthDuration=120; MaximumOrganWt=25
          VariableReference ThermalTime: VariableName=[Phenology].ThermalTime.Value
          Constant ExpansionStress: Value=1
        Biomass Live
        Biomass Dead
        Constant NReallocationFactor: Value=0
        Constant NRetranslocationFactor: Value=0.1
        Constant MaximumNConc: Value=0.01
        Constant StructuralFraction: Value=0.2
        Constant MinimumNConc: Value=0.01
      GenericAboveGroundOrgan Rachis
        MultiplyFunction CobNumber
          VariableReference StemNumber: VariableName=[Structure].TotalStemPopn
          Constant CobsPerStem: Value=1.1
        DivideFunction CobSize
          VariableReference CobMass: VariableName=[Rachis].Live.Wt
          VariableReference CobNumber: VariableName=[Rachis].CobNumber.Value
        PopulationBasedDemandFunction DMDemandFunction: StartStage=5.5; GrowthDuration=300; MaximumOrganWt=25
          VariableReference ThermalTime: VariableName=[Phenology].ThermalTime.Value
          Constant ExpansionStress: Value=1
        Biomass Live
        Biomass Dead
        Constant NReallocationFactor: Value=0
        Constant NRetranslocationFactor: Value=0.1
        Constant MaximumNConc: Value=0.008
        Constant StructuralFraction: Value=1
        Constant MinimumNConc: Value=0.003
        LinearInterpolationFunction ExpansionStress: XProperty=[Maize].WaterSupplyDemandRatio
          XYPairs: X=[0, 0.6]; Y=[1, 1]
      GenericAboveGroundOrgan Stem
        Biomass Live
        Biomass Dead
        Constant StructuralFraction: Value=0.8
        LinearInterpolationFunction MaximumNConc: XProperty=[Structure].MainStemNodeNo
          XYPairs: X=[1, 10, 11]; Y=[0.03, 0.03, 0.005]
        Constant MinimumNConc: Value=0.006
        PhaseBasedSwitch NitrogenDemandSwitch: Start=Emergence; End=StartGrainFill
        Constant NReallocationFactor: Value=0
        Constant NRetranslocationFactor: Value=0.5
        Constant DMRetranslocationFactor: Value=0.5
        MinimumFunction DMDemandFunction
          MultiplyFunction PotentialDMAccumulation
            VariableReference NodesAppearing: VariableName=[Structure].DeltaNodeNumber
            VariableReference Branches: VariableName=[Structure].TotalStemPopn
            LinearInterpolationFunction PotentialInternodeWt: XProperty=[Structure].RelativeNodeApperance
              XYPairs: X=[0, 0.5, 1]; Y=[0, 0.2, 16]
          MultiplyFunction HightLimitedDMAccumulation
            Constant SpecificStemLengthMax: Value=500
            VariableReference Branches: VariableName=[Structure].TotalStemPopn
            VariableReference DeltaHeight: VariableName=[Structure].HeightModel.DeltaHeight
      Summariser
        CompositeBiomass AboveGround
          Propertys=[[Leaf].Live, [Leaf].Dead, [Stem].Live, [Stem].Dead, [Husk].Live, [Husk].Dead, [Grain].Live, [Grain].Dead, [Rachis].Live, [Rachis].Dead]
          Memo
            The AboveGround composite biomass object includes all organs occurring above the soil surface to allow output for total dry matter and Nutrient contents, including total structural, non-structural and metabolic pools.
        CompositeBiomass BelowGround: Propertys=[[Root].Live, [Root].Dead]
          Memo
            The BelowGround composite biomass object includes all root biomass pools to allow output for total dry matter and Nutrient contents, including total structural, non-structural and metabolic pools.
        CompositeBiomass Total
          Propertys=[[Leaf].Live, [Leaf].Dead, [Stem].Live, [Stem].Dead, [Husk].Live, [Husk].Dead, [Grain].Live, [Grain].Dead, [Rachis].Live, [Rachis].Dead, [Root].Live, [Root].Dead]
          Memo
            The Total composite biomass object includes all organs (above+below ground) to allow output for total dry matter and Nutrient contents, including total structural, non-structural and metabolic pools.
        CompositeBiomass TotalLive
          Propertys=[[Leaf].Live, [Stem].Live, [Husk].Live, [Grain].Live, [Rachis].Live, [Root].Live]
          Memo
            The TotalLive composite biomass object includes the Live pools of all organs (above+below ground) to allow output for total dry matter and Nutrient contents, including total structural, non-structural and metabolic pools.
        CompositeBiomass TotalDead
          Propertys=[[Leaf].Dead, [Stem].Dead, [Husk].Dead, [Grain].Dead, [Rachis].Dead, [Root].Dead]
          Memo
            The TotalDead composite biomass object includes the Dead pools of all organs (above+below ground) to allow output for total dry matter and Nutrient contents, including total structural, non-structural and metabolic pools.
        CompositeBiomass EarLive: Propertys=[[Husk].Live, [Grain].Live, [Rachis].Live]
          Memo
            The EarLive composite biomass object includes the Live pools of all organs within the Ear to allow output for total dry matter and Nutrient contents, including total structural, non-structural and metabolic pools.
        CompositeBiomass AboveGroundLive
          Propertys=[[Leaf].Live, [Stem].Live, [Husk].Live, [Grain].Live, [Rachis].Live]
          Memo
            The AboveGroundLive composite biomass object includes the Live pools of all organs occurring above the soil surface to allow output for total dry matter and Nutrient contents, including total structural, non-structural and metabolic pools.
        CompositeBiomass AboveGroundDead
          Propertys=[[Leaf].Dead, [Stem].Dead, [Husk].Dead, [Grain].Dead, [Rachis].Dead]
          Memo
            The AboveGroundDead composite biomass object includes the Dead pools of all organs occurring above the soil surface to allow output for total dry matter and Nutrient contents, including total structural, non-structural and metabolic pools.
      Cultivar Pioneer_39G12: Command=[Phenology].GrainFilling.Target.Value = 550
      Cultivar Pioneer_3153
      Cultivar Katumani
        Command:
          [Phenology].Juvenile.Target.Value = 150
          [Phenology].Photosensitive.Target.XYPairs.X = 0, 12.5, 24
          [Phenology].Photosensitive.Target.XYPairs.Y = 0, 0, 115
          [Phenology].FlagLeafToFlowering.Target.Value = 10
          [Phenology].FloweringToGrainFilling.Target.Value = 120
          [Phenology].GrainFilling.Target.Value = 530
          [Rachis].DMDemandFunction.MaximumOrganWt = 14
          [Grain].NumberFunction.KernalsPerCob.XYPairs.X = 0, 14
          [Grain].NumberFunction.KernalsPerCob.XYPairs.Y = 0, 405
        Memo
          The variety Katumani Composite B was formed in 1966 and released in 1968 as part of the maize breeding work undertaken at the Katumani Research Station in Kenya which started in 1956.  Katumani Composite B was an advanced generation of Katumani Synthetic V X Katumani Synthetic VI.  It has slight photoperiod sensitivity and relatively small potential cob size.
      Cultivar Dekalb_XL82
        Command:
          [Phenology].Juvenile.Target.Value = 211
          [Phenology].Photosensitive.Target.XYPairs.X = 0, 12.5, 24
          [Phenology].Photosensitive.Target.XYPairs.Y = 0, 0, 472
          [Phenology].FlagLeafToFlowering.Target.Value = 101
          [Phenology].FloweringToGrainFilling.Target.Value = 170
          [Phenology].GrainFilling.Target.Value = 813
          [Rachis].DMDemandFunction.MaximumOrganWt = 25
          [Grain].NumberFunction.KernalsPerCob.XYPairs.X = 0, 25
          [Grain].NumberFunction.KernalsPerCob.XYPairs.Y = 0, 550
      Cultivar GH_5009
        Command:
          [Phenology].Juvenile.Target.Value = 260
          [Phenology].Photosensitive.Target.XYPairs.X = 0, 12.5, 24
          [Phenology].Photosensitive.Target.XYPairs.Y = 0, 0, 0
          [Phenology].FlagLeafToFlowering.Target.Value = 50
          [Phenology].FloweringToGrainFilling.Target.Value = 170
          [Phenology].GrainFilling.Target.Value = 713
          [Rachis].DMDemandFunction.MaximumOrganWt = 25
          [Grain].NumberFunction.KernalsPerCob.XYPairs.X = 0, 25
          [Grain].NumberFunction.KernalsPerCob.XYPairs.Y = 0, 550
      Cultivar Hycorn_40
        Command:
          [Phenology].Juvenile.Target.Value = 235
          [Phenology].Photosensitive.Target.XYPairs.X = 0, 12.5, 24
          [Phenology].Photosensitive.Target.XYPairs.Y = 0, 0, 0
          [Phenology].FlagLeafToFlowering.Target.Value = 50
          [Phenology].FloweringToGrainFilling.Target.Value = 170
          [Phenology].GrainFilling.Target.Value = 713
          [Rachis].DMDemandFunction.MaximumOrganWt = 25
          [Grain].NumberFunction.KernalsPerCob.XYPairs.X = 0, 25
          [Grain].NumberFunction.KernalsPerCob.XYPairs.Y = 0, 550
      Cultivar GH_5019WX
        Command:
          [Phenology].Juvenile.Target.Value = 245
          [Phenology].Photosensitive.Target.XYPairs.X = 0, 12, 24
          [Phenology].Photosensitive.Target.XYPairs.Y = 0, 0, 0
          [Phenology].FlagLeafToFlowering.Target.Value = 101
          [Phenology].FloweringToGrainFilling.Target.Value = 170
          [Phenology].GrainFilling.Target.Value = 694
          [Rachis].DMDemandFunction.MaximumOrganWt = 25
          [Grain].NumberFunction.KernalsPerCob.XYPairs.X = 0, 25
          [Grain].NumberFunction.KernalsPerCob.XYPairs.Y = 0, 550
      Cultivar Laila
        Command:
          [Phenology].Juvenile.Target.Value = 211
          [Phenology].Photosensitive.Target.XYPairs.X = 0, 12.5, 24
          [Phenology].Photosensitive.Target.XYPairs.Y = 0, 0, 0
          [Phenology].FlagLeafToFlowering.Target.Value = 1
          [Phenology].FloweringToGrainFilling.Target.Value = 170
          [Phenology].GrainFilling.Target.Value = 812
          [Phenology].Maturing.Target.Value = 1
          [Phenology].MaturityToHarvestRipe.Target.Value = 1
          [Rachis].DMDemandFunction.MaximumOrganWt = 36
          [Grain].NumberFunction.KernalsPerCob.XYPairs.X = 0, 36
          [Grain].NumberFunction.KernalsPerCob.XYPairs.Y = 0, 720
      Cultivar Pioneer_39V43
        Command:
          [Phenology].Juvenile.Target.Value = 110
          [Phenology].GrainFilling.Target.Value = 450
          [Phenology].FloweringToGrainFilling.Target.Value = 170
          [Structure].MainStemNodeAppearanceRate.Phyllochron.Phyllochron.XYPairs.X = 1, 4, 4.2, 10.5, 11
          [Structure].MainStemNodeAppearanceRate.Phyllochron.Phyllochron.XYPairs.Y = 26, 26, 46, 46, 70
          [Rachis].DMDemandFunction.MaximumOrganWt = 18
          [Structure].HeightModel.PotentialHeight.XYPairs.X = 3, 4, 5, 6
          [Structure].HeightModel.PotentialHeight.XYPairs.Y = 20, 40, 50, 1300
          [Stem].DMDemandFunction.PotentialDMAccumulation.PotentialInternodeWt.XYPairs.Y = 0, 0.15, 10
        Memo
          VShort duration variety released in New Zealand by Pioneer
      Cultivar Pioneer_34K77
        Command:
          [Phenology].Juvenile.Target.Value = 150
          [Phenology].GrainFilling.Target.Value = 550
        Memo
          VShort duration variety released in New Zealand by Pioneer
      Memo References
        References

        Brown, H.E., Huth, N.I., Holzworth, D.P., Teixeira, E.I., Zyskowski, R.F., Hargreaves, J.N., Moot, D.J., 2014. Plant modelling framework: software for building and running crop models on the APSIM platform. Environmental Modelling & Software 62 385-398.

        Hammer, G.L., Dong, Z., McLean, G., Doherty, A., Messina, C., Schussler, J., Zinselmeier, C., Paszkiewicz, S., Cooper, M., 2009. Can Changes in Canopy and/or Root System Architecture Explain Historical Maize Yield Trends in the U.S. Corn Belt? Crop Science 49(1) 299-312.

        Jones, C.A. and Kiniry, J.R. (1986) CERES-Maize: a Simulation Model of Maize Growth and Development. Texas A&M University Press, College Station, 194pp.

        B.A. Keating and Wafula, B.M. (1992) Modelling the fully expanded leaf area of maize leaves.  Field Crops Research, 29, 163–176.

        Meinke, H., Hammer, G.L., Want, P., 1993. POTENTIAL SOIL-WATER EXTRACTION BY SUNFLOWER ON A RANGE OF SOILS. Field Crops Research 32(1-2) 59-81.

        Ning, P., Li, S., White, P.J., Li, C., 2015. Maize Varieties Released in Different Eras Have Similar Root Length Density Distributions in the Soil, Which Are Negatively Correlated with Local Concentrations of Soil Mineral Nitrogen. PLoS ONE 10(3) e0121892.

        Njoroge, K., 1986. Earliness and yield in maize: an evaluation of some Katumani maize varieties. East African Agricultural and Forestry Journal 48(1/4) 40-50.

        Peake, A.S., Huth, N.I., Kelly, A.M., Bell, K.L., 2013. Variation in water extraction with maize plant density and its impact on model application. Field Crops Research 146(0) 31-37.
    Plant Potato: CropType=Potato
      Cultivar JerseyBenny: Alias=JerseyBenny
        Command:
          [Structure].MainStemFinalNodeNumber.Value = 19
          [Structure].BranchingRate.Potential_Branching_Rate.XYPairs.X = 0,6,7,10,11
          [Structure].BranchingRate.Potential_Branching_Rate.XYPairs.Y = 0,0,0.5,0.5,0
          [Tuber].DMDemandFunction.OrganNumber.OrganNumberPerStem.Value = 3
          [Tuber].DryMatterContent.XYPairs.Y = 0.13,0.2
      Cultivar IlamHardy: Alias=IlamHardy
        Command:
          [Structure].MainStemFinalNodeNumber.Value = 26
          [Tuber].DryMatterContent.XYPairs.Y = 0.13,0.18
      Cultivar MarisPiper: Alias=[MarisPiper, -]
        Command:
          [Structure].MainStemFinalNodeNumber.Value = 50
          [Structure].BranchingRate.Potential_Branching_Rate.XYPairs.X = 0,7,8,9
          [Structure].BranchingRate.Potential_Branching_Rate.XYPairs.Y = 0,0,1,0
          [Stem].DMDemandFunction.InternodeWt.Value = 0.4
          [Leaf].LagDuration.XYPairs.X = 0,0.15,0.3,0.4,0.73,1.0
          [Leaf].LagDuration.XYPairs.Y = 0,500,500,500,500,20
          [Leaf].Photosynthesis.RUE.Value = 2
      Cultivar Horizon: Alias=Horizon
        Command:
          [Structure].MainStemFinalNodeNumber.Value = 28
          [Tuber].DryMatterContent.XYPairs.Y = 0.12,0.16
      Cultivar Karaka: Alias=Karaka
        Command:
          [Structure].MainStemFinalNodeNumber.Value = 29
          [Tuber].DryMatterContent.XYPairs.Y = 0.13,0.2
      Cultivar Nooksac: Alias=Nooksac
        Command:
          [Structure].MainStemFinalNodeNumber.Value = 36
          [Tuber].DryMatterContent.XYPairs.Y = 0.13,0.21
      Cultivar RedRascal: Alias=RedRascal
        Command:
          [Tuber].DryMatterContent.XYPairs.Y = 0.13,0.2
      Cultivar Rua: Alias=Rua
        Command:
          [Structure].MainStemFinalNodeNumber.Value = 29
          [Tuber].DryMatterContent.XYPairs.Y = 0.13,0.21
      Cultivar Nadine: Alias=Nadine
        Command:
          [Structure].MainStemFinalNodeNumber.Value = 29
          [Tuber].DryMatterContent.XYPairs.Y = 0.11,0.15
      Cultivar RussetBurbank: Alias=RussetBurbank
        Command:
          [Structure].MainStemFinalNodeNumber.Value = 46
      Cultivar Coliban: Alias=Coliban
        Command:
          [Tuber].DryMatterContent.XYPairs.Y = 0.10,0.19
      Cultivar Others: Alias=[Fianna, RussetRanger, Moonlight, Agria, Bondi, Crop39]
      Phenology
        AirTemperatureFunction ThermalTime
          XYPairs: X=[2, 20, 35]; Y=[0, 18, 0]
        GenericPhase Dormant: Start=Planting; End=Peeping
          AirTemperatureFunction ThermalTime
            XYPairs: X=[2, 20, 35]; Y=[0, 18, 0]
          Constant Target: Value=1
        EmergingPhase Sprouting: Start=Peeping; End=Emergence; ShootLag=72; ShootRate=1.35
          AirTemperatureFunction ThermalTime
            XYPairs: X=[2, 20, 35]; Y=[0, 18, 0]
        GenericPhase Vegetative: Start=Emergence; End=TuberInitiation
          AirTemperatureFunction ThermalTime
            XYPairs: X=[2, 20, 35]; Y=[0, 18, 0]
          Constant Target: Value=300
        LeafAppearancePhase EarlyTuber: Start=TuberInitiation; End=FinalLeaf
          AirTemperatureFunction ThermalTime
            XYPairs: X=[2, 20, 35]; Y=[0, 18, 0]
        LeafDeathPhase LateTuber: Start=FinalLeaf; End=FullSenescence
          AirTemperatureFunction ThermalTime
            XYPairs: X=[2, 20, 35]; Y=[0, 18, 0]
        GenericPhase Senesced: Start=FullSenescence; End=Maturity
          AirTemperatureFunction ThermalTime
            XYPairs: X=[2, 20, 35]; Y=[0, 18, 0]
          Constant Target: Value=200
        EndPhase Maturity: Start=Maturity; End=Unused
          AirTemperatureFunction ThermalTime
            XYPairs: X=[2, 20, 35]; Y=[0, 18, 0]
      OrganArbitrator Arbitrator: NArbitrationOption=PriorityThenRelativeAllocation; DMArbitrationOption=RelativeAllocation
      Structure: InitialiseStage=Emergence; PrimaryBudNo=2.2
        AirTemperatureFunction ThermalTime
          XYPairs: X=[2, 20, 35]; Y=[0, 18, 0]
        PhaseLookupValue MainStemPrimordiaInitiationRate: Start=Emergence; End=FinalLeaf
          DivideFunction NodeInitiationRateFunction
            VariableReference Phyllochron: VariableName=[Structure].MainStemNodeAppearanceRate.Phyllochron.Value
            Constant PrimordiaPerMainstemNode: Value=2
        PhaseLookupValue MainStemNodeAppearanceRate: Start=Emergence; End=FinalLeaf
          LinearInterpolationFunction Phyllochron: XProperty=[Structure].RelativeNodeApperance
            XYPairs: X=[0, 0.15, 0.74, 0.75]; Y=[5, 30, 30, 60]
        Constant MainStemFinalNodeNumber: Value=34
        LinearInterpolationFunction HeightModel: XProperty=[Stem].Live.Wt
          XYPairs: X=[0, 200, 1200, 4000]; Y=[20, 300, 700, 900]
        MultiplyFunction BranchingRate
          LinearInterpolationFunction Potential_Branching_Rate: XProperty=[Structure].MainStemNodeNo
            XYPairs: X=[0, 7, 8, 13, 14, 34]; Y=[0, 0, 0.5, 0.5, 0, 0]
          LinearInterpolationFunction: XProperty=[Leaf].CoverGreen
            XYPairs: X=[0, 0.4, 0.55, 0.8, 1]; Y=[1, 1, 0.45, 0, 0]
        Constant ShadeInducedBranchMortality: Value=0
        Constant DroughtInducedBranchMortality: Value=0
      Summariser
        CompositeBiomass AboveGround: Propertys=[[Leaf].Live, [Leaf].Dead, [Stem].Live, [Stem].Dead]
        CompositeBiomass BelowGround: Propertys=[[Root].Live, [Root].Dead, [Tuber].Live, [Tuber].Dead]
        CompositeBiomass Total
          Propertys=[[Leaf].Live, [Leaf].Dead, [Stem].Live, [Stem].Dead, [Root].Live, [Root].Dead, [Tuber].Live, [Tuber].Dead]
        CompositeBiomass TotalLive: Propertys=[[Leaf].Live, [Stem].Live, [Root].Live, [Tuber].Live]
        CompositeBiomass TotalDead: Propertys=[[Leaf].Dead, [Stem].Dead, [Root].Dead, [Tuber].Dead]
      GenericAboveGroundOrgan Tuber
        LinearInterpolationFunction NitrogenDemandSwitch: XProperty=[Leaf].LAI
          XYPairs: X=[0, 0.02, 0.0201, 10]; Y=[0, 0, 1, 1]
        Constant StructuralFraction: Value=1
        PotentialSizeDemandFunction DMDemandFunction: StartStageName=TuberInitiation; EndStageName=Maturity
          LinearInterpolationFunction PotentialGrowthIncrement: XProperty=[Phenology].Stage
            XYPairs: X=[4, 4.04, 4.32, 4.52, 4.95, 6.54]; Y=[0.017, 0.017, 0.06, 0.06, 0.018, 0]
          MultiplyFunction OrganNumber
            Constant OrganNumberPerStem: Value=5
            VariableReference: VariableName=[Structure].MainStemPopn
          AirTemperatureFunction ThermalTime
            XYPairs: X=[2, 20, 35]; Y=[0, 18, 0]
          AccumulateFunction AccumThermalTime: StartStageName=TuberInitiation; EndStageName=Maturity
            VariableReference: VariableName=[Structure].ThermalTime.Value
        LinearInterpolationFunction DryMatterContent: XProperty=[Phenology].Stage
          XYPairs: X=[4, 4.5]; Y=[0.13, 0.22]
        LinearInterpolationFunction MaximumNConc: XProperty=[Phenology].Stage
          XYPairs: X=[3, 4, 5, 6]; Y=[0.023, 0.023, 0.018, 0.015]
        LinearInterpolationFunction MinimumNConc: XProperty=[Phenology].Stage
          XYPairs: X=[4, 4.1, 7]; Y=[0.02, 0.006, 0.006]
        Biomass Live
        Biomass Dead
      Root: InitialDM=5; SpecificRootLength=40000; KNO3_yProperty=[0.02, 0.02]; KNO3_xRootLength=[0, 0.003]; KNH4_yProperty=[0.0, 0.0]; KNH4_xRootLength=[0, 0.003]
        CompositeBiomass Live: Propertys=[[Root].LayerLive]
        CompositeBiomass Dead: Propertys=[[Root].LayerDead]
        PhaseBasedSwitch NitrogenDemandSwitch: Start=Planting; End=FinalLeaf
        AirTemperatureFunction TemperatureEffect
          XYPairs: X=[0, 26, 35]; Y=[1, 1, 1]
        PhaseLookup RootFrontVelocity
          PhaseLookupValue: Start=Peeping; End=FinalLeaf
            Constant: Value=10
        PhaseLookup PartitionFraction
          PhaseLookupValue: Start=Emergence; End=TuberInitiation
            Constant: Value=0.3
          PhaseLookupValue: Start=TuberInitiation; End=FinalLeaf
            Constant: Value=0.05
          PhaseLookupValue: Start=FinalLeaf; End=FullSenescence
            Constant: Value=0
        Constant MaximumNConc: Value=0.01
        LinearInterpolationFunction MaxDailyNUptake: XProperty=[Root].Length
          XYPairs: X=[0, 0.02]; Y=[0, 6]
        Constant MinimumNConc: Value=0.01
        LinearInterpolationFunction KLModifier: XProperty=[Leaf].LAI
          XYPairs: X=[0, 3]; Y=[1, 1]
        LinearInterpolationFunction SenescenceRate: XProperty=[Leaf].FractionDied
          XYPairs: X=[0, 1]; Y=[0, 0.1]
      Leaf: CurrentExpandingLeaf=34; StartFractionExpanded=0.83819; FractionNextleafExpanded=0.926641; _ExpandedNodeNo=34.9266; MaxCover=1; KDead=0.03; GsMax=0.03; R50=200; Emissivity=0.96; Albido=0.26
        CompositeBiomass Live: Propertys=[[Leaf].CohortLive]
        CompositeBiomass Dead: Propertys=[[Leaf].CohortDead]
        LeafCohortParameters CohortParameters
          LinearInterpolationFunction MaxArea: XProperty=[Structure].RelativeNodeApperance
            XYPairs: X=[0, 0.15, 0.3, 0.44, 0.59, 0.73]; Y=[2000, 18000, 27000, 15000, 6000, 1500]
          LinearInterpolationFunction GrowthDuration: XProperty=[Structure].RelativeNodeApperance
            XYPairs: X=[0, 0.3, 0.4, 1]; Y=[200, 400, 400, 400]
          LinearInterpolationFunction LagDuration: XProperty=[Structure].RelativeNodeApperance
            XYPairs: X=[0, 0.15, 0.3, 0.4, 0.73, 1]; Y=[350, 350, 350, 350, 350, 20]
          LinearInterpolationFunction SenescenceDuration: XProperty=[Structure].RelativeNodeApperance
            XYPairs: X=[0, 0.15, 0.3, 0.4, 0.73, 1]; Y=[350, 350, 350, 350, 350, 100]
          Constant DetachmentLagDuration: Value=1000000
          Constant DetachmentDuration: Value=1000000
          LinearInterpolationFunction SpecificLeafAreaMax: XProperty=[Structure].RelativeNodeApperance
            XYPairs: X=[0, 1]; Y=[40000, 25000]
          Constant SpecificLeafAreaMin: Value=25000
          Constant StructuralFraction: Value=0.5
          Constant MaximumNConc: Value=0.07
          Constant MinimumNConc: Value=0.03
          Constant InitialNConc: Value=0
          Constant NReallocationFactor: Value=1
          Constant NRetranslocationFactor: Value=0.01
          LinearInterpolationFunction ExpansionStress: XProperty=[Potato].WaterSupplyDemandRatio
            XYPairs: X=[0.5, 1]; Y=[0, 1]
          Constant CriticalNConc: Value=0.05
          Constant DMRetranslocationFactor: Value=0.5
          LinearInterpolationFunction ShadeInducedSenescenceRate: XProperty=[Leaf].CohortCurrentRankCoverAbove
            XYPairs: X=[0, 0.5, 0.8, 1]; Y=[0, 0, 0, 0.03]
          Constant NonStructuralFraction: Value=0.2
        RUEModel Photosynthesis
          Constant RUE: Value=1.2
          RUECO2Function FCO2: PhotosyntheticPathway=C3
          LinearInterpolationFunction FN: XProperty=[Leaf].Fn
            XYPairs: X=[0, 1, 1.5]; Y=[1, 1, 1]
          WeightedTemperatureFunction FT: MaximumTemperatureWeighting=0.75
            XYPairs: X=[2, 12, 24, 34]; Y=[0, 1, 1, 0]
          LinearInterpolationFunction FW: XProperty=[Leaf].Fw
            XYPairs: X=[0, 0.4, 1.5]; Y=[0, 1, 1]
          LinearInterpolationFunction FVPD: XProperty=[Leaf].Photosynthesis.VPD
            XYPairs: X=[0, 10, 50]; Y=[1, 1, 1]
        AirTemperatureFunction ThermalTime
          XYPairs: X=[2, 20, 35]; Y=[0, 18, 0]
        MultiplyFunction ExtinctionCoeff
          Constant: Value=0.8
          LinearInterpolationFunction: XProperty=[Potato].WaterSupplyDemandRatio
            XYPairs: X=[0, 1]; Y=[0.5, 1]
        LinearInterpolationFunction FrostFraction: XProperty=[Weather].MinT
          XYPairs: X=[-1, 0]; Y=[0, 0]
        CompositeBiomass Total: Propertys=[[Leaf].Live, [Leaf].Dead]
        ArrayBiomass CohortArrayLive: Propertys=[[Leaf].Live]; ArraySize=[Leaf].MaxNodeNo
        ArrayBiomass CohortArrayDead: Propertys=[[Leaf].Dead]; ArraySize=[Leaf].MaxNodeNo
        LeafCohort InitialLeaf1: Rank=1; Area=900
        LeafCohort InitialLeaf2: Rank=2; Area=600
        LeafCohort InitialLeaf3: Rank=3; Area=300
      GenericAboveGroundOrgan Stem
        Constant NReallocationFactor: Value=0
        Constant NRetranslocationFactor: Value=0.05
        PhaseBasedSwitch NitrogenDemandSwitch: Start=Planting; End=FinalLeaf
        Constant DMRetranslocationFactor: Value=0
        Constant StructuralFraction: Value=1
        InternodeDemandFunction DMDemandFunction
          Constant InterNodeWt: Value=0.2
        LinearInterpolationFunction MaximumNConc: XProperty=[Phenology].Stage
          XYPairs: X=[3, 4, 5.3]; Y=[0.06, 0.05, 0.025]
        Constant MinimumNConc: Value=0.006
        Biomass Live
        Biomass Dead
    Plant15 Wheat: AutoHarvest=true; CropType=Wheat
    Plant Potato: CropType=Potato
    Slurp: CropType=Slurp; localLAIGreen=5; localLAItot=5; localLightExtinction=0.6; localCanopyHeight=500; localCanopyDepth=500; localMaximumStomatalConductance=0.011; localFrgr=1; localDemandWater=10; localDemandNitrogen=5; localKNO3=0.1; localKNH4=0; localRootDepth=500; localSurfaceRootLengthDensity=0.05
    AgPasture: alt_N_uptake=no; SwardName=AgPasture; NumSpecies=1; WaterUptakeSource=calc; SpeciesName=[Ryegrass]; SpeciesNType=[grass]; SpeciesCType=[C3]; InitialDMShoot=[2000]; InitialDMRoot=[500]; InitialRootDepth=[750]; MinimumGreenWt=[300]; ExpoLinearDepthParam=0.1; ExpoLinearCurveParam=3
    Folder Wheat cultivars
      Folder Yield Prophet cultivars
        Cultivar Early
          Alias=[agtscythe, arrino, bonnie_rock, bowerbird, crusader, dart, drysdale, emurock, hunter, hybrid_mercury, hyperno, imposeclplus, kalka, kirchauff, kukri, livingston, mace, ouyen, perengori, ruby, tamaroi, wyalkatchem, young]
          Command:
            [Phenology].Vernalisation.VernSens = 2.3
            [Phenology].Vernalisation.PhotopSens = 3.2
        Cultivar EarlyMid
          Alias=[annuello, barunga, carnamah, catalina, clf_stiletto, cobra, corack, correll, diamondbird, estoc, frame, gladius, goroke, grenadeclplus, guardian, halbred, hartog, impala, justica, kord, merlin, mitre, pugsley, shield, spitfire, stiletto, sunguard, sunstate, ventura, yallaroi, yawa, yitpi]
          Command:
            [Phenology].Vernalisation.VernSens = 1.5
            [Phenology].Vernalisation.PhotopSens = 3.0
        Cultivar VeryEarly
          Alias=[h45, h46, saintly, silverstar, tamarinrock, waagan, westonia, wollaroi, zippy]
          Command:
            [Phenology].Vernalisation.VernSens = 1.5
            [Phenology].Vernalisation.PhotopSens = 1.5
        Cultivar Mid
          Alias=[arrivato, babbler, barham, baxter, buckley, camm, carinya, clf-jnz, derrimut, dollarbird, elmoreclplus, justicaclplus, saphire, wallup]
          Command:
            [Phenology].Vernalisation.VernSens = 1.5
            [Phenology].Vernalisation.PhotopSens = 3.5
        Cultivar MidPlus: Alias=[bellaroi, lang, caparoi, suntop]
          Command:
            [Phenology].Vernalisation.VernSens = 2.0
            [Phenology].Vernalisation.PhotopSens = 3.5
        Cultivar MidLate
          Alias=[braewood, calingiri, chara, endure, envoy, gauntlet, gazelle, giles, magenta, phantom, sentinel, sunlin, sunvale, wylie]
          Command:
            [Phenology].Vernalisation.VernSens = 2.8
            [Phenology].Vernalisation.PhotopSens = 3.0
        Cultivar Late: Alias=[beaufont, bolac, forrest, kelallac, preston, strzelecki]
          Command:
            [Phenology].Vernalisation.VernSens = 2.5
            [Phenology].Vernalisation.PhotopSens = 4.0
        Cultivar WinterWheat: Alias=[lorikeet, wylah, rosella, whistler, wedgetail]
          Command:
            [Phenology].Vernalisation.VernSens = 3.9
            [Phenology].Vernalisation.PhotopSens = 3.9
            [Phenology].FloralInitiationToFlowering.Target.Value = 380
        Cultivar Axe: Alias=axe
          Command:
            [Phenology].Vernalisation.VernSens = 2.0
            [Phenology].Vernalisation.PhotopSens = 3.0
        Cultivar Scout: Alias=[scout, l]
          Command:
            [Phenology].Vernalisation.VernSens = 1.8
            [Phenology].Vernalisation.PhotopSens = 3.5
            [Phenology].StartGrainFillToEndGrainFill.Target.Value = 550
        Cultivar Lincoln: Alias=lincoln
          Command:
            [Phenology].Vernalisation.VernSens = 1.8
            [Phenology].Vernalisation.PhotopSens = 3.5
        Cultivar GregoryLancer: Alias=[gregory, lancer]
          Command:
            [Phenology].Vernalisation.VernSens = 2.7
            [Phenology].Vernalisation.PhotopSens = 3.2
        Cultivar Eaglehawk: Alias=eaglehawk
          Command:
            [Phenology].Vernalisation.VernSens = 2.5
            [Phenology].Vernalisation.PhotopSens = 2.5
            [Phenology].EndOfJuvenileToFloralInitiation.Target.Value = 500
            [Phenology].FloralInitiationToFlowering.Target.Value = 655
            [Phenology].FloweringToStartGrainFill.Target.Value = 250
            [Phenology].StartGrainFillToEndGrainFill.Target.Value = 500
        Cultivar Marombi: Alias=[marombi, -]
          Command:
            [Phenology].Vernalisation.VernSens = 3.9
            [Phenology].Vernalisation.PhotopSens = 4.0
            [Phenology].FloralInitiationToFlowering.Target.Value = 455
    Folder OilPalm cultivars
      Cultivar Dami
        Command:
          [FrondMaxArea].XYPairs.X = 0,2,4.5,8.5,14
          [FrondMaxArea].XYPairs.Y = 0.1,1,7,12,14
      Cultivar SuperFamily
        Command:
          [FrondMaxArea].XYPairs.X = 0,2,4.5,8.5,14
          [FrondMaxArea].XYPairs.Y = 0.1,0.9,0.63,10.8,12.6
    Plant MCSP: CropType=MCSP
      OrganArbitrator Arbitrator: NArbitrationOption=RelativeAllocation; DMArbitrationOption=RelativeAllocation
      Phenology: Emerged=false
        AirTemperatureFunction ThermalTime
          XYPairs: X=[0, 30, 40]; Y=[0, 30, 0]
        GerminatingPhase Germinating: Start=Sowing; End=Germination
        EmergingPhase Emerging: Start=Germination; End=Emergence; ShootLag=0; ShootRate=0
          VariableReference ThermalTime: VariableName=[Phenology].ThermalTime.Value
        GenericPhase CanopyExpanding: Start=Emergence; End=StartReproductive
          Constant Target: Value=1000
          VariableReference ThermalTime: VariableName=[Phenology].ThermalTime.Value
        GenericPhase YieldIncreasing: Start=StartReproductive; End=StartSenescence
          Constant Target: Value=600
          VariableReference ThermalTime: VariableName=[Phenology].ThermalTime.Value
        GenericPhase Senescing: Start=StartSenescence; End=EndReproductive
          Constant Target: Value=600
          VariableReference ThermalTime: VariableName=[Phenology].ThermalTime.Value
        GenericPhase Maturing: Start=EndReproductive; End=Maturity
          Constant Target: Value=600
          VariableReference ThermalTime: VariableName=[Phenology].ThermalTime.Value
        EndPhase ReadyForHarvest: Start=Maturity; End=Unused
          VariableReference ThermalTime: VariableName=[Phenology].ThermalTime.Value
        AccumulateFunction AccumulatedThermalTime: StartStageName=Emergence; EndStageName=Maturity
          VariableReference ThermalTime: VariableName=[Phenology].ThermalTime.Value
        AccumulateFunction AccumulatedEmergingThermalTime: StartStageName=Germination; EndStageName=Emergence
          VariableReference ThermalTime: VariableName=[Phenology].ThermalTime.Value
      Root: InitialDM=0.2; SpecificRootLength=40000; KNO3_yProperty=[0.02, 0.02]; KNO3_xRootLength=[0, 0.003]; KNH4_yProperty=[0, 0]; KNH4_xRootLength=[0, 0.003]; NuptakeSupply=0
        CompositeBiomass Live: Propertys=[[Root].LayerLive]
        CompositeBiomass Dead: Propertys=[[Root].LayerDead]
        LinearInterpolationFunction KLModifier: XProperty=[Leaf].LAI
          XYPairs: X=[0, 200, 1500]; Y=[1, 1, 0]
        Constant SoilWaterEffect: Value=1
        Constant MaxDailyNUptake: Value=12
        Constant SenescenceRate: Value=0
        PhaseLookup PartitionFraction
          PhaseLookupValue Growing: Start=Germination; End=EndReproductive
            VariableReference PartitionFraction: VariableName=[RootProportion].Value
          PhaseLookupValue Dead: Start=EndReproductive; End=Maturity
            Constant Zero: Value=0
        Constant MaximumNConc: Value=0.009
        Constant MinimumNConc: Value=0.009
        PhaseBasedSwitch NitrogenDemandSwitch: Start=Germination; End=Maturity
        Constant TemperatureEffect: Value=1
        Constant MaximumRootDepth: Value=1500
        MultiplyFunction RootFrontVelocity
          LessThanFunction RootFrontVelocity
            VariableReference: VariableName=[Phenology].AccumulatedThermalTime.Value
            Constant Criteria: Value=2010
            Constant IfTrue: Value=10
            Constant IfFalse: Value=0
          VariableReference ThermalTime: VariableName=[Phenology].ThermalTime.Value
      SimpleLeaf Leaf
        zero: BiomassYesterday, LAI, Height, FRGR, PotentialEP, K, KDead, DeltaBiomass, LAIDead, WaterAllocation
        Biomass Live
        Biomass Dead
        Constant NConc: Value=0.008
        PhaseLookup NitrogenDemandSwitch
          PhaseLookupValue PreErmergence: Start=Sowing; End=Emergence
            Constant Function: Value=0
          PhaseLookupValue Expanding: Start=Emergence; End=StartSenescence
            Constant Function: Value=1
          PhaseLookupValue Senescence: Start=StartSenescence; End=EndReproductive
            Constant: Value=0
          PhaseLookupValue Mature: Start=EndReproductive; End=Maturity
            Constant: Value=0
        DeltaFunction PotentialBiomass
          SigmoidFunction2 Integral: Xo=1080; b=216
            VariableReference Ymax: VariableName=[Ymax].Value
            VariableReference XValue: VariableName=[Phenology].AccumulatedThermalTime.Value
        PartitionFractionDemandFunction DMDemandFunction
          PhaseLookup PartitionFraction
            PhaseLookupValue PreErmergence: Start=Sowing; End=Emergence
              Constant Function: Value=0
            PhaseLookupValue Expanding: Start=Emergence; End=StartReproductive
              SubtractFunction DMPartitionCoefficient
                Constant: Value=1
                VariableReference RootFraction: VariableName=[RootProportion].Value
            PhaseLookupValue YieldIncreasing: Start=StartReproductive; End=StartSenescence
              DivideFunction
                SubtractFunction Stover
                  MultiplyFunction StoverAtMaturity
                    VariableReference TotalBiomassAtMaturity: VariableName=[Ymax].Value
                    SubtractFunction AboveGroundProportion
                      Constant: Value=1
                      VariableReference RootFraction: VariableName=[RootProportion].Value
                    SubtractFunction StoverProportion
                      Constant: Value=1
                      VariableReference HI: VariableName=[HarvestIndex].Value
                  MultiplyFunction StoverAtStartReproductive
                    VariableReference BiomassAtStartReproductive: VariableName=[TotalBiomassAtStartReproductive].Value
                    SubtractFunction AboveGroundProportion
                      Constant: Value=1
                      VariableReference RootFraction: VariableName=[RootProportion].Value
                SubtractFunction TotalBiomass
                  VariableReference BiomassAtStartSenescence: VariableName=[TotalBiomassAtStartSenescence].Value
                  VariableReference BiomassAtStartReproductive: VariableName=[TotalBiomassAtStartReproductive].Value
            PhaseLookupValue Maturing: Start=StartSenescence; End=Maturity
              Constant Function: Value=0
        PhaseLookup CoverFunction
          PhaseLookupValue PreErmergence: Start=Sowing; End=Emergence
            Constant Function: Value=0
          PhaseLookupValue Expanding: same as Crops.MCSP.Leaf.CoverFunction.Expanding
          PhaseLookupValue Senescence: Start=StartSenescence; End=Maturity
            MultiplyFunction TotalCoverLoss
              OnEventFunction MaxCoverFunction: SetEvent=StartSenescence; ReSetEvent=never
                VariableReference PostEventValue: VariableName=[Leaf].CoverFunction.Expanding.SigCoverFunction.Ymax.Value
                VariableReference PostEventValue1: VariableName=[Leaf].CoverFunction.Expanding.SigCoverFunction.Ymax.Value
              SubtractFunction CoverLossFactor
                Constant: Value=0.999
                MultiplyFunction PercentComplete
                  DivideFunction SenescenceRate
                    Constant Inverse: Value=1
                    VariableReference Duration: VariableName=[Phenology].Senescing.Target.Value
                  SubtractFunction TTSenesce
                    VariableReference XValue: VariableName=[Phenology].AccumulatedThermalTime.Value
                    OnEventFunction TTToSenescence: SetEvent=StartSenescence; ReSetEvent=Maturity
                      Constant PreEventValue: Value=3000
                      VariableReference PostEventValue: VariableName=[Phenology].AccumulatedThermalTime.Value
          PhaseLookupValue Mature: Start=Maturity; End=Unused
            Constant: Value=0
        Constant FRGRFunction: Value=1
        Constant HeightFunction: Value=150
        Constant ExtinctionCoefficientFunction: Value=0.5
      GenericAboveGroundOrgan Product
        Biomass Live
        Biomass Dead
        Constant MaximumNConc: Value=0.012
        Constant MinimumNConc: Value=0.008
        PartitionFractionDemandFunction DMDemandFunction
          PhaseLookup PartitionFraction
            PhaseLookupValue PreErmergence: Start=Sowing; End=Emergence
              Constant Function: Value=0
            PhaseLookupValue Expanding: Start=Emergence; End=StartReproductive
              Constant Function: Value=0
            PhaseLookupValue YieldIncreasing: Start=StartReproductive; End=StartSenescence
              SubtractFunction ProductProportion
                Constant: Value=1
                VariableReference RootFraction: VariableName=[RootProportion].Value
                VariableReference StoverFraction
                  VariableName=[Leaf].DMDemandFunction.PartitionFraction.YieldIncreasing.Value
            PhaseLookupValue Maturing: Start=StartSenescence; End=EndReproductive
              SubtractFunction DMPartitionCoefficient
                Constant: Value=1
                VariableReference RootFraction: VariableName=[RootProportion].Value
        SubtractFunction WaterContent
          Constant One: Value=1
          VariableReference DMcontent: VariableName=[ProductDMProportion].Value
      Nodule: RespiredWt=0; PropFixationDemand=0; _NFixed=0
        Biomass Live
        Biomass Dead
        Constant FixationSwitch: Value=0
        Constant MaximumNConc: Value=0
        Constant MinimumNConc: Value=0
        Constant DMDemandFunction: Value=0
        Constant FT: Value=1
        Constant FW: Value=1
        Constant FWlog: Value=0.01
        Constant FixationMetabolicCost: Value=0
        Constant SpecificNitrogenaseActivity: Value=0
      Summariser
        CompositeBiomass Total
          Propertys=[[Leaf].Live, [Leaf].Dead, [Product].Live, [Product].Dead, [Root].Live, [Root].Dead]
      Constant ExpectedYield: Value=800
      LinearInterpolationFunction HarvestIndex: XProperty=[ExpectedYield].Value
        XYPairs: X=[0, 696, 1392]; Y=[0.14, 0.46, 0.78]
      Constant RootProportion: Value=0.1
      Constant ProductDMProportion: Value=0.87
      MultiplyFunction DryYield
        VariableReference FreshYld: VariableName=[ExpectedYield].Value
        VariableReference DMPercent: VariableName=[ProductDMProportion].Value
      SigmoidFunction2 TotalBiomassAtStartReproductive: Xo=1080; b=216
        VariableReference Ymax1: VariableName=[Ymax].Value
        VariableReference XValue: VariableName=[Phenology].CanopyExpanding.Target.Value
      SigmoidFunction2 TotalBiomassAtStartSenescence: same as Crops.MCSP.TotalBiomassAtStartSenescence
      DivideFunction Ymax
        VariableReference DryYield: VariableName=[DryYield].Value
        VariableReference HarvestIndex: VariableName=[HarvestIndex].Value
        SubtractFunction AboveGroundDM
          Constant Unity: Value=1
          VariableReference RootFraction: VariableName=[RootProportion].Value
      Cultivar Dash
      Cultivar Barley_Spring: same as Crops.MCSP.Barley_Spring
  Folder Data store and analysis models
    DataStore
    Input
    PredictedObserved
    TimeSeriesStats: TableName=PredictedObserved
    Probability: Exceedence=true
  Tests
    Test:
      SimulationName  TableName  Type            ColumnNames  Parameters
      simulation      Report     EqualTo         column       value
      simulation      Report     LessThan        column       value
      simulation      Report     GreaterThan     column       value
      simulation      Report     AllPos          column       -
      simulation      Report     Between         column       value1,value2
      simulation      Report     Mean            column       5,value
      simulation      Report     Tolerance       column       1,5
      simulation      Report     CompareToInput  column       1,5
  Experiment
    Factors
      Factor
    Simulation Base: Area=0; Slope=0
      Clock: StartDate=1940-01-01; EndDate=1989-12-31
      Summary
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