Simulations Training
  Folder Soils
    Soil Heavy Clay: ASCOrder=Vertosol; ASCSubOrder=Black; SoilType=Clay; Site=Kaimkillenbun; NearestTown=Kaimkillenbun, Q 4406; Region=Darling Downs and Granite Belt; State=Queensland; Country=Australia; NaturalVegetation=Open woodland with mountain coolibah; ApsoilNumber=11; Latitude=-27.066; Longitude=151.413; LocationAccuracy=+/- 20m; DataSource=CSIRO Sustainable Ecosystems, Toowoomba; Comments=oc and ph estimated
      Water
        Thickness  BD    AirDry  LL15  DUL   SAT
        150        1.01  0.11    0.22  0.54  0.59
        150        1.04  0.176   0.22  0.53  0.58
        300        1.07  0.28    0.28  0.52  0.57
        300        1.08  0.28    0.28  0.51  0.56
        300        1.15  0.28    0.28  0.49  0.54
        300        1.23  0.28    0.28  0.46  0.51
        300        1.26  0.28    0.28  0.44  0.49
        SoilCrop WheatSoil: LL=[0.22, 0.22, 0.28, 0.28, 0.34, 0.37, 0.36]; KL=[0.06, 0.06, 0.06, 0.04, 0.04, 0.02, 0.02]; XF=[1, 1, 1, 1, 1, 1, 1]
        SoilCrop BarleySoil: LL=[0.22, 0.22, 0.31, 0.31, 0.36, 0.37, 0.36]; KL=[0.07, 0.07, 0.07, 0.05, 0.05, 0.04, 0.03]; XF=[1, 1, 1, 1, 1, 1, 1]
      SoilWater: residueinterception=0; SummerDate=1-Nov; SummerU=6; SummerCona=3.5; WinterDate=1-Apr; WinterU=4; WinterCona=2.5; DiffusConst=40; DiffusSlope=16; Salb=0.12; CN2Bare=73; CNRed=20; CNCov=0.8; max_pond=0; Thickness=[150, 150, 300, 300, 300, 300, 300]; SWCON=[0.3, 0.3, 0.3, 0.3, 0.3, 0.3, 0.3]
      InitialWater: PercentMethod=EvenlyDistributed; FractionFull=1
      Sample InitialN: NO3Units=kgha; NH4Units=kgha; SWUnits=Volumetric; OCUnits=Total; PHUnits=Water
        Thickness  NO3  NH4
        150        1    0.1
        150        1    0.1
        300        1    0.1
        300        1    0.1
        300        1    0.1
        300        1    0.1
        300        1    0.1
      SoilNitrogen: fom_type=[default, manure, mucuna, lablab, shemp, stable]; fract_carb=[0.2, 0.3, 0.54, 0.57, 0.45, 0]; fract_cell=[0.7, 0.3, 0.37, 0.37, 0.47, 0.1]; fract_lign=[0.1, 0.4, 0.09, 0.06, 0.08, 0.9]; wfpsN2N2O_x=[22, 88]; wfpsN2N2O_y=[0.1, 1]
      SoilOrganicMatter: RootCN=40; RootWt=1000; SoilCN=12; EnrACoeff=7.4; EnrBCoeff=0.2; OCUnits=Total
        Thickness  OC        FBiom  FInert
        150        0.953846  0.04   0.4
        150        0.953846  0.02   0.6
        300        0.961538  0.02   0.8
        300        0.846154  0.02   1
        300        0.546154  0.01   1
        300        0.261538  0.01   1
        300        0.2       0.01   1
      Analysis: Thickness=[150, 150, 300, 300, 300, 300, 300]; PH=[8, 8, 8, 8, 8, 8, 8]; PHUnits=Water; BoronUnits=HotWater
    Soil Sand: SoilType=Deep sandy duplex; Site=Cunderdin; NearestTown=Cunderdin; Region=Central Region_Avon; State=Western Australia; Country=Australia; ApsoilNumber=486; Latitude=-31.457; Longitude=117.244; LocationAccuracy=+/- 20m; DataSource=DAFWA_A. Stuart-Street _ NEAR project Yield Prophet
      Comments=YP11 - reticulite subsoil (coarse with sand seams)-estimated LL.  12/05/2010 Zvi Hochman modified values for kl(wheat), salb, DiffusConst, DiffusSlope, CN2Bare at request of DAFWA
      Water
        Thickness  BD    AirDry  LL15   DUL    SAT
        100        1.64  0.015   0.03   0.09   0.354
        200        1.78  0.035   0.041  0.1    0.305
        200        1.92  0.14    0.14   0.187  0.262
        300        1.84  0.14    0.14   0.197  0.29
        400        2     0.14    0.14   0.169  0.233
        100        1.95  0.14    0.14   0.196  0.251
        SoilCrop WheatSoil: LL=[0.03, 0.041, 0.14, 0.14, 0.14, 0.142]; KL=[0.06, 0.06, 0.06, 0.04, 0.04, 0.02]; XF=[1, 1, 1, 1, 1, 1]
      SoilWater: residueinterception=0; SummerDate=1-Nov; SummerU=6; SummerCona=3.5; WinterDate=1-Apr; WinterU=2; WinterCona=2; DiffusConst=40; DiffusSlope=16; Salb=0.14; CN2Bare=60; CNRed=20; CNCov=0.8; max_pond=0; Thickness=[100, 200, 200, 300, 400, 100]; SWCON=[0.7, 0.7, 0.5, 0.5, 0.5, 0.5]
      InitialWater: PercentMethod=EvenlyDistributed; FractionFull=1
      Sample InitialN: same as Soils.Heavy Clay.InitialN
      SoilNitrogen: fom_type=[default, manure, mucuna, lablab, shemp, stable]; fract_carb=[0.2, 0.3, 0.54, 0.57, 0.45, 0]; fract_cell=[0.7, 0.3, 0.37, 0.37, 0.47, 0.1]; fract_lign=[0.1, 0.4, 0.09, 0.06, 0.08, 0.9]; wfpsN2N2O_x=[22, 88]; wfpsN2N2O_y=[0.1, 1]
      SoilOrganicMatter: RootCN=40; RootWt=1000; SoilCN=12; EnrACoeff=7.4; EnrBCoeff=0.2; OCUnits=Total
        Thickness  OC      FBiom  FInert
        100        0.0593  0.035  0.4
        200        0.1731  0.02   0.5
        200        0.103   0.015  0.7
        300        0.0409  0.015  0.95
        400        0.0275  0.01   0.95
        100        0.0648  0.01   0.95
      Analysis: Thickness=[100, 200, 200, 300, 400, 100]; PH=[6.4, 5.8, 6, 6.2, 6.2, 5.9]; PHUnits=Water; BoronUnits=HotWater
  Folder Completed Simulations
    Folder Exercise 1
      Simulation Clay Fallow: Area=0; Slope=0
        Clock: StartDate=1989-01-01; EndDate=1989-12-31
        Summary SummaryFile
        Weather: FileName=%root%\Examples\WeatherFiles\Dalby.met
        Zone Field: Area=1; Slope=0
          Report: EventNames=[Clock].EndOfDay
            VariableNames:
              [Clock].Today
              [Weather].Rain
              [Soil].SoilWater.ESW
              [Soil].SoilWater.Es
              [Soil].SoilWater.Runoff
              [Soil].SoilWater.Drainage
              sum([Soil].SoilNitrogen.NO3)
              sum([Soil].SoilNitrogen.MineralisedN
              [SurfaceOrganicMatter].Wt
              [SurfaceOrganicMatter].Cover
          Fertiliser
          SurfaceOrganicMatter: PoolName=wheat_stubble; type=wheat; mass=1000; standing_fraction=0; cnr=100; CriticalResidueWeight=2000; OptimumDecompTemp=20; MaxCumulativeEOS=20; CNRatioDecompCoeff=0.277; CNRatioDecompThreshold=25; TotalLeachRain=25; MinRainToLeach=10; CriticalMinimumOrganicC=0.004; DefaultCPRatio=0; DefaultStandingFraction=0; StandingExtinctCoeff=0.5; FractionFaecesAdded=0.5
            Pools:
              {PoolName=wheat_stubble, ResidueType=wheat, Mass=1000, CNRatio=100, StandingFraction=0}
            ResidueTypes: LoadFromResource=ResidueTypes
          MicroClimate: air_pressure=1010; soil_emissivity=0.96; sun_angle=15; soil_heat_flux_fraction=0.4; night_interception_fraction=0.5; windspeed_default=3; refheight=2; albedo=0.15; emissivity=0.96; gsmax=0.01; r50=200; a_interception=0; b_interception=1; c_interception=0; d_interception=0; soil_albedo=0.3
          Soil Heavy Clay: ASCOrder=Vertosol; ASCSubOrder=Black; SoilType=Clay; Site=Kaimkillenbun; NearestTown=Kaimkillenbun, Q 4406; Region=Darling Downs and Granite Belt; State=Queensland; Country=Australia; NaturalVegetation=Open woodland with mountain coolibah; ApsoilNumber=11; Latitude=-27.066; Longitude=151.413; LocationAccuracy=+/- 20m; DataSource=CSIRO Sustainable Ecosystems, Toowoomba; Comments=oc and ph estimated
            Water: same as Soils.Heavy Clay.Water
            SoilWater: same as Soils.Heavy Clay.SoilWater
            SoilNitrogen: fom_type=[default, manure, mucuna, lablab, shemp, stable]; fract_carb=[0.2, 0.3, 0.54, 0.57, 0.45, 0]; fract_cell=[0.7, 0.3, 0.37, 0.37, 0.47, 0.1]; fract_lign=[0.1, 0.4, 0.09, 0.06, 0.08, 0.9]; wfpsN2N2O_x=[22, 88]; wfpsN2N2O_y=[0.1, 1]
            InitialWater: PercentMethod=FilledFromTop; FractionFull=0.1
            Sample InitialN: NO3Units=kgha; NH4Units=kgha; SWUnits=Volumetric; OCUnits=Total; PHUnits=Water
              Thickness  NO3  NH4
              1800       50   3
              999999     -    -
              999999     -    -
              999999     -    -
              999999     -    -
              999999     -    -
              999999     -    -
            SoilOrganicMatter: same as Soils.Heavy Clay.SoilOrganicMatter
            Analysis: Thickness=[150, 150, 300, 300, 300, 300, 300]; PH=[8, 8, 8, 8, 8, 8, 8]; PHUnits=Water; BoronUnits=HotWater
      Simulation Sand Fallow: Area=0; Slope=0
        Clock: StartDate=1989-01-01; EndDate=1989-12-31
        Summary SummaryFile
        Weather: FileName=%root%\Examples\WeatherFiles\Dalby.met
        Zone Field: Area=1; Slope=0
          Report: EventNames=[Clock].EndOfDay
            VariableNames:
              [Clock].Today
              [Weather].Rain
              [Soil].SoilWater.ESW
              [Soil].SoilWater.Es
              [Soil].SoilWater.Runoff
              [Soil].SoilWater.Drainage
              sum([Soil].SoilNitrogen.NO3)
              sum([Soil].SoilNitrogen.MineralisedN
              [SurfaceOrganicMatter].Wt
              [SurfaceOrganicMatter].Cover
          Fertiliser
          SurfaceOrganicMatter: same as Completed Simulations.Exercise 1.Clay Fallow.Field.SurfaceOrganicMatter
          MicroClimate: same as Completed Simulations.Exercise 1.Clay Fallow.Field.MicroClimate
          Soil Sand: SoilType=Deep sandy duplex; Site=Cunderdin; NearestTown=Cunderdin; Region=Central Region_Avon; State=Western Australia; Country=Australia; ApsoilNumber=486; Latitude=-31.457; Longitude=117.244; LocationAccuracy=+/- 20m; DataSource=DAFWA_A. Stuart-Street _ NEAR project Yield Prophet
            Comments=YP11 - reticulite subsoil (coarse with sand seams)-estimated LL.  12/05/2010 Zvi Hochman modified values for kl(wheat), salb, DiffusConst, DiffusSlope, CN2Bare at request of DAFWA
            Water: same as Soils.Sand.Water
            SoilWater: same as Soils.Sand.SoilWater
            SoilNitrogen: fom_type=[default, manure, mucuna, lablab, shemp, stable]; fract_carb=[0.2, 0.3, 0.54, 0.57, 0.45, 0]; fract_cell=[0.7, 0.3, 0.37, 0.37, 0.47, 0.1]; fract_lign=[0.1, 0.4, 0.09, 0.06, 0.08, 0.9]; wfpsN2N2O_x=[22, 88]; wfpsN2N2O_y=[0.1, 1]
            InitialWater: PercentMethod=FilledFromTop; FractionFull=0.1
            Sample InitialN: NO3Units=kgha; NH4Units=kgha; SWUnits=Volumetric; OCUnits=Total; PHUnits=Water
              Thickness  NO3  NH4
              1800       50   3
              999999     -    -
              999999     -    -
              999999     -    -
              999999     -    -
              999999     -    -
              999999     -    -
            SoilOrganicMatter: same as Soils.Sand.SoilOrganicMatter
            Analysis: Thickness=[100, 200, 200, 300, 400, 100]; PH=[6.4, 5.8, 6, 6.2, 6.2, 5.9]; PHUnits=Water; BoronUnits=HotWater
      DataStore
    Folder Exercise 2
      Simulation Clay Fallow: Area=0; Slope=0
        Clock: StartDate=1989-01-01; EndDate=1989-12-31
        Summary SummaryFile
        Weather: FileName=%root%\Examples\WeatherFiles\Dalby.met
        Zone Field: same as Completed Simulations.Exercise 1.Clay Fallow.Field
      DataStore
      Simulation Clay Residue: Area=0; Slope=0
        Clock: StartDate=1989-01-01; EndDate=1989-12-31
        Summary SummaryFile
        Weather: FileName=%root%\Examples\WeatherFiles\Dalby.met
        Zone Field: Area=1; Slope=0
          Report: EventNames=[Clock].EndOfDay
            VariableNames:
              [Clock].Today
              [Weather].Rain
              [Soil].SoilWater.ESW
              [Soil].SoilWater.Es
              [Soil].SoilWater.Runoff
              [Soil].SoilWater.Drainage
              sum([Soil].SoilNitrogen.NO3)
              sum([Soil].SoilNitrogen.MineralisedN
              [SurfaceOrganicMatter].Wt
              [SurfaceOrganicMatter].Cover
          Fertiliser
          SurfaceOrganicMatter: PoolName=wheat_stubble; type=wheat; mass=3000; standing_fraction=0; cnr=100; CriticalResidueWeight=2000; OptimumDecompTemp=20; MaxCumulativeEOS=20; CNRatioDecompCoeff=0.277; CNRatioDecompThreshold=25; TotalLeachRain=25; MinRainToLeach=10; CriticalMinimumOrganicC=0.004; DefaultCPRatio=0; DefaultStandingFraction=0; StandingExtinctCoeff=0.5; FractionFaecesAdded=0.5
            Pools:
              {PoolName=wheat_stubble, ResidueType=wheat, Mass=3000, CNRatio=100, StandingFraction=0}
            ResidueTypes: LoadFromResource=ResidueTypes
          MicroClimate: same as Completed Simulations.Exercise 1.Clay Fallow.Field.MicroClimate
          Soil Heavy Clay: same as Completed Simulations.Exercise 1.Clay Fallow.Field.Heavy Clay
    Folder Exercise 3
      Simulation Nitrogen Cycle: Area=0; Slope=0
        Clock: StartDate=1989-01-01; EndDate=1989-12-31
        Summary SummaryFile
        Weather: FileName=%root%\Examples\WeatherFiles\Dalby.met
        Zone Field: Area=1; Slope=0
          Report: EventNames=[Clock].EndOfDay
            VariableNames:
              [Clock].Today
              [Weather].Rain
              [Soil].SoilWater.Drainage
              [Soil].SoilWater.ESW
              sum([Soil].SoilNitrogen.NO3) as NO3Total
              sum([Soil].SoilNitrogen.NH4) as NH4Total
              sum([Soil].SoilNitrogen.Denitrification) as Denitrification
          Fertiliser
          SurfaceOrganicMatter: same as Completed Simulations.Exercise 1.Clay Fallow.Field.SurfaceOrganicMatter
          MicroClimate: same as Completed Simulations.Exercise 1.Clay Fallow.Field.MicroClimate
          Soil Heavy Clay: ASCOrder=Vertosol; ASCSubOrder=Black; SoilType=Clay; Site=Kaimkillenbun; NearestTown=Kaimkillenbun, Q 4406; Region=Darling Downs and Granite Belt; State=Queensland; Country=Australia; NaturalVegetation=Open woodland with mountain coolibah; ApsoilNumber=11; Latitude=-27.066; Longitude=151.413; LocationAccuracy=+/- 20m; DataSource=CSIRO Sustainable Ecosystems, Toowoomba; Comments=oc and ph estimated
            Water
              Thickness  BD    AirDry  LL15  DUL   SAT
              150        1.01  0.11    0.22  0.54  0.59
              150        1.04  0.176   0.22  0.53  0.58
              300        1.07  0.28    0.28  0.52  0.57
              300        1.08  0.28    0.28  0.51  0.56
              300        1.15  0.28    0.28  0.49  0.54
              300        1.23  0.28    0.28  0.46  0.51
              300        1.26  0.28    0.28  0.44  0.49
              SoilCrop: LL=[0.22, 0.22, 0.28, 0.28, 0.34, 0.37, 0.36]; KL=[0.06, 0.06, 0.06, 0.04, 0.04, 0.02, 0.02]; XF=[1, 1, 1, 1, 1, 1, 1]
              SoilCrop: LL=[0.22, 0.22, 0.31, 0.31, 0.36, 0.37, 0.36]; KL=[0.07, 0.07, 0.07, 0.05, 0.05, 0.04, 0.03]; XF=[1, 1, 1, 1, 1, 1, 1]
            SoilWater: same as Soils.Heavy Clay.SoilWater
            SoilNitrogen: fom_type=[default, manure, mucuna, lablab, shemp, stable]; fract_carb=[0.2, 0.3, 0.54, 0.57, 0.45, 0]; fract_cell=[0.7, 0.3, 0.37, 0.37, 0.47, 0.1]; fract_lign=[0.1, 0.4, 0.09, 0.06, 0.08, 0.9]; wfpsN2N2O_x=[22, 88]; wfpsN2N2O_y=[0.1, 1]
            InitialWater: PercentMethod=EvenlyDistributed; FractionFull=0.5
            Sample InitialN: NO3Units=kgha; NH4Units=kgha; SWUnits=Volumetric; OCUnits=Total; PHUnits=Water
              Thickness  NO3  NH4
              1800       150  0
              999999     -    -
              999999     -    -
              999999     -    -
              999999     -    -
              999999     -    -
              999999     -    -
            SoilOrganicMatter: same as Soils.Heavy Clay.SoilOrganicMatter
            Analysis: Thickness=[150, 150, 300, 300, 300, 300, 300]; PH=[8, 8, 8, 8, 8, 8, 8]; PHUnits=Water; BoronUnits=HotWater
      DataStore
    Folder Exercise 4
      Simulation 0N: Area=0; Slope=0
        Clock: StartDate=1900-01-01; EndDate=2000-12-31
        Summary SummaryFile
        Weather: FileName=%root%\Examples\WeatherFiles\Dalby.met
        Zone Field: Area=1; Slope=0
          Report: EventNames=[Wheat].Harvesting
            VariableNames:
              [Clock].Today
              Wheat.Zadok.Stage
              Wheat.Phenology.CurrentStageName
              Wheat.AboveGround.Wt
              Wheat.AboveGround.N
              Wheat.Grain.Yield
              Wheat.Grain.Protein
              Wheat.Grain.Size
              Wheat.Grain.GrainNo
              Wheat.Grain.Wt
              Wheat.Grain.N
              Wheat.Total.Wt
              sum([Soil].SoilNitrogen.TotalC)/1000 as SoilCtpha
          Fertiliser
          Soil: ASCOrder=Vertosol; ASCSubOrder=Black; SoilType=Clay; Site=Norwin; NearestTown=Norwin; Region=Darling Downs and Granite Belt; State=Queensland; Country=Australia; NaturalVegetation=Qld. Bluegrass, possible Qld. Blue gum; ApsoilNumber=900; Latitude=-27.581836; Longitude=151.320206; LocationAccuracy=+/- 20m
            DataSource=CSIRO Sustainable Ecosystems, Toowoomba; Characteriesd as part of the GRDC funded project"Doing it better, doing it smarter, managing soil water in Australian agriculture' 2011
            Comments=OC, CLL for all crops estimated-based on Bongeen Mywybilla Soil No1
            Water
              Thickness  BD       AirDry    LL15      DUL       SAT       KS
              150        1.01056  0.13025   0.2605    0.521     0.588655  20
              150        1.07146  0.198689  0.248362  0.496723  0.565677  20
              300        1.09394  0.28      0.28      0.488438  0.557193  20
              300        1.15861  0.28      0.28      0.480297  0.532787  20
              300        1.17301  0.28      0.28      0.471584  0.527354  20
              300        1.16287  0.28      0.28      0.457071  0.53118   20
              300        1.1875   0.28      0.28      0.452332  0.521888  20
              SoilCrop WheatSoil: LL=[0.261, 0.248, 0.28, 0.306, 0.36, 0.392, 0.446]; KL=[0.06, 0.06, 0.06, 0.04, 0.04, 0.02, 0.01]; XF=[1, 1, 1, 1, 1, 1, 1]
            SoilWater: residueinterception=0; SummerDate=1-Nov; SummerU=5; SummerCona=5; WinterDate=1-Apr; WinterU=5; WinterCona=5; DiffusConst=40; DiffusSlope=16; Salb=0.12; CN2Bare=73; CNRed=20; CNCov=0.8; max_pond=0; Thickness=[150, 150, 300, 300, 300, 300, 300]; SWCON=[0.3, 0.3, 0.3, 0.3, 0.3, 0.3, 0.3]
            SoilNitrogen: fom_type=[default, manure, mucuna, lablab, shemp, stable]; fract_carb=[0.2, 0.3, 0.54, 0.57, 0.45, 0]; fract_cell=[0.7, 0.3, 0.37, 0.37, 0.47, 0.1]; fract_lign=[0.1, 0.4, 0.09, 0.06, 0.08, 0.9]; wfpsN2N2O_x=[22, 88]; wfpsN2N2O_y=[0.1, 1]
            SoilOrganicMatter: RootCN=40; RootWt=1000; SoilCN=12; EnrACoeff=7.4; EnrBCoeff=0.2; OCUnits=Total
              Thickness  OC    FBiom  FInert
              150        1.2   0.04   0.4
              150        0.96  0.02   0.6
              300        0.6   0.02   0.8
              300        0.3   0.02   1
              300        0.18  0.01   1
              300        0.12  0.01   1
              300        0.12  0.01   1
            Analysis: Thickness=[150, 150, 300, 300, 300, 300, 300]; PH=[8, 8, 8, 8, 8, 8, 8]; PHUnits=Water; BoronUnits=HotWater
            InitialWater: PercentMethod=EvenlyDistributed; FractionFull=1
            Sample InitialN: NO3Units=ppm; NH4Units=ppm; SWUnits=Volumetric; OCUnits=Total; PHUnits=Water
              Thickness  NO3  NH4
              150        1    0.1
              150        1    0.1
              300        1    0.1
              300        1    0.1
              300        1    0.1
              300        1    0.1
              300        1    0.1
          SurfaceOrganicMatter: PoolName=wheat_stubble; type=wheat; mass=500; standing_fraction=0; cnr=100; CriticalResidueWeight=2000; OptimumDecompTemp=20; MaxCumulativeEOS=20; CNRatioDecompCoeff=0.277; CNRatioDecompThreshold=25; TotalLeachRain=25; MinRainToLeach=10; CriticalMinimumOrganicC=0.004; DefaultCPRatio=0; DefaultStandingFraction=0; StandingExtinctCoeff=0.5; FractionFaecesAdded=0.5
            Pools:
              {PoolName=wheat_stubble, ResidueType=wheat, Mass=500, CNRatio=100, StandingFraction=0}
            ResidueTypes: LoadFromResource=ResidueTypes
          Plant15 Wheat: AutoHarvest=true; CropType=Wheat
          MicroClimate: same as Completed Simulations.Exercise 1.Clay Fallow.Field.MicroClimate
          Manager SowingFertiliser
            Amount = 0
            CropName = wheat
```csharp
using System;
using Models.Core;
using Models.PMF;
namespace Models
{
	[Serializable]
	public class Script : Model
	{
		[Link] Clock Clock;
		[Link] Fertiliser Fertiliser;
		[Link] Summary Summary;
		
		
		[Description("Amount of fertiliser to be applied (kg/ha)")]
		public double Amount { get; set;}
		
		[Description("Crop to be fertilised")]
		public string CropName { get; set;}
		
		
		

		[EventSubscribe("Sowing")]
		private void OnSowing(object sender, EventArgs e)
		{
			Model crop = sender as Model;
			if (crop.Name.ToLower()==CropName.ToLower())
				Fertiliser.Apply(Amount: Amount, Type: Fertiliser.Types.NO3N);
		}
		
	}
}
```
          Manager SowingRule
            StartDate = 1-may
            EndDate = 10-jul
            MinESW = 100
            MinRain = 25
            RainDays = 7
            CultivarName = Hartog
            SowingDepth = 30
            RowSpacing = 250
            Population = 120
```csharp
using System;
using Models.Core;
using Models.PMF.OldPlant;
using Models.Soils;
using Models.Utilities;
namespace Models
{
	[Serializable]
	public class Script : Model
	{
		[Link] Clock Clock;
		[Link] Fertiliser Fertiliser;
		[Link] Summary Summary;
		[Link] Plant15 Wheat;
		[Link] Soil Soil; 
		Accumulator accumulatedRain;
		
		[Description("Start of sowing window (d-mmm)")]
		public string StartDate { get; set;}
		[Description("End of sowing window (d-mmm)")]
		public string EndDate { get; set;}
		[Description("Minimum extractable soil water for sowing (mm)")]
		public double MinESW { get; set;}
		[Description("Accumulated rainfall required for sowing (mm)")]
		public double MinRain { get; set;}
		[Description("Duration of rainfall accumulation (d)")]
		public int RainDays { get; set;}
		[Description("Cultivar to be sown")]
		public string CultivarName { get; set;}
		[Description("Sowing depth (mm)")]
		public double SowingDepth { get; set;}		
		[Description("Row spacing (mm)")]
		public double RowSpacing { get; set;}	
		[Description("Plant population (/m2)")]
		public double Population { get; set;}	
		
		
		[EventSubscribe("Commencing")]
        private void OnSimulationCommencing(object sender, EventArgs e)
        {
        	accumulatedRain = new Accumulator(this, "[Weather].Rain", RainDays);
        }
		

		[EventSubscribe("DoManagement")]
		private void OnDoManagement(object sender, EventArgs e)
		{
			accumulatedRain.Update();
			
			if (DateUtilities.WithinDates(StartDate,Clock.Today,EndDate) &&
			    Wheat.plant_status=="out" &&
			    Soil.SoilWater.ESW > MinESW &&
			    accumulatedRain.Sum > MinRain)
			{
			   Wheat.Sow(population:Population, cultivar:CultivarName, depth:SowingDepth, rowSpacing:RowSpacing);	
			}
		
		}
		
	}
}
```
      DataStore
      Simulation 40N: Area=0; Slope=0
        Clock: StartDate=1900-01-01; EndDate=2000-12-31
        Summary SummaryFile
        Weather: FileName=%root%\Examples\WeatherFiles\Dalby.met
        Zone Field: Area=1; Slope=0
          Report: same as Completed Simulations.Exercise 4.0N.Field.Report
          Fertiliser
          Soil: same as Completed Simulations.Exercise 4.0N.Field.Soil
          SurfaceOrganicMatter: same as Completed Simulations.Exercise 4.0N.Field.SurfaceOrganicMatter
          Plant15 Wheat: AutoHarvest=true; CropType=Wheat
          MicroClimate: same as Completed Simulations.Exercise 1.Clay Fallow.Field.MicroClimate
          Manager SowingFertiliser
            Amount = 40
            CropName = wheat
            script: same as in Completed Simulations.Exercise 4.0N.Field.SowingFertiliser
          Manager SowingRule
            StartDate = 1-may
            EndDate = 10-jul
            MinESW = 100
            MinRain = 25
            RainDays = 7
            CultivarName = Hartog
            SowingDepth = 30
            RowSpacing = 250
            Population = 120
```csharp
using System;
using Models.Core;
using Models.PMF.OldPlant;
using Models.Soils;
using APSIM.Shared.Utilities;

namespace Models
{
	[Serializable]
	public class Script : Model
	{
		[Link] Clock Clock;
		[Link] Fertiliser Fertiliser;
		[Link] Summary Summary;
		[Link] Plant15 Wheat;
		[Link] Soil Soil; 
		Accumulator accumulatedRain;
		
		[Description("Start of sowing window (d-mmm)")]
		public string StartDate { get; set;}
		[Description("End of sowing window (d-mmm)")]
		public string EndDate { get; set;}
		[Description("Minimum extractable soil water for sowing (mm)")]
		public double MinESW { get; set;}
		[Description("Accumulated rainfall required for sowing (mm)")]
		public double MinRain { get; set;}
		[Description("Duration of rainfall accumulation (d)")]
		public int RainDays { get; set;}
		[Description("Cultivar to be sown")]
		public string CultivarName { get; set;}
		[Description("Sowing depth (mm)")]
		public double SowingDepth { get; set;}		
		[Description("Row spacing (mm)")]
		public double RowSpacing { get; set;}	
		[Description("Plant population (/m2)")]
		public double Population { get; set;}	
		
		
		[EventSubscribe("Commencing")]
        private void OnSimulationCommencing(object sender, EventArgs e)
        {
        	accumulatedRain = new Accumulator(this, "[Weather].Rain", RainDays);
        }
		

		[EventSubscribe("DoManagement")]
		private void OnDoManagement(object sender, EventArgs e)
		{
			accumulatedRain.Update();
			
			if (DateUtilities.WithinDates(StartDate,Clock.Today,EndDate) &&
			    Wheat.plant_status=="out" &&
			    Soil.SoilWater.ESW > MinESW &&
			    accumulatedRain.Sum > MinRain)
			{
			   Wheat.Sow(population:Population, cultivar:CultivarName, depth:SowingDepth, rowSpacing:RowSpacing);	
			}
		
		}
		
	}
}
```
      Simulation 80N: Area=0; Slope=0
        Clock: StartDate=1900-01-01; EndDate=2000-12-31
        Summary SummaryFile
        Weather: FileName=%root%\Examples\WeatherFiles\Dalby.met
        Zone Field: Area=1; Slope=0
          Report: same as Completed Simulations.Exercise 4.0N.Field.Report
          Fertiliser
          Soil: same as Completed Simulations.Exercise 4.0N.Field.Soil
          SurfaceOrganicMatter: same as Completed Simulations.Exercise 4.0N.Field.SurfaceOrganicMatter
          Plant15 Wheat: AutoHarvest=true; CropType=Wheat
          MicroClimate: same as Completed Simulations.Exercise 1.Clay Fallow.Field.MicroClimate
          Manager SowingFertiliser
            Amount = 80
            CropName = wheat
            script: same as in Completed Simulations.Exercise 4.0N.Field.SowingFertiliser
          Manager SowingRule: same as Completed Simulations.Exercise 4.40N.Field.SowingRule
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